// SBML level 2 version 3

model Akman2008_Circadian_Clock_Model1()
  // This a model from the article:
  // Isoform switching facilitates period control in the Neurospora crassa circadian clock.
  // Akman OE, Locke JC, Tang S, Carré I, Millar AJ, Rand DA Mol. Syst. Biol. 2008;Vol 4: 164 18277380 ,
  // Abstract:
  // A striking and defining feature of circadian clocks is the small variation in period over a physiological range of temperatures. This is referred to as temperature compensation, although recent work has suggested that the variation observed is a specific, adaptive control of period. Moreover, given that many biological rate constants have a Q(10) of around 2, it is remarkable that such clocks remain rhythmic under significant temperature changes. We introduce a new mathematical model for the Neurospora crassa circadian network incorporating experimental work showing that temperature alters the balance of translation between a short and long form of the FREQUENCY (FRQ) protein. This is used to discuss period control and functionality for the Neurospora system. The model reproduces a broad range of key experimental data on temperature dependence and rhythmicity, both in wild-type and mutant strains. We present a simple mechanism utilising the presence of the FRQ isoforms (isoform switching) by which period control could have evolved, and argue that this regulatory structure may also increase the temperature range where the clock is robustly rhythmic.
  // This model originates from BioModels Database: A Database of Annotated Published Models (http://www.ebi.ac.uk/biomodels/). It is copyright (c) 2005-2011 The BioModels.net Team.
  // For more information see the terms of use .
  // To cite BioModels Database, please use: Li C, Donizelli M, Rodriguez N, Dharuri H, Endler L, Chelliah V, Li L, He E, Henry A, Stefan MI, Snoep JL, Hucka M, Le Novère N, Laibe C (2010) BioModels Database: An enhanced, curated and annotated resource for published quantitative kinetic models. BMC Syst Biol., 4:92.
  // biomodels.db:MODEL8306248909
  // biomodels.db:BIOMD0000000295
  // isDescribedBy pubmed:18277380
  // isVersionOf GO:0042752 GO:0007623
  // occursIn taxonomy:5141
  // isDerivedFrom biomodels.db:BIOMD0000000299

  // Compartments:
  compartment nucleus = 1;  // isVersionOf GO:0005634
  compartment cytoplasm = 1;  // isVersionOf GO:0005737

  // Species:
  species FC in cytoplasm = 2.462463;  // isVersionOf uniprot:P19970
  species FCp in cytoplasm = 2.712311;  // isVersionOf uniprot:P19970
  species FN in nucleus = 1.844;  // isVersionOf uniprot:P19970
  species FNp in nucleus = 2.74225;  // isVersionOf uniprot:P19970
  species MF in nucleus = 0.7255793;  // encodes uniprot:P19970

  // Parameters:
  vs = 1.223633;
  ki = 5.045433;
  n = 6.3958;
  vm = 0.8853763;
  km = 0.08460041;
  ks = 0.3138465;
  vd = 0.1611115;
  k1n = 0.2226367;
  k2n = 0.3314845;
  ksp = 0.2948402;
  vdp = 0.1397503;
  k1np = 0.2723065;
  k2np = 0.2954207;
  amp = 0;
  dawn = 6;
  dusk = 18;

  // Assignment rules:
  Tot_FRQ := FC + FCp + FN + FNp;

  // Reactions:
  MFtrn: => MF; (vs + amp*((1 + tanh(2*(time - 24*floor(time/24) - dawn)))*(1 - tanh(2*(time - 24*floor(time/24) - dusk)))/4))*ki^n/(ki^n + (FN + FNp)^n);  // modifiers: FN, FNp; isVersionOf GO:0006351
  MFdeg: MF => ; vm*MF/(km + MF);  // isVersionOf GO:0009056
  FCtrl: => FC; ks*MF;  // modifiers: MF; isVersionOf GO:0006412
  FCdeg: FC => ; vd*FC;  // isVersionOf GO:0009056
  FCtrs: FC -> FN; k1n*FC - k2n*FN;  // isVersionOf GO:0006810
  FCptrl: => FCp; ksp*MF;  // modifiers: MF; isVersionOf GO:0006412
  FCpdeg: FCp => ; vdp*FCp;  // isVersionOf GO:0009056
  FCptrs: FCp -> FNp; k1np*FCp - k2np*FNp;  // isVersionOf GO:0006810
end
