// SBML level 2 version 3

model Grange2001_L_Dopa_PK()
  // This is the compartmental model for L-Dopa pharmocokinetics without simultaneous donation of benserazide as described in the article:
  // A pharmacokinetic model to predict the PK interaction of L-dopa and benserazide in rats.
  // Grange S, Holford NH and Guentert TW.
  // Pharm Res. 2001 AUg; 18(8):1174-84 11587490
  // Abstract:
  // PURPOSE: To study the PK interaction of L-dopa/benserazide in rats. METHODS: Male rats received a single oral dose of 80 mg/kg L-dopa or 20 mg/kg benserazide or 80/20 mg/kg L-dopa/benserazide. Based on plasma concentrations the kinetics of L-dopa, 3-O-methyldopa (3-OMD), benserazide, and its metabolite Ro 04-5127 were characterized by noncompartmental analysis and a compartmental model where total L-dopa clearance was the sum of the clearances mediated by amino-acid-decarboxylase (AADC), catechol-O-methyltransferase and other enzymes. In the model Ro 04-5127 inhibited competitively the L-dopa clearance by AADC.
  // RESULTS: The coadministration of L-dopa/benserazide resulted in a major increase in systemic exposure to L-dopa and 3-OMD and a decrease in L-dopa clearance. The compartmental model allowed an adequate description of the observed L-dopa and 3-OMD concentrations in the absence and presence of benserazide. It had an advantage over noncompartmental analysis because it could describe the temporal change of inhibition and recovery of AADC.
  // CONCLUSIONS: Our study is the first investigation where the kinetics of benserazide and Ro 04-5127 have been described by a compartmental model. The L-dopa/benserazide model allowed a mechanism-based view of the L-dopa/benserazide interaction and supports the hypothesis that Ro 04-5127 is the primary active metabolite of benserazide.
  // The volumes and variables in this model are taken for a rat with 0.25 kg. The inital dose for L_Dopa (L_Dopa_per_kg_rat) is to be given in umole per kg. 80 mg/kg L-Dopa correspond to 404 umol/kg. To change the model to a different mass of rat the compartment volumes, and the parameters rat_body_mass and Q have to changed accordingly.
  // The model has a species (A-dopa) whose initial concentration is calculated from a listOfInitialAssignments . While running for the first time the time-course (24hrs) for this model in COPASI (up to version 4.6, Build 33), the resulting graph displays only straight lines for all the species. Any subsequent runs should provide proper plots (i.e. without making any change to the model, just by clicking the "run" button again).
  // The above issue is caused by some initial assignments which are not calculated when COPASI imports the file. This issue should not be present in newer releases of COPASI.
  // Copyright:
  // This model originates from BioModels Database: A Database of Annotated Published Models (http://www.ebi.ac.uk/biomodels/). It is copyright (c) 2005-2011 The BioModels.net Team.
  // For more information see the terms of use .
  // To cite BioModels Database, please use: Li C, Donizelli M, Rodriguez N, Dharuri H, Endler L, Chelliah V, Li L, He E, Henry A, Stefan MI, Snoep JL, Hucka M, Le Novère N, Laibe C (2010) BioModels Database: An enhanced, curated and annotated resource for published quantitative kinetic models. BMC Syst Biol., 4:92.
  // biomodels.db:MODEL1103250000
  // biomodels.db:BIOMD0000000321
  // isDescribedBy pubmed:11587490
  // isVersionOf icd:G20 GO:0051583
  // occursIn taxonomy:10116

  // Compartments:
  compartment gut = 1;  // isVersionOf BTO:0000648
  compartment Vdopa = 0.496; Vdopa is "V_L_Dopa";  // isVersionOf FMA:7563
  compartment V_3_OMD = 0.196;  // isVersionOf FMA:7563

  // Species:
  // amount of L-Dopa in the gut
  substanceOnly species A_dopa in gut = L_Dopa_per_kg_rat*rat_body_mass;  // isVersionOf kegg.compound:C00355; CHEBI:15765 pubchem.compound:6047
  // amount of L-Dopa in the central compartment
  species C_dopa in Vdopa = 0;  // CHEBI:15765 kegg.compound:C00355 pubchem.compound:6047
  // amount of 3-OMD in the central compartment
  species C_OMD in V_3_OMD = 0; C_OMD is "C_3-OMD";  // pubchem.compound:9307; isVersionOf CHEBI:25212

  // Parameters:
  // bioavailability of L-Dopa
  F_b has dimensionless;
  // hepatic bioavailability of L-Dopa
  F_H has dimensionless;
  // gastro-intestinal bioavailability of L-Dopa
  F_G = 0.24 dimensionless;
  // hepatic blood clearance of L-Dopa
  CL_H has l_per_h;
  // hepatic blood flow
  Q = 0.828;
  // hepatically cleared fraction of l-dopa
  f_H = 0.13 dimensionless;
  // total clearance speed of L-Dopa
  CL_dopa has l_per_h;
  f_rest has dimensionless;
  f_AADC = 0.69 dimensionless;
  f_COMT = 0.1 dimensionless;
  // L-Dopa clearance by AADC
  CL_AADC has l_per_h;
  // L-Dopa clearance via unspecified elimination pathways
  CL_rest has l_per_h;
  // catechol-O-methyltransferase mediated L-Dopa clearance
  CL_COMT has l_per_h;
  // total clearance of L-Dopa
  CL_dopa0 = 0.823 l_per_h;
  // absorption rate constant of L_DOPA in the gut
  ka_b = 2.11 per_h;
  CL_OMD = 0.012; CL_OMD is "CL_3_OMD";
  L_Dopa_per_kg_rat = 404;
  rat_body_mass = 0.25;

  // Assignment rules:
  F_b := F_H*F_G;
  F_H := 1 - CL_H/Q;
  CL_H := f_H*CL_dopa;
  CL_dopa := CL_AADC + CL_rest + CL_COMT;
  f_rest := 1 - (f_AADC + f_COMT);
  CL_AADC := CL_dopa0*f_AADC;
  CL_rest := CL_dopa0*f_rest;
  CL_COMT := CL_dopa0*f_COMT;

  // Reactions:
  l_dopa_absorption: A_dopa => C_dopa; ka_b*A_dopa*F_b; l_dopa_absorption is "L_Dopa absorption from gut";  // isVersionOf GO:0050892
  l_dopa_blood_hepa_clearance: A_dopa => ; ka_b*A_dopa*(1 - F_b); l_dopa_blood_hepa_clearance is "hepatic and blood L-Dopa clearance";  // GO:0030421; hasVersion GO:0042737
  AADC_clearance: C_dopa => ; CL_AADC*C_dopa; AADC_clearance is "L-Dopa clearance via AADC";  // isVersionOf GO:0042737; isVersionOf ec-code:4.1.1.28; isVersionOf reactome:REACT_15382.1
  COMT_clearance: C_dopa => C_OMD; CL_COMT*C_dopa; COMT_clearance is "L-Dopa clearance via COMT";  // isVersionOf GO:0042737; isVersionOf ec-code:2.1.1.6
  rest_clearance: C_dopa => ; CL_rest*C_dopa; rest_clearance is "rest clearance of L-Dopa";  // hasVersion GO:0007588; hasVersion GO:0042737
  _3_OMD_clearance: C_OMD => ; CL_OMD*C_OMD; _3_OMD_clearance is "3-OMD clearance";  // hasVersion GO:0042737; hasVersion GO:0007588

  // Unit definitions:
  unit substance = 1e-9 mole; substance is "micromole";
  unit umol_per_kg = 1e-9 mole / kilogram; umol_per_kg is "micromole_per_kg";
  unit per_h = 1 / (3600 second);
  unit l_per_h = litre / (3600 second);
  unit time = 3600 second; time is "hours";
end
