// SBML level 2 version 1

model BranchSingleCycle()
  // Bhattacharya2011_UreaCycle
  // This model is from the article:
  // Time Scale Simulation of Vmax of Urea Cycle Enzymes.
  // Pradip Bhattacharya, Alok Srivastava, Sarbashish Das, Samiyadeep Nandi, Ganeshan Tamil, Ashutosh Viswabandhu, HemantaKwashua, Rabi Yadav Lokesh Nigam, Anmol Khan, Chetna Singh, Arvind Mer, Vikram Sinha, Rehan Mohommad, Candida Vaz, R.N. Rai, D.K. Lobyal, International Journal of Evolution Equations 2011; 5(4); URL
  // Abstract:
  // The objective of this study was to initialize the time-scale simulation of urea cycle enzymes based on the very limited amount of experimental data. As a model example, Vmax of each four enzymes was simulated with varying time for some organisms. These results indicated that the values of Vmax of time-scale simulation of all four enzymatic reactions of urea cycle were very close to 0.09-0.4, and were comparable (deviation ≤0.01-0.1) for steady state kinetic measurements. Enzymes of several organisms were included in this study protocol.
  // Note: The author submitted the model twice accidently. This model is identical to MODEL0318407497
  // To the extent possible under law, all copyright and related or neighbouring rights to this encoded model have been dedicated to the public domain worldwide. Please refer to CC0 Public Domain Dedication for more information.
  // In summary, you are entitled to use this encoded model in absolutely any manner you deem suitable, verbatim, or with modification, alone or embedded it in a larger context, redistribute it, commercially or not, in a restricted way or not.
  // To cite BioModels Database, please use: Li C, Donizelli M, Rodriguez N, Dharuri H, Endler L, Chelliah V, Li L, He E, Henry A, Stefan MI, Snoep JL, Hucka M, Le Novère N, Laibe C (2010) BioModels Database: An enhanced, curated and annotated resource for published quantitative kinetic models. BMC Syst Biol., 4:92.
  // biomodels.db:MODEL0318212660
  // biomodels.db:MODEL0318212660
  // biomodels.db:MODEL0318212660
  // biomodels.db:MODEL0318212660

  // Compartments:
  compartment compartment = 1;

  // Species:
  species Node1 in compartment = 0;
  species Node2 in compartment = 0;
  species Node3 in compartment = 0;
  species Node4 in compartment = 0;
  species Node6 in compartment = 0;
  species Node7 in compartment = 0;
  species Node8 in compartment = 0;
  species Node9 in compartment = 0;
  species Node10 in compartment = 0;
  species Node11 in compartment = 0;
  species Node12 in compartment = 0;
  species Node13 in compartment = 0;
  species Node14 in compartment = 0;
  species Node15 in compartment = 0;
  species $Node0 in compartment = 0;

  // Parameters:
  J0_J0_k = 0.1;
  J1_J1_k = 0.1;
  J2_J2_k = 0.1;
  J3_J3_k = 0.1;
  J4_J4_k = 0.1;
  J5_J5_k = 0.1;
  J1_Vmax = 1392.857;
  J1_Km1 = 8.1e-5;
  J1_Keq = 1e-5;
  J1_Km2 = 0.0009;
  J2_Vmax = 3.621;
  J2_Km1 = 5e-5;
  J2_Keq = 0.0032;
  J2_Km2 = 1e-5;
  J5_k = 0.1;
  J6_k = 0.1;
  J7_k = 0.1;
  J8_k = 0.1;
  J9_k = 0.1;
  J10_k = 0.1;
  J11_k = 0.1;
  J12_k = 0.1;
  J13_k = 0.1;
  J14_k = 0.1;
  J15_k = 0.1;
  J16_k = 0.1;
  J17_k = 0.1;
  J18_k = 0.1;
  J19_k = 0.1;
  J20_k = 0.1;
  J21_k = 0.1;
  J22_k = 0.1;
  J23_k = 0.1;
  J24_k = 0.1;
  J25_k = 0.1;
  J26_k = 0.1;
  J27_k = 0.1;
  J28_k = 0.1;
  J29_k = 0.1;
  J30_k = 0.1;
  J31_k = 0.1;
  J32_k = 0.1;
  J33_k = 0.1;
  J34_k = 0.1;
  J35_k = 0.1;
  J36_k = 0.1;
  J37_k = 0.1;
  J38_k = 0.1;
  J39_k = 0.1;
  J40_k = 0.1;
  J41_k = 0.1;
  J4_Vmax = 0.1;
  J4_Km1 = 0.1;
  J4_Keq = 0.1;
  J4_Km2 = 0.1;

  // Reactions:
  J1: Node1 -> Node2; J1_Vmax/J1_Km1*(Node1 - Node2/J1_Keq)/(1 + Node1/J1_Km1 + Node2/J1_Km2);
  J2: Node2 -> Node3; J2_Vmax/J2_Km1*(Node2 - Node3/J2_Keq)/(1 + Node2/J2_Km1 + Node3/J2_Km2);
  J3: Node4 -> Node3; J4_Vmax/J4_Km1*(Node4 - Node3/J4_Keq)/(1 + Node4/J4_Km1 + Node3/J4_Km2);
  J4: Node1 -> Node4; J4_Vmax/J4_Km1*(Node1 - Node4/J4_Keq)/(1 + Node1/J4_Km1 + Node4/J4_Km2);
  J5: Node2 => Node1; J5_k*Node2;
  J6: Node3 => Node2; J6_k*Node3;
  J7: Node3 => Node4; J7_k*Node3;
  J8: Node4 => Node1; J8_k*Node4;
  J9: Node14 => Node14; J9_k*Node14;
  J10: Node14 => Node14; J10_k*Node14;
  J11: Node14 => Node14; J11_k*Node14;
  J12: Node14 => Node14; J12_k*Node14;
  J13: Node14 => Node14; J13_k*Node14;
  J14: Node14 => Node14; J14_k*Node14;
  J15: Node14 => Node14; J15_k*Node14;
  J16: Node13 => Node13; J16_k*Node13;
  J17: Node13 => Node13; J17_k*Node13;
  J18: Node12 => Node12; J18_k*Node12;
  J19: Node12 => Node12; J19_k*Node12;
  J20: Node9 => Node9; J20_k*Node9;
  J21: Node9 => Node9; J21_k*Node9;
  J22: Node9 => Node9; J22_k*Node9;
  J23: Node9 => Node9; J23_k*Node9;
  J24: Node9 => Node9; J24_k*Node9;
  J25: Node9 => Node9; J25_k*Node9;
  J26: Node9 => Node9; J26_k*Node9;
  J27: Node9 => Node9; J27_k*Node9;
  J28: Node9 => Node9; J28_k*Node9;
  J29: Node15 => Node9; J29_k*Node15;
  J30: Node6 => Node13; J30_k*Node6;
  J31: Node8 => Node13; J31_k*Node8;
  J32: Node7 => Node15; J32_k*Node7;
  J33: Node3 => Node14; J33_k*Node3;
  J34: Node15 => Node4; J34_k*Node15;
  J35: Node15 => Node1; J35_k*Node15;
  J36: Node14 => Node4; J36_k*Node14;
  J37: Node13 => Node3; J37_k*Node13;
  J38: Node13 => Node2; J38_k*Node13;
  J39: Node12 => Node1; J39_k*Node12;
  J40: Node12 => Node2; J40_k*Node12;
  J41: $Node0 => Node12; J41_k*Node0;
end
