// SBML level 2 version 3

model tenTusscher2004_CardiacArrhythmias()
  // This a model from the article:
  // A model for human ventricular tissue.
  // ten Tusscher KH, Noble D, Noble PJ, Panfilov AV. Am J Physiol Heart Circ Physiol 2004 Apr;286(4):H1573-89. 14656705 ,
  // Abstract:
  // The experimental and clinical possibilities for studying cardiac arrhythmias in human ventricular myocardium are very limited. Therefore, the use of alternative methods such as computer simulations is of great importance. In this article we introduce a mathematical model of the action potential of human ventricular cells that, while including a high level of electrophysiological detail, is computationally cost-effective enough to be applied in large-scale spatial simulations for the study of reentrant arrhythmias. The model is based on recent experimental data on most of the major ionic currents: the fast sodium, L-type calcium, transient outward, rapid and slow delayed rectifier, and inward rectifier currents. The model includes a basic calcium dynamics, allowing for the realistic modeling of calcium transients, calcium current inactivation, and the contraction staircase. We are able to reproduce human epicardial, endocardial, and M cell action potentials and show that differences can be explained by differences in the transient outward and slow delayed rectifier currents. Our model reproduces the experimentally observed data on action potential duration restitution, which is an important characteristic for reentrant arrhythmias. The conduction velocity restitution of our model is broader than in other models and agrees better with available data. Finally, we model the dynamics of spiral wave rotation in a two-dimensional sheet of human ventricular tissue and show that the spiral wave follows a complex meandering pattern and has a period of 265 ms. We conclude that the proposed model reproduces a variety of electrophysiological behaviors and provides a basis for studies of reentrant arrhythmias in human ventricular tissue.
  // This model was taken from the CellML repository and automatically converted to SBML.
  // The original model was: ten Tusscher KH, Noble D, Noble PJ, Panfilov AV. (2004 - version05
  // The original CellML model was created by:
  // Noble, Penny, J
  // penny.noble@dpag.ox.ac.uk
  // Oxford University
  // Department of Physiology, Anatomy & Genetics
  // This model originates from BioModels Database: A Database of Annotated Published Models (http://www.ebi.ac.uk/biomodels/).
  // To the extent possible under law, all copyright and related or neighbouring rights to this encoded model have been dedicated to the public domain worldwide. Please refer to CC0 Public Domain Dedication for more information.
  // In summary, you are entitled to use this encoded model in absolutely any manner you deem suitable, verbatim, or with modification, alone or embedded it in a larger context, redistribute it, commercially or not, in a restricted way or not..
  // To cite BioModels Database, please use: Li C, Donizelli M, Rodriguez N, Dharuri H, Endler L, Chelliah V, Li L, He E, Henry A, Stefan MI, Snoep JL, Hucka M, Le Novère N, Laibe C (2010) BioModels Database: An enhanced, curated and annotated resource for published quantitative kinetic models. BMC Syst Biol., 4:92.
  // biomodels.db:MODEL0393108880
  // isDescribedBy pubmed:14656705
  // biomodels.db:MODEL0393108880
  // isDescribedBy pubmed:14656705
  // biomodels.db:MODEL0393108880
  // biomodels.db:MODEL0393108880

  // Compartments:
  compartment Compartment = 1 litre;

  // Parameters:
  V_membrane = -86.2 millivolt;
  R = 8314.472 joule_per_mole_kelvin;
  T = 310 kelvin;
  F = 9.64853415e4 coulomb_per_millimole;
  Cm = 0.185 microF;
  V_c = 0.016404 micrometre3;
  i_Stim has picoA_per_picoF;
  E_Na has millivolt;
  E_K has millivolt;
  E_Ks has millivolt;
  E_Ca has millivolt;
  P_kna = 0.03 dimensionless;
  i_K1 has picoA_per_picoF;
  g_K1 = 5.405 nanoS_per_picoF;
  xK1_inf has dimensionless;
  alpha_K1 has dimensionless;
  beta_K1 has dimensionless;
  i_Kr has picoA_per_picoF;
  g_Kr = 0.096 nanoS_per_picoF;
  Xr1 = 0 dimensionless;
  V_rapid_time_dependent_potassium_current_Xr1_gate has millivolt;
  time_rapid_time_dependent_potassium_current_Xr1_gate has millisecond;
  xr1_inf has dimensionless;
  alpha_xr1 has dimensionless;
  beta_xr1 has dimensionless;
  tau_xr1 has millisecond;
  Xr2 = 1 dimensionless;
  V_rapid_time_dependent_potassium_current_Xr2_gate has millivolt;
  time_rapid_time_dependent_potassium_current_Xr2_gate has millisecond;
  xr2_inf has dimensionless;
  alpha_xr2 has dimensionless;
  beta_xr2 has dimensionless;
  tau_xr2 has millisecond;
  i_Ks has picoA_per_picoF;
  g_Ks = 0.062 nanoS_per_picoF;
  Xs = 0 dimensionless;
  V_slow_time_dependent_potassium_current_Xs_gate has millivolt;
  time_slow_time_dependent_potassium_current_Xs_gate has millisecond;
  xs_inf has dimensionless;
  alpha_xs has dimensionless;
  beta_xs has dimensionless;
  tau_xs has millisecond;
  i_Na has picoA_per_picoF;
  g_Na = 14.838 nanoS_per_picoF;
  m = 0 dimensionless;
  V_fast_sodium_current_m_gate has millivolt;
  time_fast_sodium_current_m_gate has millisecond;
  m_inf has dimensionless;
  alpha_m has dimensionless;
  beta_m has dimensionless;
  tau_m has millisecond;
  h = 0.75 dimensionless;
  V_fast_sodium_current_h_gate has millivolt;
  time_fast_sodium_current_h_gate has millisecond;
  h_inf has dimensionless;
  alpha_h has per_millisecond;
  beta_h has per_millisecond;
  tau_h has millisecond;
  j = 0.75 dimensionless;
  V_fast_sodium_current_j_gate has millivolt;
  time_fast_sodium_current_j_gate has millisecond;
  j_inf has dimensionless;
  alpha_j has per_millisecond;
  beta_j has per_millisecond;
  tau_j has millisecond;
  i_b_Na has picoA_per_picoF;
  g_bna = 0.00029 nanoS_per_picoF;
  i_CaL has picoA_per_picoF;
  g_CaL = 0.000175 litre_per_farad_second;
  d_L_type_Ca_current_d_gate = 0 dimensionless;
  V_L_type_Ca_current_d_gate has millivolt;
  time_L_type_Ca_current_d_gate has millisecond;
  d_inf has dimensionless;
  alpha_d has dimensionless;
  beta_d has dimensionless;
  gamma_d has millisecond;
  tau_d has millisecond;
  f = 1 dimensionless;
  V_L_type_Ca_current_f_gate has millivolt;
  time_L_type_Ca_current_f_gate has millisecond;
  f_inf has dimensionless;
  tau_f has millisecond;
  fCa = 1 dimensionless;
  Ca_i_L_type_Ca_current_fCa_gate has millimolar;
  V_L_type_Ca_current_fCa_gate has millivolt;
  time_L_type_Ca_current_fCa_gate has millisecond;
  alpha_fCa has dimensionless;
  beta_fCa has dimensionless;
  gama_fCa has dimensionless;
  fCa_inf has dimensionless;
  tau_fCa has millisecond;
  d_fCa has per_millisecond;
  i_b_Ca has picoA_per_picoF;
  g_bca = 0.000592 nanoS_per_picoF;
  i_to has picoA_per_picoF;
  g_to = 0.294 nanoS_per_picoF;
  s = 1 dimensionless;
  V_transient_outward_current_s_gate has millivolt;
  time_transient_outward_current_s_gate has millisecond;
  s_inf has dimensionless;
  tau_s has millisecond;
  r = 0 dimensionless;
  V_transient_outward_current_r_gate has millivolt;
  time_transient_outward_current_r_gate has millisecond;
  r_inf has dimensionless;
  tau_r has millisecond;
  i_NaK has picoA_per_picoF;
  P_NaK = 1.362 picoA_per_picoF;
  K_mk = 1 millimolar;
  K_mNa = 40 millimolar;
  i_NaCa has picoA_per_picoF;
  K_NaCa = 1000 picoA_per_picoF;
  K_sat = 0.1 dimensionless;
  alpha = 2.5 dimensionless;
  gamma = 0.35 dimensionless;
  Km_Ca = 1.38 millimolar;
  Km_Nai = 87.5 millimolar;
  i_p_Ca has picoA_per_picoF;
  g_pCa = 0.825 picoA_per_picoF;
  K_pCa = 0.0005 millimolar;
  i_p_K has picoA_per_picoF;
  g_pK = 0.0146 nanoS_per_picoF;
  Ca_i_calcium_dynamics = 0.0002 millimolar;
  Ca_o = 2 millimolar;
  Ca_SR = 0.2 millimolar;
  i_rel has millimolar_per_millisecond;
  i_up has millimolar_per_millisecond;
  i_leak has millimolar_per_millisecond;
  g = 1 dimensionless;
  tau_g = 2 millisecond;
  g_inf has dimensionless;
  a_rel = 0.016464 millimolar_per_millisecond;
  b_rel = 0.25 millimolar;
  c_rel = 0.008232 millimolar_per_millisecond;
  K_up = 0.00025 millimolar;
  V_leak = 8e-5 per_millisecond;
  Vmax_up = 0.000425 millimolar_per_millisecond;
  Ca_i_bufc has dimensionless;
  Ca_sr_bufsr has dimensionless;
  Buf_c = 0.15 millimolar;
  K_buf_c = 0.001 millimolar;
  Buf_sr = 10 millimolar;
  K_buf_sr = 0.3 millimolar;
  V_sr = 0.001094 micrometre3;
  d_calcium_dynamics has dimensionless;
  d_g has per_millisecond;
  Na_i = 11.6 millimolar;
  Na_o = 140 millimolar;
  K_i = 138.3 millimolar;
  K_o = 5.4 millimolar;
  Istim has picoA_per_picoF;
  IstimStart = 100 millisecond;
  IstimEnd = 50000 millisecond;
  IstimAmplitude = -52 picoA_per_picoF;
  IstimPeriod = 1000 millisecond;
  IstimPulseDuration = 1 millisecond;

  // Assignment rules:
  E_Na := R*T/F*ln(Na_o/Na_i);
  E_K := R*T/F*ln(K_o/K_i);
  E_Ks := R*T/F*ln((K_o + P_kna*Na_o)/(K_i + P_kna*Na_i));
  E_Ca := 0.5*R*T/F*ln(Ca_o/Ca_i_calcium_dynamics);
  alpha_K1 := 0.1/(1 + exp(0.06*(V_membrane - E_K - 200)));
  beta_K1 := (3*exp(0.0002*(V_membrane - E_K + 100)) + exp(0.1*(V_membrane - E_K - 10)))/(1 + exp(-0.5*(V_membrane - E_K)));
  xK1_inf := alpha_K1/(alpha_K1 + beta_K1);
  i_K1 := g_K1*xK1_inf*sqrt(K_o/5.4)*(V_membrane - E_K);
  i_Kr := g_Kr*sqrt(K_o/5.4)*Xr1*Xr2*(V_membrane - E_K);
  xr1_inf := 1/(1 + exp(-(26 + V_rapid_time_dependent_potassium_current_Xr1_gate)/7));
  alpha_xr1 := 450/(1 + exp(-(45 + V_rapid_time_dependent_potassium_current_Xr1_gate)/10));
  beta_xr1 := 6/(1 + exp((V_rapid_time_dependent_potassium_current_Xr1_gate + 30)/11.5));
  tau_xr1 := 1*alpha_xr1*beta_xr1;
  xr2_inf := 1/(1 + exp((V_rapid_time_dependent_potassium_current_Xr2_gate + 88)/24));
  alpha_xr2 := 3/(1 + exp(-(60 + V_rapid_time_dependent_potassium_current_Xr2_gate)/20));
  beta_xr2 := 1.12/(1 + exp((V_rapid_time_dependent_potassium_current_Xr2_gate - 60)/20));
  tau_xr2 := 1*alpha_xr2*beta_xr2;
  i_Ks := g_Ks*Xs^2*(V_membrane - E_Ks);
  xs_inf := 1/(1 + exp(-(5 + V_slow_time_dependent_potassium_current_Xs_gate)/14));
  alpha_xs := 1100/sqrt(1 + exp(-(10 + V_slow_time_dependent_potassium_current_Xs_gate)/6));
  beta_xs := 1/(1 + exp((V_slow_time_dependent_potassium_current_Xs_gate - 60)/20));
  tau_xs := 1*alpha_xs*beta_xs;
  i_Na := g_Na*m^3*h*j*(V_membrane - E_Na);
  m_inf := 1/(1 + exp(-(56.86 + V_fast_sodium_current_m_gate)/9.03))^2;
  alpha_m := 1/(1 + exp(-(60 + V_fast_sodium_current_m_gate)/5));
  beta_m := 0.1/(1 + exp((V_fast_sodium_current_m_gate + 35)/5)) + 0.1/(1 + exp((V_fast_sodium_current_m_gate - 50)/200));
  tau_m := 1*alpha_m*beta_m;
  h_inf := 1/(1 + exp((V_fast_sodium_current_h_gate + 71.55)/7.43))^2;
  alpha_h := piecewise(0.057*exp(-(V_fast_sodium_current_h_gate + 80)/6.8), V_fast_sodium_current_h_gate - 40 < 0, 0);
  beta_h := piecewise(2.7*exp(0.079*V_fast_sodium_current_h_gate) + 310000*exp(0.3485*V_fast_sodium_current_h_gate), V_fast_sodium_current_h_gate + 40 < 0, 0.77/(0.13*(1 + exp((V_fast_sodium_current_h_gate + 10.66)/(-11.1)))));
  tau_h := 1/(alpha_h + beta_h);
  j_inf := 1/(1 + exp((V_fast_sodium_current_j_gate + 71.55)/7.43))^2;
  alpha_j := piecewise((-25428*exp(0.2444*V_fast_sodium_current_j_gate) - 6.948e-6*exp(-0.04391*V_fast_sodium_current_j_gate))*(V_fast_sodium_current_j_gate + 37.78)/1/(1 + exp(0.311*(V_fast_sodium_current_j_gate + 79.23))), V_fast_sodium_current_j_gate + 40 < 0, 0);
  beta_j := piecewise(0.02424*exp(-0.01052*V_fast_sodium_current_j_gate)/(1 + exp(-0.1378*(V_fast_sodium_current_j_gate + 40.14))), V_fast_sodium_current_j_gate + 40 < 0, 0.6*exp(0.057*V_fast_sodium_current_j_gate)/(1 + exp(-0.1*(V_fast_sodium_current_j_gate + 32))));
  tau_j := 1/(alpha_j + beta_j);
  i_b_Na := g_bna*(V_membrane - E_Na);
  i_CaL := g_CaL*d_calcium_dynamics*f*fCa*4*V_membrane*F^2/(R*T)*(Ca_i_calcium_dynamics*exp(2*V_membrane*F/(R*T)) - 0.341*Ca_o)/(exp(2*V_membrane*F/(R*T)) - 1);
  d_inf := 1/(1 + exp(-(5 + V_L_type_Ca_current_d_gate)/7.5));
  alpha_d := 1.4/(1 + exp(-(35 + V_L_type_Ca_current_d_gate)/13)) + 0.25;
  beta_d := 1.4/(1 + exp((V_L_type_Ca_current_d_gate + 5)/5));
  gamma_d := 1/(1 + exp((50 - V_L_type_Ca_current_d_gate)/20));
  tau_d := 1*alpha_d*beta_d + gamma_d;
  f_inf := 1/(1 + exp((V_L_type_Ca_current_f_gate + 20)/7));
  tau_f := 1125*exp(-(V_L_type_Ca_current_f_gate + 27)^2/240) + 80 + 165/(1 + exp((25 - V_L_type_Ca_current_f_gate)/10));
  alpha_fCa := 1/(1 + (Ca_i_L_type_Ca_current_fCa_gate/0.000325)^8);
  beta_fCa := 0.1/(1 + exp((Ca_i_L_type_Ca_current_fCa_gate - 0.0005)/0.0001));
  gama_fCa := 0.2/(1 + exp((Ca_i_L_type_Ca_current_fCa_gate - 0.00075)/0.0008));
  fCa_inf := (alpha_fCa + beta_fCa + gama_fCa + 0.23)/1.46;
  tau_fCa := 2;
  d_fCa := (fCa_inf - fCa)/tau_fCa;
  i_b_Ca := g_bca*(V_membrane - E_Ca);
  i_to := g_to*r*s*(V_membrane - E_K);
  s_inf := 1/(1 + exp((V_transient_outward_current_s_gate + 20)/5));
  tau_s := 85*exp(-(V_transient_outward_current_s_gate + 45)^2/320) + 5/(1 + exp((V_transient_outward_current_s_gate - 20)/5)) + 3;
  r_inf := 1/(1 + exp((20 - V_transient_outward_current_r_gate)/6));
  tau_r := 9.5*exp(-(V_transient_outward_current_r_gate + 40)^2/1800) + 0.8;
  i_NaK := P_NaK*K_o/(K_o + K_mk)*Na_i/(Na_i + K_mNa)/(1 + 0.1245*exp(-0.1*V_membrane*F/(R*T)) + 0.0353*exp(-V_membrane*F/(R*T)));
  i_NaCa := K_NaCa*(exp(gamma*V_membrane*F/(R*T))*Na_i^3*Ca_o - exp((gamma - 1)*V_membrane*F/(R*T))*Na_o^3*Ca_i_calcium_dynamics*alpha)/((Km_Nai^3 + Na_o^3)*(Km_Ca + Ca_o)*(1 + K_sat*exp((gamma - 1)*V_membrane*F/(R*T))));
  i_p_Ca := g_pCa*Ca_i_calcium_dynamics/(Ca_i_calcium_dynamics + K_pCa);
  i_p_K := g_pK*(V_membrane - E_K)/(1 + exp((25 - V_membrane)/5.98));
  i_rel := (a_rel*(Ca_SR^2/(b_rel^2 + Ca_SR^2)) + c_rel)*d_calcium_dynamics*g;
  i_up := Vmax_up/(1 + K_up^2/Ca_i_calcium_dynamics^2);
  i_leak := V_leak*(Ca_SR - Ca_i_calcium_dynamics);
  g_inf := piecewise(1/(1 + (Ca_i_calcium_dynamics/0.00035)^6), Ca_i_calcium_dynamics < 0.00035, 1/(1 + (Ca_i_calcium_dynamics/0.00035)^16));
  d_g := (g_inf - g)/tau_g;
  Ca_i_bufc := 1/(1 + Buf_c*K_buf_c/(Ca_i_calcium_dynamics + K_buf_c)^2);
  Ca_sr_bufsr := 1/(1 + Buf_sr*K_buf_sr/(Ca_SR + K_buf_sr)^2);
  Istim := piecewise(IstimAmplitude, (time >= IstimStart) && (time <= IstimEnd) && (time - IstimStart - floor((time - IstimStart)/IstimPeriod)*IstimPeriod <= IstimPulseDuration), 0);
  i_Stim := Istim;

  // Rate rules:
  V_membrane' = -1/1*(i_K1 + i_to + i_Kr + i_Ks + i_CaL + i_NaK + i_Na + i_b_Na + i_NaCa + i_b_Ca + i_p_K + i_p_Ca + i_Stim);
  Xr1' = (xr1_inf - Xr1)/tau_xr1;
  Xr2' = (xr2_inf - Xr2)/tau_xr2;
  Xs' = (xs_inf - Xs)/tau_xs;
  m' = (m_inf - m)/tau_m;
  h' = (h_inf - h)/tau_h;
  j' = (j_inf - j)/tau_j;
  d_L_type_Ca_current_d_gate' = (d_inf - d_L_type_Ca_current_d_gate)/tau_d;
  f' = (f_inf - f)/tau_f;
  fCa' = piecewise(0, (0.01*d_fCa > 0) && (V_L_type_Ca_current_fCa_gate + 60 > 0), d_fCa);
  s' = (s_inf - s)/tau_s;
  r' = (r_inf - r)/tau_r;
  g' = piecewise(0, (0.01*d_g > 0) && (V_membrane - 60 > 0), d_g);
  Ca_i_calcium_dynamics' = Ca_i_bufc*(i_leak - i_up + i_rel - 1*(i_CaL + i_b_Ca + i_p_Ca - 2*i_NaCa)/(2*1*V_c*F)*Cm);
  Ca_SR' = Ca_sr_bufsr*V_c/V_sr*(i_up - (i_rel + i_leak));
  Na_i' = -1*(i_Na + i_b_Na + 3*i_NaK + 3*i_NaCa)*Cm/(1*V_c*F);
  K_i' = -1*(i_K1 + i_to + i_Kr + i_Ks + i_p_K + i_Stim - 2*i_NaK)*Cm/(1*V_c*F);

  // Unit definitions:
  unit micrometre = 1e-6 metre;
  unit micrometre3 = (1e-6 metre)^3;
  unit litre_micrometre3 = litre / (1e-6 metre)^3;
  unit millisecond = 1e-3 second;
  unit per_millisecond = 1 / (1e-3 second);
  unit millivolt = 1e-3 volt;
  unit millivolt_square = (1e-3 volt)^2;
  unit per_millivolt = 1 / (1e-3 volt);
  unit nanoS_per_picoF = 1e-9 siemens / (1e-12 farad);
  unit microF = 1e-6 farad;
  unit picoA = 1e-12 ampere;
  unit picoA_per_picoF = 1e-12 ampere / (1e-12 farad);
  unit nanoA_per_millimolar = 1e-9 ampere * litre / (1e-3 mole);
  unit millimolar = 1e-3 mole / litre;
  unit millimolar_per_millisecond = 1e-3 mole / (litre * 1e-3 second);
  unit joule_per_mole_kelvin = joule / (mole * kelvin);
  unit coulomb_per_millimole = coulomb / (1e-3 mole);
  unit cm2 = (0.01 metre)^2;
  unit microF_per_cm2 = 1e-6 farad / (0.01 metre)^2;
  unit litre_per_farad_second = litre / (farad * second);
  unit time = 1e-3 second;
end
