// SBML level 2 version 1

model Nutsch2005_phototaxis_noncyc_attractant_light()
  // A quantitative model of the switch cycle of an archaeal flagellar motor and its sensory control, Nutsch et al, Biophys. J. 2005 ( 16192281 ) and del Rosario et al, IET Syst. Biol. 2007 ( 17708428 ). This is the non-cyclic model for spontaneous simulations used in creating Figure 5C of del Rosario 2007. The value plotted in the figure is ks*A_43(t)/max(ks*A_43(t)), where ks is a model parameter. In the figure, the asymmetric model with 10% and 50% increase in parameter R_cw are compared with data for spontaneous, repellent and attractant stimuli.
  // There are 5 SBML models provided:
  // spontaneous simulations (all light parameters Iuv, Ibl and Ior are zero)
  // repellent dark (sensor via SRII but with Ibl = 0)
  // repellent light (sensor via SRII)
  // attractant dark (sensor via SRI but with Iuv=Ior=0)
  // attractant light (sensor via SRI)
  // The 5 SBML files are "symmetric" models since the parameters in the clockwise and counter-clockwise directions are equal. For the asymmetric simulations in Figure 5c, parameter R_cw must be increased 10% and 50%.
  // We provide the following Matlab code to plot figure 5c using the Systems Biology Toolbox:
  // ---- begining of Matlab code
  // myodeoptions = odeset('AbsTol', 1e-10, 'RelTol', 1e-8);
  // dark1 = linspace(0, 2, 1000);
  // lighton = linspace(2, 2+0.02, 100);
  // dark2 = linspace(2+0.02, 60, 1000);
  // %for spontaneous, no need to separate since all dark
  // tspan = [dark1,lighton(2:end),dark2(2:end)];
  // sbmodspont = SBmodel('Nutsch2005_phototaxis_noncyc_spont.xml');
  // sbmodrepdark = SBmodel('Nutsch2005_phototaxis_noncyc_rep_dark.xml');
  // sbmodreplight = SBmodel('Nutsch2005_phototaxis_noncyc_rep_light.xml');
  // sbmodattdark = SBmodel('Nutsch2005_phototaxis_noncyc_att_dark.xml');
  // sbmodattlight = SBmodel('Nutsch2005_phototaxis_noncyc_att_light.xml');
  // R_cw_nominal = SBparameters(sbmodspont, 'R_cw');
  // R_cw_10inc = R_cw_nominal + 0.1*R_cw_nominal;
  // R_cw_50inc = R_cw_nominal + 0.5*R_cw_nominal;
  // sbmodspont10 = SBparameters(sbmodspont, 'R_cw', R_cw_10inc);
  // sbmodspont50 = SBparameters(sbmodspont, 'R_cw', R_cw_50inc);
  // clear sbmodspont
  // sbmodrepdark10 = SBparameters(sbmodrepdark, 'R_cw', R_cw_10inc);
  // sbmodreplight10 = SBparameters(sbmodreplight, 'R_cw', R_cw_10inc);
  // sbmodrepdark50 = SBparameters(sbmodrepdark, 'R_cw', R_cw_50inc);
  // sbmodreplight50 = SBparameters(sbmodreplight, 'R_cw', R_cw_50inc);
  // clear sbmodrepdark sbmodreplight
  // sbmodattdark10 = SBparameters(sbmodattdark, 'R_cw', R_cw_10inc);
  // sbmodattlight10 = SBparameters(sbmodattlight, 'R_cw', R_cw_10inc);
  // sbmodattdark50 = SBparameters(sbmodattdark, 'R_cw', R_cw_50inc);
  // sbmodattlight50 = SBparameters(sbmodattlight, 'R_cw', R_cw_50inc);
  // clear sbmodattdark sbmodattlight
  // %Asymmetric Spontaneous Simulations, 10% increase in parameter R_cw
  // sboutput_spont_Rcw10 = SBsimulate(sbmodspont10, 'ode15s', tspan, [], myodeoptions);
  // %Asymmetric Spontaneous Simulations, 50% increase in parameter R_cw
  // sboutput_spont_Rcw50 = SBsimulate(sbmodspont50, 'ode15s', tspan, [], myodeoptions);
  // %Asymmetric Repellent Simulations, 10% increase in parameter R_cw
  // sboutput_rep_dark1_Rcw10 = SBsimulate(sbmodrepdark10, 'ode15s', dark1, [], myodeoptions);
  // initcondafterdark1 = sboutput_rep_dark1_Rcw10.statevalues(end,:);
  // sboutput_rep_light_Rcw10 = SBsimulate(sbmodreplight10, 'ode15s', lighton, initcondafterdark1, myodeoptions);
  // initcondafterlight = sboutput_rep_light_Rcw10.statevalues(end,:);
  // sboutput_rep_dark2_Rcw10 = SBsimulate(sbmodrepdark10, 'ode15s', dark2, initcondafterlight, myodeoptions);
  // %Asymmetric Repellent Simulations, 50% increase in parmaeter R_cw
  // sboutput_rep_dark1_Rcw50 = SBsimulate(sbmodrepdark50, 'ode15s', dark1, [], myodeoptions);
  // initcondafterdark1 = sboutput_rep_dark1_Rcw50.statevalues(end,:);
  // sboutput_rep_light_Rcw50 = SBsimulate(sbmodreplight50, 'ode15s', lighton, initcondafterdark1, myodeoptions);
  // initcondafterlight = sboutput_rep_light_Rcw50.statevalues(end,:);
  // sboutput_rep_dark2_Rcw50 = SBsimulate(sbmodrepdark50, 'ode15s', dark2, initcondafterlight, myodeoptions);
  // %Asymmetric Attractant Simulations, 10% increase in parameter R_cw
  // sboutput_att_dark1_Rcw10 = SBsimulate(sbmodattdark10, 'ode15s', dark1, [], myodeoptions);
  // initcondafterdark1 = sboutput_att_dark1_Rcw10.statevalues(end,:);
  // sboutput_att_light_Rcw10 = SBsimulate(sbmodattlight10, 'ode15s', lighton, initcondafterdark1, myodeoptions);
  // initcondafterlight = sboutput_att_light_Rcw10.statevalues(end,:);
  // sboutput_att_dark2_Rcw10 = SBsimulate(sbmodattdark10, 'ode15s', dark2, initcondafterlight, myodeoptions);
  // %Asymmetric Attractant Simulations, 50% increase in parameter R_cw
  // sboutput_att_dark1_Rcw50 = SBsimulate(sbmodattdark50, 'ode15s', dark1, [], myodeoptions);
  // initcondafterdark1 = sboutput_att_dark1_Rcw50.statevalues(end,:);
  // sboutput_att_light_Rcw50 = SBsimulate(sbmodattlight50, 'ode15s', lighton, initcondafterdark1, myodeoptions);
  // initcondafterlight = sboutput_att_light_Rcw50.statevalues(end,:);
  // sboutput_att_dark2_Rcw50 = SBsimulate(sbmodattdark50, 'ode15s', dark2, initcondafterlight, myodeoptions);
  // A44cwindex = stateindexSB(sbmodspont10, 'A_cw43');
  // A44ccwindex = stateindexSB(sbmodspont10, 'A_ccw43');
  // ks_cw = SBparameters(sbmodspont10, 'ks_cw');
  // ks_cc = SBparameters(sbmodspont10, 'ks_cc');
  // yfig5cspontRcw10 = (sboutput_spont_Rcw10.statevalues(:, A44cwindex)*ks_cw + sboutput_spont_Rcw10.statevalues(:, A44ccwindex)*ks_cc) / ...
  // max(sboutput_spont_Rcw10.statevalues(:, A44cwindex)*ks_cw + sboutput_spont_Rcw10.statevalues(:, A44ccwindex)*ks_cc);
  // yfig5cspontRcw50 = (sboutput_spont_Rcw50.statevalues(:, A44cwindex)*ks_cw + sboutput_spont_Rcw50.statevalues(:, A44ccwindex)*ks_cc) / ...
  // max(sboutput_spont_Rcw50.statevalues(:, A44cwindex)*ks_cw + sboutput_spont_Rcw50.statevalues(:, A44ccwindex)*ks_cc);
  // A44cwindex = stateindexSB(sbmodrepdark10, 'A_cw43');
  // A44ccwindex = stateindexSB(sbmodrepdark10, 'A_ccw43');
  // ks_cw = SBparameters(sbmodrepdark10, 'ks_cw');
  // ks_cc = SBparameters(sbmodrepdark10, 'ks_cc');
  // tfig5crepRcw10 = [sboutput_rep_dark1_Rcw10.time(:)', sboutput_rep_light_Rcw10.time(:)', sboutput_rep_dark2_Rcw10.time(:)'];
  // A44cwrepRcw10 = [sboutput_rep_dark1_Rcw10.statevalues(:, A44cwindex);
  // sboutput_rep_light_Rcw10.statevalues(:, A44cwindex);
  // sboutput_rep_dark2_Rcw10.statevalues(:, A44cwindex)];
  // A44ccwrepRcw10 = [sboutput_rep_dark1_Rcw10.statevalues(:, A44ccwindex);
  // sboutput_rep_light_Rcw10.statevalues(:, A44ccwindex);
  // sboutput_rep_dark2_Rcw10.statevalues(:, A44ccwindex)];
  // yfig5crepRcw10 = (A44cwrepRcw10*ks_cw + A44ccwrepRcw10*ks_cc) / ...
  // max(A44cwrepRcw10*ks_cw + A44ccwrepRcw10*ks_cc);
  // tfig5crepRcw50 = [sboutput_rep_dark1_Rcw50.time(:)', sboutput_rep_light_Rcw50.time(:)', sboutput_rep_dark2_Rcw50.time(:)'];
  // A44cwrepRcw50 = [sboutput_rep_dark1_Rcw50.statevalues(:, A44cwindex);
  // sboutput_rep_light_Rcw50.statevalues(:, A44cwindex);
  // sboutput_rep_dark2_Rcw50.statevalues(:, A44cwindex)];
  // A44ccwrepRcw50 = [sboutput_rep_dark1_Rcw50.statevalues(:, A44ccwindex);
  // sboutput_rep_light_Rcw50.statevalues(:, A44ccwindex);
  // sboutput_rep_dark2_Rcw50.statevalues(:, A44ccwindex)];
  // yfig5crepRcw50 = (A44cwrepRcw50*ks_cw + A44ccwrepRcw50*ks_cc) / ...
  // max(A44cwrepRcw50*ks_cw + A44ccwrepRcw50*ks_cc);
  // A44cwindex = stateindexSB(sbmodattdark10, 'A_cw43');
  // A44ccwindex = stateindexSB(sbmodattdark10, 'A_ccw43');
  // ks_cw = SBparameters(sbmodattdark10, 'ks_cw');
  // ks_cc = SBparameters(sbmodattdark10, 'ks_cc');
  // tfig5cattRcw10 = [sboutput_att_dark1_Rcw10.time(:)', sboutput_att_light_Rcw10.time(:)', sboutput_att_dark2_Rcw10.time(:)'];
  // A44cwattRcw10 = [sboutput_att_dark1_Rcw10.statevalues(:, A44cwindex);
  // sboutput_att_light_Rcw10.statevalues(:, A44cwindex);
  // sboutput_att_dark2_Rcw10.statevalues(:, A44cwindex)];
  // A44ccwattRcw10 = [sboutput_att_dark1_Rcw10.statevalues(:, A44ccwindex);
  // sboutput_att_light_Rcw10.statevalues(:, A44ccwindex);
  // sboutput_att_dark2_Rcw10.statevalues(:, A44ccwindex)];
  // yfig5cattRcw10 = (A44cwattRcw10*ks_cw + A44ccwattRcw10*ks_cc) / ...
  // max(A44cwattRcw10*ks_cw + A44ccwattRcw10*ks_cc);
  // tfig5cattRcw50 = [sboutput_att_dark1_Rcw50.time(:)', sboutput_att_light_Rcw50.time(:)', sboutput_att_dark2_Rcw50.time(:)'];
  // A44cwattRcw50 = [sboutput_att_dark1_Rcw50.statevalues(:, A44cwindex);
  // sboutput_att_light_Rcw50.statevalues(:, A44cwindex);
  // sboutput_att_dark2_Rcw50.statevalues(:, A44cwindex)];
  // A44ccwattRcw50 = [sboutput_att_dark1_Rcw50.statevalues(:, A44ccwindex);
  // sboutput_att_light_Rcw50.statevalues(:, A44ccwindex);
  // sboutput_att_dark2_Rcw50.statevalues(:, A44ccwindex)];
  // yfig5cattRcw50 = (A44cwattRcw50*ks_cw + A44ccwattRcw50*ks_cc) / ...
  // max(A44cwattRcw50*ks_cw + A44ccwattRcw50*ks_cc);
  // figure
  // plot(tfig5crepRcw10, yfig5crepRcw10, 'y', 'linewidth', 2)
  // hold on
  // plot(tfig5crepRcw50, yfig5crepRcw50, 'k')
  // legend('R_{cw} increased 10%', 'R_{cw} increased 50%')
  // plot(sboutput_spont_Rcw10.time, yfig5cspontRcw10, 'y', 'linewidth', 2)
  // plot(sboutput_spont_Rcw50.time, yfig5cspontRcw50, 'k')
  // plot(tfig5cattRcw10, yfig5cattRcw10, 'y', 'linewidth', 2)
  // plot(tfig5cattRcw50, yfig5cattRcw50, 'k')
  // grid on
  // myaxis = axis; axis([0 60 0 1.2])
  // text(1, 1.1, 'repellent'); text(10, 1.1, 'spontaneous'); text(25, 1.1, 'attractant')
  // xlabel('time, s'); ylabel('reversals per time interval (1/s)')
  // ---- end of Matlab code
  // This model originates from BioModels Database: A Database of Annotated Published Models. It is copyright (c) 2005-2011 The BioModels.net Team.
  // To the extent possible under law, all copyright and related or neighbouring rights to this encoded model have been dedicated to the public domain worldwide. Please refer to CC0 Public Domain Dedication for more information.
  // In summary, you are entitled to use this encoded model in absolutely any manner you deem suitable, verbatim, or with modification, alone or embedded it in a larger context, redistribute it, commercially or not, in a restricted way or not..
  // To cite BioModels Database, please use: Li C, Donizelli M, Rodriguez N, Dharuri H, Endler L, Chelliah V, Li L, He E, Henry A, Stefan MI, Snoep JL, Hucka M, Le Novère N, Laibe C (2010) BioModels Database: An enhanced, curated and annotated resource for published quantitative kinetic models. BMC Syst Biol., 4:92.
  // biomodels.db:MODEL0403988150
  // isDescribedBy pubmed:17708428
  // biomodels.db:MODEL0403988150
  // isDescribedBy pubmed:17708428
  // biomodels.db:MODEL0403988150
  // biomodels.db:MODEL0403988150

  // Compartments:
  compartment cell = 1;

  // Species:
  species R_cw0 in cell = 0;
  species R_ccw0 in cell = 0;
  species R_cw1 in cell = 0;
  species R_ccw1 in cell = 0;
  species R_cw2 in cell = 0;
  species R_ccw2 in cell = 0;
  species R_cw3 in cell = 0;
  species R_ccw3 in cell = 0;
  species R_cw4 in cell = 0;
  species R_ccw4 in cell = 0;
  species R_cw5 in cell = 0;
  species R_ccw5 in cell = 0;
  species R_cw6 in cell = 0;
  species R_ccw6 in cell = 0;
  species R_cw7 in cell = 0;
  species R_ccw7 in cell = 0;
  species R_cw8 in cell = 0;
  species R_ccw8 in cell = 0;
  species R_cw9 in cell = 0;
  species R_ccw9 in cell = 0;
  species R_cw10 in cell = 0;
  species R_ccw10 in cell = 0;
  species R_cw11 in cell = 0;
  species R_ccw11 in cell = 0;
  species R_cw12 in cell = 0;
  species R_ccw12 in cell = 0;
  species R_cw13 in cell = 0;
  species R_ccw13 in cell = 0;
  species R_cw14 in cell = 0;
  species R_ccw14 in cell = 0;
  species R_cw15 in cell = 0;
  species R_ccw15 in cell = 0;
  species R_cw16 in cell = 0;
  species R_ccw16 in cell = 0;
  species R_cw17 in cell = 0;
  species R_ccw17 in cell = 0;
  species R_cw18 in cell = 0;
  species R_ccw18 in cell = 0;
  species R_cw19 in cell = 0;
  species R_ccw19 in cell = 0;
  species R_cw20 in cell = 0;
  species R_ccw20 in cell = 0;
  species R_cw21 in cell = 0;
  species R_ccw21 in cell = 0;
  species R_cw22 in cell = 0;
  species R_ccw22 in cell = 0;
  species R_cw23 in cell = 0;
  species R_ccw23 in cell = 0;
  species R_cw24 in cell = 0;
  species R_ccw24 in cell = 0;
  species R_cw25 in cell = 0;
  species R_ccw25 in cell = 0;
  species R_cw26 in cell = 0;
  species R_ccw26 in cell = 0;
  species R_cw27 in cell = 0;
  species R_ccw27 in cell = 0;
  species R_cw28 in cell = 0;
  species R_ccw28 in cell = 0;
  species R_cw29 in cell = 0;
  species R_ccw29 in cell = 0;
  species R_cw30 in cell = 0;
  species R_ccw30 in cell = 0;
  species R_cw31 in cell = 0;
  species R_ccw31 in cell = 0;
  species R_cw32 in cell = 0;
  species R_ccw32 in cell = 0;
  species R_cw33 in cell = 0;
  species R_ccw33 in cell = 0;
  species R_cw34 in cell = 0;
  species R_ccw34 in cell = 0;
  species R_cw35 in cell = 0;
  species R_ccw35 in cell = 0;
  species R_cw36 in cell = 0;
  species R_ccw36 in cell = 0;
  species R_cw37 in cell = 0;
  species R_ccw37 in cell = 0;
  species R_cw38 in cell = 0;
  species R_ccw38 in cell = 0;
  species R_cw39 in cell = 0;
  species R_ccw39 in cell = 0;
  species R_cw40 in cell = 0;
  species R_ccw40 in cell = 0;
  species R_cw41 in cell = 0;
  species R_ccw41 in cell = 0;
  species R_cw42 in cell = 0;
  species R_ccw42 in cell = 0;
  species R_cw43 in cell = 0;
  species R_ccw43 in cell = 0;
  species R_cw44 in cell = 0;
  species R_ccw44 in cell = 0;
  species C_cw0 in cell = 0;
  species C_ccw0 in cell = 0;
  species C_cw1 in cell = 0;
  species C_ccw1 in cell = 0;
  species C_cw2 in cell = 0;
  species C_ccw2 in cell = 0;
  species C_cw3 in cell = 0;
  species C_ccw3 in cell = 0;
  species C_cw4 in cell = 0;
  species C_ccw4 in cell = 0;
  species C_cw5 in cell = 0;
  species C_ccw5 in cell = 0;
  species C_cw6 in cell = 0;
  species C_ccw6 in cell = 0;
  species C_cw7 in cell = 0;
  species C_ccw7 in cell = 0;
  species C_cw8 in cell = 0;
  species C_ccw8 in cell = 0;
  species C_cw9 in cell = 0;
  species C_ccw9 in cell = 0;
  species C_cw10 in cell = 0;
  species C_ccw10 in cell = 0;
  species C_cw11 in cell = 0;
  species C_ccw11 in cell = 0;
  species C_cw12 in cell = 0;
  species C_ccw12 in cell = 0;
  species C_cw13 in cell = 0;
  species C_ccw13 in cell = 0;
  species C_cw14 in cell = 0;
  species C_ccw14 in cell = 0;
  species C_cw15 in cell = 0;
  species C_ccw15 in cell = 0;
  species C_cw16 in cell = 0;
  species C_ccw16 in cell = 0;
  species C_cw17 in cell = 0;
  species C_ccw17 in cell = 0;
  species C_cw18 in cell = 0;
  species C_ccw18 in cell = 0;
  species C_cw19 in cell = 0;
  species C_ccw19 in cell = 0;
  species C_cw20 in cell = 0;
  species C_ccw20 in cell = 0;
  species C_cw21 in cell = 0;
  species C_ccw21 in cell = 0;
  species C_cw22 in cell = 0;
  species C_ccw22 in cell = 0;
  species C_cw23 in cell = 0;
  species C_ccw23 in cell = 0;
  species C_cw24 in cell = 0;
  species C_ccw24 in cell = 0;
  species C_cw25 in cell = 0;
  species C_ccw25 in cell = 0;
  species C_cw26 in cell = 0;
  species C_ccw26 in cell = 0;
  species C_cw27 in cell = 0;
  species C_ccw27 in cell = 0;
  species C_cw28 in cell = 0;
  species C_ccw28 in cell = 0;
  species C_cw29 in cell = 0;
  species C_ccw29 in cell = 0;
  species C_cw30 in cell = 0;
  species C_ccw30 in cell = 0;
  species C_cw31 in cell = 0;
  species C_ccw31 in cell = 0;
  species C_cw32 in cell = 0;
  species C_ccw32 in cell = 0;
  species C_cw33 in cell = 0;
  species C_ccw33 in cell = 0;
  species C_cw34 in cell = 0;
  species C_ccw34 in cell = 0;
  species C_cw35 in cell = 0;
  species C_ccw35 in cell = 0;
  species C_cw36 in cell = 0;
  species C_ccw36 in cell = 0;
  species C_cw37 in cell = 0;
  species C_ccw37 in cell = 0;
  species C_cw38 in cell = 0;
  species C_ccw38 in cell = 0;
  species C_cw39 in cell = 0;
  species C_ccw39 in cell = 0;
  species C_cw40 in cell = 0;
  species C_ccw40 in cell = 0;
  species C_cw41 in cell = 0;
  species C_ccw41 in cell = 0;
  species C_cw42 in cell = 0;
  species C_ccw42 in cell = 0;
  species C_cw43 in cell = 0;
  species C_ccw43 in cell = 0;
  species C_cw44 in cell = 0;
  species C_ccw44 in cell = 0;
  species A_cw0 in cell = 0;
  species A_ccw0 in cell = 0;
  species A_cw1 in cell = 0;
  species A_ccw1 in cell = 0;
  species A_cw2 in cell = 0;
  species A_ccw2 in cell = 0;
  species A_cw3 in cell = 0;
  species A_ccw3 in cell = 0;
  species A_cw4 in cell = 0;
  species A_ccw4 in cell = 0;
  species A_cw5 in cell = 0;
  species A_ccw5 in cell = 0;
  species A_cw6 in cell = 0;
  species A_ccw6 in cell = 0;
  species A_cw7 in cell = 0;
  species A_ccw7 in cell = 0;
  species A_cw8 in cell = 0;
  species A_ccw8 in cell = 0;
  species A_cw9 in cell = 0;
  species A_ccw9 in cell = 0;
  species A_cw10 in cell = 0;
  species A_ccw10 in cell = 0;
  species A_cw11 in cell = 0;
  species A_ccw11 in cell = 0;
  species A_cw12 in cell = 0;
  species A_ccw12 in cell = 0;
  species A_cw13 in cell = 0;
  species A_ccw13 in cell = 0;
  species A_cw14 in cell = 0;
  species A_ccw14 in cell = 0;
  species A_cw15 in cell = 0;
  species A_ccw15 in cell = 0;
  species A_cw16 in cell = 0;
  species A_ccw16 in cell = 0;
  species A_cw17 in cell = 0;
  species A_ccw17 in cell = 0;
  species A_cw18 in cell = 0;
  species A_ccw18 in cell = 0;
  species A_cw19 in cell = 0;
  species A_ccw19 in cell = 0;
  species A_cw20 in cell = 0;
  species A_ccw20 in cell = 0;
  species A_cw21 in cell = 0;
  species A_ccw21 in cell = 0;
  species A_cw22 in cell = 0;
  species A_ccw22 in cell = 0;
  species A_cw23 in cell = 0;
  species A_ccw23 in cell = 0;
  species A_cw24 in cell = 0;
  species A_ccw24 in cell = 0;
  species A_cw25 in cell = 0;
  species A_ccw25 in cell = 0;
  species A_cw26 in cell = 0;
  species A_ccw26 in cell = 0;
  species A_cw27 in cell = 0;
  species A_ccw27 in cell = 0;
  species A_cw28 in cell = 0;
  species A_ccw28 in cell = 0;
  species A_cw29 in cell = 0;
  species A_ccw29 in cell = 0;
  species A_cw30 in cell = 0;
  species A_ccw30 in cell = 0;
  species A_cw31 in cell = 0;
  species A_ccw31 in cell = 0;
  species A_cw32 in cell = 0;
  species A_ccw32 in cell = 0;
  species A_cw33 in cell = 0;
  species A_ccw33 in cell = 0;
  species A_cw34 in cell = 0;
  species A_ccw34 in cell = 0;
  species A_cw35 in cell = 0;
  species A_ccw35 in cell = 0;
  species A_cw36 in cell = 0;
  species A_ccw36 in cell = 0;
  species A_cw37 in cell = 0;
  species A_ccw37 in cell = 0;
  species A_cw38 in cell = 0;
  species A_ccw38 in cell = 0;
  species A_cw39 in cell = 0;
  species A_ccw39 in cell = 0;
  species A_cw40 in cell = 0;
  species A_ccw40 in cell = 0;
  species A_cw41 in cell = 0;
  species A_ccw41 in cell = 0;
  species A_cw42 in cell = 0;
  species A_ccw42 in cell = 0;
  species A_cw43 in cell = 0;
  species A_ccw43 in cell = 0;
  species A_cw44 in cell = 0;
  species A_ccw44 in cell = 0;
  species E_cw0 in cell = 4.301418e-32/cell;
  species E_ccw0 in cell = 4.344886e-34/cell;
  species E_cw1 in cell = 1.316258e-29/cell;
  species E_ccw1 in cell = 1.32956e-31/cell;
  species E_cw2 in cell = 1.969131e-27/cell;
  species E_ccw2 in cell = 1.989031e-29/cell;
  species E_cw3 in cell = 1.919216e-25/cell;
  species E_ccw3 in cell = 1.938612e-27/cell;
  species E_cw4 in cell = 1.370259e-23/cell;
  species E_ccw4 in cell = 1.384107e-25/cell;
  species E_cw5 in cell = 7.639937e-22/cell;
  species E_ccw5 in cell = 7.717151e-24/cell;
  species E_cw6 in cell = 3.462993e-20/cell;
  species E_ccw6 in cell = 3.497993e-22/cell;
  species E_cw7 in cell = 1.311736e-18/cell;
  species E_ccw7 in cell = 1.324994e-20/cell;
  species E_cw8 in cell = 4.23583e-17/cell;
  species E_ccw8 in cell = 4.278643e-19/cell;
  species E_cw9 in cell = 1.183752e-15/cell;
  species E_ccw9 in cell = 1.195717e-17/cell;
  species E_cw10 in cell = 2.896462e-14/cell;
  species E_ccw10 in cell = 2.925739e-16/cell;
  species E_cw11 in cell = 6.259242e-13/cell;
  species E_ccw11 in cell = 6.322512e-15/cell;
  species E_cw12 in cell = 1.197319e-11/cell;
  species E_ccw12 in cell = 1.209422e-13/cell;
  species E_cw13 in cell = 1.991278e-10/cell;
  species E_ccw13 in cell = 2.011407e-12/cell;
  species E_cw14 in cell = 2.726669e-9/cell;
  species E_ccw14 in cell = 2.754232e-11/cell;
  species E_cw15 in cell = 2.85113e-8/cell;
  species E_ccw15 in cell = 2.879951e-10/cell;
  species E_cw16 in cell = 2.16147e-7/cell;
  species E_ccw16 in cell = 2.183319e-9/cell;
  species E_cw17 in cell = 1.183455e-6/cell;
  species E_ccw17 in cell = 1.195418e-8/cell;
  species E_cw18 in cell = 4.852643e-6/cell;
  species E_ccw18 in cell = 4.901693e-8/cell;
  species E_cw19 in cell = 1.575821e-5/cell;
  species E_ccw19 in cell = 1.591748e-7/cell;
  species E_cw20 in cell = 4.298076e-5/cell;
  species E_ccw20 in cell = 4.341514e-7/cell;
  species E_cw21 in cell = 0.0001038042/cell;
  species E_ccw21 in cell = 1.048532e-6/cell;
  species E_cw22 in cell = 0.0002318032/cell;
  species E_ccw22 in cell = 2.341454e-6/cell;
  species E_cw23 in cell = 0.0004945123/cell;
  species E_ccw23 in cell = 4.995086e-6/cell;
  species E_cw24 in cell = 0.00103035/cell;
  species E_ccw24 in cell = 1.04076e-5/cell;
  species E_cw25 in cell = 0.002121916/cell;
  species E_ccw25 in cell = 2.143351e-5/cell;
  species E_cw26 in cell = 0.00432835/cell;
  species E_ccw26 in cell = 4.372073e-5/cell;
  species E_cw27 in cell = 0.008679109/cell;
  species E_ccw27 in cell = 8.766779e-5/cell;
  species E_cw28 in cell = 0.01682067/cell;
  species E_ccw28 in cell = 0.0001699057/cell;
  species E_cw29 in cell = 0.03071975/cell;
  species E_ccw29 in cell = 0.0003103005/cell;
  species E_cw30 in cell = 0.05116391/cell;
  species E_ccw30 in cell = 0.0005168071/cell;
  species E_cw31 in cell = 0.07466724/cell;
  species E_ccw31 in cell = 0.0007542144/cell;
  species E_cw32 in cell = 0.09098367/cell;
  species E_ccw32 in cell = 0.000919027/cell;
  species E_cw33 in cell = 0.08727803/cell;
  species E_ccw33 in cell = 0.0008815962/cell;
  species E_cw34 in cell = 0.08727803/cell;
  species E_ccw34 in cell = 0.0008815962/cell;
  species E_cw35 in cell = 0.0290482/cell;
  species E_ccw35 in cell = 0.0002934162/cell;
  species E_cw36 in cell = 0.008465626/cell;
  species E_ccw36 in cell = 8.55114e-5/cell;
  species E_cw37 in cell = 0.001394074/cell;
  species E_ccw37 in cell = 1.408157e-5/cell;
  species E_cw38 in cell = 0.0001206565/cell;
  species E_ccw38 in cell = 1.218754e-6/cell;
  species E_cw39 in cell = 5.175103e-6/cell;
  species E_ccw39 in cell = 5.227381e-8/cell;
  species E_cw40 in cell = 1.044874e-7/cell;
  species E_ccw40 in cell = 1.055429e-9/cell;
  species E_cw41 in cell = 9.408366e-10/cell;
  species E_ccw41 in cell = 9.503411e-12/cell;
  species E_cw42 in cell = 3.51746e-12/cell;
  species E_ccw42 in cell = 3.552994e-14/cell;
  species E_cw43 in cell = 4.856758e-15/cell;
  species E_ccw43 in cell = 4.905821e-17/cell;
  species E_cw44 in cell = 2.041278e-18/cell;
  species E_ccw44 in cell = 2.06188e-20/cell;
  species Start_cw in cell = 0.01/cell;
  species Start_ccw in cell = 0.99/cell;
  species Stop_cw in cell = 0;
  species Stop_ccw in cell = 0;
  species SRI587 in cell = 0.0382/cell;
  species SRI373 in cell = 0.2567/cell;
  species SRI510 in cell = 0.7052/cell;
  species M1 in cell = 0.73/cell;
  species M0 in cell;
  species CheYP_cw in cell;
  species CheYP_ccw in cell;
  species CheBP in cell;
  species meanAct in cell;
  species Csum_cw in cell;
  species Csum_ccw in cell;
  species Esum_cw in cell;
  species Esum_ccw in cell;

  // Parameters:
  Ior = 2.64e20;
  Ibl = 0;
  Iuv = 0;
  kassR_cw = 0.5341;
  kdissR_cw = 0.9314;
  k10_cw = 810000;
  R_cw = 0.6;
  kassC_cw = 0.1177;
  kdissC_cw = 0.03338;
  k20_cw = 2.07e-9;
  C_cw = 0.6;
  ks_cw = 7;
  kstop_cw = 2.48;
  kassR_cc = 0.5341;
  kdissR_cc = 0.9314;
  k10_cc = 810000;
  R_cc = 0.6;
  kassC_cc = 0.1177;
  kdissC_cc = 0.03338;
  k20_cc = 2.07e-9;
  C_cc = 0.6;
  ks_cc = 7;
  kstop_cc = 2.48;
  kmeth = 0.0212;
  kdemeth = 0.0212;
  sigmaphi = 1.47e-20;
  kr373 = 0.924;
  kr510 = 8.66;
  a587M0 = 0;
  a587M1 = 30;
  a373M0 = -2.04;
  a373M1 = 1.1;
  a510M0 = 1;
  a510M1 = 518;
  kr360 = 0.577;
  kr540 = 0.21;
  a487M0 = -0.6;
  a487M1 = 1.1;
  a360M0 = 0;
  a360M1 = 250;
  a540M0 = 0;
  a540M1 = 250;
  ymax = 30;
  bmax = 3;
  tau1 = 0.02;
  taudelay = 2;

  // Assignment rules:
  M0 := 1 - M1;
  meanAct := SRI587*(M0*a587M0 + M1*a587M1) + SRI373*(M0*a373M0 + M1*a373M1) + SRI510*(M0*a510M0 + M1*a510M1);
  CheYP_cw := min(max, 0, meanAct, ymax);
  CheYP_ccw := min(max, 0, meanAct, ymax);
  CheBP := min(max, 0, meanAct, bmax);
  Csum_cw := C_cw0 + C_cw1*exp(1*C_cw) + C_cw2*exp(2*C_cw) + C_cw3*exp(3*C_cw) + C_cw4*exp(4*C_cw) + C_cw5*exp(5*C_cw) + C_cw6*exp(6*C_cw) + C_cw7*exp(7*C_cw) + C_cw8*exp(8*C_cw) + C_cw9*exp(9*C_cw) + C_cw10*exp(10*C_cw) + C_cw11*exp(11*C_cw) + C_cw12*exp(12*C_cw) + C_cw13*exp(13*C_cw) + C_cw14*exp(14*C_cw) + C_cw15*exp(15*C_cw) + C_cw16*exp(16*C_cw) + C_cw17*exp(17*C_cw) + C_cw18*exp(18*C_cw) + C_cw19*exp(19*C_cw) + C_cw20*exp(20*C_cw) + C_cw21*exp(21*C_cw) + C_cw22*exp(22*C_cw) + C_cw23*exp(23*C_cw) + C_cw24*exp(24*C_cw) + C_cw25*exp(25*C_cw) + C_cw26*exp(26*C_cw) + C_cw27*exp(27*C_cw) + C_cw28*exp(28*C_cw) + C_cw29*exp(29*C_cw) + C_cw30*exp(30*C_cw) + C_cw31*exp(31*C_cw) + C_cw32*exp(32*C_cw) + C_cw33*exp(33*C_cw) + C_cw34*exp(34*C_cw) + C_cw35*exp(35*C_cw) + C_cw36*exp(36*C_cw) + C_cw37*exp(37*C_cw) + C_cw38*exp(38*C_cw) + C_cw39*exp(39*C_cw) + C_cw40*exp(40*C_cw) + C_cw41*exp(41*C_cw) + C_cw42*exp(42*C_cw) + C_cw43*exp(43*C_cw) + C_cw44*exp(44*C_cw);
  Esum_cw := E_cw0 + E_cw1 + E_cw2 + E_cw3 + E_cw4 + E_cw5 + E_cw6 + E_cw7 + E_cw8 + E_cw9 + E_cw10 + E_cw11 + E_cw12 + E_cw13 + E_cw14 + E_cw15 + E_cw16 + E_cw17 + E_cw18 + E_cw19 + E_cw20 + E_cw21 + E_cw22 + E_cw23 + E_cw24 + E_cw25 + E_cw26 + E_cw27 + E_cw28 + E_cw29 + E_cw30 + E_cw31 + E_cw32 + E_cw33 + E_cw34 + E_cw35 + E_cw36 + E_cw37 + E_cw38 + E_cw39 + E_cw40 + E_cw41 + E_cw42 + E_cw43 + E_cw44;
  Csum_ccw := C_ccw0 + C_ccw1*exp(1*C_cc) + C_ccw2*exp(2*C_cc) + C_ccw3*exp(3*C_cc) + C_ccw4*exp(4*C_cc) + C_ccw5*exp(5*C_cc) + C_ccw6*exp(6*C_cc) + C_ccw7*exp(7*C_cc) + C_ccw8*exp(8*C_cc) + C_ccw9*exp(9*C_cc) + C_ccw10*exp(10*C_cc) + C_ccw11*exp(11*C_cc) + C_ccw12*exp(12*C_cc) + C_ccw13*exp(13*C_cc) + C_ccw14*exp(14*C_cc) + C_ccw15*exp(15*C_cc) + C_ccw16*exp(16*C_cc) + C_ccw17*exp(17*C_cc) + C_ccw18*exp(18*C_cc) + C_ccw19*exp(19*C_cc) + C_ccw20*exp(20*C_cc) + C_ccw21*exp(21*C_cc) + C_ccw22*exp(22*C_cc) + C_ccw23*exp(23*C_cc) + C_ccw24*exp(24*C_cc) + C_ccw25*exp(25*C_cc) + C_ccw26*exp(26*C_cc) + C_ccw27*exp(27*C_cc) + C_ccw28*exp(28*C_cc) + C_ccw29*exp(29*C_cc) + C_ccw30*exp(30*C_cc) + C_ccw31*exp(31*C_cc) + C_ccw32*exp(32*C_cc) + C_ccw33*exp(33*C_cc) + C_ccw34*exp(34*C_cc) + C_ccw35*exp(35*C_cc) + C_ccw36*exp(36*C_cc) + C_ccw37*exp(37*C_cc) + C_ccw38*exp(38*C_cc) + C_ccw39*exp(39*C_cc) + C_ccw40*exp(40*C_cc) + C_ccw41*exp(41*C_cc) + C_ccw42*exp(42*C_cc) + C_ccw43*exp(43*C_cc) + C_ccw44*exp(44*C_cc);
  Esum_ccw := E_ccw0 + E_ccw1 + E_ccw2 + E_ccw3 + E_ccw4 + E_ccw5 + E_ccw6 + E_ccw7 + E_ccw8 + E_ccw9 + E_ccw10 + E_ccw11 + E_ccw12 + E_ccw13 + E_ccw14 + E_ccw15 + E_ccw16 + E_ccw17 + E_ccw18 + E_ccw19 + E_ccw20 + E_ccw21 + E_ccw22 + E_ccw23 + E_ccw24 + E_ccw25 + E_ccw26 + E_ccw27 + E_ccw28 + E_ccw29 + E_ccw30 + E_ccw31 + E_ccw32 + E_ccw33 + E_ccw34 + E_ccw35 + E_ccw36 + E_ccw37 + E_ccw38 + E_ccw39 + E_ccw40 + E_ccw41 + E_ccw42 + E_ccw43 + E_ccw44;

  // Rate rules:
  M1' = kmeth - kdemeth*CheBP;

  // Reactions:
  R_cw0ass: R_cw0 => R_cw1; CheYP_cw*R_cw0*(44 - 0)*R_cw0ass_kassR_cw;  // modifiers: CheYP_cw
    R_cw0ass_kassR_cw = 0.5341;
  R_ccw0ass: R_ccw0 => R_ccw1; CheYP_ccw*R_ccw0*(44 - 0)*R_ccw0ass_kassR_cc;  // modifiers: CheYP_ccw
    R_ccw0ass_kassR_cc = 0.5341;
  R_cw1ass: R_cw1 => R_cw2; CheYP_cw*R_cw1*(44 - 1)*R_cw1ass_kassR_cw;  // modifiers: CheYP_cw
    R_cw1ass_kassR_cw = 0.5341;
  R_ccw1ass: R_ccw1 => R_ccw2; CheYP_ccw*R_ccw1*(44 - 1)*R_ccw1ass_kassR_cc;  // modifiers: CheYP_ccw
    R_ccw1ass_kassR_cc = 0.5341;
  R_cw2ass: R_cw2 => R_cw3; CheYP_cw*R_cw2*(44 - 2)*R_cw2ass_kassR_cw;  // modifiers: CheYP_cw
    R_cw2ass_kassR_cw = 0.5341;
  R_ccw2ass: R_ccw2 => R_ccw3; CheYP_ccw*R_ccw2*(44 - 2)*R_ccw2ass_kassR_cc;  // modifiers: CheYP_ccw
    R_ccw2ass_kassR_cc = 0.5341;
  R_cw3ass: R_cw3 => R_cw4; CheYP_cw*R_cw3*(44 - 3)*R_cw3ass_kassR_cw;  // modifiers: CheYP_cw
    R_cw3ass_kassR_cw = 0.5341;
  R_ccw3ass: R_ccw3 => R_ccw4; CheYP_ccw*R_ccw3*(44 - 3)*R_ccw3ass_kassR_cc;  // modifiers: CheYP_ccw
    R_ccw3ass_kassR_cc = 0.5341;
  R_cw4ass: R_cw4 => R_cw5; CheYP_cw*R_cw4*(44 - 4)*R_cw4ass_kassR_cw;  // modifiers: CheYP_cw
    R_cw4ass_kassR_cw = 0.5341;
  R_ccw4ass: R_ccw4 => R_ccw5; CheYP_ccw*R_ccw4*(44 - 4)*R_ccw4ass_kassR_cc;  // modifiers: CheYP_ccw
    R_ccw4ass_kassR_cc = 0.5341;
  R_cw5ass: R_cw5 => R_cw6; CheYP_cw*R_cw5*(44 - 5)*R_cw5ass_kassR_cw;  // modifiers: CheYP_cw
    R_cw5ass_kassR_cw = 0.5341;
  R_ccw5ass: R_ccw5 => R_ccw6; CheYP_ccw*R_ccw5*(44 - 5)*R_ccw5ass_kassR_cc;  // modifiers: CheYP_ccw
    R_ccw5ass_kassR_cc = 0.5341;
  R_cw6ass: R_cw6 => R_cw7; CheYP_cw*R_cw6*(44 - 6)*R_cw6ass_kassR_cw;  // modifiers: CheYP_cw
    R_cw6ass_kassR_cw = 0.5341;
  R_ccw6ass: R_ccw6 => R_ccw7; CheYP_ccw*R_ccw6*(44 - 6)*R_ccw6ass_kassR_cc;  // modifiers: CheYP_ccw
    R_ccw6ass_kassR_cc = 0.5341;
  R_cw7ass: R_cw7 => R_cw8; CheYP_cw*R_cw7*(44 - 7)*R_cw7ass_kassR_cw;  // modifiers: CheYP_cw
    R_cw7ass_kassR_cw = 0.5341;
  R_ccw7ass: R_ccw7 => R_ccw8; CheYP_ccw*R_ccw7*(44 - 7)*R_ccw7ass_kassR_cc;  // modifiers: CheYP_ccw
    R_ccw7ass_kassR_cc = 0.5341;
  R_cw8ass: R_cw8 => R_cw9; CheYP_cw*R_cw8*(44 - 8)*R_cw8ass_kassR_cw;  // modifiers: CheYP_cw
    R_cw8ass_kassR_cw = 0.5341;
  R_ccw8ass: R_ccw8 => R_ccw9; CheYP_ccw*R_ccw8*(44 - 8)*R_ccw8ass_kassR_cc;  // modifiers: CheYP_ccw
    R_ccw8ass_kassR_cc = 0.5341;
  R_cw9ass: R_cw9 => R_cw10; CheYP_cw*R_cw9*(44 - 9)*R_cw9ass_kassR_cw;  // modifiers: CheYP_cw
    R_cw9ass_kassR_cw = 0.5341;
  R_ccw9ass: R_ccw9 => R_ccw10; CheYP_ccw*R_ccw9*(44 - 9)*R_ccw9ass_kassR_cc;  // modifiers: CheYP_ccw
    R_ccw9ass_kassR_cc = 0.5341;
  R_cw10ass: R_cw10 => R_cw11; CheYP_cw*R_cw10*(44 - 10)*R_cw10ass_kassR_cw;  // modifiers: CheYP_cw
    R_cw10ass_kassR_cw = 0.5341;
  R_ccw10ass: R_ccw10 => R_ccw11; CheYP_ccw*R_ccw10*(44 - 10)*R_ccw10ass_kassR_cc;  // modifiers: CheYP_ccw
    R_ccw10ass_kassR_cc = 0.5341;
  R_cw11ass: R_cw11 => R_cw12; CheYP_cw*R_cw11*(44 - 11)*R_cw11ass_kassR_cw;  // modifiers: CheYP_cw
    R_cw11ass_kassR_cw = 0.5341;
  R_ccw11ass: R_ccw11 => R_ccw12; CheYP_ccw*R_ccw11*(44 - 11)*R_ccw11ass_kassR_cc;  // modifiers: CheYP_ccw
    R_ccw11ass_kassR_cc = 0.5341;
  R_cw12ass: R_cw12 => R_cw13; CheYP_cw*R_cw12*(44 - 12)*R_cw12ass_kassR_cw;  // modifiers: CheYP_cw
    R_cw12ass_kassR_cw = 0.5341;
  R_ccw12ass: R_ccw12 => R_ccw13; CheYP_ccw*R_ccw12*(44 - 12)*R_ccw12ass_kassR_cc;  // modifiers: CheYP_ccw
    R_ccw12ass_kassR_cc = 0.5341;
  R_cw13ass: R_cw13 => R_cw14; CheYP_cw*R_cw13*(44 - 13)*R_cw13ass_kassR_cw;  // modifiers: CheYP_cw
    R_cw13ass_kassR_cw = 0.5341;
  R_ccw13ass: R_ccw13 => R_ccw14; CheYP_ccw*R_ccw13*(44 - 13)*R_ccw13ass_kassR_cc;  // modifiers: CheYP_ccw
    R_ccw13ass_kassR_cc = 0.5341;
  R_cw14ass: R_cw14 => R_cw15; CheYP_cw*R_cw14*(44 - 14)*R_cw14ass_kassR_cw;  // modifiers: CheYP_cw
    R_cw14ass_kassR_cw = 0.5341;
  R_ccw14ass: R_ccw14 => R_ccw15; CheYP_ccw*R_ccw14*(44 - 14)*R_ccw14ass_kassR_cc;  // modifiers: CheYP_ccw
    R_ccw14ass_kassR_cc = 0.5341;
  R_cw15ass: R_cw15 => R_cw16; CheYP_cw*R_cw15*(44 - 15)*R_cw15ass_kassR_cw;  // modifiers: CheYP_cw
    R_cw15ass_kassR_cw = 0.5341;
  R_ccw15ass: R_ccw15 => R_ccw16; CheYP_ccw*R_ccw15*(44 - 15)*R_ccw15ass_kassR_cc;  // modifiers: CheYP_ccw
    R_ccw15ass_kassR_cc = 0.5341;
  R_cw16ass: R_cw16 => R_cw17; CheYP_cw*R_cw16*(44 - 16)*R_cw16ass_kassR_cw;  // modifiers: CheYP_cw
    R_cw16ass_kassR_cw = 0.5341;
  R_ccw16ass: R_ccw16 => R_ccw17; CheYP_ccw*R_ccw16*(44 - 16)*R_ccw16ass_kassR_cc;  // modifiers: CheYP_ccw
    R_ccw16ass_kassR_cc = 0.5341;
  R_cw17ass: R_cw17 => R_cw18; CheYP_cw*R_cw17*(44 - 17)*R_cw17ass_kassR_cw;  // modifiers: CheYP_cw
    R_cw17ass_kassR_cw = 0.5341;
  R_ccw17ass: R_ccw17 => R_ccw18; CheYP_ccw*R_ccw17*(44 - 17)*R_ccw17ass_kassR_cc;  // modifiers: CheYP_ccw
    R_ccw17ass_kassR_cc = 0.5341;
  R_cw18ass: R_cw18 => R_cw19; CheYP_cw*R_cw18*(44 - 18)*R_cw18ass_kassR_cw;  // modifiers: CheYP_cw
    R_cw18ass_kassR_cw = 0.5341;
  R_ccw18ass: R_ccw18 => R_ccw19; CheYP_ccw*R_ccw18*(44 - 18)*R_ccw18ass_kassR_cc;  // modifiers: CheYP_ccw
    R_ccw18ass_kassR_cc = 0.5341;
  R_cw19ass: R_cw19 => R_cw20; CheYP_cw*R_cw19*(44 - 19)*R_cw19ass_kassR_cw;  // modifiers: CheYP_cw
    R_cw19ass_kassR_cw = 0.5341;
  R_ccw19ass: R_ccw19 => R_ccw20; CheYP_ccw*R_ccw19*(44 - 19)*R_ccw19ass_kassR_cc;  // modifiers: CheYP_ccw
    R_ccw19ass_kassR_cc = 0.5341;
  R_cw20ass: R_cw20 => R_cw21; CheYP_cw*R_cw20*(44 - 20)*R_cw20ass_kassR_cw;  // modifiers: CheYP_cw
    R_cw20ass_kassR_cw = 0.5341;
  R_ccw20ass: R_ccw20 => R_ccw21; CheYP_ccw*R_ccw20*(44 - 20)*R_ccw20ass_kassR_cc;  // modifiers: CheYP_ccw
    R_ccw20ass_kassR_cc = 0.5341;
  R_cw21ass: R_cw21 => R_cw22; CheYP_cw*R_cw21*(44 - 21)*R_cw21ass_kassR_cw;  // modifiers: CheYP_cw
    R_cw21ass_kassR_cw = 0.5341;
  R_ccw21ass: R_ccw21 => R_ccw22; CheYP_ccw*R_ccw21*(44 - 21)*R_ccw21ass_kassR_cc;  // modifiers: CheYP_ccw
    R_ccw21ass_kassR_cc = 0.5341;
  R_cw22ass: R_cw22 => R_cw23; CheYP_cw*R_cw22*(44 - 22)*R_cw22ass_kassR_cw;  // modifiers: CheYP_cw
    R_cw22ass_kassR_cw = 0.5341;
  R_ccw22ass: R_ccw22 => R_ccw23; CheYP_ccw*R_ccw22*(44 - 22)*R_ccw22ass_kassR_cc;  // modifiers: CheYP_ccw
    R_ccw22ass_kassR_cc = 0.5341;
  R_cw23ass: R_cw23 => R_cw24; CheYP_cw*R_cw23*(44 - 23)*R_cw23ass_kassR_cw;  // modifiers: CheYP_cw
    R_cw23ass_kassR_cw = 0.5341;
  R_ccw23ass: R_ccw23 => R_ccw24; CheYP_ccw*R_ccw23*(44 - 23)*R_ccw23ass_kassR_cc;  // modifiers: CheYP_ccw
    R_ccw23ass_kassR_cc = 0.5341;
  R_cw24ass: R_cw24 => R_cw25; CheYP_cw*R_cw24*(44 - 24)*R_cw24ass_kassR_cw;  // modifiers: CheYP_cw
    R_cw24ass_kassR_cw = 0.5341;
  R_ccw24ass: R_ccw24 => R_ccw25; CheYP_ccw*R_ccw24*(44 - 24)*R_ccw24ass_kassR_cc;  // modifiers: CheYP_ccw
    R_ccw24ass_kassR_cc = 0.5341;
  R_cw25ass: R_cw25 => R_cw26; CheYP_cw*R_cw25*(44 - 25)*R_cw25ass_kassR_cw;  // modifiers: CheYP_cw
    R_cw25ass_kassR_cw = 0.5341;
  R_ccw25ass: R_ccw25 => R_ccw26; CheYP_ccw*R_ccw25*(44 - 25)*R_ccw25ass_kassR_cc;  // modifiers: CheYP_ccw
    R_ccw25ass_kassR_cc = 0.5341;
  R_cw26ass: R_cw26 => R_cw27; CheYP_cw*R_cw26*(44 - 26)*R_cw26ass_kassR_cw;  // modifiers: CheYP_cw
    R_cw26ass_kassR_cw = 0.5341;
  R_ccw26ass: R_ccw26 => R_ccw27; CheYP_ccw*R_ccw26*(44 - 26)*R_ccw26ass_kassR_cc;  // modifiers: CheYP_ccw
    R_ccw26ass_kassR_cc = 0.5341;
  R_cw27ass: R_cw27 => R_cw28; CheYP_cw*R_cw27*(44 - 27)*R_cw27ass_kassR_cw;  // modifiers: CheYP_cw
    R_cw27ass_kassR_cw = 0.5341;
  R_ccw27ass: R_ccw27 => R_ccw28; CheYP_ccw*R_ccw27*(44 - 27)*R_ccw27ass_kassR_cc;  // modifiers: CheYP_ccw
    R_ccw27ass_kassR_cc = 0.5341;
  R_cw28ass: R_cw28 => R_cw29; CheYP_cw*R_cw28*(44 - 28)*R_cw28ass_kassR_cw;  // modifiers: CheYP_cw
    R_cw28ass_kassR_cw = 0.5341;
  R_ccw28ass: R_ccw28 => R_ccw29; CheYP_ccw*R_ccw28*(44 - 28)*R_ccw28ass_kassR_cc;  // modifiers: CheYP_ccw
    R_ccw28ass_kassR_cc = 0.5341;
  R_cw29ass: R_cw29 => R_cw30; CheYP_cw*R_cw29*(44 - 29)*R_cw29ass_kassR_cw;  // modifiers: CheYP_cw
    R_cw29ass_kassR_cw = 0.5341;
  R_ccw29ass: R_ccw29 => R_ccw30; CheYP_ccw*R_ccw29*(44 - 29)*R_ccw29ass_kassR_cc;  // modifiers: CheYP_ccw
    R_ccw29ass_kassR_cc = 0.5341;
  R_cw30ass: R_cw30 => R_cw31; CheYP_cw*R_cw30*(44 - 30)*R_cw30ass_kassR_cw;  // modifiers: CheYP_cw
    R_cw30ass_kassR_cw = 0.5341;
  R_ccw30ass: R_ccw30 => R_ccw31; CheYP_ccw*R_ccw30*(44 - 30)*R_ccw30ass_kassR_cc;  // modifiers: CheYP_ccw
    R_ccw30ass_kassR_cc = 0.5341;
  R_cw31ass: R_cw31 => R_cw32; CheYP_cw*R_cw31*(44 - 31)*R_cw31ass_kassR_cw;  // modifiers: CheYP_cw
    R_cw31ass_kassR_cw = 0.5341;
  R_ccw31ass: R_ccw31 => R_ccw32; CheYP_ccw*R_ccw31*(44 - 31)*R_ccw31ass_kassR_cc;  // modifiers: CheYP_ccw
    R_ccw31ass_kassR_cc = 0.5341;
  R_cw32ass: R_cw32 => R_cw33; CheYP_cw*R_cw32*(44 - 32)*R_cw32ass_kassR_cw;  // modifiers: CheYP_cw
    R_cw32ass_kassR_cw = 0.5341;
  R_ccw32ass: R_ccw32 => R_ccw33; CheYP_ccw*R_ccw32*(44 - 32)*R_ccw32ass_kassR_cc;  // modifiers: CheYP_ccw
    R_ccw32ass_kassR_cc = 0.5341;
  R_cw33ass: R_cw33 => R_cw34; CheYP_cw*R_cw33*(44 - 33)*R_cw33ass_kassR_cw;  // modifiers: CheYP_cw
    R_cw33ass_kassR_cw = 0.5341;
  R_ccw33ass: R_ccw33 => R_ccw34; CheYP_ccw*R_ccw33*(44 - 33)*R_ccw33ass_kassR_cc;  // modifiers: CheYP_ccw
    R_ccw33ass_kassR_cc = 0.5341;
  R_cw34ass: R_cw34 => R_cw35; CheYP_cw*R_cw34*(44 - 34)*R_cw34ass_kassR_cw;  // modifiers: CheYP_cw
    R_cw34ass_kassR_cw = 0.5341;
  R_ccw34ass: R_ccw34 => R_ccw35; CheYP_ccw*R_ccw34*(44 - 34)*R_ccw34ass_kassR_cc;  // modifiers: CheYP_ccw
    R_ccw34ass_kassR_cc = 0.5341;
  R_cw35ass: R_cw35 => R_cw36; CheYP_cw*R_cw35*(44 - 35)*R_cw35ass_kassR_cw;  // modifiers: CheYP_cw
    R_cw35ass_kassR_cw = 0.5341;
  R_ccw35ass: R_ccw35 => R_ccw36; CheYP_ccw*R_ccw35*(44 - 35)*R_ccw35ass_kassR_cc;  // modifiers: CheYP_ccw
    R_ccw35ass_kassR_cc = 0.5341;
  R_cw36ass: R_cw36 => R_cw37; CheYP_cw*R_cw36*(44 - 36)*R_cw36ass_kassR_cw;  // modifiers: CheYP_cw
    R_cw36ass_kassR_cw = 0.5341;
  R_ccw36ass: R_ccw36 => R_ccw37; CheYP_ccw*R_ccw36*(44 - 36)*R_ccw36ass_kassR_cc;  // modifiers: CheYP_ccw
    R_ccw36ass_kassR_cc = 0.5341;
  R_cw37ass: R_cw37 => R_cw38; CheYP_cw*R_cw37*(44 - 37)*R_cw37ass_kassR_cw;  // modifiers: CheYP_cw
    R_cw37ass_kassR_cw = 0.5341;
  R_ccw37ass: R_ccw37 => R_ccw38; CheYP_ccw*R_ccw37*(44 - 37)*R_ccw37ass_kassR_cc;  // modifiers: CheYP_ccw
    R_ccw37ass_kassR_cc = 0.5341;
  R_cw38ass: R_cw38 => R_cw39; CheYP_cw*R_cw38*(44 - 38)*R_cw38ass_kassR_cw;  // modifiers: CheYP_cw
    R_cw38ass_kassR_cw = 0.5341;
  R_ccw38ass: R_ccw38 => R_ccw39; CheYP_ccw*R_ccw38*(44 - 38)*R_ccw38ass_kassR_cc;  // modifiers: CheYP_ccw
    R_ccw38ass_kassR_cc = 0.5341;
  R_cw39ass: R_cw39 => R_cw40; CheYP_cw*R_cw39*(44 - 39)*R_cw39ass_kassR_cw;  // modifiers: CheYP_cw
    R_cw39ass_kassR_cw = 0.5341;
  R_ccw39ass: R_ccw39 => R_ccw40; CheYP_ccw*R_ccw39*(44 - 39)*R_ccw39ass_kassR_cc;  // modifiers: CheYP_ccw
    R_ccw39ass_kassR_cc = 0.5341;
  R_cw40ass: R_cw40 => R_cw41; CheYP_cw*R_cw40*(44 - 40)*R_cw40ass_kassR_cw;  // modifiers: CheYP_cw
    R_cw40ass_kassR_cw = 0.5341;
  R_ccw40ass: R_ccw40 => R_ccw41; CheYP_ccw*R_ccw40*(44 - 40)*R_ccw40ass_kassR_cc;  // modifiers: CheYP_ccw
    R_ccw40ass_kassR_cc = 0.5341;
  R_cw41ass: R_cw41 => R_cw42; CheYP_cw*R_cw41*(44 - 41)*R_cw41ass_kassR_cw;  // modifiers: CheYP_cw
    R_cw41ass_kassR_cw = 0.5341;
  R_ccw41ass: R_ccw41 => R_ccw42; CheYP_ccw*R_ccw41*(44 - 41)*R_ccw41ass_kassR_cc;  // modifiers: CheYP_ccw
    R_ccw41ass_kassR_cc = 0.5341;
  R_cw42ass: R_cw42 => R_cw43; CheYP_cw*R_cw42*(44 - 42)*R_cw42ass_kassR_cw;  // modifiers: CheYP_cw
    R_cw42ass_kassR_cw = 0.5341;
  R_ccw42ass: R_ccw42 => R_ccw43; CheYP_ccw*R_ccw42*(44 - 42)*R_ccw42ass_kassR_cc;  // modifiers: CheYP_ccw
    R_ccw42ass_kassR_cc = 0.5341;
  R_cw43ass: R_cw43 => R_cw44; CheYP_cw*R_cw43*(44 - 43)*R_cw43ass_kassR_cw;  // modifiers: CheYP_cw
    R_cw43ass_kassR_cw = 0.5341;
  R_ccw43ass: R_ccw43 => R_ccw44; CheYP_ccw*R_ccw43*(44 - 43)*R_ccw43ass_kassR_cc;  // modifiers: CheYP_ccw
    R_ccw43ass_kassR_cc = 0.5341;
  R_cw1diss: R_cw1 => R_cw0; R_cw1*1*R_cw1diss_kdissR_cw;
    R_cw1diss_kdissR_cw = 0.9314;
  R_ccw1diss: R_ccw1 => R_ccw0; R_ccw1*1*R_ccw1diss_kdissR_cc;
    R_ccw1diss_kdissR_cc = 0.9314;
  R_cw2diss: R_cw2 => R_cw1; R_cw2*2*R_cw2diss_kdissR_cw;
    R_cw2diss_kdissR_cw = 0.9314;
  R_ccw2diss: R_ccw2 => R_ccw1; R_ccw2*2*R_ccw2diss_kdissR_cc;
    R_ccw2diss_kdissR_cc = 0.9314;
  R_cw3diss: R_cw3 => R_cw2; R_cw3*3*R_cw3diss_kdissR_cw;
    R_cw3diss_kdissR_cw = 0.9314;
  R_ccw3diss: R_ccw3 => R_ccw2; R_ccw3*3*R_ccw3diss_kdissR_cc;
    R_ccw3diss_kdissR_cc = 0.9314;
  R_cw4diss: R_cw4 => R_cw3; R_cw4*4*R_cw4diss_kdissR_cw;
    R_cw4diss_kdissR_cw = 0.9314;
  R_ccw4diss: R_ccw4 => R_ccw3; R_ccw4*4*R_ccw4diss_kdissR_cc;
    R_ccw4diss_kdissR_cc = 0.9314;
  R_cw5diss: R_cw5 => R_cw4; R_cw5*5*R_cw5diss_kdissR_cw;
    R_cw5diss_kdissR_cw = 0.9314;
  R_ccw5diss: R_ccw5 => R_ccw4; R_ccw5*5*R_ccw5diss_kdissR_cc;
    R_ccw5diss_kdissR_cc = 0.9314;
  R_cw6diss: R_cw6 => R_cw5; R_cw6*6*R_cw6diss_kdissR_cw;
    R_cw6diss_kdissR_cw = 0.9314;
  R_ccw6diss: R_ccw6 => R_ccw5; R_ccw6*6*R_ccw6diss_kdissR_cc;
    R_ccw6diss_kdissR_cc = 0.9314;
  R_cw7diss: R_cw7 => R_cw6; R_cw7*7*R_cw7diss_kdissR_cw;
    R_cw7diss_kdissR_cw = 0.9314;
  R_ccw7diss: R_ccw7 => R_ccw6; R_ccw7*7*R_ccw7diss_kdissR_cc;
    R_ccw7diss_kdissR_cc = 0.9314;
  R_cw8diss: R_cw8 => R_cw7; R_cw8*8*R_cw8diss_kdissR_cw;
    R_cw8diss_kdissR_cw = 0.9314;
  R_ccw8diss: R_ccw8 => R_ccw7; R_ccw8*8*R_ccw8diss_kdissR_cc;
    R_ccw8diss_kdissR_cc = 0.9314;
  R_cw9diss: R_cw9 => R_cw8; R_cw9*9*R_cw9diss_kdissR_cw;
    R_cw9diss_kdissR_cw = 0.9314;
  R_ccw9diss: R_ccw9 => R_ccw8; R_ccw9*9*R_ccw9diss_kdissR_cc;
    R_ccw9diss_kdissR_cc = 0.9314;
  R_cw10diss: R_cw10 => R_cw9; R_cw10*10*R_cw10diss_kdissR_cw;
    R_cw10diss_kdissR_cw = 0.9314;
  R_ccw10diss: R_ccw10 => R_ccw9; R_ccw10*10*R_ccw10diss_kdissR_cc;
    R_ccw10diss_kdissR_cc = 0.9314;
  R_cw11diss: R_cw11 => R_cw10; R_cw11*11*R_cw11diss_kdissR_cw;
    R_cw11diss_kdissR_cw = 0.9314;
  R_ccw11diss: R_ccw11 => R_ccw10; R_ccw11*11*R_ccw11diss_kdissR_cc;
    R_ccw11diss_kdissR_cc = 0.9314;
  R_cw12diss: R_cw12 => R_cw11; R_cw12*12*R_cw12diss_kdissR_cw;
    R_cw12diss_kdissR_cw = 0.9314;
  R_ccw12diss: R_ccw12 => R_ccw11; R_ccw12*12*R_ccw12diss_kdissR_cc;
    R_ccw12diss_kdissR_cc = 0.9314;
  R_cw13diss: R_cw13 => R_cw12; R_cw13*13*R_cw13diss_kdissR_cw;
    R_cw13diss_kdissR_cw = 0.9314;
  R_ccw13diss: R_ccw13 => R_ccw12; R_ccw13*13*R_ccw13diss_kdissR_cc;
    R_ccw13diss_kdissR_cc = 0.9314;
  R_cw14diss: R_cw14 => R_cw13; R_cw14*14*R_cw14diss_kdissR_cw;
    R_cw14diss_kdissR_cw = 0.9314;
  R_ccw14diss: R_ccw14 => R_ccw13; R_ccw14*14*R_ccw14diss_kdissR_cc;
    R_ccw14diss_kdissR_cc = 0.9314;
  R_cw15diss: R_cw15 => R_cw14; R_cw15*15*R_cw15diss_kdissR_cw;
    R_cw15diss_kdissR_cw = 0.9314;
  R_ccw15diss: R_ccw15 => R_ccw14; R_ccw15*15*R_ccw15diss_kdissR_cc;
    R_ccw15diss_kdissR_cc = 0.9314;
  R_cw16diss: R_cw16 => R_cw15; R_cw16*16*R_cw16diss_kdissR_cw;
    R_cw16diss_kdissR_cw = 0.9314;
  R_ccw16diss: R_ccw16 => R_ccw15; R_ccw16*16*R_ccw16diss_kdissR_cc;
    R_ccw16diss_kdissR_cc = 0.9314;
  R_cw17diss: R_cw17 => R_cw16; R_cw17*17*R_cw17diss_kdissR_cw;
    R_cw17diss_kdissR_cw = 0.9314;
  R_ccw17diss: R_ccw17 => R_ccw16; R_ccw17*17*R_ccw17diss_kdissR_cc;
    R_ccw17diss_kdissR_cc = 0.9314;
  R_cw18diss: R_cw18 => R_cw17; R_cw18*18*R_cw18diss_kdissR_cw;
    R_cw18diss_kdissR_cw = 0.9314;
  R_ccw18diss: R_ccw18 => R_ccw17; R_ccw18*18*R_ccw18diss_kdissR_cc;
    R_ccw18diss_kdissR_cc = 0.9314;
  R_cw19diss: R_cw19 => R_cw18; R_cw19*19*R_cw19diss_kdissR_cw;
    R_cw19diss_kdissR_cw = 0.9314;
  R_ccw19diss: R_ccw19 => R_ccw18; R_ccw19*19*R_ccw19diss_kdissR_cc;
    R_ccw19diss_kdissR_cc = 0.9314;
  R_cw20diss: R_cw20 => R_cw19; R_cw20*20*R_cw20diss_kdissR_cw;
    R_cw20diss_kdissR_cw = 0.9314;
  R_ccw20diss: R_ccw20 => R_ccw19; R_ccw20*20*R_ccw20diss_kdissR_cc;
    R_ccw20diss_kdissR_cc = 0.9314;
  R_cw21diss: R_cw21 => R_cw20; R_cw21*21*R_cw21diss_kdissR_cw;
    R_cw21diss_kdissR_cw = 0.9314;
  R_ccw21diss: R_ccw21 => R_ccw20; R_ccw21*21*R_ccw21diss_kdissR_cc;
    R_ccw21diss_kdissR_cc = 0.9314;
  R_cw22diss: R_cw22 => R_cw21; R_cw22*22*R_cw22diss_kdissR_cw;
    R_cw22diss_kdissR_cw = 0.9314;
  R_ccw22diss: R_ccw22 => R_ccw21; R_ccw22*22*R_ccw22diss_kdissR_cc;
    R_ccw22diss_kdissR_cc = 0.9314;
  R_cw23diss: R_cw23 => R_cw22; R_cw23*23*R_cw23diss_kdissR_cw;
    R_cw23diss_kdissR_cw = 0.9314;
  R_ccw23diss: R_ccw23 => R_ccw22; R_ccw23*23*R_ccw23diss_kdissR_cc;
    R_ccw23diss_kdissR_cc = 0.9314;
  R_cw24diss: R_cw24 => R_cw23; R_cw24*24*R_cw24diss_kdissR_cw;
    R_cw24diss_kdissR_cw = 0.9314;
  R_ccw24diss: R_ccw24 => R_ccw23; R_ccw24*24*R_ccw24diss_kdissR_cc;
    R_ccw24diss_kdissR_cc = 0.9314;
  R_cw25diss: R_cw25 => R_cw24; R_cw25*25*R_cw25diss_kdissR_cw;
    R_cw25diss_kdissR_cw = 0.9314;
  R_ccw25diss: R_ccw25 => R_ccw24; R_ccw25*25*R_ccw25diss_kdissR_cc;
    R_ccw25diss_kdissR_cc = 0.9314;
  R_cw26diss: R_cw26 => R_cw25; R_cw26*26*R_cw26diss_kdissR_cw;
    R_cw26diss_kdissR_cw = 0.9314;
  R_ccw26diss: R_ccw26 => R_ccw25; R_ccw26*26*R_ccw26diss_kdissR_cc;
    R_ccw26diss_kdissR_cc = 0.9314;
  R_cw27diss: R_cw27 => R_cw26; R_cw27*27*R_cw27diss_kdissR_cw;
    R_cw27diss_kdissR_cw = 0.9314;
  R_ccw27diss: R_ccw27 => R_ccw26; R_ccw27*27*R_ccw27diss_kdissR_cc;
    R_ccw27diss_kdissR_cc = 0.9314;
  R_cw28diss: R_cw28 => R_cw27; R_cw28*28*R_cw28diss_kdissR_cw;
    R_cw28diss_kdissR_cw = 0.9314;
  R_ccw28diss: R_ccw28 => R_ccw27; R_ccw28*28*R_ccw28diss_kdissR_cc;
    R_ccw28diss_kdissR_cc = 0.9314;
  R_cw29diss: R_cw29 => R_cw28; R_cw29*29*R_cw29diss_kdissR_cw;
    R_cw29diss_kdissR_cw = 0.9314;
  R_ccw29diss: R_ccw29 => R_ccw28; R_ccw29*29*R_ccw29diss_kdissR_cc;
    R_ccw29diss_kdissR_cc = 0.9314;
  R_cw30diss: R_cw30 => R_cw29; R_cw30*30*R_cw30diss_kdissR_cw;
    R_cw30diss_kdissR_cw = 0.9314;
  R_ccw30diss: R_ccw30 => R_ccw29; R_ccw30*30*R_ccw30diss_kdissR_cc;
    R_ccw30diss_kdissR_cc = 0.9314;
  R_cw31diss: R_cw31 => R_cw30; R_cw31*31*R_cw31diss_kdissR_cw;
    R_cw31diss_kdissR_cw = 0.9314;
  R_ccw31diss: R_ccw31 => R_ccw30; R_ccw31*31*R_ccw31diss_kdissR_cc;
    R_ccw31diss_kdissR_cc = 0.9314;
  R_cw32diss: R_cw32 => R_cw31; R_cw32*32*R_cw32diss_kdissR_cw;
    R_cw32diss_kdissR_cw = 0.9314;
  R_ccw32diss: R_ccw32 => R_ccw31; R_ccw32*32*R_ccw32diss_kdissR_cc;
    R_ccw32diss_kdissR_cc = 0.9314;
  R_cw33diss: R_cw33 => R_cw32; R_cw33*33*R_cw33diss_kdissR_cw;
    R_cw33diss_kdissR_cw = 0.9314;
  R_ccw33diss: R_ccw33 => R_ccw32; R_ccw33*33*R_ccw33diss_kdissR_cc;
    R_ccw33diss_kdissR_cc = 0.9314;
  R_cw34diss: R_cw34 => R_cw33; R_cw34*34*R_cw34diss_kdissR_cw;
    R_cw34diss_kdissR_cw = 0.9314;
  R_ccw34diss: R_ccw34 => R_ccw33; R_ccw34*34*R_ccw34diss_kdissR_cc;
    R_ccw34diss_kdissR_cc = 0.9314;
  R_cw35diss: R_cw35 => R_cw34; R_cw35*35*R_cw35diss_kdissR_cw;
    R_cw35diss_kdissR_cw = 0.9314;
  R_ccw35diss: R_ccw35 => R_ccw34; R_ccw35*35*R_ccw35diss_kdissR_cc;
    R_ccw35diss_kdissR_cc = 0.9314;
  R_cw36diss: R_cw36 => R_cw35; R_cw36*36*R_cw36diss_kdissR_cw;
    R_cw36diss_kdissR_cw = 0.9314;
  R_ccw36diss: R_ccw36 => R_ccw35; R_ccw36*36*R_ccw36diss_kdissR_cc;
    R_ccw36diss_kdissR_cc = 0.9314;
  R_cw37diss: R_cw37 => R_cw36; R_cw37*37*R_cw37diss_kdissR_cw;
    R_cw37diss_kdissR_cw = 0.9314;
  R_ccw37diss: R_ccw37 => R_ccw36; R_ccw37*37*R_ccw37diss_kdissR_cc;
    R_ccw37diss_kdissR_cc = 0.9314;
  R_cw38diss: R_cw38 => R_cw37; R_cw38*38*R_cw38diss_kdissR_cw;
    R_cw38diss_kdissR_cw = 0.9314;
  R_ccw38diss: R_ccw38 => R_ccw37; R_ccw38*38*R_ccw38diss_kdissR_cc;
    R_ccw38diss_kdissR_cc = 0.9314;
  R_cw39diss: R_cw39 => R_cw38; R_cw39*39*R_cw39diss_kdissR_cw;
    R_cw39diss_kdissR_cw = 0.9314;
  R_ccw39diss: R_ccw39 => R_ccw38; R_ccw39*39*R_ccw39diss_kdissR_cc;
    R_ccw39diss_kdissR_cc = 0.9314;
  R_cw40diss: R_cw40 => R_cw39; R_cw40*40*R_cw40diss_kdissR_cw;
    R_cw40diss_kdissR_cw = 0.9314;
  R_ccw40diss: R_ccw40 => R_ccw39; R_ccw40*40*R_ccw40diss_kdissR_cc;
    R_ccw40diss_kdissR_cc = 0.9314;
  R_cw41diss: R_cw41 => R_cw40; R_cw41*41*R_cw41diss_kdissR_cw;
    R_cw41diss_kdissR_cw = 0.9314;
  R_ccw41diss: R_ccw41 => R_ccw40; R_ccw41*41*R_ccw41diss_kdissR_cc;
    R_ccw41diss_kdissR_cc = 0.9314;
  R_cw42diss: R_cw42 => R_cw41; R_cw42*42*R_cw42diss_kdissR_cw;
    R_cw42diss_kdissR_cw = 0.9314;
  R_ccw42diss: R_ccw42 => R_ccw41; R_ccw42*42*R_ccw42diss_kdissR_cc;
    R_ccw42diss_kdissR_cc = 0.9314;
  R_cw43diss: R_cw43 => R_cw42; R_cw43*43*R_cw43diss_kdissR_cw;
    R_cw43diss_kdissR_cw = 0.9314;
  R_ccw43diss: R_ccw43 => R_ccw42; R_ccw43*43*R_ccw43diss_kdissR_cc;
    R_ccw43diss_kdissR_cc = 0.9314;
  R_cw44diss: R_cw44 => R_cw43; R_cw44*44*R_cw44diss_kdissR_cw;
    R_cw44diss_kdissR_cw = 0.9314;
  R_ccw44diss: R_ccw44 => R_ccw43; R_ccw44*44*R_ccw44diss_kdissR_cc;
    R_ccw44diss_kdissR_cc = 0.9314;
  R_cw0toC_cw0: R_cw0 => C_cw0; R_cw0*R_cw0toC_cw0_k10_cw*exp(0*R_cw0toC_cw0_R_cw);
    R_cw0toC_cw0_k10_cw = 810000; R_cw0toC_cw0_R_cw = 0.6;
  R_ccw0toC_ccw0: R_ccw0 => C_ccw0; R_ccw0*R_ccw0toC_ccw0_k10_cc*exp(0*R_ccw0toC_ccw0_R_cc);
    R_ccw0toC_ccw0_k10_cc = 810000; R_ccw0toC_ccw0_R_cc = 0.6;
  R_cw1toC_cw1: R_cw1 => C_cw1; R_cw1*R_cw1toC_cw1_k10_cw*exp(-1*R_cw1toC_cw1_R_cw);
    R_cw1toC_cw1_k10_cw = 810000; R_cw1toC_cw1_R_cw = 0.6;
  R_ccw1toC_ccw1: R_ccw1 => C_ccw1; R_ccw1*R_ccw1toC_ccw1_k10_cc*exp(-1*R_ccw1toC_ccw1_R_cc);
    R_ccw1toC_ccw1_k10_cc = 810000; R_ccw1toC_ccw1_R_cc = 0.6;
  R_cw2toC_cw2: R_cw2 => C_cw2; R_cw2*R_cw2toC_cw2_k10_cw*exp(-2*R_cw2toC_cw2_R_cw);
    R_cw2toC_cw2_k10_cw = 810000; R_cw2toC_cw2_R_cw = 0.6;
  R_ccw2toC_ccw2: R_ccw2 => C_ccw2; R_ccw2*R_ccw2toC_ccw2_k10_cc*exp(-2*R_ccw2toC_ccw2_R_cc);
    R_ccw2toC_ccw2_k10_cc = 810000; R_ccw2toC_ccw2_R_cc = 0.6;
  R_cw3toC_cw3: R_cw3 => C_cw3; R_cw3*R_cw3toC_cw3_k10_cw*exp(-3*R_cw3toC_cw3_R_cw);
    R_cw3toC_cw3_k10_cw = 810000; R_cw3toC_cw3_R_cw = 0.6;
  R_ccw3toC_ccw3: R_ccw3 => C_ccw3; R_ccw3*R_ccw3toC_ccw3_k10_cc*exp(-3*R_ccw3toC_ccw3_R_cc);
    R_ccw3toC_ccw3_k10_cc = 810000; R_ccw3toC_ccw3_R_cc = 0.6;
  R_cw4toC_cw4: R_cw4 => C_cw4; R_cw4*R_cw4toC_cw4_k10_cw*exp(-4*R_cw4toC_cw4_R_cw);
    R_cw4toC_cw4_k10_cw = 810000; R_cw4toC_cw4_R_cw = 0.6;
  R_ccw4toC_ccw4: R_ccw4 => C_ccw4; R_ccw4*R_ccw4toC_ccw4_k10_cc*exp(-4*R_ccw4toC_ccw4_R_cc);
    R_ccw4toC_ccw4_k10_cc = 810000; R_ccw4toC_ccw4_R_cc = 0.6;
  R_cw5toC_cw5: R_cw5 => C_cw5; R_cw5*R_cw5toC_cw5_k10_cw*exp(-5*R_cw5toC_cw5_R_cw);
    R_cw5toC_cw5_k10_cw = 810000; R_cw5toC_cw5_R_cw = 0.6;
  R_ccw5toC_ccw5: R_ccw5 => C_ccw5; R_ccw5*R_ccw5toC_ccw5_k10_cc*exp(-5*R_ccw5toC_ccw5_R_cc);
    R_ccw5toC_ccw5_k10_cc = 810000; R_ccw5toC_ccw5_R_cc = 0.6;
  R_cw6toC_cw6: R_cw6 => C_cw6; R_cw6*R_cw6toC_cw6_k10_cw*exp(-6*R_cw6toC_cw6_R_cw);
    R_cw6toC_cw6_k10_cw = 810000; R_cw6toC_cw6_R_cw = 0.6;
  R_ccw6toC_ccw6: R_ccw6 => C_ccw6; R_ccw6*R_ccw6toC_ccw6_k10_cc*exp(-6*R_ccw6toC_ccw6_R_cc);
    R_ccw6toC_ccw6_k10_cc = 810000; R_ccw6toC_ccw6_R_cc = 0.6;
  R_cw7toC_cw7: R_cw7 => C_cw7; R_cw7*R_cw7toC_cw7_k10_cw*exp(-7*R_cw7toC_cw7_R_cw);
    R_cw7toC_cw7_k10_cw = 810000; R_cw7toC_cw7_R_cw = 0.6;
  R_ccw7toC_ccw7: R_ccw7 => C_ccw7; R_ccw7*R_ccw7toC_ccw7_k10_cc*exp(-7*R_ccw7toC_ccw7_R_cc);
    R_ccw7toC_ccw7_k10_cc = 810000; R_ccw7toC_ccw7_R_cc = 0.6;
  R_cw8toC_cw8: R_cw8 => C_cw8; R_cw8*R_cw8toC_cw8_k10_cw*exp(-8*R_cw8toC_cw8_R_cw);
    R_cw8toC_cw8_k10_cw = 810000; R_cw8toC_cw8_R_cw = 0.6;
  R_ccw8toC_ccw8: R_ccw8 => C_ccw8; R_ccw8*R_ccw8toC_ccw8_k10_cc*exp(-8*R_ccw8toC_ccw8_R_cc);
    R_ccw8toC_ccw8_k10_cc = 810000; R_ccw8toC_ccw8_R_cc = 0.6;
  R_cw9toC_cw9: R_cw9 => C_cw9; R_cw9*R_cw9toC_cw9_k10_cw*exp(-9*R_cw9toC_cw9_R_cw);
    R_cw9toC_cw9_k10_cw = 810000; R_cw9toC_cw9_R_cw = 0.6;
  R_ccw9toC_ccw9: R_ccw9 => C_ccw9; R_ccw9*R_ccw9toC_ccw9_k10_cc*exp(-9*R_ccw9toC_ccw9_R_cc);
    R_ccw9toC_ccw9_k10_cc = 810000; R_ccw9toC_ccw9_R_cc = 0.6;
  R_cw10toC_cw10: R_cw10 => C_cw10; R_cw10*R_cw10toC_cw10_k10_cw*exp(-10*R_cw10toC_cw10_R_cw);
    R_cw10toC_cw10_k10_cw = 810000; R_cw10toC_cw10_R_cw = 0.6;
  R_ccw10toC_ccw10: R_ccw10 => C_ccw10; R_ccw10*R_ccw10toC_ccw10_k10_cc*exp(-10*R_ccw10toC_ccw10_R_cc);
    R_ccw10toC_ccw10_k10_cc = 810000; R_ccw10toC_ccw10_R_cc = 0.6;
  R_cw11toC_cw11: R_cw11 => C_cw11; R_cw11*R_cw11toC_cw11_k10_cw*exp(-11*R_cw11toC_cw11_R_cw);
    R_cw11toC_cw11_k10_cw = 810000; R_cw11toC_cw11_R_cw = 0.6;
  R_ccw11toC_ccw11: R_ccw11 => C_ccw11; R_ccw11*R_ccw11toC_ccw11_k10_cc*exp(-11*R_ccw11toC_ccw11_R_cc);
    R_ccw11toC_ccw11_k10_cc = 810000; R_ccw11toC_ccw11_R_cc = 0.6;
  R_cw12toC_cw12: R_cw12 => C_cw12; R_cw12*R_cw12toC_cw12_k10_cw*exp(-12*R_cw12toC_cw12_R_cw);
    R_cw12toC_cw12_k10_cw = 810000; R_cw12toC_cw12_R_cw = 0.6;
  R_ccw12toC_ccw12: R_ccw12 => C_ccw12; R_ccw12*R_ccw12toC_ccw12_k10_cc*exp(-12*R_ccw12toC_ccw12_R_cc);
    R_ccw12toC_ccw12_k10_cc = 810000; R_ccw12toC_ccw12_R_cc = 0.6;
  R_cw13toC_cw13: R_cw13 => C_cw13; R_cw13*R_cw13toC_cw13_k10_cw*exp(-13*R_cw13toC_cw13_R_cw);
    R_cw13toC_cw13_k10_cw = 810000; R_cw13toC_cw13_R_cw = 0.6;
  R_ccw13toC_ccw13: R_ccw13 => C_ccw13; R_ccw13*R_ccw13toC_ccw13_k10_cc*exp(-13*R_ccw13toC_ccw13_R_cc);
    R_ccw13toC_ccw13_k10_cc = 810000; R_ccw13toC_ccw13_R_cc = 0.6;
  R_cw14toC_cw14: R_cw14 => C_cw14; R_cw14*R_cw14toC_cw14_k10_cw*exp(-14*R_cw14toC_cw14_R_cw);
    R_cw14toC_cw14_k10_cw = 810000; R_cw14toC_cw14_R_cw = 0.6;
  R_ccw14toC_ccw14: R_ccw14 => C_ccw14; R_ccw14*R_ccw14toC_ccw14_k10_cc*exp(-14*R_ccw14toC_ccw14_R_cc);
    R_ccw14toC_ccw14_k10_cc = 810000; R_ccw14toC_ccw14_R_cc = 0.6;
  R_cw15toC_cw15: R_cw15 => C_cw15; R_cw15*R_cw15toC_cw15_k10_cw*exp(-15*R_cw15toC_cw15_R_cw);
    R_cw15toC_cw15_k10_cw = 810000; R_cw15toC_cw15_R_cw = 0.6;
  R_ccw15toC_ccw15: R_ccw15 => C_ccw15; R_ccw15*R_ccw15toC_ccw15_k10_cc*exp(-15*R_ccw15toC_ccw15_R_cc);
    R_ccw15toC_ccw15_k10_cc = 810000; R_ccw15toC_ccw15_R_cc = 0.6;
  R_cw16toC_cw16: R_cw16 => C_cw16; R_cw16*R_cw16toC_cw16_k10_cw*exp(-16*R_cw16toC_cw16_R_cw);
    R_cw16toC_cw16_k10_cw = 810000; R_cw16toC_cw16_R_cw = 0.6;
  R_ccw16toC_ccw16: R_ccw16 => C_ccw16; R_ccw16*R_ccw16toC_ccw16_k10_cc*exp(-16*R_ccw16toC_ccw16_R_cc);
    R_ccw16toC_ccw16_k10_cc = 810000; R_ccw16toC_ccw16_R_cc = 0.6;
  R_cw17toC_cw17: R_cw17 => C_cw17; R_cw17*R_cw17toC_cw17_k10_cw*exp(-17*R_cw17toC_cw17_R_cw);
    R_cw17toC_cw17_k10_cw = 810000; R_cw17toC_cw17_R_cw = 0.6;
  R_ccw17toC_ccw17: R_ccw17 => C_ccw17; R_ccw17*R_ccw17toC_ccw17_k10_cc*exp(-17*R_ccw17toC_ccw17_R_cc);
    R_ccw17toC_ccw17_k10_cc = 810000; R_ccw17toC_ccw17_R_cc = 0.6;
  R_cw18toC_cw18: R_cw18 => C_cw18; R_cw18*R_cw18toC_cw18_k10_cw*exp(-18*R_cw18toC_cw18_R_cw);
    R_cw18toC_cw18_k10_cw = 810000; R_cw18toC_cw18_R_cw = 0.6;
  R_ccw18toC_ccw18: R_ccw18 => C_ccw18; R_ccw18*R_ccw18toC_ccw18_k10_cc*exp(-18*R_ccw18toC_ccw18_R_cc);
    R_ccw18toC_ccw18_k10_cc = 810000; R_ccw18toC_ccw18_R_cc = 0.6;
  R_cw19toC_cw19: R_cw19 => C_cw19; R_cw19*R_cw19toC_cw19_k10_cw*exp(-19*R_cw19toC_cw19_R_cw);
    R_cw19toC_cw19_k10_cw = 810000; R_cw19toC_cw19_R_cw = 0.6;
  R_ccw19toC_ccw19: R_ccw19 => C_ccw19; R_ccw19*R_ccw19toC_ccw19_k10_cc*exp(-19*R_ccw19toC_ccw19_R_cc);
    R_ccw19toC_ccw19_k10_cc = 810000; R_ccw19toC_ccw19_R_cc = 0.6;
  R_cw20toC_cw20: R_cw20 => C_cw20; R_cw20*R_cw20toC_cw20_k10_cw*exp(-20*R_cw20toC_cw20_R_cw);
    R_cw20toC_cw20_k10_cw = 810000; R_cw20toC_cw20_R_cw = 0.6;
  R_ccw20toC_ccw20: R_ccw20 => C_ccw20; R_ccw20*R_ccw20toC_ccw20_k10_cc*exp(-20*R_ccw20toC_ccw20_R_cc);
    R_ccw20toC_ccw20_k10_cc = 810000; R_ccw20toC_ccw20_R_cc = 0.6;
  R_cw21toC_cw21: R_cw21 => C_cw21; R_cw21*R_cw21toC_cw21_k10_cw*exp(-21*R_cw21toC_cw21_R_cw);
    R_cw21toC_cw21_k10_cw = 810000; R_cw21toC_cw21_R_cw = 0.6;
  R_ccw21toC_ccw21: R_ccw21 => C_ccw21; R_ccw21*R_ccw21toC_ccw21_k10_cc*exp(-21*R_ccw21toC_ccw21_R_cc);
    R_ccw21toC_ccw21_k10_cc = 810000; R_ccw21toC_ccw21_R_cc = 0.6;
  R_cw22toC_cw22: R_cw22 => C_cw22; R_cw22*R_cw22toC_cw22_k10_cw*exp(-22*R_cw22toC_cw22_R_cw);
    R_cw22toC_cw22_k10_cw = 810000; R_cw22toC_cw22_R_cw = 0.6;
  R_ccw22toC_ccw22: R_ccw22 => C_ccw22; R_ccw22*R_ccw22toC_ccw22_k10_cc*exp(-22*R_ccw22toC_ccw22_R_cc);
    R_ccw22toC_ccw22_k10_cc = 810000; R_ccw22toC_ccw22_R_cc = 0.6;
  R_cw23toC_cw23: R_cw23 => C_cw23; R_cw23*R_cw23toC_cw23_k10_cw*exp(-23*R_cw23toC_cw23_R_cw);
    R_cw23toC_cw23_k10_cw = 810000; R_cw23toC_cw23_R_cw = 0.6;
  R_ccw23toC_ccw23: R_ccw23 => C_ccw23; R_ccw23*R_ccw23toC_ccw23_k10_cc*exp(-23*R_ccw23toC_ccw23_R_cc);
    R_ccw23toC_ccw23_k10_cc = 810000; R_ccw23toC_ccw23_R_cc = 0.6;
  R_cw24toC_cw24: R_cw24 => C_cw24; R_cw24*R_cw24toC_cw24_k10_cw*exp(-24*R_cw24toC_cw24_R_cw);
    R_cw24toC_cw24_k10_cw = 810000; R_cw24toC_cw24_R_cw = 0.6;
  R_ccw24toC_ccw24: R_ccw24 => C_ccw24; R_ccw24*R_ccw24toC_ccw24_k10_cc*exp(-24*R_ccw24toC_ccw24_R_cc);
    R_ccw24toC_ccw24_k10_cc = 810000; R_ccw24toC_ccw24_R_cc = 0.6;
  R_cw25toC_cw25: R_cw25 => C_cw25; R_cw25*R_cw25toC_cw25_k10_cw*exp(-25*R_cw25toC_cw25_R_cw);
    R_cw25toC_cw25_k10_cw = 810000; R_cw25toC_cw25_R_cw = 0.6;
  R_ccw25toC_ccw25: R_ccw25 => C_ccw25; R_ccw25*R_ccw25toC_ccw25_k10_cc*exp(-25*R_ccw25toC_ccw25_R_cc);
    R_ccw25toC_ccw25_k10_cc = 810000; R_ccw25toC_ccw25_R_cc = 0.6;
  R_cw26toC_cw26: R_cw26 => C_cw26; R_cw26*R_cw26toC_cw26_k10_cw*exp(-26*R_cw26toC_cw26_R_cw);
    R_cw26toC_cw26_k10_cw = 810000; R_cw26toC_cw26_R_cw = 0.6;
  R_ccw26toC_ccw26: R_ccw26 => C_ccw26; R_ccw26*R_ccw26toC_ccw26_k10_cc*exp(-26*R_ccw26toC_ccw26_R_cc);
    R_ccw26toC_ccw26_k10_cc = 810000; R_ccw26toC_ccw26_R_cc = 0.6;
  R_cw27toC_cw27: R_cw27 => C_cw27; R_cw27*R_cw27toC_cw27_k10_cw*exp(-27*R_cw27toC_cw27_R_cw);
    R_cw27toC_cw27_k10_cw = 810000; R_cw27toC_cw27_R_cw = 0.6;
  R_ccw27toC_ccw27: R_ccw27 => C_ccw27; R_ccw27*R_ccw27toC_ccw27_k10_cc*exp(-27*R_ccw27toC_ccw27_R_cc);
    R_ccw27toC_ccw27_k10_cc = 810000; R_ccw27toC_ccw27_R_cc = 0.6;
  R_cw28toC_cw28: R_cw28 => C_cw28; R_cw28*R_cw28toC_cw28_k10_cw*exp(-28*R_cw28toC_cw28_R_cw);
    R_cw28toC_cw28_k10_cw = 810000; R_cw28toC_cw28_R_cw = 0.6;
  R_ccw28toC_ccw28: R_ccw28 => C_ccw28; R_ccw28*R_ccw28toC_ccw28_k10_cc*exp(-28*R_ccw28toC_ccw28_R_cc);
    R_ccw28toC_ccw28_k10_cc = 810000; R_ccw28toC_ccw28_R_cc = 0.6;
  R_cw29toC_cw29: R_cw29 => C_cw29; R_cw29*R_cw29toC_cw29_k10_cw*exp(-29*R_cw29toC_cw29_R_cw);
    R_cw29toC_cw29_k10_cw = 810000; R_cw29toC_cw29_R_cw = 0.6;
  R_ccw29toC_ccw29: R_ccw29 => C_ccw29; R_ccw29*R_ccw29toC_ccw29_k10_cc*exp(-29*R_ccw29toC_ccw29_R_cc);
    R_ccw29toC_ccw29_k10_cc = 810000; R_ccw29toC_ccw29_R_cc = 0.6;
  R_cw30toC_cw30: R_cw30 => C_cw30; R_cw30*R_cw30toC_cw30_k10_cw*exp(-30*R_cw30toC_cw30_R_cw);
    R_cw30toC_cw30_k10_cw = 810000; R_cw30toC_cw30_R_cw = 0.6;
  R_ccw30toC_ccw30: R_ccw30 => C_ccw30; R_ccw30*R_ccw30toC_ccw30_k10_cc*exp(-30*R_ccw30toC_ccw30_R_cc);
    R_ccw30toC_ccw30_k10_cc = 810000; R_ccw30toC_ccw30_R_cc = 0.6;
  R_cw31toC_cw31: R_cw31 => C_cw31; R_cw31*R_cw31toC_cw31_k10_cw*exp(-31*R_cw31toC_cw31_R_cw);
    R_cw31toC_cw31_k10_cw = 810000; R_cw31toC_cw31_R_cw = 0.6;
  R_ccw31toC_ccw31: R_ccw31 => C_ccw31; R_ccw31*R_ccw31toC_ccw31_k10_cc*exp(-31*R_ccw31toC_ccw31_R_cc);
    R_ccw31toC_ccw31_k10_cc = 810000; R_ccw31toC_ccw31_R_cc = 0.6;
  R_cw32toC_cw32: R_cw32 => C_cw32; R_cw32*R_cw32toC_cw32_k10_cw*exp(-32*R_cw32toC_cw32_R_cw);
    R_cw32toC_cw32_k10_cw = 810000; R_cw32toC_cw32_R_cw = 0.6;
  R_ccw32toC_ccw32: R_ccw32 => C_ccw32; R_ccw32*R_ccw32toC_ccw32_k10_cc*exp(-32*R_ccw32toC_ccw32_R_cc);
    R_ccw32toC_ccw32_k10_cc = 810000; R_ccw32toC_ccw32_R_cc = 0.6;
  R_cw33toC_cw33: R_cw33 => C_cw33; R_cw33*R_cw33toC_cw33_k10_cw*exp(-33*R_cw33toC_cw33_R_cw);
    R_cw33toC_cw33_k10_cw = 810000; R_cw33toC_cw33_R_cw = 0.6;
  R_ccw33toC_ccw33: R_ccw33 => C_ccw33; R_ccw33*R_ccw33toC_ccw33_k10_cc*exp(-33*R_ccw33toC_ccw33_R_cc);
    R_ccw33toC_ccw33_k10_cc = 810000; R_ccw33toC_ccw33_R_cc = 0.6;
  R_cw34toC_cw34: R_cw34 => C_cw34; R_cw34*R_cw34toC_cw34_k10_cw*exp(-34*R_cw34toC_cw34_R_cw);
    R_cw34toC_cw34_k10_cw = 810000; R_cw34toC_cw34_R_cw = 0.6;
  R_ccw34toC_ccw34: R_ccw34 => C_ccw34; R_ccw34*R_ccw34toC_ccw34_k10_cc*exp(-34*R_ccw34toC_ccw34_R_cc);
    R_ccw34toC_ccw34_k10_cc = 810000; R_ccw34toC_ccw34_R_cc = 0.6;
  R_cw35toC_cw35: R_cw35 => C_cw35; R_cw35*R_cw35toC_cw35_k10_cw*exp(-35*R_cw35toC_cw35_R_cw);
    R_cw35toC_cw35_k10_cw = 810000; R_cw35toC_cw35_R_cw = 0.6;
  R_ccw35toC_ccw35: R_ccw35 => C_ccw35; R_ccw35*R_ccw35toC_ccw35_k10_cc*exp(-35*R_ccw35toC_ccw35_R_cc);
    R_ccw35toC_ccw35_k10_cc = 810000; R_ccw35toC_ccw35_R_cc = 0.6;
  R_cw36toC_cw36: R_cw36 => C_cw36; R_cw36*R_cw36toC_cw36_k10_cw*exp(-36*R_cw36toC_cw36_R_cw);
    R_cw36toC_cw36_k10_cw = 810000; R_cw36toC_cw36_R_cw = 0.6;
  R_ccw36toC_ccw36: R_ccw36 => C_ccw36; R_ccw36*R_ccw36toC_ccw36_k10_cc*exp(-36*R_ccw36toC_ccw36_R_cc);
    R_ccw36toC_ccw36_k10_cc = 810000; R_ccw36toC_ccw36_R_cc = 0.6;
  R_cw37toC_cw37: R_cw37 => C_cw37; R_cw37*R_cw37toC_cw37_k10_cw*exp(-37*R_cw37toC_cw37_R_cw);
    R_cw37toC_cw37_k10_cw = 810000; R_cw37toC_cw37_R_cw = 0.6;
  R_ccw37toC_ccw37: R_ccw37 => C_ccw37; R_ccw37*R_ccw37toC_ccw37_k10_cc*exp(-37*R_ccw37toC_ccw37_R_cc);
    R_ccw37toC_ccw37_k10_cc = 810000; R_ccw37toC_ccw37_R_cc = 0.6;
  R_cw38toC_cw38: R_cw38 => C_cw38; R_cw38*R_cw38toC_cw38_k10_cw*exp(-38*R_cw38toC_cw38_R_cw);
    R_cw38toC_cw38_k10_cw = 810000; R_cw38toC_cw38_R_cw = 0.6;
  R_ccw38toC_ccw38: R_ccw38 => C_ccw38; R_ccw38*R_ccw38toC_ccw38_k10_cc*exp(-38*R_ccw38toC_ccw38_R_cc);
    R_ccw38toC_ccw38_k10_cc = 810000; R_ccw38toC_ccw38_R_cc = 0.6;
  R_cw39toC_cw39: R_cw39 => C_cw39; R_cw39*R_cw39toC_cw39_k10_cw*exp(-39*R_cw39toC_cw39_R_cw);
    R_cw39toC_cw39_k10_cw = 810000; R_cw39toC_cw39_R_cw = 0.6;
  R_ccw39toC_ccw39: R_ccw39 => C_ccw39; R_ccw39*R_ccw39toC_ccw39_k10_cc*exp(-39*R_ccw39toC_ccw39_R_cc);
    R_ccw39toC_ccw39_k10_cc = 810000; R_ccw39toC_ccw39_R_cc = 0.6;
  R_cw40toC_cw40: R_cw40 => C_cw40; R_cw40*R_cw40toC_cw40_k10_cw*exp(-40*R_cw40toC_cw40_R_cw);
    R_cw40toC_cw40_k10_cw = 810000; R_cw40toC_cw40_R_cw = 0.6;
  R_ccw40toC_ccw40: R_ccw40 => C_ccw40; R_ccw40*R_ccw40toC_ccw40_k10_cc*exp(-40*R_ccw40toC_ccw40_R_cc);
    R_ccw40toC_ccw40_k10_cc = 810000; R_ccw40toC_ccw40_R_cc = 0.6;
  R_cw41toC_cw41: R_cw41 => C_cw41; R_cw41*R_cw41toC_cw41_k10_cw*exp(-41*R_cw41toC_cw41_R_cw);
    R_cw41toC_cw41_k10_cw = 810000; R_cw41toC_cw41_R_cw = 0.6;
  R_ccw41toC_ccw41: R_ccw41 => C_ccw41; R_ccw41*R_ccw41toC_ccw41_k10_cc*exp(-41*R_ccw41toC_ccw41_R_cc);
    R_ccw41toC_ccw41_k10_cc = 810000; R_ccw41toC_ccw41_R_cc = 0.6;
  R_cw42toC_cw42: R_cw42 => C_cw42; R_cw42*R_cw42toC_cw42_k10_cw*exp(-42*R_cw42toC_cw42_R_cw);
    R_cw42toC_cw42_k10_cw = 810000; R_cw42toC_cw42_R_cw = 0.6;
  R_ccw42toC_ccw42: R_ccw42 => C_ccw42; R_ccw42*R_ccw42toC_ccw42_k10_cc*exp(-42*R_ccw42toC_ccw42_R_cc);
    R_ccw42toC_ccw42_k10_cc = 810000; R_ccw42toC_ccw42_R_cc = 0.6;
  R_cw43toC_cw43: R_cw43 => C_cw43; R_cw43*R_cw43toC_cw43_k10_cw*exp(-43*R_cw43toC_cw43_R_cw);
    R_cw43toC_cw43_k10_cw = 810000; R_cw43toC_cw43_R_cw = 0.6;
  R_ccw43toC_ccw43: R_ccw43 => C_ccw43; R_ccw43*R_ccw43toC_ccw43_k10_cc*exp(-43*R_ccw43toC_ccw43_R_cc);
    R_ccw43toC_ccw43_k10_cc = 810000; R_ccw43toC_ccw43_R_cc = 0.6;
  R_cw44toC_cw44: R_cw44 => C_cw44; R_cw44*R_cw44toC_cw44_k10_cw*exp(-44*R_cw44toC_cw44_R_cw);
    R_cw44toC_cw44_k10_cw = 810000; R_cw44toC_cw44_R_cw = 0.6;
  R_ccw44toC_ccw44: R_ccw44 => C_ccw44; R_ccw44*R_ccw44toC_ccw44_k10_cc*exp(-44*R_ccw44toC_ccw44_R_cc);
    R_ccw44toC_ccw44_k10_cc = 810000; R_ccw44toC_ccw44_R_cc = 0.6;
  C_cw0ass: C_cw0 => C_cw1; CheYP_cw*C_cw0*(44 - 0)*C_cw0ass_kassC_cw;  // modifiers: CheYP_cw
    C_cw0ass_kassC_cw = 0.1177;
  C_ccw0ass: C_ccw0 => C_ccw1; CheYP_ccw*C_ccw0*(44 - 0)*C_ccw0ass_kassC_cc;  // modifiers: CheYP_ccw
    C_ccw0ass_kassC_cc = 0.1177;
  C_cw1ass: C_cw1 => C_cw2; CheYP_cw*C_cw1*(44 - 1)*C_cw1ass_kassC_cw;  // modifiers: CheYP_cw
    C_cw1ass_kassC_cw = 0.1177;
  C_ccw1ass: C_ccw1 => C_ccw2; CheYP_ccw*C_ccw1*(44 - 1)*C_ccw1ass_kassC_cc;  // modifiers: CheYP_ccw
    C_ccw1ass_kassC_cc = 0.1177;
  C_cw2ass: C_cw2 => C_cw3; CheYP_cw*C_cw2*(44 - 2)*C_cw2ass_kassC_cw;  // modifiers: CheYP_cw
    C_cw2ass_kassC_cw = 0.1177;
  C_ccw2ass: C_ccw2 => C_ccw3; CheYP_ccw*C_ccw2*(44 - 2)*C_ccw2ass_kassC_cc;  // modifiers: CheYP_ccw
    C_ccw2ass_kassC_cc = 0.1177;
  C_cw3ass: C_cw3 => C_cw4; CheYP_cw*C_cw3*(44 - 3)*C_cw3ass_kassC_cw;  // modifiers: CheYP_cw
    C_cw3ass_kassC_cw = 0.1177;
  C_ccw3ass: C_ccw3 => C_ccw4; CheYP_ccw*C_ccw3*(44 - 3)*C_ccw3ass_kassC_cc;  // modifiers: CheYP_ccw
    C_ccw3ass_kassC_cc = 0.1177;
  C_cw4ass: C_cw4 => C_cw5; CheYP_cw*C_cw4*(44 - 4)*C_cw4ass_kassC_cw;  // modifiers: CheYP_cw
    C_cw4ass_kassC_cw = 0.1177;
  C_ccw4ass: C_ccw4 => C_ccw5; CheYP_ccw*C_ccw4*(44 - 4)*C_ccw4ass_kassC_cc;  // modifiers: CheYP_ccw
    C_ccw4ass_kassC_cc = 0.1177;
  C_cw5ass: C_cw5 => C_cw6; CheYP_cw*C_cw5*(44 - 5)*C_cw5ass_kassC_cw;  // modifiers: CheYP_cw
    C_cw5ass_kassC_cw = 0.1177;
  C_ccw5ass: C_ccw5 => C_ccw6; CheYP_ccw*C_ccw5*(44 - 5)*C_ccw5ass_kassC_cc;  // modifiers: CheYP_ccw
    C_ccw5ass_kassC_cc = 0.1177;
  C_cw6ass: C_cw6 => C_cw7; CheYP_cw*C_cw6*(44 - 6)*C_cw6ass_kassC_cw;  // modifiers: CheYP_cw
    C_cw6ass_kassC_cw = 0.1177;
  C_ccw6ass: C_ccw6 => C_ccw7; CheYP_ccw*C_ccw6*(44 - 6)*C_ccw6ass_kassC_cc;  // modifiers: CheYP_ccw
    C_ccw6ass_kassC_cc = 0.1177;
  C_cw7ass: C_cw7 => C_cw8; CheYP_cw*C_cw7*(44 - 7)*C_cw7ass_kassC_cw;  // modifiers: CheYP_cw
    C_cw7ass_kassC_cw = 0.1177;
  C_ccw7ass: C_ccw7 => C_ccw8; CheYP_ccw*C_ccw7*(44 - 7)*C_ccw7ass_kassC_cc;  // modifiers: CheYP_ccw
    C_ccw7ass_kassC_cc = 0.1177;
  C_cw8ass: C_cw8 => C_cw9; CheYP_cw*C_cw8*(44 - 8)*C_cw8ass_kassC_cw;  // modifiers: CheYP_cw
    C_cw8ass_kassC_cw = 0.1177;
  C_ccw8ass: C_ccw8 => C_ccw9; CheYP_ccw*C_ccw8*(44 - 8)*C_ccw8ass_kassC_cc;  // modifiers: CheYP_ccw
    C_ccw8ass_kassC_cc = 0.1177;
  C_cw9ass: C_cw9 => C_cw10; CheYP_cw*C_cw9*(44 - 9)*C_cw9ass_kassC_cw;  // modifiers: CheYP_cw
    C_cw9ass_kassC_cw = 0.1177;
  C_ccw9ass: C_ccw9 => C_ccw10; CheYP_ccw*C_ccw9*(44 - 9)*C_ccw9ass_kassC_cc;  // modifiers: CheYP_ccw
    C_ccw9ass_kassC_cc = 0.1177;
  C_cw10ass: C_cw10 => C_cw11; CheYP_cw*C_cw10*(44 - 10)*C_cw10ass_kassC_cw;  // modifiers: CheYP_cw
    C_cw10ass_kassC_cw = 0.1177;
  C_ccw10ass: C_ccw10 => C_ccw11; CheYP_ccw*C_ccw10*(44 - 10)*C_ccw10ass_kassC_cc;  // modifiers: CheYP_ccw
    C_ccw10ass_kassC_cc = 0.1177;
  C_cw11ass: C_cw11 => C_cw12; CheYP_cw*C_cw11*(44 - 11)*C_cw11ass_kassC_cw;  // modifiers: CheYP_cw
    C_cw11ass_kassC_cw = 0.1177;
  C_ccw11ass: C_ccw11 => C_ccw12; CheYP_ccw*C_ccw11*(44 - 11)*C_ccw11ass_kassC_cc;  // modifiers: CheYP_ccw
    C_ccw11ass_kassC_cc = 0.1177;
  C_cw12ass: C_cw12 => C_cw13; CheYP_cw*C_cw12*(44 - 12)*C_cw12ass_kassC_cw;  // modifiers: CheYP_cw
    C_cw12ass_kassC_cw = 0.1177;
  C_ccw12ass: C_ccw12 => C_ccw13; CheYP_ccw*C_ccw12*(44 - 12)*C_ccw12ass_kassC_cc;  // modifiers: CheYP_ccw
    C_ccw12ass_kassC_cc = 0.1177;
  C_cw13ass: C_cw13 => C_cw14; CheYP_cw*C_cw13*(44 - 13)*C_cw13ass_kassC_cw;  // modifiers: CheYP_cw
    C_cw13ass_kassC_cw = 0.1177;
  C_ccw13ass: C_ccw13 => C_ccw14; CheYP_ccw*C_ccw13*(44 - 13)*C_ccw13ass_kassC_cc;  // modifiers: CheYP_ccw
    C_ccw13ass_kassC_cc = 0.1177;
  C_cw14ass: C_cw14 => C_cw15; CheYP_cw*C_cw14*(44 - 14)*C_cw14ass_kassC_cw;  // modifiers: CheYP_cw
    C_cw14ass_kassC_cw = 0.1177;
  C_ccw14ass: C_ccw14 => C_ccw15; CheYP_ccw*C_ccw14*(44 - 14)*C_ccw14ass_kassC_cc;  // modifiers: CheYP_ccw
    C_ccw14ass_kassC_cc = 0.1177;
  C_cw15ass: C_cw15 => C_cw16; CheYP_cw*C_cw15*(44 - 15)*C_cw15ass_kassC_cw;  // modifiers: CheYP_cw
    C_cw15ass_kassC_cw = 0.1177;
  C_ccw15ass: C_ccw15 => C_ccw16; CheYP_ccw*C_ccw15*(44 - 15)*C_ccw15ass_kassC_cc;  // modifiers: CheYP_ccw
    C_ccw15ass_kassC_cc = 0.1177;
  C_cw16ass: C_cw16 => C_cw17; CheYP_cw*C_cw16*(44 - 16)*C_cw16ass_kassC_cw;  // modifiers: CheYP_cw
    C_cw16ass_kassC_cw = 0.1177;
  C_ccw16ass: C_ccw16 => C_ccw17; CheYP_ccw*C_ccw16*(44 - 16)*C_ccw16ass_kassC_cc;  // modifiers: CheYP_ccw
    C_ccw16ass_kassC_cc = 0.1177;
  C_cw17ass: C_cw17 => C_cw18; CheYP_cw*C_cw17*(44 - 17)*C_cw17ass_kassC_cw;  // modifiers: CheYP_cw
    C_cw17ass_kassC_cw = 0.1177;
  C_ccw17ass: C_ccw17 => C_ccw18; CheYP_ccw*C_ccw17*(44 - 17)*C_ccw17ass_kassC_cc;  // modifiers: CheYP_ccw
    C_ccw17ass_kassC_cc = 0.1177;
  C_cw18ass: C_cw18 => C_cw19; CheYP_cw*C_cw18*(44 - 18)*C_cw18ass_kassC_cw;  // modifiers: CheYP_cw
    C_cw18ass_kassC_cw = 0.1177;
  C_ccw18ass: C_ccw18 => C_ccw19; CheYP_ccw*C_ccw18*(44 - 18)*C_ccw18ass_kassC_cc;  // modifiers: CheYP_ccw
    C_ccw18ass_kassC_cc = 0.1177;
  C_cw19ass: C_cw19 => C_cw20; CheYP_cw*C_cw19*(44 - 19)*C_cw19ass_kassC_cw;  // modifiers: CheYP_cw
    C_cw19ass_kassC_cw = 0.1177;
  C_ccw19ass: C_ccw19 => C_ccw20; CheYP_ccw*C_ccw19*(44 - 19)*C_ccw19ass_kassC_cc;  // modifiers: CheYP_ccw
    C_ccw19ass_kassC_cc = 0.1177;
  C_cw20ass: C_cw20 => C_cw21; CheYP_cw*C_cw20*(44 - 20)*C_cw20ass_kassC_cw;  // modifiers: CheYP_cw
    C_cw20ass_kassC_cw = 0.1177;
  C_ccw20ass: C_ccw20 => C_ccw21; CheYP_ccw*C_ccw20*(44 - 20)*C_ccw20ass_kassC_cc;  // modifiers: CheYP_ccw
    C_ccw20ass_kassC_cc = 0.1177;
  C_cw21ass: C_cw21 => C_cw22; CheYP_cw*C_cw21*(44 - 21)*C_cw21ass_kassC_cw;  // modifiers: CheYP_cw
    C_cw21ass_kassC_cw = 0.1177;
  C_ccw21ass: C_ccw21 => C_ccw22; CheYP_ccw*C_ccw21*(44 - 21)*C_ccw21ass_kassC_cc;  // modifiers: CheYP_ccw
    C_ccw21ass_kassC_cc = 0.1177;
  C_cw22ass: C_cw22 => C_cw23; CheYP_cw*C_cw22*(44 - 22)*C_cw22ass_kassC_cw;  // modifiers: CheYP_cw
    C_cw22ass_kassC_cw = 0.1177;
  C_ccw22ass: C_ccw22 => C_ccw23; CheYP_ccw*C_ccw22*(44 - 22)*C_ccw22ass_kassC_cc;  // modifiers: CheYP_ccw
    C_ccw22ass_kassC_cc = 0.1177;
  C_cw23ass: C_cw23 => C_cw24; CheYP_cw*C_cw23*(44 - 23)*C_cw23ass_kassC_cw;  // modifiers: CheYP_cw
    C_cw23ass_kassC_cw = 0.1177;
  C_ccw23ass: C_ccw23 => C_ccw24; CheYP_ccw*C_ccw23*(44 - 23)*C_ccw23ass_kassC_cc;  // modifiers: CheYP_ccw
    C_ccw23ass_kassC_cc = 0.1177;
  C_cw24ass: C_cw24 => C_cw25; CheYP_cw*C_cw24*(44 - 24)*C_cw24ass_kassC_cw;  // modifiers: CheYP_cw
    C_cw24ass_kassC_cw = 0.1177;
  C_ccw24ass: C_ccw24 => C_ccw25; CheYP_ccw*C_ccw24*(44 - 24)*C_ccw24ass_kassC_cc;  // modifiers: CheYP_ccw
    C_ccw24ass_kassC_cc = 0.1177;
  C_cw25ass: C_cw25 => C_cw26; CheYP_cw*C_cw25*(44 - 25)*C_cw25ass_kassC_cw;  // modifiers: CheYP_cw
    C_cw25ass_kassC_cw = 0.1177;
  C_ccw25ass: C_ccw25 => C_ccw26; CheYP_ccw*C_ccw25*(44 - 25)*C_ccw25ass_kassC_cc;  // modifiers: CheYP_ccw
    C_ccw25ass_kassC_cc = 0.1177;
  C_cw26ass: C_cw26 => C_cw27; CheYP_cw*C_cw26*(44 - 26)*C_cw26ass_kassC_cw;  // modifiers: CheYP_cw
    C_cw26ass_kassC_cw = 0.1177;
  C_ccw26ass: C_ccw26 => C_ccw27; CheYP_ccw*C_ccw26*(44 - 26)*C_ccw26ass_kassC_cc;  // modifiers: CheYP_ccw
    C_ccw26ass_kassC_cc = 0.1177;
  C_cw27ass: C_cw27 => C_cw28; CheYP_cw*C_cw27*(44 - 27)*C_cw27ass_kassC_cw;  // modifiers: CheYP_cw
    C_cw27ass_kassC_cw = 0.1177;
  C_ccw27ass: C_ccw27 => C_ccw28; CheYP_ccw*C_ccw27*(44 - 27)*C_ccw27ass_kassC_cc;  // modifiers: CheYP_ccw
    C_ccw27ass_kassC_cc = 0.1177;
  C_cw28ass: C_cw28 => C_cw29; CheYP_cw*C_cw28*(44 - 28)*C_cw28ass_kassC_cw;  // modifiers: CheYP_cw
    C_cw28ass_kassC_cw = 0.1177;
  C_ccw28ass: C_ccw28 => C_ccw29; CheYP_ccw*C_ccw28*(44 - 28)*C_ccw28ass_kassC_cc;  // modifiers: CheYP_ccw
    C_ccw28ass_kassC_cc = 0.1177;
  C_cw29ass: C_cw29 => C_cw30; CheYP_cw*C_cw29*(44 - 29)*C_cw29ass_kassC_cw;  // modifiers: CheYP_cw
    C_cw29ass_kassC_cw = 0.1177;
  C_ccw29ass: C_ccw29 => C_ccw30; CheYP_ccw*C_ccw29*(44 - 29)*C_ccw29ass_kassC_cc;  // modifiers: CheYP_ccw
    C_ccw29ass_kassC_cc = 0.1177;
  C_cw30ass: C_cw30 => C_cw31; CheYP_cw*C_cw30*(44 - 30)*C_cw30ass_kassC_cw;  // modifiers: CheYP_cw
    C_cw30ass_kassC_cw = 0.1177;
  C_ccw30ass: C_ccw30 => C_ccw31; CheYP_ccw*C_ccw30*(44 - 30)*C_ccw30ass_kassC_cc;  // modifiers: CheYP_ccw
    C_ccw30ass_kassC_cc = 0.1177;
  C_cw31ass: C_cw31 => C_cw32; CheYP_cw*C_cw31*(44 - 31)*C_cw31ass_kassC_cw;  // modifiers: CheYP_cw
    C_cw31ass_kassC_cw = 0.1177;
  C_ccw31ass: C_ccw31 => C_ccw32; CheYP_ccw*C_ccw31*(44 - 31)*C_ccw31ass_kassC_cc;  // modifiers: CheYP_ccw
    C_ccw31ass_kassC_cc = 0.1177;
  C_cw32ass: C_cw32 => C_cw33; CheYP_cw*C_cw32*(44 - 32)*C_cw32ass_kassC_cw;  // modifiers: CheYP_cw
    C_cw32ass_kassC_cw = 0.1177;
  C_ccw32ass: C_ccw32 => C_ccw33; CheYP_ccw*C_ccw32*(44 - 32)*C_ccw32ass_kassC_cc;  // modifiers: CheYP_ccw
    C_ccw32ass_kassC_cc = 0.1177;
  C_cw33ass: C_cw33 => C_cw34; CheYP_cw*C_cw33*(44 - 33)*C_cw33ass_kassC_cw;  // modifiers: CheYP_cw
    C_cw33ass_kassC_cw = 0.1177;
  C_ccw33ass: C_ccw33 => C_ccw34; CheYP_ccw*C_ccw33*(44 - 33)*C_ccw33ass_kassC_cc;  // modifiers: CheYP_ccw
    C_ccw33ass_kassC_cc = 0.1177;
  C_cw34ass: C_cw34 => C_cw35; CheYP_cw*C_cw34*(44 - 34)*C_cw34ass_kassC_cw;  // modifiers: CheYP_cw
    C_cw34ass_kassC_cw = 0.1177;
  C_ccw34ass: C_ccw34 => C_ccw35; CheYP_ccw*C_ccw34*(44 - 34)*C_ccw34ass_kassC_cc;  // modifiers: CheYP_ccw
    C_ccw34ass_kassC_cc = 0.1177;
  C_cw35ass: C_cw35 => C_cw36; CheYP_cw*C_cw35*(44 - 35)*C_cw35ass_kassC_cw;  // modifiers: CheYP_cw
    C_cw35ass_kassC_cw = 0.1177;
  C_ccw35ass: C_ccw35 => C_ccw36; CheYP_ccw*C_ccw35*(44 - 35)*C_ccw35ass_kassC_cc;  // modifiers: CheYP_ccw
    C_ccw35ass_kassC_cc = 0.1177;
  C_cw36ass: C_cw36 => C_cw37; CheYP_cw*C_cw36*(44 - 36)*C_cw36ass_kassC_cw;  // modifiers: CheYP_cw
    C_cw36ass_kassC_cw = 0.1177;
  C_ccw36ass: C_ccw36 => C_ccw37; CheYP_ccw*C_ccw36*(44 - 36)*C_ccw36ass_kassC_cc;  // modifiers: CheYP_ccw
    C_ccw36ass_kassC_cc = 0.1177;
  C_cw37ass: C_cw37 => C_cw38; CheYP_cw*C_cw37*(44 - 37)*C_cw37ass_kassC_cw;  // modifiers: CheYP_cw
    C_cw37ass_kassC_cw = 0.1177;
  C_ccw37ass: C_ccw37 => C_ccw38; CheYP_ccw*C_ccw37*(44 - 37)*C_ccw37ass_kassC_cc;  // modifiers: CheYP_ccw
    C_ccw37ass_kassC_cc = 0.1177;
  C_cw38ass: C_cw38 => C_cw39; CheYP_cw*C_cw38*(44 - 38)*C_cw38ass_kassC_cw;  // modifiers: CheYP_cw
    C_cw38ass_kassC_cw = 0.1177;
  C_ccw38ass: C_ccw38 => C_ccw39; CheYP_ccw*C_ccw38*(44 - 38)*C_ccw38ass_kassC_cc;  // modifiers: CheYP_ccw
    C_ccw38ass_kassC_cc = 0.1177;
  C_cw39ass: C_cw39 => C_cw40; CheYP_cw*C_cw39*(44 - 39)*C_cw39ass_kassC_cw;  // modifiers: CheYP_cw
    C_cw39ass_kassC_cw = 0.1177;
  C_ccw39ass: C_ccw39 => C_ccw40; CheYP_ccw*C_ccw39*(44 - 39)*C_ccw39ass_kassC_cc;  // modifiers: CheYP_ccw
    C_ccw39ass_kassC_cc = 0.1177;
  C_cw40ass: C_cw40 => C_cw41; CheYP_cw*C_cw40*(44 - 40)*C_cw40ass_kassC_cw;  // modifiers: CheYP_cw
    C_cw40ass_kassC_cw = 0.1177;
  C_ccw40ass: C_ccw40 => C_ccw41; CheYP_ccw*C_ccw40*(44 - 40)*C_ccw40ass_kassC_cc;  // modifiers: CheYP_ccw
    C_ccw40ass_kassC_cc = 0.1177;
  C_cw41ass: C_cw41 => C_cw42; CheYP_cw*C_cw41*(44 - 41)*C_cw41ass_kassC_cw;  // modifiers: CheYP_cw
    C_cw41ass_kassC_cw = 0.1177;
  C_ccw41ass: C_ccw41 => C_ccw42; CheYP_ccw*C_ccw41*(44 - 41)*C_ccw41ass_kassC_cc;  // modifiers: CheYP_ccw
    C_ccw41ass_kassC_cc = 0.1177;
  C_cw42ass: C_cw42 => C_cw43; CheYP_cw*C_cw42*(44 - 42)*C_cw42ass_kassC_cw;  // modifiers: CheYP_cw
    C_cw42ass_kassC_cw = 0.1177;
  C_ccw42ass: C_ccw42 => C_ccw43; CheYP_ccw*C_ccw42*(44 - 42)*C_ccw42ass_kassC_cc;  // modifiers: CheYP_ccw
    C_ccw42ass_kassC_cc = 0.1177;
  C_cw43ass: C_cw43 => C_cw44; CheYP_cw*C_cw43*(44 - 43)*C_cw43ass_kassC_cw;  // modifiers: CheYP_cw
    C_cw43ass_kassC_cw = 0.1177;
  C_ccw43ass: C_ccw43 => C_ccw44; CheYP_ccw*C_ccw43*(44 - 43)*C_ccw43ass_kassC_cc;  // modifiers: CheYP_ccw
    C_ccw43ass_kassC_cc = 0.1177;
  C_cw1diss: C_cw1 => C_cw0; C_cw1*1*C_cw1diss_kdissC_cw;
    C_cw1diss_kdissC_cw = 0.03338;
  C_ccw1diss: C_ccw1 => C_ccw0; C_ccw1*1*C_ccw1diss_kdissC_cc;
    C_ccw1diss_kdissC_cc = 0.03338;
  C_cw2diss: C_cw2 => C_cw1; C_cw2*2*C_cw2diss_kdissC_cw;
    C_cw2diss_kdissC_cw = 0.03338;
  C_ccw2diss: C_ccw2 => C_ccw1; C_ccw2*2*C_ccw2diss_kdissC_cc;
    C_ccw2diss_kdissC_cc = 0.03338;
  C_cw3diss: C_cw3 => C_cw2; C_cw3*3*C_cw3diss_kdissC_cw;
    C_cw3diss_kdissC_cw = 0.03338;
  C_ccw3diss: C_ccw3 => C_ccw2; C_ccw3*3*C_ccw3diss_kdissC_cc;
    C_ccw3diss_kdissC_cc = 0.03338;
  C_cw4diss: C_cw4 => C_cw3; C_cw4*4*C_cw4diss_kdissC_cw;
    C_cw4diss_kdissC_cw = 0.03338;
  C_ccw4diss: C_ccw4 => C_ccw3; C_ccw4*4*C_ccw4diss_kdissC_cc;
    C_ccw4diss_kdissC_cc = 0.03338;
  C_cw5diss: C_cw5 => C_cw4; C_cw5*5*C_cw5diss_kdissC_cw;
    C_cw5diss_kdissC_cw = 0.03338;
  C_ccw5diss: C_ccw5 => C_ccw4; C_ccw5*5*C_ccw5diss_kdissC_cc;
    C_ccw5diss_kdissC_cc = 0.03338;
  C_cw6diss: C_cw6 => C_cw5; C_cw6*6*C_cw6diss_kdissC_cw;
    C_cw6diss_kdissC_cw = 0.03338;
  C_ccw6diss: C_ccw6 => C_ccw5; C_ccw6*6*C_ccw6diss_kdissC_cc;
    C_ccw6diss_kdissC_cc = 0.03338;
  C_cw7diss: C_cw7 => C_cw6; C_cw7*7*C_cw7diss_kdissC_cw;
    C_cw7diss_kdissC_cw = 0.03338;
  C_ccw7diss: C_ccw7 => C_ccw6; C_ccw7*7*C_ccw7diss_kdissC_cc;
    C_ccw7diss_kdissC_cc = 0.03338;
  C_cw8diss: C_cw8 => C_cw7; C_cw8*8*C_cw8diss_kdissC_cw;
    C_cw8diss_kdissC_cw = 0.03338;
  C_ccw8diss: C_ccw8 => C_ccw7; C_ccw8*8*C_ccw8diss_kdissC_cc;
    C_ccw8diss_kdissC_cc = 0.03338;
  C_cw9diss: C_cw9 => C_cw8; C_cw9*9*C_cw9diss_kdissC_cw;
    C_cw9diss_kdissC_cw = 0.03338;
  C_ccw9diss: C_ccw9 => C_ccw8; C_ccw9*9*C_ccw9diss_kdissC_cc;
    C_ccw9diss_kdissC_cc = 0.03338;
  C_cw10diss: C_cw10 => C_cw9; C_cw10*10*C_cw10diss_kdissC_cw;
    C_cw10diss_kdissC_cw = 0.03338;
  C_ccw10diss: C_ccw10 => C_ccw9; C_ccw10*10*C_ccw10diss_kdissC_cc;
    C_ccw10diss_kdissC_cc = 0.03338;
  C_cw11diss: C_cw11 => C_cw10; C_cw11*11*C_cw11diss_kdissC_cw;
    C_cw11diss_kdissC_cw = 0.03338;
  C_ccw11diss: C_ccw11 => C_ccw10; C_ccw11*11*C_ccw11diss_kdissC_cc;
    C_ccw11diss_kdissC_cc = 0.03338;
  C_cw12diss: C_cw12 => C_cw11; C_cw12*12*C_cw12diss_kdissC_cw;
    C_cw12diss_kdissC_cw = 0.03338;
  C_ccw12diss: C_ccw12 => C_ccw11; C_ccw12*12*C_ccw12diss_kdissC_cc;
    C_ccw12diss_kdissC_cc = 0.03338;
  C_cw13diss: C_cw13 => C_cw12; C_cw13*13*C_cw13diss_kdissC_cw;
    C_cw13diss_kdissC_cw = 0.03338;
  C_ccw13diss: C_ccw13 => C_ccw12; C_ccw13*13*C_ccw13diss_kdissC_cc;
    C_ccw13diss_kdissC_cc = 0.03338;
  C_cw14diss: C_cw14 => C_cw13; C_cw14*14*C_cw14diss_kdissC_cw;
    C_cw14diss_kdissC_cw = 0.03338;
  C_ccw14diss: C_ccw14 => C_ccw13; C_ccw14*14*C_ccw14diss_kdissC_cc;
    C_ccw14diss_kdissC_cc = 0.03338;
  C_cw15diss: C_cw15 => C_cw14; C_cw15*15*C_cw15diss_kdissC_cw;
    C_cw15diss_kdissC_cw = 0.03338;
  C_ccw15diss: C_ccw15 => C_ccw14; C_ccw15*15*C_ccw15diss_kdissC_cc;
    C_ccw15diss_kdissC_cc = 0.03338;
  C_cw16diss: C_cw16 => C_cw15; C_cw16*16*C_cw16diss_kdissC_cw;
    C_cw16diss_kdissC_cw = 0.03338;
  C_ccw16diss: C_ccw16 => C_ccw15; C_ccw16*16*C_ccw16diss_kdissC_cc;
    C_ccw16diss_kdissC_cc = 0.03338;
  C_cw17diss: C_cw17 => C_cw16; C_cw17*17*C_cw17diss_kdissC_cw;
    C_cw17diss_kdissC_cw = 0.03338;
  C_ccw17diss: C_ccw17 => C_ccw16; C_ccw17*17*C_ccw17diss_kdissC_cc;
    C_ccw17diss_kdissC_cc = 0.03338;
  C_cw18diss: C_cw18 => C_cw17; C_cw18*18*C_cw18diss_kdissC_cw;
    C_cw18diss_kdissC_cw = 0.03338;
  C_ccw18diss: C_ccw18 => C_ccw17; C_ccw18*18*C_ccw18diss_kdissC_cc;
    C_ccw18diss_kdissC_cc = 0.03338;
  C_cw19diss: C_cw19 => C_cw18; C_cw19*19*C_cw19diss_kdissC_cw;
    C_cw19diss_kdissC_cw = 0.03338;
  C_ccw19diss: C_ccw19 => C_ccw18; C_ccw19*19*C_ccw19diss_kdissC_cc;
    C_ccw19diss_kdissC_cc = 0.03338;
  C_cw20diss: C_cw20 => C_cw19; C_cw20*20*C_cw20diss_kdissC_cw;
    C_cw20diss_kdissC_cw = 0.03338;
  C_ccw20diss: C_ccw20 => C_ccw19; C_ccw20*20*C_ccw20diss_kdissC_cc;
    C_ccw20diss_kdissC_cc = 0.03338;
  C_cw21diss: C_cw21 => C_cw20; C_cw21*21*C_cw21diss_kdissC_cw;
    C_cw21diss_kdissC_cw = 0.03338;
  C_ccw21diss: C_ccw21 => C_ccw20; C_ccw21*21*C_ccw21diss_kdissC_cc;
    C_ccw21diss_kdissC_cc = 0.03338;
  C_cw22diss: C_cw22 => C_cw21; C_cw22*22*C_cw22diss_kdissC_cw;
    C_cw22diss_kdissC_cw = 0.03338;
  C_ccw22diss: C_ccw22 => C_ccw21; C_ccw22*22*C_ccw22diss_kdissC_cc;
    C_ccw22diss_kdissC_cc = 0.03338;
  C_cw23diss: C_cw23 => C_cw22; C_cw23*23*C_cw23diss_kdissC_cw;
    C_cw23diss_kdissC_cw = 0.03338;
  C_ccw23diss: C_ccw23 => C_ccw22; C_ccw23*23*C_ccw23diss_kdissC_cc;
    C_ccw23diss_kdissC_cc = 0.03338;
  C_cw24diss: C_cw24 => C_cw23; C_cw24*24*C_cw24diss_kdissC_cw;
    C_cw24diss_kdissC_cw = 0.03338;
  C_ccw24diss: C_ccw24 => C_ccw23; C_ccw24*24*C_ccw24diss_kdissC_cc;
    C_ccw24diss_kdissC_cc = 0.03338;
  C_cw25diss: C_cw25 => C_cw24; C_cw25*25*C_cw25diss_kdissC_cw;
    C_cw25diss_kdissC_cw = 0.03338;
  C_ccw25diss: C_ccw25 => C_ccw24; C_ccw25*25*C_ccw25diss_kdissC_cc;
    C_ccw25diss_kdissC_cc = 0.03338;
  C_cw26diss: C_cw26 => C_cw25; C_cw26*26*C_cw26diss_kdissC_cw;
    C_cw26diss_kdissC_cw = 0.03338;
  C_ccw26diss: C_ccw26 => C_ccw25; C_ccw26*26*C_ccw26diss_kdissC_cc;
    C_ccw26diss_kdissC_cc = 0.03338;
  C_cw27diss: C_cw27 => C_cw26; C_cw27*27*C_cw27diss_kdissC_cw;
    C_cw27diss_kdissC_cw = 0.03338;
  C_ccw27diss: C_ccw27 => C_ccw26; C_ccw27*27*C_ccw27diss_kdissC_cc;
    C_ccw27diss_kdissC_cc = 0.03338;
  C_cw28diss: C_cw28 => C_cw27; C_cw28*28*C_cw28diss_kdissC_cw;
    C_cw28diss_kdissC_cw = 0.03338;
  C_ccw28diss: C_ccw28 => C_ccw27; C_ccw28*28*C_ccw28diss_kdissC_cc;
    C_ccw28diss_kdissC_cc = 0.03338;
  C_cw29diss: C_cw29 => C_cw28; C_cw29*29*C_cw29diss_kdissC_cw;
    C_cw29diss_kdissC_cw = 0.03338;
  C_ccw29diss: C_ccw29 => C_ccw28; C_ccw29*29*C_ccw29diss_kdissC_cc;
    C_ccw29diss_kdissC_cc = 0.03338;
  C_cw30diss: C_cw30 => C_cw29; C_cw30*30*C_cw30diss_kdissC_cw;
    C_cw30diss_kdissC_cw = 0.03338;
  C_ccw30diss: C_ccw30 => C_ccw29; C_ccw30*30*C_ccw30diss_kdissC_cc;
    C_ccw30diss_kdissC_cc = 0.03338;
  C_cw31diss: C_cw31 => C_cw30; C_cw31*31*C_cw31diss_kdissC_cw;
    C_cw31diss_kdissC_cw = 0.03338;
  C_ccw31diss: C_ccw31 => C_ccw30; C_ccw31*31*C_ccw31diss_kdissC_cc;
    C_ccw31diss_kdissC_cc = 0.03338;
  C_cw32diss: C_cw32 => C_cw31; C_cw32*32*C_cw32diss_kdissC_cw;
    C_cw32diss_kdissC_cw = 0.03338;
  C_ccw32diss: C_ccw32 => C_ccw31; C_ccw32*32*C_ccw32diss_kdissC_cc;
    C_ccw32diss_kdissC_cc = 0.03338;
  C_cw33diss: C_cw33 => C_cw32; C_cw33*33*C_cw33diss_kdissC_cw;
    C_cw33diss_kdissC_cw = 0.03338;
  C_ccw33diss: C_ccw33 => C_ccw32; C_ccw33*33*C_ccw33diss_kdissC_cc;
    C_ccw33diss_kdissC_cc = 0.03338;
  C_cw34diss: C_cw34 => C_cw33; C_cw34*34*C_cw34diss_kdissC_cw;
    C_cw34diss_kdissC_cw = 0.03338;
  C_ccw34diss: C_ccw34 => C_ccw33; C_ccw34*34*C_ccw34diss_kdissC_cc;
    C_ccw34diss_kdissC_cc = 0.03338;
  C_cw35diss: C_cw35 => C_cw34; C_cw35*35*C_cw35diss_kdissC_cw;
    C_cw35diss_kdissC_cw = 0.03338;
  C_ccw35diss: C_ccw35 => C_ccw34; C_ccw35*35*C_ccw35diss_kdissC_cc;
    C_ccw35diss_kdissC_cc = 0.03338;
  C_cw36diss: C_cw36 => C_cw35; C_cw36*36*C_cw36diss_kdissC_cw;
    C_cw36diss_kdissC_cw = 0.03338;
  C_ccw36diss: C_ccw36 => C_ccw35; C_ccw36*36*C_ccw36diss_kdissC_cc;
    C_ccw36diss_kdissC_cc = 0.03338;
  C_cw37diss: C_cw37 => C_cw36; C_cw37*37*C_cw37diss_kdissC_cw;
    C_cw37diss_kdissC_cw = 0.03338;
  C_ccw37diss: C_ccw37 => C_ccw36; C_ccw37*37*C_ccw37diss_kdissC_cc;
    C_ccw37diss_kdissC_cc = 0.03338;
  C_cw38diss: C_cw38 => C_cw37; C_cw38*38*C_cw38diss_kdissC_cw;
    C_cw38diss_kdissC_cw = 0.03338;
  C_ccw38diss: C_ccw38 => C_ccw37; C_ccw38*38*C_ccw38diss_kdissC_cc;
    C_ccw38diss_kdissC_cc = 0.03338;
  C_cw39diss: C_cw39 => C_cw38; C_cw39*39*C_cw39diss_kdissC_cw;
    C_cw39diss_kdissC_cw = 0.03338;
  C_ccw39diss: C_ccw39 => C_ccw38; C_ccw39*39*C_ccw39diss_kdissC_cc;
    C_ccw39diss_kdissC_cc = 0.03338;
  C_cw40diss: C_cw40 => C_cw39; C_cw40*40*C_cw40diss_kdissC_cw;
    C_cw40diss_kdissC_cw = 0.03338;
  C_ccw40diss: C_ccw40 => C_ccw39; C_ccw40*40*C_ccw40diss_kdissC_cc;
    C_ccw40diss_kdissC_cc = 0.03338;
  C_cw41diss: C_cw41 => C_cw40; C_cw41*41*C_cw41diss_kdissC_cw;
    C_cw41diss_kdissC_cw = 0.03338;
  C_ccw41diss: C_ccw41 => C_ccw40; C_ccw41*41*C_ccw41diss_kdissC_cc;
    C_ccw41diss_kdissC_cc = 0.03338;
  C_cw42diss: C_cw42 => C_cw41; C_cw42*42*C_cw42diss_kdissC_cw;
    C_cw42diss_kdissC_cw = 0.03338;
  C_ccw42diss: C_ccw42 => C_ccw41; C_ccw42*42*C_ccw42diss_kdissC_cc;
    C_ccw42diss_kdissC_cc = 0.03338;
  C_cw43diss: C_cw43 => C_cw42; C_cw43*43*C_cw43diss_kdissC_cw;
    C_cw43diss_kdissC_cw = 0.03338;
  C_ccw43diss: C_ccw43 => C_ccw42; C_ccw43*43*C_ccw43diss_kdissC_cc;
    C_ccw43diss_kdissC_cc = 0.03338;
  C_cw44diss: C_cw44 => C_cw43; C_cw44*44*C_cw44diss_kdissC_cw;
    C_cw44diss_kdissC_cw = 0.03338;
  C_ccw44diss: C_ccw44 => C_ccw43; C_ccw44*44*C_ccw44diss_kdissC_cc;
    C_ccw44diss_kdissC_cc = 0.03338;
  C_cw0toA0_cw: C_cw0 => A_cw0; C_cw0*C_cw0toA0_cw_k20_cw*exp(0*C_cw0toA0_cw_C_cw);
    C_cw0toA0_cw_k20_cw = 2.07e-9; C_cw0toA0_cw_C_cw = 0.6;
  C_ccw0toA0_ccw: C_ccw0 => A_ccw0; C_ccw0*C_ccw0toA0_ccw_k20_cc*exp(0*C_ccw0toA0_ccw_C_cc);
    C_ccw0toA0_ccw_k20_cc = 2.07e-9; C_ccw0toA0_ccw_C_cc = 0.6;
  C_cw1toA0_cw: C_cw1 => A_cw0; C_cw1*C_cw1toA0_cw_k20_cw*exp(1*C_cw1toA0_cw_C_cw);
    C_cw1toA0_cw_k20_cw = 2.07e-9; C_cw1toA0_cw_C_cw = 0.6;
  C_ccw1toA0_ccw: C_ccw1 => A_ccw0; C_ccw1*C_ccw1toA0_ccw_k20_cc*exp(1*C_ccw1toA0_ccw_C_cc);
    C_ccw1toA0_ccw_k20_cc = 2.07e-9; C_ccw1toA0_ccw_C_cc = 0.6;
  C_cw2toA0_cw: C_cw2 => A_cw0; C_cw2*C_cw2toA0_cw_k20_cw*exp(2*C_cw2toA0_cw_C_cw);
    C_cw2toA0_cw_k20_cw = 2.07e-9; C_cw2toA0_cw_C_cw = 0.6;
  C_ccw2toA0_ccw: C_ccw2 => A_ccw0; C_ccw2*C_ccw2toA0_ccw_k20_cc*exp(2*C_ccw2toA0_ccw_C_cc);
    C_ccw2toA0_ccw_k20_cc = 2.07e-9; C_ccw2toA0_ccw_C_cc = 0.6;
  C_cw3toA0_cw: C_cw3 => A_cw0; C_cw3*C_cw3toA0_cw_k20_cw*exp(3*C_cw3toA0_cw_C_cw);
    C_cw3toA0_cw_k20_cw = 2.07e-9; C_cw3toA0_cw_C_cw = 0.6;
  C_ccw3toA0_ccw: C_ccw3 => A_ccw0; C_ccw3*C_ccw3toA0_ccw_k20_cc*exp(3*C_ccw3toA0_ccw_C_cc);
    C_ccw3toA0_ccw_k20_cc = 2.07e-9; C_ccw3toA0_ccw_C_cc = 0.6;
  C_cw4toA0_cw: C_cw4 => A_cw0; C_cw4*C_cw4toA0_cw_k20_cw*exp(4*C_cw4toA0_cw_C_cw);
    C_cw4toA0_cw_k20_cw = 2.07e-9; C_cw4toA0_cw_C_cw = 0.6;
  C_ccw4toA0_ccw: C_ccw4 => A_ccw0; C_ccw4*C_ccw4toA0_ccw_k20_cc*exp(4*C_ccw4toA0_ccw_C_cc);
    C_ccw4toA0_ccw_k20_cc = 2.07e-9; C_ccw4toA0_ccw_C_cc = 0.6;
  C_cw5toA0_cw: C_cw5 => A_cw0; C_cw5*C_cw5toA0_cw_k20_cw*exp(5*C_cw5toA0_cw_C_cw);
    C_cw5toA0_cw_k20_cw = 2.07e-9; C_cw5toA0_cw_C_cw = 0.6;
  C_ccw5toA0_ccw: C_ccw5 => A_ccw0; C_ccw5*C_ccw5toA0_ccw_k20_cc*exp(5*C_ccw5toA0_ccw_C_cc);
    C_ccw5toA0_ccw_k20_cc = 2.07e-9; C_ccw5toA0_ccw_C_cc = 0.6;
  C_cw6toA0_cw: C_cw6 => A_cw0; C_cw6*C_cw6toA0_cw_k20_cw*exp(6*C_cw6toA0_cw_C_cw);
    C_cw6toA0_cw_k20_cw = 2.07e-9; C_cw6toA0_cw_C_cw = 0.6;
  C_ccw6toA0_ccw: C_ccw6 => A_ccw0; C_ccw6*C_ccw6toA0_ccw_k20_cc*exp(6*C_ccw6toA0_ccw_C_cc);
    C_ccw6toA0_ccw_k20_cc = 2.07e-9; C_ccw6toA0_ccw_C_cc = 0.6;
  C_cw7toA0_cw: C_cw7 => A_cw0; C_cw7*C_cw7toA0_cw_k20_cw*exp(7*C_cw7toA0_cw_C_cw);
    C_cw7toA0_cw_k20_cw = 2.07e-9; C_cw7toA0_cw_C_cw = 0.6;
  C_ccw7toA0_ccw: C_ccw7 => A_ccw0; C_ccw7*C_ccw7toA0_ccw_k20_cc*exp(7*C_ccw7toA0_ccw_C_cc);
    C_ccw7toA0_ccw_k20_cc = 2.07e-9; C_ccw7toA0_ccw_C_cc = 0.6;
  C_cw8toA0_cw: C_cw8 => A_cw0; C_cw8*C_cw8toA0_cw_k20_cw*exp(8*C_cw8toA0_cw_C_cw);
    C_cw8toA0_cw_k20_cw = 2.07e-9; C_cw8toA0_cw_C_cw = 0.6;
  C_ccw8toA0_ccw: C_ccw8 => A_ccw0; C_ccw8*C_ccw8toA0_ccw_k20_cc*exp(8*C_ccw8toA0_ccw_C_cc);
    C_ccw8toA0_ccw_k20_cc = 2.07e-9; C_ccw8toA0_ccw_C_cc = 0.6;
  C_cw9toA0_cw: C_cw9 => A_cw0; C_cw9*C_cw9toA0_cw_k20_cw*exp(9*C_cw9toA0_cw_C_cw);
    C_cw9toA0_cw_k20_cw = 2.07e-9; C_cw9toA0_cw_C_cw = 0.6;
  C_ccw9toA0_ccw: C_ccw9 => A_ccw0; C_ccw9*C_ccw9toA0_ccw_k20_cc*exp(9*C_ccw9toA0_ccw_C_cc);
    C_ccw9toA0_ccw_k20_cc = 2.07e-9; C_ccw9toA0_ccw_C_cc = 0.6;
  C_cw10toA0_cw: C_cw10 => A_cw0; C_cw10*C_cw10toA0_cw_k20_cw*exp(10*C_cw10toA0_cw_C_cw);
    C_cw10toA0_cw_k20_cw = 2.07e-9; C_cw10toA0_cw_C_cw = 0.6;
  C_ccw10toA0_ccw: C_ccw10 => A_ccw0; C_ccw10*C_ccw10toA0_ccw_k20_cc*exp(10*C_ccw10toA0_ccw_C_cc);
    C_ccw10toA0_ccw_k20_cc = 2.07e-9; C_ccw10toA0_ccw_C_cc = 0.6;
  C_cw11toA0_cw: C_cw11 => A_cw0; C_cw11*C_cw11toA0_cw_k20_cw*exp(11*C_cw11toA0_cw_C_cw);
    C_cw11toA0_cw_k20_cw = 2.07e-9; C_cw11toA0_cw_C_cw = 0.6;
  C_ccw11toA0_ccw: C_ccw11 => A_ccw0; C_ccw11*C_ccw11toA0_ccw_k20_cc*exp(11*C_ccw11toA0_ccw_C_cc);
    C_ccw11toA0_ccw_k20_cc = 2.07e-9; C_ccw11toA0_ccw_C_cc = 0.6;
  C_cw12toA0_cw: C_cw12 => A_cw0; C_cw12*C_cw12toA0_cw_k20_cw*exp(12*C_cw12toA0_cw_C_cw);
    C_cw12toA0_cw_k20_cw = 2.07e-9; C_cw12toA0_cw_C_cw = 0.6;
  C_ccw12toA0_ccw: C_ccw12 => A_ccw0; C_ccw12*C_ccw12toA0_ccw_k20_cc*exp(12*C_ccw12toA0_ccw_C_cc);
    C_ccw12toA0_ccw_k20_cc = 2.07e-9; C_ccw12toA0_ccw_C_cc = 0.6;
  C_cw13toA0_cw: C_cw13 => A_cw0; C_cw13*C_cw13toA0_cw_k20_cw*exp(13*C_cw13toA0_cw_C_cw);
    C_cw13toA0_cw_k20_cw = 2.07e-9; C_cw13toA0_cw_C_cw = 0.6;
  C_ccw13toA0_ccw: C_ccw13 => A_ccw0; C_ccw13*C_ccw13toA0_ccw_k20_cc*exp(13*C_ccw13toA0_ccw_C_cc);
    C_ccw13toA0_ccw_k20_cc = 2.07e-9; C_ccw13toA0_ccw_C_cc = 0.6;
  C_cw14toA0_cw: C_cw14 => A_cw0; C_cw14*C_cw14toA0_cw_k20_cw*exp(14*C_cw14toA0_cw_C_cw);
    C_cw14toA0_cw_k20_cw = 2.07e-9; C_cw14toA0_cw_C_cw = 0.6;
  C_ccw14toA0_ccw: C_ccw14 => A_ccw0; C_ccw14*C_ccw14toA0_ccw_k20_cc*exp(14*C_ccw14toA0_ccw_C_cc);
    C_ccw14toA0_ccw_k20_cc = 2.07e-9; C_ccw14toA0_ccw_C_cc = 0.6;
  C_cw15toA0_cw: C_cw15 => A_cw0; C_cw15*C_cw15toA0_cw_k20_cw*exp(15*C_cw15toA0_cw_C_cw);
    C_cw15toA0_cw_k20_cw = 2.07e-9; C_cw15toA0_cw_C_cw = 0.6;
  C_ccw15toA0_ccw: C_ccw15 => A_ccw0; C_ccw15*C_ccw15toA0_ccw_k20_cc*exp(15*C_ccw15toA0_ccw_C_cc);
    C_ccw15toA0_ccw_k20_cc = 2.07e-9; C_ccw15toA0_ccw_C_cc = 0.6;
  C_cw16toA0_cw: C_cw16 => A_cw0; C_cw16*C_cw16toA0_cw_k20_cw*exp(16*C_cw16toA0_cw_C_cw);
    C_cw16toA0_cw_k20_cw = 2.07e-9; C_cw16toA0_cw_C_cw = 0.6;
  C_ccw16toA0_ccw: C_ccw16 => A_ccw0; C_ccw16*C_ccw16toA0_ccw_k20_cc*exp(16*C_ccw16toA0_ccw_C_cc);
    C_ccw16toA0_ccw_k20_cc = 2.07e-9; C_ccw16toA0_ccw_C_cc = 0.6;
  C_cw17toA0_cw: C_cw17 => A_cw0; C_cw17*C_cw17toA0_cw_k20_cw*exp(17*C_cw17toA0_cw_C_cw);
    C_cw17toA0_cw_k20_cw = 2.07e-9; C_cw17toA0_cw_C_cw = 0.6;
  C_ccw17toA0_ccw: C_ccw17 => A_ccw0; C_ccw17*C_ccw17toA0_ccw_k20_cc*exp(17*C_ccw17toA0_ccw_C_cc);
    C_ccw17toA0_ccw_k20_cc = 2.07e-9; C_ccw17toA0_ccw_C_cc = 0.6;
  C_cw18toA0_cw: C_cw18 => A_cw0; C_cw18*C_cw18toA0_cw_k20_cw*exp(18*C_cw18toA0_cw_C_cw);
    C_cw18toA0_cw_k20_cw = 2.07e-9; C_cw18toA0_cw_C_cw = 0.6;
  C_ccw18toA0_ccw: C_ccw18 => A_ccw0; C_ccw18*C_ccw18toA0_ccw_k20_cc*exp(18*C_ccw18toA0_ccw_C_cc);
    C_ccw18toA0_ccw_k20_cc = 2.07e-9; C_ccw18toA0_ccw_C_cc = 0.6;
  C_cw19toA0_cw: C_cw19 => A_cw0; C_cw19*C_cw19toA0_cw_k20_cw*exp(19*C_cw19toA0_cw_C_cw);
    C_cw19toA0_cw_k20_cw = 2.07e-9; C_cw19toA0_cw_C_cw = 0.6;
  C_ccw19toA0_ccw: C_ccw19 => A_ccw0; C_ccw19*C_ccw19toA0_ccw_k20_cc*exp(19*C_ccw19toA0_ccw_C_cc);
    C_ccw19toA0_ccw_k20_cc = 2.07e-9; C_ccw19toA0_ccw_C_cc = 0.6;
  C_cw20toA0_cw: C_cw20 => A_cw0; C_cw20*C_cw20toA0_cw_k20_cw*exp(20*C_cw20toA0_cw_C_cw);
    C_cw20toA0_cw_k20_cw = 2.07e-9; C_cw20toA0_cw_C_cw = 0.6;
  C_ccw20toA0_ccw: C_ccw20 => A_ccw0; C_ccw20*C_ccw20toA0_ccw_k20_cc*exp(20*C_ccw20toA0_ccw_C_cc);
    C_ccw20toA0_ccw_k20_cc = 2.07e-9; C_ccw20toA0_ccw_C_cc = 0.6;
  C_cw21toA0_cw: C_cw21 => A_cw0; C_cw21*C_cw21toA0_cw_k20_cw*exp(21*C_cw21toA0_cw_C_cw);
    C_cw21toA0_cw_k20_cw = 2.07e-9; C_cw21toA0_cw_C_cw = 0.6;
  C_ccw21toA0_ccw: C_ccw21 => A_ccw0; C_ccw21*C_ccw21toA0_ccw_k20_cc*exp(21*C_ccw21toA0_ccw_C_cc);
    C_ccw21toA0_ccw_k20_cc = 2.07e-9; C_ccw21toA0_ccw_C_cc = 0.6;
  C_cw22toA0_cw: C_cw22 => A_cw0; C_cw22*C_cw22toA0_cw_k20_cw*exp(22*C_cw22toA0_cw_C_cw);
    C_cw22toA0_cw_k20_cw = 2.07e-9; C_cw22toA0_cw_C_cw = 0.6;
  C_ccw22toA0_ccw: C_ccw22 => A_ccw0; C_ccw22*C_ccw22toA0_ccw_k20_cc*exp(22*C_ccw22toA0_ccw_C_cc);
    C_ccw22toA0_ccw_k20_cc = 2.07e-9; C_ccw22toA0_ccw_C_cc = 0.6;
  C_cw23toA0_cw: C_cw23 => A_cw0; C_cw23*C_cw23toA0_cw_k20_cw*exp(23*C_cw23toA0_cw_C_cw);
    C_cw23toA0_cw_k20_cw = 2.07e-9; C_cw23toA0_cw_C_cw = 0.6;
  C_ccw23toA0_ccw: C_ccw23 => A_ccw0; C_ccw23*C_ccw23toA0_ccw_k20_cc*exp(23*C_ccw23toA0_ccw_C_cc);
    C_ccw23toA0_ccw_k20_cc = 2.07e-9; C_ccw23toA0_ccw_C_cc = 0.6;
  C_cw24toA0_cw: C_cw24 => A_cw0; C_cw24*C_cw24toA0_cw_k20_cw*exp(24*C_cw24toA0_cw_C_cw);
    C_cw24toA0_cw_k20_cw = 2.07e-9; C_cw24toA0_cw_C_cw = 0.6;
  C_ccw24toA0_ccw: C_ccw24 => A_ccw0; C_ccw24*C_ccw24toA0_ccw_k20_cc*exp(24*C_ccw24toA0_ccw_C_cc);
    C_ccw24toA0_ccw_k20_cc = 2.07e-9; C_ccw24toA0_ccw_C_cc = 0.6;
  C_cw25toA0_cw: C_cw25 => A_cw0; C_cw25*C_cw25toA0_cw_k20_cw*exp(25*C_cw25toA0_cw_C_cw);
    C_cw25toA0_cw_k20_cw = 2.07e-9; C_cw25toA0_cw_C_cw = 0.6;
  C_ccw25toA0_ccw: C_ccw25 => A_ccw0; C_ccw25*C_ccw25toA0_ccw_k20_cc*exp(25*C_ccw25toA0_ccw_C_cc);
    C_ccw25toA0_ccw_k20_cc = 2.07e-9; C_ccw25toA0_ccw_C_cc = 0.6;
  C_cw26toA0_cw: C_cw26 => A_cw0; C_cw26*C_cw26toA0_cw_k20_cw*exp(26*C_cw26toA0_cw_C_cw);
    C_cw26toA0_cw_k20_cw = 2.07e-9; C_cw26toA0_cw_C_cw = 0.6;
  C_ccw26toA0_ccw: C_ccw26 => A_ccw0; C_ccw26*C_ccw26toA0_ccw_k20_cc*exp(26*C_ccw26toA0_ccw_C_cc);
    C_ccw26toA0_ccw_k20_cc = 2.07e-9; C_ccw26toA0_ccw_C_cc = 0.6;
  C_cw27toA0_cw: C_cw27 => A_cw0; C_cw27*C_cw27toA0_cw_k20_cw*exp(27*C_cw27toA0_cw_C_cw);
    C_cw27toA0_cw_k20_cw = 2.07e-9; C_cw27toA0_cw_C_cw = 0.6;
  C_ccw27toA0_ccw: C_ccw27 => A_ccw0; C_ccw27*C_ccw27toA0_ccw_k20_cc*exp(27*C_ccw27toA0_ccw_C_cc);
    C_ccw27toA0_ccw_k20_cc = 2.07e-9; C_ccw27toA0_ccw_C_cc = 0.6;
  C_cw28toA0_cw: C_cw28 => A_cw0; C_cw28*C_cw28toA0_cw_k20_cw*exp(28*C_cw28toA0_cw_C_cw);
    C_cw28toA0_cw_k20_cw = 2.07e-9; C_cw28toA0_cw_C_cw = 0.6;
  C_ccw28toA0_ccw: C_ccw28 => A_ccw0; C_ccw28*C_ccw28toA0_ccw_k20_cc*exp(28*C_ccw28toA0_ccw_C_cc);
    C_ccw28toA0_ccw_k20_cc = 2.07e-9; C_ccw28toA0_ccw_C_cc = 0.6;
  C_cw29toA0_cw: C_cw29 => A_cw0; C_cw29*C_cw29toA0_cw_k20_cw*exp(29*C_cw29toA0_cw_C_cw);
    C_cw29toA0_cw_k20_cw = 2.07e-9; C_cw29toA0_cw_C_cw = 0.6;
  C_ccw29toA0_ccw: C_ccw29 => A_ccw0; C_ccw29*C_ccw29toA0_ccw_k20_cc*exp(29*C_ccw29toA0_ccw_C_cc);
    C_ccw29toA0_ccw_k20_cc = 2.07e-9; C_ccw29toA0_ccw_C_cc = 0.6;
  C_cw30toA0_cw: C_cw30 => A_cw0; C_cw30*C_cw30toA0_cw_k20_cw*exp(30*C_cw30toA0_cw_C_cw);
    C_cw30toA0_cw_k20_cw = 2.07e-9; C_cw30toA0_cw_C_cw = 0.6;
  C_ccw30toA0_ccw: C_ccw30 => A_ccw0; C_ccw30*C_ccw30toA0_ccw_k20_cc*exp(30*C_ccw30toA0_ccw_C_cc);
    C_ccw30toA0_ccw_k20_cc = 2.07e-9; C_ccw30toA0_ccw_C_cc = 0.6;
  C_cw31toA0_cw: C_cw31 => A_cw0; C_cw31*C_cw31toA0_cw_k20_cw*exp(31*C_cw31toA0_cw_C_cw);
    C_cw31toA0_cw_k20_cw = 2.07e-9; C_cw31toA0_cw_C_cw = 0.6;
  C_ccw31toA0_ccw: C_ccw31 => A_ccw0; C_ccw31*C_ccw31toA0_ccw_k20_cc*exp(31*C_ccw31toA0_ccw_C_cc);
    C_ccw31toA0_ccw_k20_cc = 2.07e-9; C_ccw31toA0_ccw_C_cc = 0.6;
  C_cw32toA0_cw: C_cw32 => A_cw0; C_cw32*C_cw32toA0_cw_k20_cw*exp(32*C_cw32toA0_cw_C_cw);
    C_cw32toA0_cw_k20_cw = 2.07e-9; C_cw32toA0_cw_C_cw = 0.6;
  C_ccw32toA0_ccw: C_ccw32 => A_ccw0; C_ccw32*C_ccw32toA0_ccw_k20_cc*exp(32*C_ccw32toA0_ccw_C_cc);
    C_ccw32toA0_ccw_k20_cc = 2.07e-9; C_ccw32toA0_ccw_C_cc = 0.6;
  C_cw33toA0_cw: C_cw33 => A_cw0; C_cw33*C_cw33toA0_cw_k20_cw*exp(33*C_cw33toA0_cw_C_cw);
    C_cw33toA0_cw_k20_cw = 2.07e-9; C_cw33toA0_cw_C_cw = 0.6;
  C_ccw33toA0_ccw: C_ccw33 => A_ccw0; C_ccw33*C_ccw33toA0_ccw_k20_cc*exp(33*C_ccw33toA0_ccw_C_cc);
    C_ccw33toA0_ccw_k20_cc = 2.07e-9; C_ccw33toA0_ccw_C_cc = 0.6;
  C_cw34toA0_cw: C_cw34 => A_cw0; C_cw34*C_cw34toA0_cw_k20_cw*exp(34*C_cw34toA0_cw_C_cw);
    C_cw34toA0_cw_k20_cw = 2.07e-9; C_cw34toA0_cw_C_cw = 0.6;
  C_ccw34toA0_ccw: C_ccw34 => A_ccw0; C_ccw34*C_ccw34toA0_ccw_k20_cc*exp(34*C_ccw34toA0_ccw_C_cc);
    C_ccw34toA0_ccw_k20_cc = 2.07e-9; C_ccw34toA0_ccw_C_cc = 0.6;
  C_cw35toA0_cw: C_cw35 => A_cw0; C_cw35*C_cw35toA0_cw_k20_cw*exp(35*C_cw35toA0_cw_C_cw);
    C_cw35toA0_cw_k20_cw = 2.07e-9; C_cw35toA0_cw_C_cw = 0.6;
  C_ccw35toA0_ccw: C_ccw35 => A_ccw0; C_ccw35*C_ccw35toA0_ccw_k20_cc*exp(35*C_ccw35toA0_ccw_C_cc);
    C_ccw35toA0_ccw_k20_cc = 2.07e-9; C_ccw35toA0_ccw_C_cc = 0.6;
  C_cw36toA0_cw: C_cw36 => A_cw0; C_cw36*C_cw36toA0_cw_k20_cw*exp(36*C_cw36toA0_cw_C_cw);
    C_cw36toA0_cw_k20_cw = 2.07e-9; C_cw36toA0_cw_C_cw = 0.6;
  C_ccw36toA0_ccw: C_ccw36 => A_ccw0; C_ccw36*C_ccw36toA0_ccw_k20_cc*exp(36*C_ccw36toA0_ccw_C_cc);
    C_ccw36toA0_ccw_k20_cc = 2.07e-9; C_ccw36toA0_ccw_C_cc = 0.6;
  C_cw37toA0_cw: C_cw37 => A_cw0; C_cw37*C_cw37toA0_cw_k20_cw*exp(37*C_cw37toA0_cw_C_cw);
    C_cw37toA0_cw_k20_cw = 2.07e-9; C_cw37toA0_cw_C_cw = 0.6;
  C_ccw37toA0_ccw: C_ccw37 => A_ccw0; C_ccw37*C_ccw37toA0_ccw_k20_cc*exp(37*C_ccw37toA0_ccw_C_cc);
    C_ccw37toA0_ccw_k20_cc = 2.07e-9; C_ccw37toA0_ccw_C_cc = 0.6;
  C_cw38toA0_cw: C_cw38 => A_cw0; C_cw38*C_cw38toA0_cw_k20_cw*exp(38*C_cw38toA0_cw_C_cw);
    C_cw38toA0_cw_k20_cw = 2.07e-9; C_cw38toA0_cw_C_cw = 0.6;
  C_ccw38toA0_ccw: C_ccw38 => A_ccw0; C_ccw38*C_ccw38toA0_ccw_k20_cc*exp(38*C_ccw38toA0_ccw_C_cc);
    C_ccw38toA0_ccw_k20_cc = 2.07e-9; C_ccw38toA0_ccw_C_cc = 0.6;
  C_cw39toA0_cw: C_cw39 => A_cw0; C_cw39*C_cw39toA0_cw_k20_cw*exp(39*C_cw39toA0_cw_C_cw);
    C_cw39toA0_cw_k20_cw = 2.07e-9; C_cw39toA0_cw_C_cw = 0.6;
  C_ccw39toA0_ccw: C_ccw39 => A_ccw0; C_ccw39*C_ccw39toA0_ccw_k20_cc*exp(39*C_ccw39toA0_ccw_C_cc);
    C_ccw39toA0_ccw_k20_cc = 2.07e-9; C_ccw39toA0_ccw_C_cc = 0.6;
  C_cw40toA0_cw: C_cw40 => A_cw0; C_cw40*C_cw40toA0_cw_k20_cw*exp(40*C_cw40toA0_cw_C_cw);
    C_cw40toA0_cw_k20_cw = 2.07e-9; C_cw40toA0_cw_C_cw = 0.6;
  C_ccw40toA0_ccw: C_ccw40 => A_ccw0; C_ccw40*C_ccw40toA0_ccw_k20_cc*exp(40*C_ccw40toA0_ccw_C_cc);
    C_ccw40toA0_ccw_k20_cc = 2.07e-9; C_ccw40toA0_ccw_C_cc = 0.6;
  C_cw41toA0_cw: C_cw41 => A_cw0; C_cw41*C_cw41toA0_cw_k20_cw*exp(41*C_cw41toA0_cw_C_cw);
    C_cw41toA0_cw_k20_cw = 2.07e-9; C_cw41toA0_cw_C_cw = 0.6;
  C_ccw41toA0_ccw: C_ccw41 => A_ccw0; C_ccw41*C_ccw41toA0_ccw_k20_cc*exp(41*C_ccw41toA0_ccw_C_cc);
    C_ccw41toA0_ccw_k20_cc = 2.07e-9; C_ccw41toA0_ccw_C_cc = 0.6;
  C_cw42toA0_cw: C_cw42 => A_cw0; C_cw42*C_cw42toA0_cw_k20_cw*exp(42*C_cw42toA0_cw_C_cw);
    C_cw42toA0_cw_k20_cw = 2.07e-9; C_cw42toA0_cw_C_cw = 0.6;
  C_ccw42toA0_ccw: C_ccw42 => A_ccw0; C_ccw42*C_ccw42toA0_ccw_k20_cc*exp(42*C_ccw42toA0_ccw_C_cc);
    C_ccw42toA0_ccw_k20_cc = 2.07e-9; C_ccw42toA0_ccw_C_cc = 0.6;
  C_cw43toA0_cw: C_cw43 => A_cw0; C_cw43*C_cw43toA0_cw_k20_cw*exp(43*C_cw43toA0_cw_C_cw);
    C_cw43toA0_cw_k20_cw = 2.07e-9; C_cw43toA0_cw_C_cw = 0.6;
  C_ccw43toA0_ccw: C_ccw43 => A_ccw0; C_ccw43*C_ccw43toA0_ccw_k20_cc*exp(43*C_ccw43toA0_ccw_C_cc);
    C_ccw43toA0_ccw_k20_cc = 2.07e-9; C_ccw43toA0_ccw_C_cc = 0.6;
  C_cw44toA0_cw: C_cw44 => A_cw0; C_cw44*C_cw44toA0_cw_k20_cw*exp(44*C_cw44toA0_cw_C_cw);
    C_cw44toA0_cw_k20_cw = 2.07e-9; C_cw44toA0_cw_C_cw = 0.6;
  C_ccw44toA0_ccw: C_ccw44 => A_ccw0; C_ccw44*C_ccw44toA0_ccw_k20_cc*exp(44*C_ccw44toA0_ccw_C_cc);
    C_ccw44toA0_ccw_k20_cc = 2.07e-9; C_ccw44toA0_ccw_C_cc = 0.6;
  Aconfchange_cw0: A_cw0 => A_cw1; A_cw0*(44 - 0)*Aconfchange_cw0_ks_cw;
    Aconfchange_cw0_ks_cw = 7;
  Aconfchange_ccw0: A_ccw0 => A_ccw1; A_ccw0*(44 - 0)*Aconfchange_ccw0_ks_cc;
    Aconfchange_ccw0_ks_cc = 7;
  Aconfchange_cw1: A_cw1 => A_cw2; A_cw1*(44 - 1)*Aconfchange_cw1_ks_cw;
    Aconfchange_cw1_ks_cw = 7;
  Aconfchange_ccw1: A_ccw1 => A_ccw2; A_ccw1*(44 - 1)*Aconfchange_ccw1_ks_cc;
    Aconfchange_ccw1_ks_cc = 7;
  Aconfchange_cw2: A_cw2 => A_cw3; A_cw2*(44 - 2)*Aconfchange_cw2_ks_cw;
    Aconfchange_cw2_ks_cw = 7;
  Aconfchange_ccw2: A_ccw2 => A_ccw3; A_ccw2*(44 - 2)*Aconfchange_ccw2_ks_cc;
    Aconfchange_ccw2_ks_cc = 7;
  Aconfchange_cw3: A_cw3 => A_cw4; A_cw3*(44 - 3)*Aconfchange_cw3_ks_cw;
    Aconfchange_cw3_ks_cw = 7;
  Aconfchange_ccw3: A_ccw3 => A_ccw4; A_ccw3*(44 - 3)*Aconfchange_ccw3_ks_cc;
    Aconfchange_ccw3_ks_cc = 7;
  Aconfchange_cw4: A_cw4 => A_cw5; A_cw4*(44 - 4)*Aconfchange_cw4_ks_cw;
    Aconfchange_cw4_ks_cw = 7;
  Aconfchange_ccw4: A_ccw4 => A_ccw5; A_ccw4*(44 - 4)*Aconfchange_ccw4_ks_cc;
    Aconfchange_ccw4_ks_cc = 7;
  Aconfchange_cw5: A_cw5 => A_cw6; A_cw5*(44 - 5)*Aconfchange_cw5_ks_cw;
    Aconfchange_cw5_ks_cw = 7;
  Aconfchange_ccw5: A_ccw5 => A_ccw6; A_ccw5*(44 - 5)*Aconfchange_ccw5_ks_cc;
    Aconfchange_ccw5_ks_cc = 7;
  Aconfchange_cw6: A_cw6 => A_cw7; A_cw6*(44 - 6)*Aconfchange_cw6_ks_cw;
    Aconfchange_cw6_ks_cw = 7;
  Aconfchange_ccw6: A_ccw6 => A_ccw7; A_ccw6*(44 - 6)*Aconfchange_ccw6_ks_cc;
    Aconfchange_ccw6_ks_cc = 7;
  Aconfchange_cw7: A_cw7 => A_cw8; A_cw7*(44 - 7)*Aconfchange_cw7_ks_cw;
    Aconfchange_cw7_ks_cw = 7;
  Aconfchange_ccw7: A_ccw7 => A_ccw8; A_ccw7*(44 - 7)*Aconfchange_ccw7_ks_cc;
    Aconfchange_ccw7_ks_cc = 7;
  Aconfchange_cw8: A_cw8 => A_cw9; A_cw8*(44 - 8)*Aconfchange_cw8_ks_cw;
    Aconfchange_cw8_ks_cw = 7;
  Aconfchange_ccw8: A_ccw8 => A_ccw9; A_ccw8*(44 - 8)*Aconfchange_ccw8_ks_cc;
    Aconfchange_ccw8_ks_cc = 7;
  Aconfchange_cw9: A_cw9 => A_cw10; A_cw9*(44 - 9)*Aconfchange_cw9_ks_cw;
    Aconfchange_cw9_ks_cw = 7;
  Aconfchange_ccw9: A_ccw9 => A_ccw10; A_ccw9*(44 - 9)*Aconfchange_ccw9_ks_cc;
    Aconfchange_ccw9_ks_cc = 7;
  Aconfchange_cw10: A_cw10 => A_cw11; A_cw10*(44 - 10)*Aconfchange_cw10_ks_cw;
    Aconfchange_cw10_ks_cw = 7;
  Aconfchange_ccw10: A_ccw10 => A_ccw11; A_ccw10*(44 - 10)*Aconfchange_ccw10_ks_cc;
    Aconfchange_ccw10_ks_cc = 7;
  Aconfchange_cw11: A_cw11 => A_cw12; A_cw11*(44 - 11)*Aconfchange_cw11_ks_cw;
    Aconfchange_cw11_ks_cw = 7;
  Aconfchange_ccw11: A_ccw11 => A_ccw12; A_ccw11*(44 - 11)*Aconfchange_ccw11_ks_cc;
    Aconfchange_ccw11_ks_cc = 7;
  Aconfchange_cw12: A_cw12 => A_cw13; A_cw12*(44 - 12)*Aconfchange_cw12_ks_cw;
    Aconfchange_cw12_ks_cw = 7;
  Aconfchange_ccw12: A_ccw12 => A_ccw13; A_ccw12*(44 - 12)*Aconfchange_ccw12_ks_cc;
    Aconfchange_ccw12_ks_cc = 7;
  Aconfchange_cw13: A_cw13 => A_cw14; A_cw13*(44 - 13)*Aconfchange_cw13_ks_cw;
    Aconfchange_cw13_ks_cw = 7;
  Aconfchange_ccw13: A_ccw13 => A_ccw14; A_ccw13*(44 - 13)*Aconfchange_ccw13_ks_cc;
    Aconfchange_ccw13_ks_cc = 7;
  Aconfchange_cw14: A_cw14 => A_cw15; A_cw14*(44 - 14)*Aconfchange_cw14_ks_cw;
    Aconfchange_cw14_ks_cw = 7;
  Aconfchange_ccw14: A_ccw14 => A_ccw15; A_ccw14*(44 - 14)*Aconfchange_ccw14_ks_cc;
    Aconfchange_ccw14_ks_cc = 7;
  Aconfchange_cw15: A_cw15 => A_cw16; A_cw15*(44 - 15)*Aconfchange_cw15_ks_cw;
    Aconfchange_cw15_ks_cw = 7;
  Aconfchange_ccw15: A_ccw15 => A_ccw16; A_ccw15*(44 - 15)*Aconfchange_ccw15_ks_cc;
    Aconfchange_ccw15_ks_cc = 7;
  Aconfchange_cw16: A_cw16 => A_cw17; A_cw16*(44 - 16)*Aconfchange_cw16_ks_cw;
    Aconfchange_cw16_ks_cw = 7;
  Aconfchange_ccw16: A_ccw16 => A_ccw17; A_ccw16*(44 - 16)*Aconfchange_ccw16_ks_cc;
    Aconfchange_ccw16_ks_cc = 7;
  Aconfchange_cw17: A_cw17 => A_cw18; A_cw17*(44 - 17)*Aconfchange_cw17_ks_cw;
    Aconfchange_cw17_ks_cw = 7;
  Aconfchange_ccw17: A_ccw17 => A_ccw18; A_ccw17*(44 - 17)*Aconfchange_ccw17_ks_cc;
    Aconfchange_ccw17_ks_cc = 7;
  Aconfchange_cw18: A_cw18 => A_cw19; A_cw18*(44 - 18)*Aconfchange_cw18_ks_cw;
    Aconfchange_cw18_ks_cw = 7;
  Aconfchange_ccw18: A_ccw18 => A_ccw19; A_ccw18*(44 - 18)*Aconfchange_ccw18_ks_cc;
    Aconfchange_ccw18_ks_cc = 7;
  Aconfchange_cw19: A_cw19 => A_cw20; A_cw19*(44 - 19)*Aconfchange_cw19_ks_cw;
    Aconfchange_cw19_ks_cw = 7;
  Aconfchange_ccw19: A_ccw19 => A_ccw20; A_ccw19*(44 - 19)*Aconfchange_ccw19_ks_cc;
    Aconfchange_ccw19_ks_cc = 7;
  Aconfchange_cw20: A_cw20 => A_cw21; A_cw20*(44 - 20)*Aconfchange_cw20_ks_cw;
    Aconfchange_cw20_ks_cw = 7;
  Aconfchange_ccw20: A_ccw20 => A_ccw21; A_ccw20*(44 - 20)*Aconfchange_ccw20_ks_cc;
    Aconfchange_ccw20_ks_cc = 7;
  Aconfchange_cw21: A_cw21 => A_cw22; A_cw21*(44 - 21)*Aconfchange_cw21_ks_cw;
    Aconfchange_cw21_ks_cw = 7;
  Aconfchange_ccw21: A_ccw21 => A_ccw22; A_ccw21*(44 - 21)*Aconfchange_ccw21_ks_cc;
    Aconfchange_ccw21_ks_cc = 7;
  Aconfchange_cw22: A_cw22 => A_cw23; A_cw22*(44 - 22)*Aconfchange_cw22_ks_cw;
    Aconfchange_cw22_ks_cw = 7;
  Aconfchange_ccw22: A_ccw22 => A_ccw23; A_ccw22*(44 - 22)*Aconfchange_ccw22_ks_cc;
    Aconfchange_ccw22_ks_cc = 7;
  Aconfchange_cw23: A_cw23 => A_cw24; A_cw23*(44 - 23)*Aconfchange_cw23_ks_cw;
    Aconfchange_cw23_ks_cw = 7;
  Aconfchange_ccw23: A_ccw23 => A_ccw24; A_ccw23*(44 - 23)*Aconfchange_ccw23_ks_cc;
    Aconfchange_ccw23_ks_cc = 7;
  Aconfchange_cw24: A_cw24 => A_cw25; A_cw24*(44 - 24)*Aconfchange_cw24_ks_cw;
    Aconfchange_cw24_ks_cw = 7;
  Aconfchange_ccw24: A_ccw24 => A_ccw25; A_ccw24*(44 - 24)*Aconfchange_ccw24_ks_cc;
    Aconfchange_ccw24_ks_cc = 7;
  Aconfchange_cw25: A_cw25 => A_cw26; A_cw25*(44 - 25)*Aconfchange_cw25_ks_cw;
    Aconfchange_cw25_ks_cw = 7;
  Aconfchange_ccw25: A_ccw25 => A_ccw26; A_ccw25*(44 - 25)*Aconfchange_ccw25_ks_cc;
    Aconfchange_ccw25_ks_cc = 7;
  Aconfchange_cw26: A_cw26 => A_cw27; A_cw26*(44 - 26)*Aconfchange_cw26_ks_cw;
    Aconfchange_cw26_ks_cw = 7;
  Aconfchange_ccw26: A_ccw26 => A_ccw27; A_ccw26*(44 - 26)*Aconfchange_ccw26_ks_cc;
    Aconfchange_ccw26_ks_cc = 7;
  Aconfchange_cw27: A_cw27 => A_cw28; A_cw27*(44 - 27)*Aconfchange_cw27_ks_cw;
    Aconfchange_cw27_ks_cw = 7;
  Aconfchange_ccw27: A_ccw27 => A_ccw28; A_ccw27*(44 - 27)*Aconfchange_ccw27_ks_cc;
    Aconfchange_ccw27_ks_cc = 7;
  Aconfchange_cw28: A_cw28 => A_cw29; A_cw28*(44 - 28)*Aconfchange_cw28_ks_cw;
    Aconfchange_cw28_ks_cw = 7;
  Aconfchange_ccw28: A_ccw28 => A_ccw29; A_ccw28*(44 - 28)*Aconfchange_ccw28_ks_cc;
    Aconfchange_ccw28_ks_cc = 7;
  Aconfchange_cw29: A_cw29 => A_cw30; A_cw29*(44 - 29)*Aconfchange_cw29_ks_cw;
    Aconfchange_cw29_ks_cw = 7;
  Aconfchange_ccw29: A_ccw29 => A_ccw30; A_ccw29*(44 - 29)*Aconfchange_ccw29_ks_cc;
    Aconfchange_ccw29_ks_cc = 7;
  Aconfchange_cw30: A_cw30 => A_cw31; A_cw30*(44 - 30)*Aconfchange_cw30_ks_cw;
    Aconfchange_cw30_ks_cw = 7;
  Aconfchange_ccw30: A_ccw30 => A_ccw31; A_ccw30*(44 - 30)*Aconfchange_ccw30_ks_cc;
    Aconfchange_ccw30_ks_cc = 7;
  Aconfchange_cw31: A_cw31 => A_cw32; A_cw31*(44 - 31)*Aconfchange_cw31_ks_cw;
    Aconfchange_cw31_ks_cw = 7;
  Aconfchange_ccw31: A_ccw31 => A_ccw32; A_ccw31*(44 - 31)*Aconfchange_ccw31_ks_cc;
    Aconfchange_ccw31_ks_cc = 7;
  Aconfchange_cw32: A_cw32 => A_cw33; A_cw32*(44 - 32)*Aconfchange_cw32_ks_cw;
    Aconfchange_cw32_ks_cw = 7;
  Aconfchange_ccw32: A_ccw32 => A_ccw33; A_ccw32*(44 - 32)*Aconfchange_ccw32_ks_cc;
    Aconfchange_ccw32_ks_cc = 7;
  Aconfchange_cw33: A_cw33 => A_cw34; A_cw33*(44 - 33)*Aconfchange_cw33_ks_cw;
    Aconfchange_cw33_ks_cw = 7;
  Aconfchange_ccw33: A_ccw33 => A_ccw34; A_ccw33*(44 - 33)*Aconfchange_ccw33_ks_cc;
    Aconfchange_ccw33_ks_cc = 7;
  Aconfchange_cw34: A_cw34 => A_cw35; A_cw34*(44 - 34)*Aconfchange_cw34_ks_cw;
    Aconfchange_cw34_ks_cw = 7;
  Aconfchange_ccw34: A_ccw34 => A_ccw35; A_ccw34*(44 - 34)*Aconfchange_ccw34_ks_cc;
    Aconfchange_ccw34_ks_cc = 7;
  Aconfchange_cw35: A_cw35 => A_cw36; A_cw35*(44 - 35)*Aconfchange_cw35_ks_cw;
    Aconfchange_cw35_ks_cw = 7;
  Aconfchange_ccw35: A_ccw35 => A_ccw36; A_ccw35*(44 - 35)*Aconfchange_ccw35_ks_cc;
    Aconfchange_ccw35_ks_cc = 7;
  Aconfchange_cw36: A_cw36 => A_cw37; A_cw36*(44 - 36)*Aconfchange_cw36_ks_cw;
    Aconfchange_cw36_ks_cw = 7;
  Aconfchange_ccw36: A_ccw36 => A_ccw37; A_ccw36*(44 - 36)*Aconfchange_ccw36_ks_cc;
    Aconfchange_ccw36_ks_cc = 7;
  Aconfchange_cw37: A_cw37 => A_cw38; A_cw37*(44 - 37)*Aconfchange_cw37_ks_cw;
    Aconfchange_cw37_ks_cw = 7;
  Aconfchange_ccw37: A_ccw37 => A_ccw38; A_ccw37*(44 - 37)*Aconfchange_ccw37_ks_cc;
    Aconfchange_ccw37_ks_cc = 7;
  Aconfchange_cw38: A_cw38 => A_cw39; A_cw38*(44 - 38)*Aconfchange_cw38_ks_cw;
    Aconfchange_cw38_ks_cw = 7;
  Aconfchange_ccw38: A_ccw38 => A_ccw39; A_ccw38*(44 - 38)*Aconfchange_ccw38_ks_cc;
    Aconfchange_ccw38_ks_cc = 7;
  Aconfchange_cw39: A_cw39 => A_cw40; A_cw39*(44 - 39)*Aconfchange_cw39_ks_cw;
    Aconfchange_cw39_ks_cw = 7;
  Aconfchange_ccw39: A_ccw39 => A_ccw40; A_ccw39*(44 - 39)*Aconfchange_ccw39_ks_cc;
    Aconfchange_ccw39_ks_cc = 7;
  Aconfchange_cw40: A_cw40 => A_cw41; A_cw40*(44 - 40)*Aconfchange_cw40_ks_cw;
    Aconfchange_cw40_ks_cw = 7;
  Aconfchange_ccw40: A_ccw40 => A_ccw41; A_ccw40*(44 - 40)*Aconfchange_ccw40_ks_cc;
    Aconfchange_ccw40_ks_cc = 7;
  Aconfchange_cw41: A_cw41 => A_cw42; A_cw41*(44 - 41)*Aconfchange_cw41_ks_cw;
    Aconfchange_cw41_ks_cw = 7;
  Aconfchange_ccw41: A_ccw41 => A_ccw42; A_ccw41*(44 - 41)*Aconfchange_ccw41_ks_cc;
    Aconfchange_ccw41_ks_cc = 7;
  Aconfchange_cw42: A_cw42 => A_cw43; A_cw42*(44 - 42)*Aconfchange_cw42_ks_cw;
    Aconfchange_cw42_ks_cw = 7;
  Aconfchange_ccw42: A_ccw42 => A_ccw43; A_ccw42*(44 - 42)*Aconfchange_ccw42_ks_cc;
    Aconfchange_ccw42_ks_cc = 7;
  Aconfchange_cw43: A_cw43 => Stop_cw + A_cw44; A_cw43*Aconfchange_cw43_ks_cw;
    Aconfchange_cw43_ks_cw = 7;
  Aconfchange_ccw43: A_ccw43 => Stop_ccw + A_ccw44; A_ccw43*Aconfchange_ccw43_ks_cc;
    Aconfchange_ccw43_ks_cc = 7;
  Stop_cwtoRev: Stop_cw => ; Stop_cw*Stop_cwtoRev_kstop_cw;
    Stop_cwtoRev_kstop_cw = 2.48;
  Stop_ccwtoRev: Stop_ccw => ; Stop_ccw*Stop_ccwtoRev_kstop_cc;
    Stop_ccwtoRev_kstop_cc = 2.48;
  C_cwtoE_cw0: => E_cw0; C_cw0*C_cwtoE_cw0_k20_cw*exp(0*C_cwtoE_cw0_C_cw);  // modifiers: C_cw0
    C_cwtoE_cw0_k20_cw = 2.07e-9; C_cwtoE_cw0_C_cw = 0.6;
  C_ccwtoE_ccw0: => E_ccw0; C_ccw0*C_ccwtoE_ccw0_k20_cc*exp(0*C_ccwtoE_ccw0_C_cc);  // modifiers: C_ccw0
    C_ccwtoE_ccw0_k20_cc = 2.07e-9; C_ccwtoE_ccw0_C_cc = 0.6;
  C_cwtoE_cw1: => E_cw1; C_cw1*C_cwtoE_cw1_k20_cw*exp(1*C_cwtoE_cw1_C_cw);  // modifiers: C_cw1
    C_cwtoE_cw1_k20_cw = 2.07e-9; C_cwtoE_cw1_C_cw = 0.6;
  C_ccwtoE_ccw1: => E_ccw1; C_ccw1*C_ccwtoE_ccw1_k20_cc*exp(1*C_ccwtoE_ccw1_C_cc);  // modifiers: C_ccw1
    C_ccwtoE_ccw1_k20_cc = 2.07e-9; C_ccwtoE_ccw1_C_cc = 0.6;
  C_cwtoE_cw2: => E_cw2; C_cw2*C_cwtoE_cw2_k20_cw*exp(2*C_cwtoE_cw2_C_cw);  // modifiers: C_cw2
    C_cwtoE_cw2_k20_cw = 2.07e-9; C_cwtoE_cw2_C_cw = 0.6;
  C_ccwtoE_ccw2: => E_ccw2; C_ccw2*C_ccwtoE_ccw2_k20_cc*exp(2*C_ccwtoE_ccw2_C_cc);  // modifiers: C_ccw2
    C_ccwtoE_ccw2_k20_cc = 2.07e-9; C_ccwtoE_ccw2_C_cc = 0.6;
  C_cwtoE_cw3: => E_cw3; C_cw3*C_cwtoE_cw3_k20_cw*exp(3*C_cwtoE_cw3_C_cw);  // modifiers: C_cw3
    C_cwtoE_cw3_k20_cw = 2.07e-9; C_cwtoE_cw3_C_cw = 0.6;
  C_ccwtoE_ccw3: => E_ccw3; C_ccw3*C_ccwtoE_ccw3_k20_cc*exp(3*C_ccwtoE_ccw3_C_cc);  // modifiers: C_ccw3
    C_ccwtoE_ccw3_k20_cc = 2.07e-9; C_ccwtoE_ccw3_C_cc = 0.6;
  C_cwtoE_cw4: => E_cw4; C_cw4*C_cwtoE_cw4_k20_cw*exp(4*C_cwtoE_cw4_C_cw);  // modifiers: C_cw4
    C_cwtoE_cw4_k20_cw = 2.07e-9; C_cwtoE_cw4_C_cw = 0.6;
  C_ccwtoE_ccw4: => E_ccw4; C_ccw4*C_ccwtoE_ccw4_k20_cc*exp(4*C_ccwtoE_ccw4_C_cc);  // modifiers: C_ccw4
    C_ccwtoE_ccw4_k20_cc = 2.07e-9; C_ccwtoE_ccw4_C_cc = 0.6;
  C_cwtoE_cw5: => E_cw5; C_cw5*C_cwtoE_cw5_k20_cw*exp(5*C_cwtoE_cw5_C_cw);  // modifiers: C_cw5
    C_cwtoE_cw5_k20_cw = 2.07e-9; C_cwtoE_cw5_C_cw = 0.6;
  C_ccwtoE_ccw5: => E_ccw5; C_ccw5*C_ccwtoE_ccw5_k20_cc*exp(5*C_ccwtoE_ccw5_C_cc);  // modifiers: C_ccw5
    C_ccwtoE_ccw5_k20_cc = 2.07e-9; C_ccwtoE_ccw5_C_cc = 0.6;
  C_cwtoE_cw6: => E_cw6; C_cw6*C_cwtoE_cw6_k20_cw*exp(6*C_cwtoE_cw6_C_cw);  // modifiers: C_cw6
    C_cwtoE_cw6_k20_cw = 2.07e-9; C_cwtoE_cw6_C_cw = 0.6;
  C_ccwtoE_ccw6: => E_ccw6; C_ccw6*C_ccwtoE_ccw6_k20_cc*exp(6*C_ccwtoE_ccw6_C_cc);  // modifiers: C_ccw6
    C_ccwtoE_ccw6_k20_cc = 2.07e-9; C_ccwtoE_ccw6_C_cc = 0.6;
  C_cwtoE_cw7: => E_cw7; C_cw7*C_cwtoE_cw7_k20_cw*exp(7*C_cwtoE_cw7_C_cw);  // modifiers: C_cw7
    C_cwtoE_cw7_k20_cw = 2.07e-9; C_cwtoE_cw7_C_cw = 0.6;
  C_ccwtoE_ccw7: => E_ccw7; C_ccw7*C_ccwtoE_ccw7_k20_cc*exp(7*C_ccwtoE_ccw7_C_cc);  // modifiers: C_ccw7
    C_ccwtoE_ccw7_k20_cc = 2.07e-9; C_ccwtoE_ccw7_C_cc = 0.6;
  C_cwtoE_cw8: => E_cw8; C_cw8*C_cwtoE_cw8_k20_cw*exp(8*C_cwtoE_cw8_C_cw);  // modifiers: C_cw8
    C_cwtoE_cw8_k20_cw = 2.07e-9; C_cwtoE_cw8_C_cw = 0.6;
  C_ccwtoE_ccw8: => E_ccw8; C_ccw8*C_ccwtoE_ccw8_k20_cc*exp(8*C_ccwtoE_ccw8_C_cc);  // modifiers: C_ccw8
    C_ccwtoE_ccw8_k20_cc = 2.07e-9; C_ccwtoE_ccw8_C_cc = 0.6;
  C_cwtoE_cw9: => E_cw9; C_cw9*C_cwtoE_cw9_k20_cw*exp(9*C_cwtoE_cw9_C_cw);  // modifiers: C_cw9
    C_cwtoE_cw9_k20_cw = 2.07e-9; C_cwtoE_cw9_C_cw = 0.6;
  C_ccwtoE_ccw9: => E_ccw9; C_ccw9*C_ccwtoE_ccw9_k20_cc*exp(9*C_ccwtoE_ccw9_C_cc);  // modifiers: C_ccw9
    C_ccwtoE_ccw9_k20_cc = 2.07e-9; C_ccwtoE_ccw9_C_cc = 0.6;
  C_cwtoE_cw10: => E_cw10; C_cw10*C_cwtoE_cw10_k20_cw*exp(10*C_cwtoE_cw10_C_cw);  // modifiers: C_cw10
    C_cwtoE_cw10_k20_cw = 2.07e-9; C_cwtoE_cw10_C_cw = 0.6;
  C_ccwtoE_ccw10: => E_ccw10; C_ccw10*C_ccwtoE_ccw10_k20_cc*exp(10*C_ccwtoE_ccw10_C_cc);  // modifiers: C_ccw10
    C_ccwtoE_ccw10_k20_cc = 2.07e-9; C_ccwtoE_ccw10_C_cc = 0.6;
  C_cwtoE_cw11: => E_cw11; C_cw11*C_cwtoE_cw11_k20_cw*exp(11*C_cwtoE_cw11_C_cw);  // modifiers: C_cw11
    C_cwtoE_cw11_k20_cw = 2.07e-9; C_cwtoE_cw11_C_cw = 0.6;
  C_ccwtoE_ccw11: => E_ccw11; C_ccw11*C_ccwtoE_ccw11_k20_cc*exp(11*C_ccwtoE_ccw11_C_cc);  // modifiers: C_ccw11
    C_ccwtoE_ccw11_k20_cc = 2.07e-9; C_ccwtoE_ccw11_C_cc = 0.6;
  C_cwtoE_cw12: => E_cw12; C_cw12*C_cwtoE_cw12_k20_cw*exp(12*C_cwtoE_cw12_C_cw);  // modifiers: C_cw12
    C_cwtoE_cw12_k20_cw = 2.07e-9; C_cwtoE_cw12_C_cw = 0.6;
  C_ccwtoE_ccw12: => E_ccw12; C_ccw12*C_ccwtoE_ccw12_k20_cc*exp(12*C_ccwtoE_ccw12_C_cc);  // modifiers: C_ccw12
    C_ccwtoE_ccw12_k20_cc = 2.07e-9; C_ccwtoE_ccw12_C_cc = 0.6;
  C_cwtoE_cw13: => E_cw13; C_cw13*C_cwtoE_cw13_k20_cw*exp(13*C_cwtoE_cw13_C_cw);  // modifiers: C_cw13
    C_cwtoE_cw13_k20_cw = 2.07e-9; C_cwtoE_cw13_C_cw = 0.6;
  C_ccwtoE_ccw13: => E_ccw13; C_ccw13*C_ccwtoE_ccw13_k20_cc*exp(13*C_ccwtoE_ccw13_C_cc);  // modifiers: C_ccw13
    C_ccwtoE_ccw13_k20_cc = 2.07e-9; C_ccwtoE_ccw13_C_cc = 0.6;
  C_cwtoE_cw14: => E_cw14; C_cw14*C_cwtoE_cw14_k20_cw*exp(14*C_cwtoE_cw14_C_cw);  // modifiers: C_cw14
    C_cwtoE_cw14_k20_cw = 2.07e-9; C_cwtoE_cw14_C_cw = 0.6;
  C_ccwtoE_ccw14: => E_ccw14; C_ccw14*C_ccwtoE_ccw14_k20_cc*exp(14*C_ccwtoE_ccw14_C_cc);  // modifiers: C_ccw14
    C_ccwtoE_ccw14_k20_cc = 2.07e-9; C_ccwtoE_ccw14_C_cc = 0.6;
  C_cwtoE_cw15: => E_cw15; C_cw15*C_cwtoE_cw15_k20_cw*exp(15*C_cwtoE_cw15_C_cw);  // modifiers: C_cw15
    C_cwtoE_cw15_k20_cw = 2.07e-9; C_cwtoE_cw15_C_cw = 0.6;
  C_ccwtoE_ccw15: => E_ccw15; C_ccw15*C_ccwtoE_ccw15_k20_cc*exp(15*C_ccwtoE_ccw15_C_cc);  // modifiers: C_ccw15
    C_ccwtoE_ccw15_k20_cc = 2.07e-9; C_ccwtoE_ccw15_C_cc = 0.6;
  C_cwtoE_cw16: => E_cw16; C_cw16*C_cwtoE_cw16_k20_cw*exp(16*C_cwtoE_cw16_C_cw);  // modifiers: C_cw16
    C_cwtoE_cw16_k20_cw = 2.07e-9; C_cwtoE_cw16_C_cw = 0.6;
  C_ccwtoE_ccw16: => E_ccw16; C_ccw16*C_ccwtoE_ccw16_k20_cc*exp(16*C_ccwtoE_ccw16_C_cc);  // modifiers: C_ccw16
    C_ccwtoE_ccw16_k20_cc = 2.07e-9; C_ccwtoE_ccw16_C_cc = 0.6;
  C_cwtoE_cw17: => E_cw17; C_cw17*C_cwtoE_cw17_k20_cw*exp(17*C_cwtoE_cw17_C_cw);  // modifiers: C_cw17
    C_cwtoE_cw17_k20_cw = 2.07e-9; C_cwtoE_cw17_C_cw = 0.6;
  C_ccwtoE_ccw17: => E_ccw17; C_ccw17*C_ccwtoE_ccw17_k20_cc*exp(17*C_ccwtoE_ccw17_C_cc);  // modifiers: C_ccw17
    C_ccwtoE_ccw17_k20_cc = 2.07e-9; C_ccwtoE_ccw17_C_cc = 0.6;
  C_cwtoE_cw18: => E_cw18; C_cw18*C_cwtoE_cw18_k20_cw*exp(18*C_cwtoE_cw18_C_cw);  // modifiers: C_cw18
    C_cwtoE_cw18_k20_cw = 2.07e-9; C_cwtoE_cw18_C_cw = 0.6;
  C_ccwtoE_ccw18: => E_ccw18; C_ccw18*C_ccwtoE_ccw18_k20_cc*exp(18*C_ccwtoE_ccw18_C_cc);  // modifiers: C_ccw18
    C_ccwtoE_ccw18_k20_cc = 2.07e-9; C_ccwtoE_ccw18_C_cc = 0.6;
  C_cwtoE_cw19: => E_cw19; C_cw19*C_cwtoE_cw19_k20_cw*exp(19*C_cwtoE_cw19_C_cw);  // modifiers: C_cw19
    C_cwtoE_cw19_k20_cw = 2.07e-9; C_cwtoE_cw19_C_cw = 0.6;
  C_ccwtoE_ccw19: => E_ccw19; C_ccw19*C_ccwtoE_ccw19_k20_cc*exp(19*C_ccwtoE_ccw19_C_cc);  // modifiers: C_ccw19
    C_ccwtoE_ccw19_k20_cc = 2.07e-9; C_ccwtoE_ccw19_C_cc = 0.6;
  C_cwtoE_cw20: => E_cw20; C_cw20*C_cwtoE_cw20_k20_cw*exp(20*C_cwtoE_cw20_C_cw);  // modifiers: C_cw20
    C_cwtoE_cw20_k20_cw = 2.07e-9; C_cwtoE_cw20_C_cw = 0.6;
  C_ccwtoE_ccw20: => E_ccw20; C_ccw20*C_ccwtoE_ccw20_k20_cc*exp(20*C_ccwtoE_ccw20_C_cc);  // modifiers: C_ccw20
    C_ccwtoE_ccw20_k20_cc = 2.07e-9; C_ccwtoE_ccw20_C_cc = 0.6;
  C_cwtoE_cw21: => E_cw21; C_cw21*C_cwtoE_cw21_k20_cw*exp(21*C_cwtoE_cw21_C_cw);  // modifiers: C_cw21
    C_cwtoE_cw21_k20_cw = 2.07e-9; C_cwtoE_cw21_C_cw = 0.6;
  C_ccwtoE_ccw21: => E_ccw21; C_ccw21*C_ccwtoE_ccw21_k20_cc*exp(21*C_ccwtoE_ccw21_C_cc);  // modifiers: C_ccw21
    C_ccwtoE_ccw21_k20_cc = 2.07e-9; C_ccwtoE_ccw21_C_cc = 0.6;
  C_cwtoE_cw22: => E_cw22; C_cw22*C_cwtoE_cw22_k20_cw*exp(22*C_cwtoE_cw22_C_cw);  // modifiers: C_cw22
    C_cwtoE_cw22_k20_cw = 2.07e-9; C_cwtoE_cw22_C_cw = 0.6;
  C_ccwtoE_ccw22: => E_ccw22; C_ccw22*C_ccwtoE_ccw22_k20_cc*exp(22*C_ccwtoE_ccw22_C_cc);  // modifiers: C_ccw22
    C_ccwtoE_ccw22_k20_cc = 2.07e-9; C_ccwtoE_ccw22_C_cc = 0.6;
  C_cwtoE_cw23: => E_cw23; C_cw23*C_cwtoE_cw23_k20_cw*exp(23*C_cwtoE_cw23_C_cw);  // modifiers: C_cw23
    C_cwtoE_cw23_k20_cw = 2.07e-9; C_cwtoE_cw23_C_cw = 0.6;
  C_ccwtoE_ccw23: => E_ccw23; C_ccw23*C_ccwtoE_ccw23_k20_cc*exp(23*C_ccwtoE_ccw23_C_cc);  // modifiers: C_ccw23
    C_ccwtoE_ccw23_k20_cc = 2.07e-9; C_ccwtoE_ccw23_C_cc = 0.6;
  C_cwtoE_cw24: => E_cw24; C_cw24*C_cwtoE_cw24_k20_cw*exp(24*C_cwtoE_cw24_C_cw);  // modifiers: C_cw24
    C_cwtoE_cw24_k20_cw = 2.07e-9; C_cwtoE_cw24_C_cw = 0.6;
  C_ccwtoE_ccw24: => E_ccw24; C_ccw24*C_ccwtoE_ccw24_k20_cc*exp(24*C_ccwtoE_ccw24_C_cc);  // modifiers: C_ccw24
    C_ccwtoE_ccw24_k20_cc = 2.07e-9; C_ccwtoE_ccw24_C_cc = 0.6;
  C_cwtoE_cw25: => E_cw25; C_cw25*C_cwtoE_cw25_k20_cw*exp(25*C_cwtoE_cw25_C_cw);  // modifiers: C_cw25
    C_cwtoE_cw25_k20_cw = 2.07e-9; C_cwtoE_cw25_C_cw = 0.6;
  C_ccwtoE_ccw25: => E_ccw25; C_ccw25*C_ccwtoE_ccw25_k20_cc*exp(25*C_ccwtoE_ccw25_C_cc);  // modifiers: C_ccw25
    C_ccwtoE_ccw25_k20_cc = 2.07e-9; C_ccwtoE_ccw25_C_cc = 0.6;
  C_cwtoE_cw26: => E_cw26; C_cw26*C_cwtoE_cw26_k20_cw*exp(26*C_cwtoE_cw26_C_cw);  // modifiers: C_cw26
    C_cwtoE_cw26_k20_cw = 2.07e-9; C_cwtoE_cw26_C_cw = 0.6;
  C_ccwtoE_ccw26: => E_ccw26; C_ccw26*C_ccwtoE_ccw26_k20_cc*exp(26*C_ccwtoE_ccw26_C_cc);  // modifiers: C_ccw26
    C_ccwtoE_ccw26_k20_cc = 2.07e-9; C_ccwtoE_ccw26_C_cc = 0.6;
  C_cwtoE_cw27: => E_cw27; C_cw27*C_cwtoE_cw27_k20_cw*exp(27*C_cwtoE_cw27_C_cw);  // modifiers: C_cw27
    C_cwtoE_cw27_k20_cw = 2.07e-9; C_cwtoE_cw27_C_cw = 0.6;
  C_ccwtoE_ccw27: => E_ccw27; C_ccw27*C_ccwtoE_ccw27_k20_cc*exp(27*C_ccwtoE_ccw27_C_cc);  // modifiers: C_ccw27
    C_ccwtoE_ccw27_k20_cc = 2.07e-9; C_ccwtoE_ccw27_C_cc = 0.6;
  C_cwtoE_cw28: => E_cw28; C_cw28*C_cwtoE_cw28_k20_cw*exp(28*C_cwtoE_cw28_C_cw);  // modifiers: C_cw28
    C_cwtoE_cw28_k20_cw = 2.07e-9; C_cwtoE_cw28_C_cw = 0.6;
  C_ccwtoE_ccw28: => E_ccw28; C_ccw28*C_ccwtoE_ccw28_k20_cc*exp(28*C_ccwtoE_ccw28_C_cc);  // modifiers: C_ccw28
    C_ccwtoE_ccw28_k20_cc = 2.07e-9; C_ccwtoE_ccw28_C_cc = 0.6;
  C_cwtoE_cw29: => E_cw29; C_cw29*C_cwtoE_cw29_k20_cw*exp(29*C_cwtoE_cw29_C_cw);  // modifiers: C_cw29
    C_cwtoE_cw29_k20_cw = 2.07e-9; C_cwtoE_cw29_C_cw = 0.6;
  C_ccwtoE_ccw29: => E_ccw29; C_ccw29*C_ccwtoE_ccw29_k20_cc*exp(29*C_ccwtoE_ccw29_C_cc);  // modifiers: C_ccw29
    C_ccwtoE_ccw29_k20_cc = 2.07e-9; C_ccwtoE_ccw29_C_cc = 0.6;
  C_cwtoE_cw30: => E_cw30; C_cw30*C_cwtoE_cw30_k20_cw*exp(30*C_cwtoE_cw30_C_cw);  // modifiers: C_cw30
    C_cwtoE_cw30_k20_cw = 2.07e-9; C_cwtoE_cw30_C_cw = 0.6;
  C_ccwtoE_ccw30: => E_ccw30; C_ccw30*C_ccwtoE_ccw30_k20_cc*exp(30*C_ccwtoE_ccw30_C_cc);  // modifiers: C_ccw30
    C_ccwtoE_ccw30_k20_cc = 2.07e-9; C_ccwtoE_ccw30_C_cc = 0.6;
  C_cwtoE_cw31: => E_cw31; C_cw31*C_cwtoE_cw31_k20_cw*exp(31*C_cwtoE_cw31_C_cw);  // modifiers: C_cw31
    C_cwtoE_cw31_k20_cw = 2.07e-9; C_cwtoE_cw31_C_cw = 0.6;
  C_ccwtoE_ccw31: => E_ccw31; C_ccw31*C_ccwtoE_ccw31_k20_cc*exp(31*C_ccwtoE_ccw31_C_cc);  // modifiers: C_ccw31
    C_ccwtoE_ccw31_k20_cc = 2.07e-9; C_ccwtoE_ccw31_C_cc = 0.6;
  C_cwtoE_cw32: => E_cw32; C_cw32*C_cwtoE_cw32_k20_cw*exp(32*C_cwtoE_cw32_C_cw);  // modifiers: C_cw32
    C_cwtoE_cw32_k20_cw = 2.07e-9; C_cwtoE_cw32_C_cw = 0.6;
  C_ccwtoE_ccw32: => E_ccw32; C_ccw32*C_ccwtoE_ccw32_k20_cc*exp(32*C_ccwtoE_ccw32_C_cc);  // modifiers: C_ccw32
    C_ccwtoE_ccw32_k20_cc = 2.07e-9; C_ccwtoE_ccw32_C_cc = 0.6;
  C_cwtoE_cw33: => E_cw33; C_cw33*C_cwtoE_cw33_k20_cw*exp(33*C_cwtoE_cw33_C_cw);  // modifiers: C_cw33
    C_cwtoE_cw33_k20_cw = 2.07e-9; C_cwtoE_cw33_C_cw = 0.6;
  C_ccwtoE_ccw33: => E_ccw33; C_ccw33*C_ccwtoE_ccw33_k20_cc*exp(33*C_ccwtoE_ccw33_C_cc);  // modifiers: C_ccw33
    C_ccwtoE_ccw33_k20_cc = 2.07e-9; C_ccwtoE_ccw33_C_cc = 0.6;
  C_cwtoE_cw34: => E_cw34; C_cw34*C_cwtoE_cw34_k20_cw*exp(34*C_cwtoE_cw34_C_cw);  // modifiers: C_cw34
    C_cwtoE_cw34_k20_cw = 2.07e-9; C_cwtoE_cw34_C_cw = 0.6;
  C_ccwtoE_ccw34: => E_ccw34; C_ccw34*C_ccwtoE_ccw34_k20_cc*exp(34*C_ccwtoE_ccw34_C_cc);  // modifiers: C_ccw34
    C_ccwtoE_ccw34_k20_cc = 2.07e-9; C_ccwtoE_ccw34_C_cc = 0.6;
  C_cwtoE_cw35: => E_cw35; C_cw35*C_cwtoE_cw35_k20_cw*exp(35*C_cwtoE_cw35_C_cw);  // modifiers: C_cw35
    C_cwtoE_cw35_k20_cw = 2.07e-9; C_cwtoE_cw35_C_cw = 0.6;
  C_ccwtoE_ccw35: => E_ccw35; C_ccw35*C_ccwtoE_ccw35_k20_cc*exp(35*C_ccwtoE_ccw35_C_cc);  // modifiers: C_ccw35
    C_ccwtoE_ccw35_k20_cc = 2.07e-9; C_ccwtoE_ccw35_C_cc = 0.6;
  C_cwtoE_cw36: => E_cw36; C_cw36*C_cwtoE_cw36_k20_cw*exp(36*C_cwtoE_cw36_C_cw);  // modifiers: C_cw36
    C_cwtoE_cw36_k20_cw = 2.07e-9; C_cwtoE_cw36_C_cw = 0.6;
  C_ccwtoE_ccw36: => E_ccw36; C_ccw36*C_ccwtoE_ccw36_k20_cc*exp(36*C_ccwtoE_ccw36_C_cc);  // modifiers: C_ccw36
    C_ccwtoE_ccw36_k20_cc = 2.07e-9; C_ccwtoE_ccw36_C_cc = 0.6;
  C_cwtoE_cw37: => E_cw37; C_cw37*C_cwtoE_cw37_k20_cw*exp(37*C_cwtoE_cw37_C_cw);  // modifiers: C_cw37
    C_cwtoE_cw37_k20_cw = 2.07e-9; C_cwtoE_cw37_C_cw = 0.6;
  C_ccwtoE_ccw37: => E_ccw37; C_ccw37*C_ccwtoE_ccw37_k20_cc*exp(37*C_ccwtoE_ccw37_C_cc);  // modifiers: C_ccw37
    C_ccwtoE_ccw37_k20_cc = 2.07e-9; C_ccwtoE_ccw37_C_cc = 0.6;
  C_cwtoE_cw38: => E_cw38; C_cw38*C_cwtoE_cw38_k20_cw*exp(38*C_cwtoE_cw38_C_cw);  // modifiers: C_cw38
    C_cwtoE_cw38_k20_cw = 2.07e-9; C_cwtoE_cw38_C_cw = 0.6;
  C_ccwtoE_ccw38: => E_ccw38; C_ccw38*C_ccwtoE_ccw38_k20_cc*exp(38*C_ccwtoE_ccw38_C_cc);  // modifiers: C_ccw38
    C_ccwtoE_ccw38_k20_cc = 2.07e-9; C_ccwtoE_ccw38_C_cc = 0.6;
  C_cwtoE_cw39: => E_cw39; C_cw39*C_cwtoE_cw39_k20_cw*exp(39*C_cwtoE_cw39_C_cw);  // modifiers: C_cw39
    C_cwtoE_cw39_k20_cw = 2.07e-9; C_cwtoE_cw39_C_cw = 0.6;
  C_ccwtoE_ccw39: => E_ccw39; C_ccw39*C_ccwtoE_ccw39_k20_cc*exp(39*C_ccwtoE_ccw39_C_cc);  // modifiers: C_ccw39
    C_ccwtoE_ccw39_k20_cc = 2.07e-9; C_ccwtoE_ccw39_C_cc = 0.6;
  C_cwtoE_cw40: => E_cw40; C_cw40*C_cwtoE_cw40_k20_cw*exp(40*C_cwtoE_cw40_C_cw);  // modifiers: C_cw40
    C_cwtoE_cw40_k20_cw = 2.07e-9; C_cwtoE_cw40_C_cw = 0.6;
  C_ccwtoE_ccw40: => E_ccw40; C_ccw40*C_ccwtoE_ccw40_k20_cc*exp(40*C_ccwtoE_ccw40_C_cc);  // modifiers: C_ccw40
    C_ccwtoE_ccw40_k20_cc = 2.07e-9; C_ccwtoE_ccw40_C_cc = 0.6;
  C_cwtoE_cw41: => E_cw41; C_cw41*C_cwtoE_cw41_k20_cw*exp(41*C_cwtoE_cw41_C_cw);  // modifiers: C_cw41
    C_cwtoE_cw41_k20_cw = 2.07e-9; C_cwtoE_cw41_C_cw = 0.6;
  C_ccwtoE_ccw41: => E_ccw41; C_ccw41*C_ccwtoE_ccw41_k20_cc*exp(41*C_ccwtoE_ccw41_C_cc);  // modifiers: C_ccw41
    C_ccwtoE_ccw41_k20_cc = 2.07e-9; C_ccwtoE_ccw41_C_cc = 0.6;
  C_cwtoE_cw42: => E_cw42; C_cw42*C_cwtoE_cw42_k20_cw*exp(42*C_cwtoE_cw42_C_cw);  // modifiers: C_cw42
    C_cwtoE_cw42_k20_cw = 2.07e-9; C_cwtoE_cw42_C_cw = 0.6;
  C_ccwtoE_ccw42: => E_ccw42; C_ccw42*C_ccwtoE_ccw42_k20_cc*exp(42*C_ccwtoE_ccw42_C_cc);  // modifiers: C_ccw42
    C_ccwtoE_ccw42_k20_cc = 2.07e-9; C_ccwtoE_ccw42_C_cc = 0.6;
  C_cwtoE_cw43: => E_cw43; C_cw43*C_cwtoE_cw43_k20_cw*exp(43*C_cwtoE_cw43_C_cw);  // modifiers: C_cw43
    C_cwtoE_cw43_k20_cw = 2.07e-9; C_cwtoE_cw43_C_cw = 0.6;
  C_ccwtoE_ccw43: => E_ccw43; C_ccw43*C_ccwtoE_ccw43_k20_cc*exp(43*C_ccwtoE_ccw43_C_cc);  // modifiers: C_ccw43
    C_ccwtoE_ccw43_k20_cc = 2.07e-9; C_ccwtoE_ccw43_C_cc = 0.6;
  C_cwtoE_cw44: => E_cw44; C_cw44*C_cwtoE_cw44_k20_cw*exp(44*C_cwtoE_cw44_C_cw);  // modifiers: C_cw44
    C_cwtoE_cw44_k20_cw = 2.07e-9; C_cwtoE_cw44_C_cw = 0.6;
  C_ccwtoE_ccw44: => E_ccw44; C_ccw44*C_ccwtoE_ccw44_k20_cc*exp(44*C_ccwtoE_ccw44_C_cc);  // modifiers: C_ccw44
    C_ccwtoE_ccw44_k20_cc = 2.07e-9; C_ccwtoE_ccw44_C_cc = 0.6;
  Start_cwtoR_cw0: Start_cw => R_cw0; Start_cw*Start_cwtoR_cw0_kstop_cw*E_cw0/Esum_cw;  // modifiers: Esum_cw, E_cw0
    Start_cwtoR_cw0_kstop_cw = 2.48;
  Start_ccwtoR_ccw0: Start_ccw => R_ccw0; Start_ccw*Start_ccwtoR_ccw0_kstop_cc*E_ccw0/Esum_ccw;  // modifiers: Esum_ccw, E_ccw0
    Start_ccwtoR_ccw0_kstop_cc = 2.48;
  Start_cwtoR_cw1: Start_cw => R_cw1; Start_cw*Start_cwtoR_cw1_kstop_cw*E_cw1/Esum_cw;  // modifiers: Esum_cw, E_cw1
    Start_cwtoR_cw1_kstop_cw = 2.48;
  Start_ccwtoR_ccw1: Start_ccw => R_ccw1; Start_ccw*Start_ccwtoR_ccw1_kstop_cc*E_ccw1/Esum_ccw;  // modifiers: Esum_ccw, E_ccw1
    Start_ccwtoR_ccw1_kstop_cc = 2.48;
  Start_cwtoR_cw2: Start_cw => R_cw2; Start_cw*Start_cwtoR_cw2_kstop_cw*E_cw2/Esum_cw;  // modifiers: Esum_cw, E_cw2
    Start_cwtoR_cw2_kstop_cw = 2.48;
  Start_ccwtoR_ccw2: Start_ccw => R_ccw2; Start_ccw*Start_ccwtoR_ccw2_kstop_cc*E_ccw2/Esum_ccw;  // modifiers: Esum_ccw, E_ccw2
    Start_ccwtoR_ccw2_kstop_cc = 2.48;
  Start_cwtoR_cw3: Start_cw => R_cw3; Start_cw*Start_cwtoR_cw3_kstop_cw*E_cw3/Esum_cw;  // modifiers: Esum_cw, E_cw3
    Start_cwtoR_cw3_kstop_cw = 2.48;
  Start_ccwtoR_ccw3: Start_ccw => R_ccw3; Start_ccw*Start_ccwtoR_ccw3_kstop_cc*E_ccw3/Esum_ccw;  // modifiers: Esum_ccw, E_ccw3
    Start_ccwtoR_ccw3_kstop_cc = 2.48;
  Start_cwtoR_cw4: Start_cw => R_cw4; Start_cw*Start_cwtoR_cw4_kstop_cw*E_cw4/Esum_cw;  // modifiers: Esum_cw, E_cw4
    Start_cwtoR_cw4_kstop_cw = 2.48;
  Start_ccwtoR_ccw4: Start_ccw => R_ccw4; Start_ccw*Start_ccwtoR_ccw4_kstop_cc*E_ccw4/Esum_ccw;  // modifiers: Esum_ccw, E_ccw4
    Start_ccwtoR_ccw4_kstop_cc = 2.48;
  Start_cwtoR_cw5: Start_cw => R_cw5; Start_cw*Start_cwtoR_cw5_kstop_cw*E_cw5/Esum_cw;  // modifiers: Esum_cw, E_cw5
    Start_cwtoR_cw5_kstop_cw = 2.48;
  Start_ccwtoR_ccw5: Start_ccw => R_ccw5; Start_ccw*Start_ccwtoR_ccw5_kstop_cc*E_ccw5/Esum_ccw;  // modifiers: Esum_ccw, E_ccw5
    Start_ccwtoR_ccw5_kstop_cc = 2.48;
  Start_cwtoR_cw6: Start_cw => R_cw6; Start_cw*Start_cwtoR_cw6_kstop_cw*E_cw6/Esum_cw;  // modifiers: Esum_cw, E_cw6
    Start_cwtoR_cw6_kstop_cw = 2.48;
  Start_ccwtoR_ccw6: Start_ccw => R_ccw6; Start_ccw*Start_ccwtoR_ccw6_kstop_cc*E_ccw6/Esum_ccw;  // modifiers: Esum_ccw, E_ccw6
    Start_ccwtoR_ccw6_kstop_cc = 2.48;
  Start_cwtoR_cw7: Start_cw => R_cw7; Start_cw*Start_cwtoR_cw7_kstop_cw*E_cw7/Esum_cw;  // modifiers: Esum_cw, E_cw7
    Start_cwtoR_cw7_kstop_cw = 2.48;
  Start_ccwtoR_ccw7: Start_ccw => R_ccw7; Start_ccw*Start_ccwtoR_ccw7_kstop_cc*E_ccw7/Esum_ccw;  // modifiers: Esum_ccw, E_ccw7
    Start_ccwtoR_ccw7_kstop_cc = 2.48;
  Start_cwtoR_cw8: Start_cw => R_cw8; Start_cw*Start_cwtoR_cw8_kstop_cw*E_cw8/Esum_cw;  // modifiers: Esum_cw, E_cw8
    Start_cwtoR_cw8_kstop_cw = 2.48;
  Start_ccwtoR_ccw8: Start_ccw => R_ccw8; Start_ccw*Start_ccwtoR_ccw8_kstop_cc*E_ccw8/Esum_ccw;  // modifiers: Esum_ccw, E_ccw8
    Start_ccwtoR_ccw8_kstop_cc = 2.48;
  Start_cwtoR_cw9: Start_cw => R_cw9; Start_cw*Start_cwtoR_cw9_kstop_cw*E_cw9/Esum_cw;  // modifiers: Esum_cw, E_cw9
    Start_cwtoR_cw9_kstop_cw = 2.48;
  Start_ccwtoR_ccw9: Start_ccw => R_ccw9; Start_ccw*Start_ccwtoR_ccw9_kstop_cc*E_ccw9/Esum_ccw;  // modifiers: Esum_ccw, E_ccw9
    Start_ccwtoR_ccw9_kstop_cc = 2.48;
  Start_cwtoR_cw10: Start_cw => R_cw10; Start_cw*Start_cwtoR_cw10_kstop_cw*E_cw10/Esum_cw;  // modifiers: Esum_cw, E_cw10
    Start_cwtoR_cw10_kstop_cw = 2.48;
  Start_ccwtoR_ccw10: Start_ccw => R_ccw10; Start_ccw*Start_ccwtoR_ccw10_kstop_cc*E_ccw10/Esum_ccw;  // modifiers: Esum_ccw, E_ccw10
    Start_ccwtoR_ccw10_kstop_cc = 2.48;
  Start_cwtoR_cw11: Start_cw => R_cw11; Start_cw*Start_cwtoR_cw11_kstop_cw*E_cw11/Esum_cw;  // modifiers: Esum_cw, E_cw11
    Start_cwtoR_cw11_kstop_cw = 2.48;
  Start_ccwtoR_ccw11: Start_ccw => R_ccw11; Start_ccw*Start_ccwtoR_ccw11_kstop_cc*E_ccw11/Esum_ccw;  // modifiers: Esum_ccw, E_ccw11
    Start_ccwtoR_ccw11_kstop_cc = 2.48;
  Start_cwtoR_cw12: Start_cw => R_cw12; Start_cw*Start_cwtoR_cw12_kstop_cw*E_cw12/Esum_cw;  // modifiers: Esum_cw, E_cw12
    Start_cwtoR_cw12_kstop_cw = 2.48;
  Start_ccwtoR_ccw12: Start_ccw => R_ccw12; Start_ccw*Start_ccwtoR_ccw12_kstop_cc*E_ccw12/Esum_ccw;  // modifiers: Esum_ccw, E_ccw12
    Start_ccwtoR_ccw12_kstop_cc = 2.48;
  Start_cwtoR_cw13: Start_cw => R_cw13; Start_cw*Start_cwtoR_cw13_kstop_cw*E_cw13/Esum_cw;  // modifiers: Esum_cw, E_cw13
    Start_cwtoR_cw13_kstop_cw = 2.48;
  Start_ccwtoR_ccw13: Start_ccw => R_ccw13; Start_ccw*Start_ccwtoR_ccw13_kstop_cc*E_ccw13/Esum_ccw;  // modifiers: Esum_ccw, E_ccw13
    Start_ccwtoR_ccw13_kstop_cc = 2.48;
  Start_cwtoR_cw14: Start_cw => R_cw14; Start_cw*Start_cwtoR_cw14_kstop_cw*E_cw14/Esum_cw;  // modifiers: Esum_cw, E_cw14
    Start_cwtoR_cw14_kstop_cw = 2.48;
  Start_ccwtoR_ccw14: Start_ccw => R_ccw14; Start_ccw*Start_ccwtoR_ccw14_kstop_cc*E_ccw14/Esum_ccw;  // modifiers: Esum_ccw, E_ccw14
    Start_ccwtoR_ccw14_kstop_cc = 2.48;
  Start_cwtoR_cw15: Start_cw => R_cw15; Start_cw*Start_cwtoR_cw15_kstop_cw*E_cw15/Esum_cw;  // modifiers: Esum_cw, E_cw15
    Start_cwtoR_cw15_kstop_cw = 2.48;
  Start_ccwtoR_ccw15: Start_ccw => R_ccw15; Start_ccw*Start_ccwtoR_ccw15_kstop_cc*E_ccw15/Esum_ccw;  // modifiers: Esum_ccw, E_ccw15
    Start_ccwtoR_ccw15_kstop_cc = 2.48;
  Start_cwtoR_cw16: Start_cw => R_cw16; Start_cw*Start_cwtoR_cw16_kstop_cw*E_cw16/Esum_cw;  // modifiers: Esum_cw, E_cw16
    Start_cwtoR_cw16_kstop_cw = 2.48;
  Start_ccwtoR_ccw16: Start_ccw => R_ccw16; Start_ccw*Start_ccwtoR_ccw16_kstop_cc*E_ccw16/Esum_ccw;  // modifiers: Esum_ccw, E_ccw16
    Start_ccwtoR_ccw16_kstop_cc = 2.48;
  Start_cwtoR_cw17: Start_cw => R_cw17; Start_cw*Start_cwtoR_cw17_kstop_cw*E_cw17/Esum_cw;  // modifiers: Esum_cw, E_cw17
    Start_cwtoR_cw17_kstop_cw = 2.48;
  Start_ccwtoR_ccw17: Start_ccw => R_ccw17; Start_ccw*Start_ccwtoR_ccw17_kstop_cc*E_ccw17/Esum_ccw;  // modifiers: Esum_ccw, E_ccw17
    Start_ccwtoR_ccw17_kstop_cc = 2.48;
  Start_cwtoR_cw18: Start_cw => R_cw18; Start_cw*Start_cwtoR_cw18_kstop_cw*E_cw18/Esum_cw;  // modifiers: Esum_cw, E_cw18
    Start_cwtoR_cw18_kstop_cw = 2.48;
  Start_ccwtoR_ccw18: Start_ccw => R_ccw18; Start_ccw*Start_ccwtoR_ccw18_kstop_cc*E_ccw18/Esum_ccw;  // modifiers: Esum_ccw, E_ccw18
    Start_ccwtoR_ccw18_kstop_cc = 2.48;
  Start_cwtoR_cw19: Start_cw => R_cw19; Start_cw*Start_cwtoR_cw19_kstop_cw*E_cw19/Esum_cw;  // modifiers: Esum_cw, E_cw19
    Start_cwtoR_cw19_kstop_cw = 2.48;
  Start_ccwtoR_ccw19: Start_ccw => R_ccw19; Start_ccw*Start_ccwtoR_ccw19_kstop_cc*E_ccw19/Esum_ccw;  // modifiers: Esum_ccw, E_ccw19
    Start_ccwtoR_ccw19_kstop_cc = 2.48;
  Start_cwtoR_cw20: Start_cw => R_cw20; Start_cw*Start_cwtoR_cw20_kstop_cw*E_cw20/Esum_cw;  // modifiers: Esum_cw, E_cw20
    Start_cwtoR_cw20_kstop_cw = 2.48;
  Start_ccwtoR_ccw20: Start_ccw => R_ccw20; Start_ccw*Start_ccwtoR_ccw20_kstop_cc*E_ccw20/Esum_ccw;  // modifiers: Esum_ccw, E_ccw20
    Start_ccwtoR_ccw20_kstop_cc = 2.48;
  Start_cwtoR_cw21: Start_cw => R_cw21; Start_cw*Start_cwtoR_cw21_kstop_cw*E_cw21/Esum_cw;  // modifiers: Esum_cw, E_cw21
    Start_cwtoR_cw21_kstop_cw = 2.48;
  Start_ccwtoR_ccw21: Start_ccw => R_ccw21; Start_ccw*Start_ccwtoR_ccw21_kstop_cc*E_ccw21/Esum_ccw;  // modifiers: Esum_ccw, E_ccw21
    Start_ccwtoR_ccw21_kstop_cc = 2.48;
  Start_cwtoR_cw22: Start_cw => R_cw22; Start_cw*Start_cwtoR_cw22_kstop_cw*E_cw22/Esum_cw;  // modifiers: Esum_cw, E_cw22
    Start_cwtoR_cw22_kstop_cw = 2.48;
  Start_ccwtoR_ccw22: Start_ccw => R_ccw22; Start_ccw*Start_ccwtoR_ccw22_kstop_cc*E_ccw22/Esum_ccw;  // modifiers: Esum_ccw, E_ccw22
    Start_ccwtoR_ccw22_kstop_cc = 2.48;
  Start_cwtoR_cw23: Start_cw => R_cw23; Start_cw*Start_cwtoR_cw23_kstop_cw*E_cw23/Esum_cw;  // modifiers: Esum_cw, E_cw23
    Start_cwtoR_cw23_kstop_cw = 2.48;
  Start_ccwtoR_ccw23: Start_ccw => R_ccw23; Start_ccw*Start_ccwtoR_ccw23_kstop_cc*E_ccw23/Esum_ccw;  // modifiers: Esum_ccw, E_ccw23
    Start_ccwtoR_ccw23_kstop_cc = 2.48;
  Start_cwtoR_cw24: Start_cw => R_cw24; Start_cw*Start_cwtoR_cw24_kstop_cw*E_cw24/Esum_cw;  // modifiers: Esum_cw, E_cw24
    Start_cwtoR_cw24_kstop_cw = 2.48;
  Start_ccwtoR_ccw24: Start_ccw => R_ccw24; Start_ccw*Start_ccwtoR_ccw24_kstop_cc*E_ccw24/Esum_ccw;  // modifiers: Esum_ccw, E_ccw24
    Start_ccwtoR_ccw24_kstop_cc = 2.48;
  Start_cwtoR_cw25: Start_cw => R_cw25; Start_cw*Start_cwtoR_cw25_kstop_cw*E_cw25/Esum_cw;  // modifiers: Esum_cw, E_cw25
    Start_cwtoR_cw25_kstop_cw = 2.48;
  Start_ccwtoR_ccw25: Start_ccw => R_ccw25; Start_ccw*Start_ccwtoR_ccw25_kstop_cc*E_ccw25/Esum_ccw;  // modifiers: Esum_ccw, E_ccw25
    Start_ccwtoR_ccw25_kstop_cc = 2.48;
  Start_cwtoR_cw26: Start_cw => R_cw26; Start_cw*Start_cwtoR_cw26_kstop_cw*E_cw26/Esum_cw;  // modifiers: Esum_cw, E_cw26
    Start_cwtoR_cw26_kstop_cw = 2.48;
  Start_ccwtoR_ccw26: Start_ccw => R_ccw26; Start_ccw*Start_ccwtoR_ccw26_kstop_cc*E_ccw26/Esum_ccw;  // modifiers: Esum_ccw, E_ccw26
    Start_ccwtoR_ccw26_kstop_cc = 2.48;
  Start_cwtoR_cw27: Start_cw => R_cw27; Start_cw*Start_cwtoR_cw27_kstop_cw*E_cw27/Esum_cw;  // modifiers: Esum_cw, E_cw27
    Start_cwtoR_cw27_kstop_cw = 2.48;
  Start_ccwtoR_ccw27: Start_ccw => R_ccw27; Start_ccw*Start_ccwtoR_ccw27_kstop_cc*E_ccw27/Esum_ccw;  // modifiers: Esum_ccw, E_ccw27
    Start_ccwtoR_ccw27_kstop_cc = 2.48;
  Start_cwtoR_cw28: Start_cw => R_cw28; Start_cw*Start_cwtoR_cw28_kstop_cw*E_cw28/Esum_cw;  // modifiers: Esum_cw, E_cw28
    Start_cwtoR_cw28_kstop_cw = 2.48;
  Start_ccwtoR_ccw28: Start_ccw => R_ccw28; Start_ccw*Start_ccwtoR_ccw28_kstop_cc*E_ccw28/Esum_ccw;  // modifiers: Esum_ccw, E_ccw28
    Start_ccwtoR_ccw28_kstop_cc = 2.48;
  Start_cwtoR_cw29: Start_cw => R_cw29; Start_cw*Start_cwtoR_cw29_kstop_cw*E_cw29/Esum_cw;  // modifiers: Esum_cw, E_cw29
    Start_cwtoR_cw29_kstop_cw = 2.48;
  Start_ccwtoR_ccw29: Start_ccw => R_ccw29; Start_ccw*Start_ccwtoR_ccw29_kstop_cc*E_ccw29/Esum_ccw;  // modifiers: Esum_ccw, E_ccw29
    Start_ccwtoR_ccw29_kstop_cc = 2.48;
  Start_cwtoR_cw30: Start_cw => R_cw30; Start_cw*Start_cwtoR_cw30_kstop_cw*E_cw30/Esum_cw;  // modifiers: Esum_cw, E_cw30
    Start_cwtoR_cw30_kstop_cw = 2.48;
  Start_ccwtoR_ccw30: Start_ccw => R_ccw30; Start_ccw*Start_ccwtoR_ccw30_kstop_cc*E_ccw30/Esum_ccw;  // modifiers: Esum_ccw, E_ccw30
    Start_ccwtoR_ccw30_kstop_cc = 2.48;
  Start_cwtoR_cw31: Start_cw => R_cw31; Start_cw*Start_cwtoR_cw31_kstop_cw*E_cw31/Esum_cw;  // modifiers: Esum_cw, E_cw31
    Start_cwtoR_cw31_kstop_cw = 2.48;
  Start_ccwtoR_ccw31: Start_ccw => R_ccw31; Start_ccw*Start_ccwtoR_ccw31_kstop_cc*E_ccw31/Esum_ccw;  // modifiers: Esum_ccw, E_ccw31
    Start_ccwtoR_ccw31_kstop_cc = 2.48;
  Start_cwtoR_cw32: Start_cw => R_cw32; Start_cw*Start_cwtoR_cw32_kstop_cw*E_cw32/Esum_cw;  // modifiers: Esum_cw, E_cw32
    Start_cwtoR_cw32_kstop_cw = 2.48;
  Start_ccwtoR_ccw32: Start_ccw => R_ccw32; Start_ccw*Start_ccwtoR_ccw32_kstop_cc*E_ccw32/Esum_ccw;  // modifiers: Esum_ccw, E_ccw32
    Start_ccwtoR_ccw32_kstop_cc = 2.48;
  Start_cwtoR_cw33: Start_cw => R_cw33; Start_cw*Start_cwtoR_cw33_kstop_cw*E_cw33/Esum_cw;  // modifiers: Esum_cw, E_cw33
    Start_cwtoR_cw33_kstop_cw = 2.48;
  Start_ccwtoR_ccw33: Start_ccw => R_ccw33; Start_ccw*Start_ccwtoR_ccw33_kstop_cc*E_ccw33/Esum_ccw;  // modifiers: Esum_ccw, E_ccw33
    Start_ccwtoR_ccw33_kstop_cc = 2.48;
  Start_cwtoR_cw34: Start_cw => R_cw34; Start_cw*Start_cwtoR_cw34_kstop_cw*E_cw34/Esum_cw;  // modifiers: Esum_cw, E_cw34
    Start_cwtoR_cw34_kstop_cw = 2.48;
  Start_ccwtoR_ccw34: Start_ccw => R_ccw34; Start_ccw*Start_ccwtoR_ccw34_kstop_cc*E_ccw34/Esum_ccw;  // modifiers: Esum_ccw, E_ccw34
    Start_ccwtoR_ccw34_kstop_cc = 2.48;
  Start_cwtoR_cw35: Start_cw => R_cw35; Start_cw*Start_cwtoR_cw35_kstop_cw*E_cw35/Esum_cw;  // modifiers: Esum_cw, E_cw35
    Start_cwtoR_cw35_kstop_cw = 2.48;
  Start_ccwtoR_ccw35: Start_ccw => R_ccw35; Start_ccw*Start_ccwtoR_ccw35_kstop_cc*E_ccw35/Esum_ccw;  // modifiers: Esum_ccw, E_ccw35
    Start_ccwtoR_ccw35_kstop_cc = 2.48;
  Start_cwtoR_cw36: Start_cw => R_cw36; Start_cw*Start_cwtoR_cw36_kstop_cw*E_cw36/Esum_cw;  // modifiers: Esum_cw, E_cw36
    Start_cwtoR_cw36_kstop_cw = 2.48;
  Start_ccwtoR_ccw36: Start_ccw => R_ccw36; Start_ccw*Start_ccwtoR_ccw36_kstop_cc*E_ccw36/Esum_ccw;  // modifiers: Esum_ccw, E_ccw36
    Start_ccwtoR_ccw36_kstop_cc = 2.48;
  Start_cwtoR_cw37: Start_cw => R_cw37; Start_cw*Start_cwtoR_cw37_kstop_cw*E_cw37/Esum_cw;  // modifiers: Esum_cw, E_cw37
    Start_cwtoR_cw37_kstop_cw = 2.48;
  Start_ccwtoR_ccw37: Start_ccw => R_ccw37; Start_ccw*Start_ccwtoR_ccw37_kstop_cc*E_ccw37/Esum_ccw;  // modifiers: Esum_ccw, E_ccw37
    Start_ccwtoR_ccw37_kstop_cc = 2.48;
  Start_cwtoR_cw38: Start_cw => R_cw38; Start_cw*Start_cwtoR_cw38_kstop_cw*E_cw38/Esum_cw;  // modifiers: Esum_cw, E_cw38
    Start_cwtoR_cw38_kstop_cw = 2.48;
  Start_ccwtoR_ccw38: Start_ccw => R_ccw38; Start_ccw*Start_ccwtoR_ccw38_kstop_cc*E_ccw38/Esum_ccw;  // modifiers: Esum_ccw, E_ccw38
    Start_ccwtoR_ccw38_kstop_cc = 2.48;
  Start_cwtoR_cw39: Start_cw => R_cw39; Start_cw*Start_cwtoR_cw39_kstop_cw*E_cw39/Esum_cw;  // modifiers: Esum_cw, E_cw39
    Start_cwtoR_cw39_kstop_cw = 2.48;
  Start_ccwtoR_ccw39: Start_ccw => R_ccw39; Start_ccw*Start_ccwtoR_ccw39_kstop_cc*E_ccw39/Esum_ccw;  // modifiers: Esum_ccw, E_ccw39
    Start_ccwtoR_ccw39_kstop_cc = 2.48;
  Start_cwtoR_cw40: Start_cw => R_cw40; Start_cw*Start_cwtoR_cw40_kstop_cw*E_cw40/Esum_cw;  // modifiers: Esum_cw, E_cw40
    Start_cwtoR_cw40_kstop_cw = 2.48;
  Start_ccwtoR_ccw40: Start_ccw => R_ccw40; Start_ccw*Start_ccwtoR_ccw40_kstop_cc*E_ccw40/Esum_ccw;  // modifiers: Esum_ccw, E_ccw40
    Start_ccwtoR_ccw40_kstop_cc = 2.48;
  Start_cwtoR_cw41: Start_cw => R_cw41; Start_cw*Start_cwtoR_cw41_kstop_cw*E_cw41/Esum_cw;  // modifiers: Esum_cw, E_cw41
    Start_cwtoR_cw41_kstop_cw = 2.48;
  Start_ccwtoR_ccw41: Start_ccw => R_ccw41; Start_ccw*Start_ccwtoR_ccw41_kstop_cc*E_ccw41/Esum_ccw;  // modifiers: Esum_ccw, E_ccw41
    Start_ccwtoR_ccw41_kstop_cc = 2.48;
  Start_cwtoR_cw42: Start_cw => R_cw42; Start_cw*Start_cwtoR_cw42_kstop_cw*E_cw42/Esum_cw;  // modifiers: Esum_cw, E_cw42
    Start_cwtoR_cw42_kstop_cw = 2.48;
  Start_ccwtoR_ccw42: Start_ccw => R_ccw42; Start_ccw*Start_ccwtoR_ccw42_kstop_cc*E_ccw42/Esum_ccw;  // modifiers: Esum_ccw, E_ccw42
    Start_ccwtoR_ccw42_kstop_cc = 2.48;
  Start_cwtoR_cw43: Start_cw => R_cw43; Start_cw*Start_cwtoR_cw43_kstop_cw*E_cw43/Esum_cw;  // modifiers: Esum_cw, E_cw43
    Start_cwtoR_cw43_kstop_cw = 2.48;
  Start_ccwtoR_ccw43: Start_ccw => R_ccw43; Start_ccw*Start_ccwtoR_ccw43_kstop_cc*E_ccw43/Esum_ccw;  // modifiers: Esum_ccw, E_ccw43
    Start_ccwtoR_ccw43_kstop_cc = 2.48;
  Start_cwtoR_cw44: Start_cw => R_cw44; Start_cw*Start_cwtoR_cw44_kstop_cw*E_cw44/Esum_cw;  // modifiers: Esum_cw, E_cw44
    Start_cwtoR_cw44_kstop_cw = 2.48;
  Start_ccwtoR_ccw44: Start_ccw => R_ccw44; Start_ccw*Start_ccwtoR_ccw44_kstop_cc*E_ccw44/Esum_ccw;  // modifiers: Esum_ccw, E_ccw44
    Start_ccwtoR_ccw44_kstop_cc = 2.48;
  SR587toSR373: SRI587 => SRI373; SRI587*SR587toSR373_Ior*SR587toSR373_sigmaphi;
    SR587toSR373_Ior = 2.64e20; SR587toSR373_sigmaphi = 1.47e-20;
  SR373toSR510: SRI373 => SRI510; SRI373*SR373toSR510_Iuv*SR373toSR510_sigmaphi;
    SR373toSR510_Iuv = 0; SR373toSR510_sigmaphi = 1.47e-20;
  SR373toSR587: SRI373 => SRI587; SRI373*SR373toSR587_kr373;
    SR373toSR587_kr373 = 0.924;
  SR510toSR587: SRI510 => SRI587; SRI510*SR510toSR587_kr510;
    SR510toSR587_kr510 = 8.66;
end
