// SBML level 2 version 3

model Livshitz2007_CardiacMyocytes()
  // This a model from the article:
  // Regulation of Ca2+ and electrical alternans in cardiac myocytes: role of CAMKII and repolarizing currents.
  // Livshitz LM, Rudy Y. Am J Physiol Heart Circ Physiol. 2007 Jun;292(6):H2854-66. 17277017 ,
  // Abstract:
  // Alternans of cardiac repolarization is associated with arrhythmias and sudden death. At the cellular level, alternans involves beat-to-beat oscillation of the action potential (AP) and possibly Ca(2+) transient (CaT). Because of experimental difficulty in independently controlling the Ca(2+) and electrical subsystems, mathematical modeling provides additional insights into mechanisms and causality. Pacing protocols were conducted in a canine ventricular myocyte model with the following results: 1) CaT alternans results from refractoriness of the sarcoplasmic reticulum Ca(2+) release system; alternation of the L-type calcium current has a negligible effect; 2) CaT-AP coupling during late AP occurs through the sodium-calcium exchanger and underlies AP duration (APD) alternans; 3) increased Ca(2+)/calmodulin-dependent protein kinase II (CaMKII) activity extends the range of CaT and APD alternans to slower frequencies and increases alternans magnitude; its decrease suppresses CaT and APD alternans, exerting an antiarrhythmic effect; and 4) increase of the rapid delayed rectifier current (I(Kr)) also suppresses APD alternans but without suppressing CaT alternans. Thus CaMKII inhibition eliminates APD alternans by eliminating its cause (CaT alternans) while I(Kr) enhancement does so by weakening CaT-APD coupling. The simulations identify combined CaMKII inhibition and I(Kr) enhancement as a possible antiarrhythmic intervention.
  // This model was taken from the CellML repository and automatically converted to SBML.
  // The original model was: Livshitz LM, Rudy Y. (2007) - version01
  // The original CellML model was created by:
  // Noble, Penny,
  // penny.noble@dpag.ox.ac.uk
  // The University of Oxford
  // This model originates from BioModels Database: A Database of Annotated Published Models (http://www.ebi.ac.uk/biomodels/). It is copyright (c) 2005-2011 The BioModels.net Team.
  // To the extent possible under law, all copyright and related or neighbouring rights to this encoded model have been dedicated to the public domain worldwide. Please refer to CC0 Public Domain Dedication for more information.
  // In summary, you are entitled to use this encoded model in absolutely any manner you deem suitable, verbatim, or with modification, alone or embedded it in a larger context, redistribute it, commercially or not, in a restricted way or not..
  // To cite BioModels Database, please use: Li C, Donizelli M, Rodriguez N, Dharuri H, Endler L, Chelliah V, Li L, He E, Henry A, Stefan MI, Snoep JL, Hucka M, Le Novère N, Laibe C (2010) BioModels Database: An enhanced, curated and annotated resource for published quantitative kinetic models. BMC Syst Biol., 4:92.
  // biomodels.db:MODEL0406270966
  // isDescribedBy pubmed:17277017
  // biomodels.db:MODEL0406270966
  // isDescribedBy pubmed:17277017
  // biomodels.db:MODEL0406270966
  // biomodels.db:MODEL0406270966

  // Compartments:
  compartment Compartment = 1 litre;

  // Parameters:
  time_Environment has ms;
  F = 96485 C_per_mole;
  R = 8314 mJ_per_mole_K;
  Temp = 310 kelvin;
  FonRT has per_mV;
  K_o = 4.5 mM;
  Na_o = 140 mM;
  Ca_o = 1.8 mM;
  V = -89.4356 mV;
  caiont has uA_per_uF;
  naiont has uA_per_uF;
  kiont has uA_per_uF;
  l = 0.01 cm;
  ra = 0.0011 cm;
  vcell has uL;
  ageo has cm2;
  Acap has uF;
  AF has uF_mole_per_C;
  vmyo has uL;
  vmito has uL;
  vsr has uL;
  vnsr has uL;
  vjsr has uL;
  vss has uL;
  i_Stim has uA_per_uF;
  stim_offset = 0 ms;
  stim_period = 400 ms;
  stim_duration = 3 ms;
  stim_amplitude = -15 uA_per_uF;
  past has ms;
  H = 0.9944014 dimensionless;
  m = 0.0007347803 dimensionless;
  J = 0.9961007 dimensionless;
  GNa = 16 mS_per_uF;
  a has per_ms;
  aH has per_ms;
  bH has per_ms;
  aj has per_ms;
  bj has per_ms;
  am has per_ms;
  bm has per_ms;
  ina has uA_per_uF;
  d = 3.251479e-27 dimensionless;
  f = 0.9974049 dimensionless;
  dss0 has dimensionless;
  taud has ms;
  dss1 has dimensionless;
  dss has dimensionless;
  fss has dimensionless;
  tauf has ms;
  gacai = 1 dimensionless;
  gacao = 0.341 dimensionless;
  kmca = 0.0006 mM;
  pca = 0.00054 L_per_F_ms;
  pna = 6.75e-7 L_per_F_ms;
  ganai = 0.75 dimensionless;
  ganao = 0.75 dimensionless;
  pk = 1.93e-7 L_per_F_ms;
  gaki = 0.75 dimensionless;
  gako = 0.75 dimensionless;
  ibarca has uA_per_uF;
  ibarna has uA_per_uF;
  ibark has uA_per_uF;
  fca has dimensionless;
  ilca has uA_per_uF;
  ilcana has uA_per_uF;
  ilcak has uA_per_uF;
  GK1max = 0.75 mS_per_uF;
  GK1_ has mS_per_uF;
  ak1 has per_ms;
  bk1 has per_ms;
  gK1 has mS_per_uF;
  IK1 has uA_per_uF;
  gkrmax = 0.02614 mS_per_uF;
  xr = 0.0001621947 dimensionless;
  r has dimensionless;
  xrss has dimensionless;
  tauxr has ms;
  ikr has uA_per_uF;
  GKsmax = 0.433 mS_per_uF;
  xs1 = 0.02851473 dimensionless;
  xs2 = 0.0764114 dimensionless;
  gks has mS_per_uF;
  xss has dimensionless;
  tauxs has ms;
  iks has uA_per_uF;
  kmnai = 10 mM;
  kmko = 1.5 mM;
  ibarnak = 2.25 uA_per_uF;
  fnak has dimensionless;
  sigma has dimensionless;
  inak has uA_per_uF;
  c1 = 0.00025 uA_per_uF;
  c2 = 0.0001 dimensionless;
  gammas = 0.15 dimensionless;
  inaca has uA_per_uF;
  GKpmax = 0.00552 mS_per_uF;
  ikp has uA_per_uF;
  ibarpca = 1.15 uA_per_uF;
  kmpca = 0.0005 mM;
  ipca has uA_per_uF;
  gcab = 0.003016 mS_per_uF;
  icab has uA_per_uF;
  GNab = 0.004 mS_per_uF;
  inab has uA_per_uF;
  b = 0.0009274619 dimensionless;
  g = 0.9528343 dimensionless;
  gcat = 0.05 mS_per_uF;
  bss has dimensionless;
  taub has ms;
  gss has dimensionless;
  aa has dimensionless;
  taug has ms;
  icat has uA_per_uF;
  ENa has mV;
  ECa has mV;
  EK has mV;
  EKs has mV;
  prnak = 0.01833 dimensionless;
  Rel = 1.068742e-23 mM_per_ms;
  Rel_ss has mM_per_ms;
  tau_Rel has ms;
  K_Relss = 1 mM;
  alpha_Rel has mM_per_mV;
  tau = 4.75 ms;
  kappa = 0.125 mM_per_mV_ms;
  qn = 9 dimensionless;
  Ca_JSR_free has mM;
  bbb has mM;
  c has mM2;
  kmcsqn = 0.8 mM;
  csqnbar = 10 mM;
  kmup = 0.00092 mM;
  iupbar = 0.00875 mM_per_ms;
  nsrbar = 15 mM;
  iup has mM_per_ms;
  ileak has mM_per_ms;
  tautr = 120 ms;
  itr has mM_per_ms;
  Na_i = 16.61274 mM;
  K_i = 139.7309 mM;
  Ca_T = 0.02570598 mM;
  Ca_JSR_T = 7.873717 mM;
  Ca_NSR = 2.715182 mM;
  Over = 1e-12 dimensionless;
  cmdnbar = 0.05 mM;
  trpnbar = 0.07 mM;
  kmcmdn = 0.00238 mM;
  kmtrpn = 0.0005 mM;
  bmyo has mM;
  cmyo has mM2;
  dmyo has mM3;
  Ca_i has mM;

  // Assignment rules:
  FonRT := F/Temp/R;
  vcell := 1000*pi*ra*ra*l;
  ageo := 2*pi*ra*ra + 2*pi*ra*l;
  Acap := ageo*2;
  vmyo := vcell*0.68;
  vmito := vcell*0.24;
  vsr := vcell*0.06;
  vnsr := vcell*0.0552;
  vjsr := vcell*0.0048;
  vss := vcell*0.02;
  AF := Acap/F;
  past := floor(time_Environment/stim_period)*stim_period;
  i_Stim := piecewise(stim_amplitude, (time_Environment - past >= stim_offset) && (time_Environment - past <= stim_offset + stim_duration), 0);
  ENa := ln(Na_o/Na_i)/FonRT;
  ina := GNa*m*m*m*H*J*(V - ENa);
  a := 1 - 1/(1 + exp(-(V + 40)/0.024));
  aH := a*0.135*exp((80 + V)/(-6.8));
  bH := (1 - a)/(0.13*(1 + exp((V + 10.66)/(-11.1)))) + a*(3.56*exp(0.079*V) + 3.1*100000*exp(0.35*V));
  aj := a*(-127140*exp(0.2444*V) - 3.474e-5*exp(-0.04391*V))*1*(V + 37.78)/(1 + exp(0.311*(V + 79.23)));
  bj := (1 - a)*0.3*exp(-2.535e-7*V)/(1 + exp(-0.1*(V + 32))) + a*0.1212*exp(-0.01052*V)/(1 + exp(-0.1378*(V + 40.14)));
  am := 0.32*1*(V + 47.13)/(1 - exp(-0.1*(V + 47.13)));
  bm := 0.08*exp(-V/11);
  dss0 := 1/(1 + exp(-(V + 10)/6.24));
  taud := dss0*1*(1 - exp(-(V + 10)/6.24))/(0.035*(V + 10));
  dss1 := 1/(1 + exp(-(V + 60)/0.024));
  dss := dss0*dss1;
  fss := 1/(1 + exp((V + 32)/8)) + 0.6/(1 + exp((50 - V)/20));
  tauf := 1/(0.0197*exp(-(0.0337*(V + 10))^2) + 0.02);
  bmyo := cmdnbar + trpnbar - Ca_T + kmtrpn + kmcmdn;
  cmyo := kmcmdn*kmtrpn - Ca_T*(kmtrpn + kmcmdn) + trpnbar*kmcmdn + cmdnbar*kmtrpn;
  dmyo := -kmtrpn*kmcmdn*Ca_T;
  Ca_i := 2*sqrt(bmyo*bmyo - 3*cmyo)/3*cos(acos((9*bmyo*cmyo - 2*bmyo*bmyo*bmyo - 27*dmyo)/(2*(bmyo*bmyo - 3*cmyo)^1.5))/3) - bmyo/3;
  ibarca := pca*4*V*F*FonRT*(gacai*Ca_i*exp(2*V*FonRT) - gacao*Ca_o)/(exp(2*V*FonRT) - 1);
  ibarna := pna*V*F*FonRT*(ganai*Na_i*exp(V*FonRT) - ganao*Na_o)/(exp(V*FonRT) - 1);
  ibark := pk*V*F*FonRT*(gaki*K_i*exp(V*FonRT) - gako*K_o)/(exp(V*FonRT) - 1);
  fca := 1/(1 + Ca_i/kmca);
  ilca := d*f*fca*ibarca;
  ilcana := d*f*fca*ibarna;
  ilcak := d*f*fca*ibark;
  GK1_ := GK1max*sqrt(K_o/5.4);
  EK := ln(K_o/K_i)/FonRT;
  EKs := ln((K_o + prnak*Na_o)/(K_i + prnak*Na_i))/FonRT;
  ak1 := 1.02/(1 + exp(0.2385*(V - EK - 59.215)));
  bk1 := (0.49124*exp(0.08032*(V - EK + 5.476)) + 1*exp(0.06175*(V - EK - 594.31)))/(1 + exp(-0.5143*(V - EK + 4.753)));
  gK1 := GK1_*ak1/(ak1 + bk1);
  IK1 := gK1*(V - EK);
  r := 1/(1 + exp((V + 9)/22.4));
  ikr := gkrmax*sqrt(K_o/5.4)*xr*r*(V - EK);
  xrss := 1/(1 + exp(-(V + 10.085)/4.25));
  tauxr := 1/(0.00138*(V + 14.2)/(1 - exp(-0.123*(V + 14.2))) + 0.00061*(V + 38.9)/(exp(0.145*(V + 38.9)) - 1));
  gks := GKsmax*(1 + 0.6/(1 + (3.8e-5/Ca_i)^1.4));
  xss := 1/(1 + exp(-(V - 1.5)/16.7));
  tauxs := 1/(7.19e-5*(V + 30)/(1 - exp(-0.148*(V + 30))) + 0.000131*(V + 30)/(exp(0.0687*(V + 30)) - 1));
  iks := gks*xs1*xs2*(V - EKs);
  sigma := (exp(Na_o/67.3) - 1)/7;
  fnak := 1/(1 + 0.1245*exp(-0.1*V*FonRT) + 0.0365*sigma*exp(-V*FonRT));
  inak := ibarnak*fnak/(1 + (kmnai/Na_i)^2)/(1 + kmko/K_o);
  inaca := c1*exp((gammas - 1)*V*FonRT)*(exp(V*FonRT)*Na_i^3*Ca_o - Na_o^3*Ca_i)/(1 + c2*exp((gammas - 1)*V*FonRT)*(exp(V*FonRT)*Na_i^3*Ca_o + Na_o^3*Ca_i));
  ikp := GKpmax*(V - EK)/(1 + exp((7.488 - V)/5.98));
  ipca := ibarpca*Ca_i/(kmpca + Ca_i);
  icab := gcab*(V - ln(Ca_o/Ca_i)/(2*FonRT));
  inab := GNab*(V - ENa);
  icat := gcat*b*b*g*(V - ECa);
  bss := 1/(1 + exp(-(V + 14)/10.8));
  taub := 3.7 + 6.1/(1 + exp((V + 25)/4.5));
  gss := 1/(1 + exp((V + 60)/5.6));
  aa := 1 - 1/(1 + exp(-V/0.0024));
  taug := aa*1*(-0.875*V + 12) + 12*(1 - aa);
  ECa := ln(Ca_o/Ca_i)/2/FonRT;
  alpha_Rel := tau*kappa;
  bbb := csqnbar + kmcsqn - Ca_JSR_T;
  c := Ca_JSR_T*kmcsqn;
  Ca_JSR_free := -bbb/2 + sqrt(bbb^2 + 4*c)/2;
  Rel_ss := ilca*alpha_Rel/(1 + (K_Relss/Ca_JSR_free)^qn);
  tau_Rel := tau/(1 + 0.0123/Ca_JSR_free);
  iup := iupbar*Ca_i/(Ca_i + kmup);
  ileak := iupbar*Ca_NSR/nsrbar;
  itr := (Ca_NSR - Ca_JSR_free)/tautr;
  caiont := ilca + icab + ipca - 2*inaca + icat;
  naiont := ina + inab + 3*inaca + ilcana + 3*inak;
  kiont := ikr + iks + IK1 + ikp + ilcak - 2*inak + i_Stim;

  // Rate rules:
  V' = -(naiont + kiont + caiont);
  H' = aH*(1 - H) - bH*H;
  m' = am*(1 - m) - bm*m;
  J' = aj*(1 - J) - bj*J;
  d' = (dss - d)/taud;
  f' = (fss - f)/tauf;
  xr' = (xrss - xr)/tauxr;
  xs1' = (xss - xs1)/tauxs;
  xs2' = (xss - xs2)/tauxs/4;
  b' = (bss - b)/taub;
  g' = (gss - g)/taug;
  Rel' = -(Rel_ss + Rel)/tau_Rel;
  Na_i' = -naiont*AF/vmyo;
  K_i' = -kiont*AF/vmyo;
  Over' = 0;
  Ca_T' = -caiont*AF/(vmyo*2) + (ileak - iup)*vnsr/vmyo + Rel*vjsr/vmyo;
  Ca_NSR' = iup - itr*(vjsr/vnsr) - ileak;
  Ca_JSR_T' = itr - Rel;

  // Unit definitions:
  unit ms = 1e-3 second;
  unit per_ms = 1 / (1e-3 second);
  unit uA_per_uF = 1e-6 ampere / (1e-6 farad);
  unit mS_per_uF = 1e-3 siemens / (1e-6 farad);
  unit uL = 1e-6 litre;
  unit mV = 1e-3 volt;
  unit per_mV = 1 / (1e-3 volt);
  unit uF = 1e-6 farad;
  unit cm = 0.01 metre;
  unit cm2 = (0.01 metre)^2;
  unit mJ_per_mole_K = 1e-3 joule / (mole * kelvin);
  unit C_per_mole = coulomb / mole;
  unit mM = 1e-3 mole / litre;
  unit mM2 = (1e-3 mole)^2 / litre^2;
  unit mM3 = (1e-3 mole)^3 / litre^3;
  unit mM4 = (1e-3 mole)^4 / litre^4;
  unit mM_per_ms = 1e-3 mole / (litre * 1e-3 second);
  unit mM_per_mV = 1e-3 mole / (litre * 1e-3 volt);
  unit mM_per_mV_ms = 1e-3 mole / (litre * 1e-3 volt * 1e-3 second);
  unit uF_per_cm2 = 1e-6 farad / (0.01 metre)^2;
  unit uF_mole_per_C = 1e-6 farad * mole / coulomb;
  unit L_per_F_ms = litre / (farad * 1e-3 second);
  unit time = 1e-3 second;
end
