// SBML level 2 version 3

model Pasek2006_VentricularCardioMyocytes()
  // This a model from the article:
  // The functional role of cardiac T-tubules explored in a model of rat ventricular myocytes.
  // Pásek M, Simurda J, Christé G. Philos Transact A Math Phys Eng Sci. 2006 May 15;364(1842):1187-206. 16608703 ,
  // Abstract:
  // The morphology of the cardiac transverse-axial tubular system (TATS) has been known for decades, but its function has received little attention. To explore the possible role of this system in the physiological modulation of electrical and contractile activity, we have developed a mathematical model of rat ventricular cardiomyocytes in which the TATS is described as a single compartment. The geometrical characteristics of the TATS, the biophysical characteristics of ion transporters and their distribution between surface and tubular membranes were based on available experimental data. Biophysically realistic values of mean access resistance to the tubular lumen and time constants for ion exchange with the bulk extracellular solution were included. The fraction of membrane in the TATS was set to 56%. The action potentials initiated in current-clamp mode are accompanied by transient K+ accumulation and transient Ca2+ depletion in the TATS lumen. The amplitude of these changes relative to external ion concentrations was studied at steady-state stimulation frequencies of 1-5 Hz. Ca2+ depletion increased from 7 to 13.1% with stimulation frequency, while K+ accumulation decreased from 4.1 to 2.7%. These ionic changes (particularly Ca2+ depletion) implicated significant decrease of intracellular Ca2+ load at frequencies natural for rat heart.
  // This model was taken from the CellML repository and automatically converted to SBML.
  // The original model was: Pásek M, Simurda J, Christé G. (2006) - version03
  // The original CellML model was created by:
  // Lloyd, Catherine, May
  // c.lloyd@aukland.ac.nz
  // The University of Auckland
  // The Bioengineering Institute
  // This model originates from BioModels Database: A Database of Annotated Published Models (http://www.ebi.ac.uk/biomodels/). It is copyright (c) 2005-2011 The BioModels.net Team.
  // To the extent possible under law, all copyright and related or neighbouring rights to this encoded model have been dedicated to the public domain worldwide. Please refer to CC0 Public Domain Dedication for more information.
  // In summary, you are entitled to use this encoded model in absolutely any manner you deem suitable, verbatim, or with modification, alone or embedded it in a larger context, redistribute it, commercially or not, in a restricted way or not..
  // To cite BioModels Database, please use: Li C, Donizelli M, Rodriguez N, Dharuri H, Endler L, Chelliah V, Li L, He E, Henry A, Stefan MI, Snoep JL, Hucka M, Le Novère N, Laibe C (2010) BioModels Database: An enhanced, curated and annotated resource for published quantitative kinetic models. BMC Syst Biol., 4:92.
  // biomodels.db:MODEL0406553884
  // isDescribedBy pubmed:16608703
  // biomodels.db:MODEL0406553884
  // isDescribedBy pubmed:16608703
  // biomodels.db:MODEL0406553884
  // biomodels.db:MODEL0406553884

  // Compartments:
  compartment Compartment = 1 litre;

  // Parameters:
  R = 8310 milli_joule_per_mole_kelvin;
  T = 295 temperature;
  F = 96500 coulomb_per_mole;
  Nae = 140 millimolar;
  Cae = 1.2 millimolar;
  Ke = 5.4 millimolar;
  Vt has cm3;
  Vd has cm3;
  Vmyo has cm3;
  Sms has cm2;
  Smt has cm2;
  Cms has microF;
  Cmt has microF;
  Rst has ohm;
  VSRrel has cm3;
  VSRup has cm3;
  Vc has cm3;
  pt has dimensionless;
  Lt has cm;
  Rot = 83.33 ohm_cm;
  radiust = 1.5e-5 cm;
  ptcm = 30000000 per_cm2;
  Smtot = 0.0001 cm2;
  i_circ has microA;
  i_Stim has microA;
  stim_offset = 0 second;
  stim_period = 1 second;
  stim_duration = 0.001 second;
  stim_amplitude = 0.0052 microA;
  past has second;
  gNas has milliS;
  gCas has cm3_per_second;
  gKfs has milliS;
  gKsts has milliS;
  gK1s has milliS;
  gKbs has milliS;
  gKtos has milliS;
  gNabs has milliS;
  gCabs has milliS;
  i_pCa_maxs has microA;
  i_NaK_maxs has microA;
  i_NaCa_maxs has microA;
  gNat has milliS;
  gCat has cm3_per_second;
  gKft has milliS;
  gKstt has milliS;
  gK1t has milliS;
  gKbt has milliS;
  gKtot has milliS;
  gNabt has milliS;
  gCabt has milliS;
  i_pCa_maxt has microA;
  i_NaK_maxt has microA;
  i_NaCa_maxt has microA;
  gNa = 10 milliS_per_cm2;
  fNat = 0.56 dimensionless;
  gKf = 0.0145 milliS_per_cm2;
  fKft = 0.56 dimensionless;
  gKst = 0.07 milliS_per_cm2;
  fKstt = 0.76 dimensionless;
  gK1 = 0.24 milliS_per_cm2;
  fK1t = 0.56 dimensionless;
  gKb = 0.00138 milliS_per_cm2;
  fKbt = 0.56 dimensionless;
  gKto = 0.35 milliS_per_cm2;
  fKtot = 0.56 dimensionless;
  gNab = 0.0008015 milliS_per_cm2;
  fNabt = 0.56 dimensionless;
  gCab = 0.000648 milliS_per_cm2;
  fCabt = 0.56 dimensionless;
  gCa = 0.00021 cm_per_second;
  fCat = 0.87 dimensionless;
  i_NaCa_max = 0.00018 microA_per_cm2;
  fNaCat = 0.81 dimensionless;
  i_NaK_max = 1 microA_per_cm2;
  fNaKt = 0.59 dimensionless;
  i_pCa_max = 0.85 microA_per_cm2;
  fpCat = 0.56 dimensionless;
  i_Nas has microA;
  E_Nas has millivolt;
  m_i_Nas_m_gate = 2.1832558e-6 dimensionless;
  alpha_m_i_Nas_m_gate has per_second;
  beta_m_i_Nas_m_gate has per_second;
  h_i_Nas_h_gate = 0.58232781 dimensionless;
  alpha_h_i_Nas_h_gate has per_second;
  beta_h_i_Nas_h_gate has per_second;
  i_Nat has microA;
  E_Nat has millivolt;
  m_i_Nat_m_gate = 2.1832694e-6 dimensionless;
  alpha_m_i_Nat_m_gate has per_second;
  beta_m_i_Nat_m_gate has per_second;
  h_i_Nat_h_gate = 0.58232717 dimensionless;
  alpha_h_i_Nat_h_gate has per_second;
  beta_h_i_Nat_h_gate has per_second;
  i_Cas has microA;
  E_Cas has millivolt;
  Co_i_Cas = 2.5436465e-6 dimensionless;
  C1_i_Cas = 0.99994546 dimensionless;
  C2_i_Cas = 0.99994546 dimensionless;
  tauCo_i_Cas has second;
  tauCcast_i_Cas = 0.009 second;
  tauC1_i_Cas has second;
  tauC2_i_Cas has second;
  Ccast_i_Cas = 0.99570063 dimensionless;
  Coinf_i_Cas has dimensionless;
  Ccastinf_i_Cas has dimensionless;
  C1inf_i_Cas has dimensionless;
  C2inf_i_Cas has dimensionless;
  i_Cat has microA;
  E_Cat has millivolt;
  Co_i_Cat = 2.543652e-6 dimensionless;
  C1_i_Cat = 0.99994546 dimensionless;
  C2_i_Cat = 0.99994546 dimensionless;
  tauCo_i_Cat has second;
  tauCcast_i_Cat = 0.009 second;
  tauC1_i_Cat has second;
  tauC2_i_Cat has second;
  Coinf_i_Cat has dimensionless;
  Ccast_i_Cat = 0.99570063 dimensionless;
  Ccastinf_i_Cat has dimensionless;
  C1inf_i_Cat has dimensionless;
  C2inf_i_Cat has dimensionless;
  i_Ktos has microA;
  E_Ks has millivolt;
  rs = 0.0023485072 dimensionless;
  taurs has second;
  rinfs has dimensionless;
  ss = 0.98315843 dimensionless;
  tauss has second;
  sinfs has dimensionless;
  sss = 0.6748337 dimensionless;
  tausss has second;
  ssinfs has dimensionless;
  i_Ktot has microA;
  E_Kt has millivolt;
  rt = 0.0023485094 dimensionless;
  taurt has second;
  rinft has dimensionless;
  st = 0.98315865 dimensionless;
  taust has second;
  sinft has dimensionless;
  sst = 0.67478532 dimensionless;
  tausst has second;
  ssinft has dimensionless;
  i_Ksts has microA;
  rsts = 0.0031079213 dimensionless;
  taursts has second;
  rstinfs has dimensionless;
  ssts = 0.30773393 dimensionless;
  taussts = 2.1 second;
  sstinfs has dimensionless;
  i_Kstt has microA;
  rstt = 0.0031079241 dimensionless;
  taurstt has second;
  rstinft has dimensionless;
  sstt = 0.30773368 dimensionless;
  tausstt = 2.1 second;
  sstinft has dimensionless;
  i_Kfs has microA;
  qs = 0.0034357356 dimensionless;
  tauqs has second;
  qinfs has dimensionless;
  i_Kft has microA;
  qt = 0.0034357175 dimensionless;
  tauqt has second;
  qinft has dimensionless;
  i_K1s has microA;
  i_K1t has microA;
  i_Nabs has microA;
  i_Nabt has microA;
  i_Cabs has microA;
  i_Cabt has microA;
  i_Kbs has microA;
  i_Kbt has microA;
  i_NaCas has microA;
  i_NaCat has microA;
  i_NaKs has microA;
  i_NaKt has microA;
  i_pCas has microA;
  i_pCat has microA;
  JteNa has millimolar_per_second;
  JteCa has millimolar_per_second;
  JteK has millimolar_per_second;
  tauNa = 0.15 second;
  tauCa = 0.5 second;
  tauK = 0.15 second;
  JCaSRup has millimolar_per_second;
  Jtr has millimolar_per_second;
  tautr = 0.03448 second;
  JCaSRrel has millimolar_per_second;
  kap has per_millimolar4_per_second;
  kam = 576 per_second;
  kbp has per_millimolar3_per_second;
  kbm = 1930 per_second;
  kcp = 18 per_second;
  kcm = 0.8 per_second;
  F1 = 0.67606483 dimensionless;
  F2 = 0.00038333331 dimensionless;
  F3 = 6.4516879e-11 dimensionless;
  F4 = 0.32355462 dimensionless;
  JCad has millimolar_per_second;
  taud = 0.003125 second;
  CaSRup = 0.22755058 millimolar;
  CaSRrel = 0.22638169 millimolar;
  Nai = 6.9435814 millimolar;
  Cai = 3.5486498e-5 millimolar;
  Ki = 137.53311 millimolar;
  Nat = 140.01386 millimolar;
  Cat = 1.2271399 millimolar;
  Kt = 5.3627676 millimolar;
  Cass = 4.3112114e-5 millimolar;
  BTRH = 0.92804169 millimolar;
  BTRL = 0.034317829 millimolar;
  dBTRH has millimolar_per_second;
  dBTRL has millimolar_per_second;
  Vms = -79.709547 millivolt;
  Vmt = -79.709536 millivolt;

  // Assignment rules:
  Vc := Smtot/7850;
  Vmyo := Vc*0.585;
  VSRup := Vc*0.0315;
  VSRrel := Vc*0.0035;
  Vd := Vc*7.5e-5;
  Sms := Smtot - 4400*Vc;
  Smt := Smtot - Sms;
  pt := ptcm*Sms;
  Lt := Smt/(2*3.14159*radiust*pt);
  Vt := 3.14159*radiust^2*Lt*pt;
  Cmt := Smt*1;
  Cms := Sms*1;
  Rst := Rot*Lt/2/(3.14159*radiust^2*pt);
  i_circ := 1000*(Vmt/Rst - Vms/Rst);
  past := floor(time/stim_period)*stim_period;
  i_Stim := piecewise(stim_amplitude, (time - past >= stim_offset) && (time - past <= stim_offset + stim_duration), 0);
  gNas := gNa*(Sms + Smt)*(1 - fNat);
  gNat := gNa*(Sms + Smt)*fNat;
  gKfs := gKf*(Sms + Smt)*(1 - fKft);
  gKft := gKf*(Sms + Smt)*fKft;
  gKsts := gKst*(Sms + Smt)*(1 - fKstt);
  gKstt := gKst*(Sms + Smt)*fKstt;
  gK1s := gK1*(Sms + Smt)*(1 - fK1t);
  gK1t := gK1*(Sms + Smt)*fK1t;
  gKbs := gKb*(Sms + Smt)*(1 - fKbt);
  gKbt := gKb*(Sms + Smt)*fKbt;
  gKtos := gKto*(Sms + Smt)*(1 - fKtot);
  gKtot := gKto*(Sms + Smt)*fKtot;
  gNabs := gNab*(Sms + Smt)*(1 - fNabt);
  gNabt := gNab*(Sms + Smt)*fNabt;
  gCabs := gCab*(Sms + Smt)*(1 - fCabt);
  gCabt := gCab*(Sms + Smt)*fCabt;
  gCas := gCa*(Sms + Smt)*(1 - fCat);
  gCat := gCa*(Sms + Smt)*fCat;
  i_NaCa_maxs := i_NaCa_max*(Sms + Smt)*(1 - fNaCat);
  i_NaCa_maxt := i_NaCa_max*(Sms + Smt)*fNaCat;
  i_NaK_maxs := i_NaK_max*(Sms + Smt)*(1 - fNaKt);
  i_NaK_maxt := i_NaK_max*(Sms + Smt)*fNaKt;
  i_pCa_maxs := i_pCa_max*(Sms + Smt)*(1 - fpCat);
  i_pCa_maxt := i_pCa_max*(Sms + Smt)*fpCat;
  E_Nas := ln(Nae/Nai)*R*T/F;
  i_Nas := gNas*m_i_Nas_m_gate^3*h_i_Nas_h_gate*(Vms - 1*ln((Nae + 0.12*Ke)/(Nai + 0.12*Ki))*R*T/F);
  alpha_m_i_Nas_m_gate := 117.26*(Vms + 59.3)/(1 - exp(-0.55*(Vms + 59.3)));
  beta_m_i_Nas_m_gate := 3800*exp(-0.072*(Vms + 61));
  alpha_h_i_Nas_h_gate := 284.4/(1 + exp(0.0812*(Vms + 115.9)));
  beta_h_i_Nas_h_gate := 18.77*(Vms + 64.4)/(1 - exp(-0.22*(Vms + 64.4)));
  E_Nat := ln(Nat/Nai)*R*T/F;
  i_Nat := gNat*m_i_Nat_m_gate^3*h_i_Nat_h_gate*(Vmt - 1*ln((Nat + 0.12*Kt)/(Nai + 0.12*Ki))*R*T/F);
  alpha_m_i_Nat_m_gate := 117.26*(Vmt + 59.3)/(1 - exp(-0.55*(Vmt + 59.3)));
  beta_m_i_Nat_m_gate := 3800*exp(-0.072*(Vmt + 61));
  alpha_h_i_Nat_h_gate := 284.4/(1 + exp(0.0812*(Vmt + 115.9)));
  beta_h_i_Nat_h_gate := 18.77*(Vmt + 64.4)/(1 - exp(-0.22*(Vmt + 64.4)));
  E_Cas := ln(Cae/Cai)*R*T/(2*F);
  Coinf_i_Cas := 1/(1 + exp(-(Vms + 15.3)/5));
  tauCo_i_Cas := 0.00025 + 0.00305*exp(-0.0045*(Vms + 7)^2) + 0.00105*exp(-0.002*(Vms - 18)^2);
  C1inf_i_Cas := 1/(1 + exp((Vms + 26.7)/5.4));
  tauC1_i_Cas := 0.105*exp(-((Vms + 45)/12)^2) + 0.04/(1 + exp((-Vms + 25)/25)) + 0.015/(1 + exp((Vms + 75)/25));
  C2inf_i_Cas := C1inf_i_Cas;
  tauC2_i_Cas := 0.041*exp(-((Vms + 47)/12)^2) + 0.08/(1 + exp(-(Vms + 55)/5)) + 0.015/(1 + exp((Vms + 75)/25));
  Ccastinf_i_Cas := 1/(1 + Cass/0.01);
  i_Cas := gCas*4*Vms*F^2/(R*T)*(Cass*exp(2*Vms*F/(R*T)) - 0.341*Cae)/(exp(2*Vms*F/(R*T)) - 1)*Co_i_Cas*((0.9 + Ccast_i_Cas/10)*C1_i_Cas + (0.1 - Ccast_i_Cas/10)*C2_i_Cas);
  E_Cat := ln(Cat/Cai)*R*T/(2*F);
  Coinf_i_Cat := 1/(1 + exp(-(Vmt + 15.3)/5));
  tauCo_i_Cat := 0.00025 + 0.00305*exp(-0.0045*(Vmt + 7)^2) + 0.00105*exp(-0.002*(Vmt - 18)^2);
  C1inf_i_Cat := 1/(1 + exp((Vmt + 26.7)/5.4));
  tauC1_i_Cat := 0.105*exp(-((Vmt + 45)/12)^2) + 0.04/(1 + exp((-Vmt + 25)/25)) + 0.015/(1 + exp((Vmt + 75)/25));
  C2inf_i_Cat := C1inf_i_Cat;
  tauC2_i_Cat := 0.041*exp(-((Vmt + 47)/12)^2) + 0.08/(1 + exp(-(Vmt + 55)/5)) + 0.015/(1 + exp((Vmt + 75)/25));
  Ccastinf_i_Cat := 1/(1 + Cass/0.01);
  i_Cat := gCat*4*Vmt*F^2/(R*T)*(Cass*exp(2*Vmt*F/(R*T)) - 0.341*Cat)/(exp(2*Vmt*F/(R*T)) - 1)*Co_i_Cat*((0.9 + Ccast_i_Cat/10)*C1_i_Cat + (0.1 - Ccast_i_Cat/10)*C2_i_Cat);
  i_Ktos := gKtos*rs*(0.886*ss + 0.114*sss)*(Vms - E_Ks);
  E_Ks := ln(Ke/Ki)*R*T/F;
  rinfs := 1/(1 + exp((Vms + 10.6)/(-11.42)));
  taurs := 1/(45.16*exp(0.03577*(Vms + 50)) + 98.9*exp(-0.1*(Vms + 38)));
  sinfs := 1/(1 + exp((Vms + 45.3)/6.8841));
  tauss := 0.35*exp(-(0.0666*(Vms + 70))^2) + 0.035;
  ssinfs := 1/(1 + exp((Vms + 45.3)/6.8841));
  tausss := 3.7*exp(-(0.0333*(Vms + 70))^2) + 0.035;
  E_Kt := ln(Kt/Ki)*R*T/F;
  i_Ktot := gKtot*rt*(0.886*st + 0.114*sst)*(Vmt - E_Kt);
  rinft := 1/(1 + exp((Vmt + 10.6)/(-11.42)));
  taurt := 1/(45.16*exp(0.03577*(Vmt + 50)) + 98.9*exp(-0.1*(Vmt + 38)));
  sinft := 1/(1 + exp((Vmt + 45.3)/6.8841));
  taust := 0.35*exp(-(0.0666*(Vmt + 70))^2) + 0.035;
  ssinft := 1/(1 + exp((Vmt + 45.3)/6.8841));
  tausst := 3.7*exp(-(0.0333*(Vmt + 70))^2) + 0.035;
  i_Ksts := gKsts*rsts*ssts*(Vms - E_Ks);
  rstinfs := 1/(1 + exp(-(Vms + 11.5)/11.82));
  taursts := 10/(45.16*exp(0.03577*(Vms + 50)) + 98.9*exp(-0.1*(Vms + 38)));
  sstinfs := 1/(1 + exp((Vms + 87.5)/10.3));
  i_Kstt := gKstt*rstt*sstt*(Vmt - E_Kt);
  rstinft := 1/(1 + exp(-(Vmt + 11.5)/11.82));
  taurstt := 10/(45.16*exp(0.03577*(Vmt + 50)) + 98.9*exp(-0.1*(Vmt + 38)));
  sstinft := 1/(1 + exp((Vmt + 87.5)/10.3));
  i_Kfs := gKfs*qs*(0.2*(Vms - E_Nas) + 0.8*(Vms - E_Ks));
  qinfs := 1/(1 + exp((Vms + 138.6)/10.48));
  tauqs := 1/(0.11885*exp((Vms + 80)/28.37) + 0.5623*exp(-(Vms + 80)/14.19));
  i_Kft := gKft*qt*(0.2*(Vmt - E_Nat) + 0.8*(Vmt - E_Kt));
  qinft := 1/(1 + exp((Vmt + 138.6)/10.48));
  tauqt := 1/(0.11885*exp((Vmt + 80)/28.37) + 0.5623*exp(-(Vmt + 80)/14.19));
  i_K1s := gK1s*(Vms - E_Ks - 1.73)/(1 + exp(1.613*F/(R*T)*(Vms - E_Ks - 1.73))*(1 + exp((Ke - 0.9988)/(-0.124))));
  i_K1t := gK1t*(Vmt - E_Kt - 1.73)/(1 + exp(1.613*F/(R*T)*(Vmt - E_Kt - 1.73))*(1 + exp((Kt - 0.9988)/(-0.124))));
  i_Nabs := gNabs*(Vms - E_Nas);
  i_Nabt := gNabt*(Vmt - E_Nat);
  i_Cabs := gCabs*(Vms - E_Cas);
  i_Cabt := gCabt*(Vmt - E_Cat);
  i_Kbs := gKbs*(Vms - E_Ks);
  i_Kbt := gKbt*(Vmt - E_Kt);
  i_NaCas := i_NaCa_maxs*(exp(0.0187*Vms)*Nai^3*Cae - exp(-0.0187*Vms)*Nae^3*Cai)/(1 + 0.0001*(Nae^3*Cai + Nai^3*Cae));
  i_NaCat := i_NaCa_maxt*(exp(0.0187*Vmt)*Nai^3*Cat - exp(-0.0187*Vmt)*Nat^3*Cai)/(1 + 0.0001*(Nat^3*Cai + Nai^3*Cat));
  i_NaKs := i_NaK_maxs/(1 + 0.1245*exp(-0.1*Vms*F/(R*T)) + 0.0365*1/7*(exp(Nae/67.3) - 1)*exp(-Vms*F/(R*T)))*1/(1 + (10/Nai)^1.5)*Ke/(Ke + 1.5);
  i_NaKt := i_NaK_maxt/(1 + 0.1245*exp(-0.1*Vmt*F/(R*T)) + 0.0365*1/7*(exp(Nat/67.3) - 1)*exp(-Vmt*F/(R*T)))*1/(1 + (10/Nai)^1.5)*Kt/(Kt + 1.5);
  i_pCas := i_pCa_maxs*Cai/(0.0004 + Cai);
  i_pCat := i_pCa_maxt*Cai/(0.0004 + Cai);
  JteNa := 1*Vt/tauNa*(Nat - Nae);
  JteCa := 1*Vt/tauCa*(Cat - Cae);
  JteK := 1*Vt/tauK*(Kt - Ke);
  JCaSRup := 1*Vmyo*(0.04*10*(Cai/0.000168)^1.2 - 0.9*CaSRup/3.29)/(1 + (Cai/0.000168)^1.2 + CaSRup/3.29);
  Jtr := 1*VSRrel/tautr*(CaSRup - CaSRrel);
  JCaSRrel := 1800*VSRrel*(F2 + F3)*(CaSRrel - Cass);
  kap := 12150000000000;
  kbp := 4050000000;
  JCad := 1*(Cass - Cai)*Vmyo/taud;
  dBTRH := 20000*Cai*(1 - BTRH) - 0.07*BTRH;
  dBTRL := 40000*Cai*(1 - BTRL) - BTRL*40;

  // Rate rules:
  m_i_Nas_m_gate' = alpha_m_i_Nas_m_gate*(1 - m_i_Nas_m_gate) - beta_m_i_Nas_m_gate*m_i_Nas_m_gate;
  h_i_Nas_h_gate' = alpha_h_i_Nas_h_gate*(1 - h_i_Nas_h_gate) - beta_h_i_Nas_h_gate*h_i_Nas_h_gate;
  m_i_Nat_m_gate' = alpha_m_i_Nat_m_gate*(1 - m_i_Nat_m_gate) - beta_m_i_Nat_m_gate*m_i_Nat_m_gate;
  h_i_Nat_h_gate' = alpha_h_i_Nat_h_gate*(1 - h_i_Nat_h_gate) - beta_h_i_Nat_h_gate*h_i_Nat_h_gate;
  C1_i_Cas' = (C1inf_i_Cas - C1_i_Cas)/tauC1_i_Cas;
  C2_i_Cas' = (C2inf_i_Cas - C2_i_Cas)/tauC2_i_Cas;
  Co_i_Cas' = (Coinf_i_Cas - Co_i_Cas)/tauCo_i_Cas;
  Ccast_i_Cas' = (Ccastinf_i_Cas - Ccast_i_Cas)/tauCcast_i_Cas;
  C1_i_Cat' = (C1inf_i_Cat - C1_i_Cat)/tauC1_i_Cat;
  C2_i_Cat' = (C2inf_i_Cat - C2_i_Cat)/tauC2_i_Cat;
  Co_i_Cat' = (Coinf_i_Cat - Co_i_Cat)/tauCo_i_Cat;
  Ccast_i_Cat' = (Ccastinf_i_Cat - Ccast_i_Cat)/tauCcast_i_Cat;
  rs' = (rinfs - rs)/taurs;
  ss' = (sinfs - ss)/tauss;
  sss' = (ssinfs - sss)/tausss;
  rt' = (rinft - rt)/taurt;
  st' = (sinft - st)/taust;
  sst' = (ssinft - sst)/tausst;
  rsts' = (rstinfs - rsts)/taursts;
  ssts' = (sstinfs - ssts)/taussts;
  rstt' = (rstinft - rstt)/taurstt;
  sstt' = (sstinft - sstt)/tausstt;
  qs' = (qinfs - qs)/tauqs;
  qt' = (qinft - qt)/tauqt;
  F1' = F2*kam - F1*kap*Cass^4;
  F2' = F1*kap*Cass^4 + F3*kbm + F4*kcm - F2*(kam + kbp*Cass^3 + kcp);
  F3' = F2*kbp*Cass^3 - F3*kbm;
  F4' = F2*kcp - F4*kcm;
  CaSRup' = (JCaSRup - Jtr)/(1*VSRup);
  CaSRrel' = 1/(1 + 15*0.8/(0.8 + CaSRrel)^2)*(Jtr - JCaSRrel)/VSRrel;
  BTRH' = dBTRH;
  BTRL' = dBTRL;
  Cass' = 1/(1 + 0.05*0.00238/(0.00238 + Cass)^2)*(-(i_Cas + i_Cat)/(2*F*Vd) + 1*JCaSRrel/Vd - 1*JCad/Vd);
  Cai' = 1/(1 + 0.05*0.00238/(0.00238 + Cai)^2)*((-2*(i_NaCas + i_NaCat) + i_Cabs + i_Cabt + i_pCas + i_pCat)/(-2*F*Vmyo) + 1*(JCad - JCaSRup)/Vmyo - dBTRH*0.14 - dBTRL*0.07);
  Nai' = -(i_Nas + i_Nat + i_Nabs + i_Nabt + 3*i_NaCas + 3*i_NaCat + 3*i_NaKs + 3*i_NaKt)/(F*Vmyo);
  Ki' = -(-i_Stim + i_Kfs + i_Kft + i_Ksts + i_Kstt + i_K1s + i_K1t + i_Kbs + i_Kbt - 2*i_NaKs - 2*i_NaKt + i_Ktos + i_Ktot)/(F*Vmyo);
  Nat' = ((i_Nat + i_Nabt + 3*i_NaCat + 3*i_NaKt)/F - 1*JteNa)/Vt;
  Cat' = ((-2*i_NaCat + i_Cat + i_Cabt + i_pCat)/(2*F) - 1*JteCa)/Vt;
  Kt' = ((i_Kft + i_Kstt + i_K1t + i_Kbt - 2*i_NaKt + i_Ktot)/F - 1*JteK)/Vt;
  Vms' = 1000*(i_Stim + i_circ - (i_Nas + i_Cas + i_Ktos + i_Ksts + i_Kfs + i_K1s + i_Nabs + i_Cabs + i_Kbs + i_NaKs + i_NaCas + i_pCas))/Cms;
  Vmt' = 1000*(-(i_circ + i_Nat + i_Cat + i_Ktot + i_Kstt + i_Kft + i_K1t + i_Nabt + i_Cabt + i_Kbt + i_NaKt + i_NaCat + i_pCat))/Cmt;

  // Unit definitions:
  unit per_second = 1 / second;
  unit millivolt = 1e-3 volt;
  unit per_millivolt = 1 / (1e-3 volt);
  unit per_millivolt_second = 1 / (1e-3 volt * second);
  unit per_millivolt2 = 1 / (1e-3 volt)^2;
  unit cm = 0.01 metre;
  unit cm_per_second = 0.01 metre / second;
  unit cm3_per_second = (0.01 metre)^3 / second;
  unit per_cm = 1 / (0.01 metre);
  unit per_cm2 = 1 / (0.01 metre)^2;
  unit per_cm3 = 1 / (0.01 metre)^3;
  unit cm2 = (0.01 metre)^2;
  unit milliS = 1e-3 siemens;
  unit milliS_per_cm2 = 1e-3 siemens / (0.01 metre)^2;
  unit microF = 1e-6 farad;
  unit microA = 1e-6 ampere;
  unit millimolar = 1e-3 mole / litre;
  unit millimolar2 = (1e-3 mole)^2 / litre^2;
  unit millimolar4 = (1e-3 mole)^4 / litre^4;
  unit millimolar_per_second = 1e-3 mole / (litre * second);
  unit millimolar2_per_cm3 = (1e-3 mole)^2 / (litre^2 * (0.01 metre)^3);
  unit per_millimolar_per_second = litre / (1e-3 mole * second);
  unit per_millimolar3_per_second = litre^3 / ((1e-3 mole)^3 * second);
  unit per_millimolar4 = litre^4 / (1e-3 mole)^4;
  unit per_millimolar4_per_second = litre^4 / ((1e-3 mole)^4 * second);
  unit per_millimolar_second = litre / (1e-3 mole * second);
  unit microA_per_millimolar = 1e-6 ampere * litre / (1e-3 mole);
  unit microA_per_cm2 = 1e-6 ampere / (0.01 metre)^2;
  unit microF_per_cm2 = 1e-6 farad / (0.01 metre)^2;
  unit kilo_ohm = 1000 ohm;
  unit ohm_cm = ohm * 0.01 metre;
  unit microA_per_millimolar4 = 1e-6 ampere * litre^4 / (1e-3 mole)^4;
  unit milli_joule_per_mole_kelvin = 1e-3 joule / (kelvin * mole); milli_joule_per_mole_kelvin is "milli_joule_per_kilomole_kelvin";
  unit temperature = kelvin; temperature is "kelvin";
  unit coulomb_per_mole = coulomb / mole;
  unit mole_per_coulomb = mole / coulomb;
  unit cm3 = (0.01 metre)^3;
  unit per_cm3_second = 1 / ((0.01 metre)^3 * second);
end
