// SBML level 2 version 3

model Pasek2008_VentricularCardioMyocyte()
  // This a model from the article:
  // A model of the guinea-pig ventricular cardiac myocyte incorporating a transverse-axial tubular system.
  // Pásek M, Simurda J, Orchard CH, Christé G. Prog Biophys Mol Biol. 2008 Jan-Apr;96(1-3):258-80. 17888503 ,
  // Abstract:
  // A model of the guinea-pig cardiac ventricular myocyte has been developed that includes a representation of the transverse-axial tubular system (TATS), including heterogeneous distribution of ion flux pathways between the surface and tubular membranes. The model reproduces frequency-dependent changes of action potential shape and intracellular ion concentrations and can replicate experimental data showing ion diffusion between the tubular lumen and external solution in guinea-pig myocytes. The model is stable at rest and during activity and returns to rested state after perturbation. Theoretical analysis and model simulations show that, due to tight electrical coupling, tubular and surface membranes behave as a homogeneous whole during voltage and current clamp (maximum difference 0.9 mV at peak tubular INa of -38 nA). However, during action potentials, restricted diffusion and ionic currents in TATS cause depletion of tubular Ca2+ and accumulation of tubular K+ (up to -19.8% and +3.4%, respectively, of bulk extracellular values, at 6 Hz). These changes, in turn, decrease ion fluxes across the TATS membrane and decrease sarcoplasmic reticulum (SR) Ca2+ load. Thus, the TATS plays a potentially important role in modulating the function of guinea-pig ventricular myocyte in physiological conditions.
  // This model was taken from the CellML repository and automatically converted to SBML.
  // The original model was: Pásek M, Simurda J, Orchard CH, Christé G. (2008) - version03
  // The original CellML model was created by:
  // Lloyd, Catherine, May
  // c.lloyd@aukland.ac.nz
  // The University of Auckland
  // The Bioengineering Institute
  // This model originates from BioModels Database: A Database of Annotated Published Models (http://www.ebi.ac.uk/biomodels/). It is copyright (c) 2005-2011 The BioModels.net Team.
  // To the extent possible under law, all copyright and related or neighbouring rights to this encoded model have been dedicated to the public domain worldwide. Please refer to CC0 Public Domain Dedication for more information.
  // In summary, you are entitled to use this encoded model in absolutely any manner you deem suitable, verbatim, or with modification, alone or embedded it in a larger context, redistribute it, commercially or not, in a restricted way or not..
  // To cite BioModels Database, please use: Li C, Donizelli M, Rodriguez N, Dharuri H, Endler L, Chelliah V, Li L, He E, Henry A, Stefan MI, Snoep JL, Hucka M, Le Novère N, Laibe C (2010) BioModels Database: An enhanced, curated and annotated resource for published quantitative kinetic models. BMC Syst Biol., 4:92.
  // biomodels.db:MODEL0406793751
  // isDescribedBy pubmed:17888503
  // biomodels.db:MODEL0406793751
  // isDescribedBy pubmed:17888503
  // biomodels.db:MODEL0406793751
  // biomodels.db:MODEL0406793751

  // Compartments:
  compartment Compartment = 1 litre;

  // Parameters:
  R = 8310 joule_per_kilomole_kelvin;
  T = 310 kelvin;
  F = 96500 coulomb_per_mole;
  Na_e = 140 millimolar;
  Ca_e = 1.8 millimolar;
  K_e = 5.4 millimolar;
  ATP_i = 6.8 millimolar;
  Vt has cm3;
  Vd has cm3;
  Vmyo has cm3;
  Sms has cm2;
  Smt has cm2;
  Cms has microF;
  Cmt has microF;
  Rst has ohm;
  VSRup has cm3;
  VSRrel has cm3;
  Vc has cm3;
  pt has dimensionless;
  Rot = 83.33 ohm_cm;
  rt = 1.4815e-5 cm;
  Lt = 0.000593 cm;
  rc = 0.000593 cm;
  Lc = 0.013 cm;
  ptcm = 21028875 per_cm2;
  i_circ has microA;
  g_Na_s has milliS;
  g_Naps_s has milliS;
  q_Kr_s has milliS;
  q_Ks_s has milliS;
  g_Kp_s has milliS;
  g_Kto_s has milliS;
  g_K1_s has milliS;
  g_KNa_s has milliS;
  g_KATP_s has milliS;
  g_Nab_s has milliS;
  g_Cab_s has milliS;
  i_pCa_max_s has microA;
  i_NaK_max_s has microA;
  i_NaCa_max_s has microA;
  P_CaL_s has litre_per_second;
  P_KL_s has litre_per_second;
  P_nsNa_s has litre_per_second;
  P_nsK_s has litre_per_second;
  g_Na_t has milliS;
  g_Naps_t has milliS;
  q_Kr_t has milliS;
  q_Ks_t has milliS;
  g_Kp_t has milliS;
  g_Kto_t has milliS;
  g_K1_t has milliS;
  g_KNa_t has milliS;
  g_KATP_t has milliS;
  g_Nab_t has milliS;
  g_Cab_t has milliS;
  i_pCa_max_t has microA;
  i_NaK_max_t has microA;
  i_NaCa_max_t has microA;
  P_CaL_t has litre_per_second;
  P_KL_t has litre_per_second;
  P_nsNa_t has litre_per_second;
  P_nsK_t has litre_per_second;
  g_Na = 30 milliS_per_cm2;
  fNat = 0.64 dimensionless;
  g_Naps = 0.0053 milliS_per_cm2;
  fNapst = 0.526 dimensionless;
  q_Kr = 0.8 milliS_per_cm2;
  fKrt = 0.526 dimensionless;
  q_Ks = 0.1975 milliS_per_cm2;
  fKst = 0.526 dimensionless;
  g_Kp = 0.006 milliS_per_cm2;
  fKpt = 0.526 dimensionless;
  g_Kto = 0 milliS_per_cm2;
  fKtot = 0.526 dimensionless;
  g_K1 = 0.75 milliS_per_cm2;
  fK1t = 0.8 dimensionless;
  g_KNa = 0.12848 milliS_per_cm2;
  fKNat = 0.526 dimensionless;
  g_KATP = 1 milliS_per_cm2;
  fKATPt = 0.526 dimensionless;
  g_Nab = 0.00075 milliS_per_cm2;
  fNabt = 0.526 dimensionless;
  g_Cab = 0.0021 milliS_per_cm2;
  fCabt = 0.526 dimensionless;
  P_CaL = 0.0048 litre_per_second_cm2;
  fCaLt = 0.64 dimensionless;
  P_KL = 4.8e-6 litre_per_second_cm2;
  P_nsNa = 1.75e-7 litre_per_second_cm2;
  fnsNat = 0.526 dimensionless;
  P_nsK = 1.75e-7 litre_per_second_cm2;
  fnsKt = 0.526 dimensionless;
  i_NaCa_max = 0.00025 microA_per_cm2;
  fNaCat = 0.526 dimensionless;
  i_NaK_max = 1.5 microA_per_cm2;
  fNaKt = 0.526 dimensionless;
  i_pCa_max = 1.15 microA_per_cm2;
  fpCat = 0.2 dimensionless;
  i_Kext has microA;
  stim_Period = 1 second;
  i_Na_s has microA;
  E_Na_s has millivolt;
  m_i_Na_s_m_gate = 0.0034130493 dimensionless;
  m_infinity_i_Na_s_m_gate has dimensionless;
  tau_m_i_Na_s_m_gate has second;
  time_i_Na_s_m_gate has second;
  h_i_Na_s_h_gate = 0.82699973 dimensionless;
  h_infinity_i_Na_s_h_gate has dimensionless;
  tau_h_i_Na_s_h_gate has second;
  time_i_Na_s_h_gate has second;
  i_Na_t has microA;
  E_Na_t has millivolt;
  m_i_Na_t_m_gate = 0.0034129472 dimensionless;
  m_infinity_i_Na_t_m_gate has dimensionless;
  tau_m_i_Na_t_m_gate has second;
  time_i_Na_t_m_gate has second;
  h_i_Na_t_h_gate = 0.82700551 dimensionless;
  h_infinity_i_Na_t_h_gate has dimensionless;
  tau_h_i_Na_t_h_gate has second;
  time_i_Na_t_h_gate has second;
  i_Naps_s has microA;
  i_Naps_t has microA;
  i_CaL_s has microA;
  i_KL_s has microA;
  alfas has per_second;
  betas has per_second;
  gama_i_CaL_s has per_second;
  omega_i_CaL_s = 10 per_second;
  a_i_CaL_s = 2 dimensionless;
  b_i_CaL_s = 2 dimensionless;
  f_i_CaL_s = 300 per_second;
  g_i_CaL_s = 2000 per_second;
  f2_i_CaL_s = 5 per_second;
  g2_i_CaL_s = 7000 per_second;
  alfa2s has per_second;
  beta2s has per_second;
  Cst = 0.99797984 dimensionless;
  C1 = 7.5722514e-5 dimensionless;
  C2 = 2.1545646e-9 dimensionless;
  C3 = 2.7463178e-14 dimensionless;
  C4 = -5.7569102e-17 dimensionless;
  Co = -1.3496934e-17 dimensionless;
  Ccast = 0.0019155065 dimensionless;
  Cca1 = 5.8135383e-7 dimensionless;
  Cca2 = 6.615513e-11 dimensionless;
  Cca3 = 3.3426555e-15 dimensionless;
  Cca4 = 4.6640361e-19 dimensionless;
  Ccao = 3.7986638e-22 dimensionless;
  y_i_CaL_s_y_gate = 0.78134852 dimensionless;
  y_infinity_i_CaL_s_y_gate has dimensionless;
  tau_y_i_CaL_s_y_gate has second;
  time_i_CaL_s_y_gate has second;
  i_CaL_t has microA;
  i_KL_t has microA;
  alfat has per_second;
  betat has per_second;
  gama_i_CaL_t has per_second;
  omega_i_CaL_t = 10 per_second;
  a_i_CaL_t = 2 dimensionless;
  b_i_CaL_t = 2 dimensionless;
  f_i_CaL_t = 300 per_second;
  g_i_CaL_t = 2000 per_second;
  f2_i_CaL_t = 5 per_second;
  g2_i_CaL_t = 7000 per_second;
  alfa2t has per_second;
  beta2t has per_second;
  TCst = 0.99798934 dimensionless;
  TC1 = 7.5720257e-5 dimensionless;
  TC2 = 2.1544156e-9 dimensionless;
  TC3 = 2.7459475e-14 dimensionless;
  TC4 = -5.7367189e-17 dimensionless;
  TCo = -1.3449454e-17 dimensionless;
  TCcast = 0.0019155245 dimensionless;
  TCca1 = 5.8133643e-7 dimensionless;
  TCca2 = 6.6150547e-11 dimensionless;
  TCca3 = 3.3423167e-15 dimensionless;
  TCca4 = 4.6165955e-19 dimensionless;
  TCcao = 3.75926e-22 dimensionless;
  y_i_CaL_t_y_gate = 0.7813477 dimensionless;
  y_infinity_i_CaL_t_y_gate has dimensionless;
  tau_y_i_CaL_t_y_gate has second;
  i_Kr_s has microA;
  E_Kr_s has millivolt;
  xr_i_Kr_s_xr_gate = 0.00020469344 dimensionless;
  xr_infinity_i_Kr_s_xr_gate has dimensionless;
  tau_xr_i_Kr_s_xr_gate has second;
  xri_i_Kr_s_xri_gate has dimensionless;
  i_Kr_t has microA;
  E_Kr_t has millivolt;
  xr_i_Kr_t_xr_gate = 0.00020469344 dimensionless;
  xr_infinity_i_Kr_t_xr_gate has dimensionless;
  tau_xr_i_Kr_t_xr_gate has second;
  xri_i_Kr_t_xri_gate has dimensionless;
  i_Ks_s has microA;
  E_Ks_s has millivolt;
  PRNaK_i_Ks_s = 0.01833 dimensionless;
  xs_i_Ks_s_xs_gate = 0.0061359896 dimensionless;
  xs_infinity_i_Ks_s_xs_gate has dimensionless;
  tau_xs_i_Ks_s_xs_gate has second;
  i_Ks_t has microA;
  E_Ks_t has millivolt;
  PRNaK_i_Ks_t = 0.01833 dimensionless;
  xs_i_Ks_t_xs_gate = 0.0061359896 dimensionless;
  xs_infinity_i_Ks_t_xs_gate has dimensionless;
  tau_xs_i_Ks_t_xs_gate has second;
  i_K1_s has microA;
  E_K1_s has millivolt;
  aK1s has dimensionless;
  bK1s has dimensionless;
  i_K1_t has microA;
  E_K1_t has millivolt;
  aK1t has dimensionless;
  bK1t has dimensionless;
  i_Kp_s has microA;
  kps has dimensionless;
  E_Kp_s has millivolt;
  i_Kp_t has microA;
  kpt has dimensionless;
  E_Kp_t has millivolt;
  i_Kto_s has microA;
  fr2_i_Kto_s = 1 dimensionless;
  E_Kto_s has millivolt;
  r2_i_Kto_s_r2_gate = 0.9625701 dimensionless;
  tau_r2_i_Kto_s_r2_gate = 0.02 second;
  r2_infinity_i_Kto_s_r2_gate has dimensionless;
  r3_i_Kto_s_r3_gate = 0.96250049 dimensionless;
  tau_r3_i_Kto_s_r3_gate = 0.08 second;
  r3_infinity_i_Kto_s_r3_gate has dimensionless;
  i_Kto_t has microA;
  fr2_i_Kto_t = 1 dimensionless;
  E_Kto_t has millivolt;
  r2_i_Kto_t_r2_gate = 0.9625701 dimensionless;
  tau_r2_i_Kto_t_r2_gate = 0.02 second;
  r2_infinity_i_Kto_t_r2_gate has dimensionless;
  r3_i_Kto_t_r3_gate = 0.96250049 dimensionless;
  r3_infinity_i_Kto_t_r3_gate has dimensionless;
  tau_r3_i_Kto_t_r3_gate = 0.08 second;
  i_KNa_s has microA;
  E_KNa_s has millivolt;
  i_KNa_t has microA;
  E_KNa_t has millivolt;
  i_nsNa_s has microA;
  i_nsNa_t has microA;
  i_nsK_s has microA;
  i_nsK_t has microA;
  i_Nab_s has microA;
  i_Nab_t has microA;
  i_Cab_s has microA;
  E_Ca_s has millivolt;
  i_Cab_t has microA;
  E_Ca_t has millivolt;
  i_NaCa_s has microA;
  i_NaCa_t has microA;
  i_NaK_s has microA;
  i_NaK_t has microA;
  i_pCa_s has microA;
  i_pCa_t has microA;
  i_KATP_s has microA;
  E_KATP_s has millivolt;
  i_KATP_t has microA;
  E_KATP_t has millivolt;
  JteNa has millimolar_per_second;
  JteCa has millimolar_per_second;
  JteK has millimolar_per_second;
  tau_Na = 0.2 second;
  tau_Ca = 0.24 second;
  tau_K = 0.2 second;
  JCaSRup has millimolar_per_second;
  JCaSRleak has millimolar_per_second;
  Jtr has millimolar_per_second;
  tau_tr = 0.03448 second;
  JCaSRrel has millimolar_per_second;
  kap has per_millimolar4_per_second;
  kam = 576 per_second;
  kbp has per_millimolar3_per_second;
  kbm = 1930 per_second;
  kcp = 18 per_second;
  kcm = 0.8 per_second;
  F1 = 0.8053082 dimensionless;
  F2 = 0.00026639195 dimensionless;
  F3 = 4.9455459e-10 dimensionless;
  F4 = 0.19442578 dimensionless;
  JCad has millimolar_per_second;
  tau_d = 0.003125 second;
  CaSRrel = 1.0326252 millimolar;
  CaSRup = 1.0200296 millimolar;
  K_t = 5.4140321 millimolar;
  Na_t = 139.93239 millimolar;
  Ca_t = 1.8476402 millimolar;
  K_i = 136.78926 millimolar;
  Na_i = 11.120279 millimolar;
  Ca_i = 8.8787034e-5 millimolar;
  Ca_ss = 9.5977033e-5 millimolar;
  BTRH = 0.96700747 millimolar;
  BTRL = 0.081740868 millimolar;
  dBTRH has millimolar_per_second;
  dBTRL has millimolar_per_second;
  Vm_s = -85.207812 millivolt;
  Vm_t = -85.208034 millivolt;

  // Assignment rules:
  Sms := 2*3.141592*rc^2 + 2*3.14159*rc*Lc;
  Vc := 3.14159*rc^2*Lc;
  Vmyo := Vc*0.68;
  VSRup := Vc*0.055;
  VSRrel := Vc*0.00316;
  Vd := Vc*0.68*6e-5;
  pt := ptcm*2*3.14159*rc*Lc;
  Smt := 2*3.14159*rt*Lt*pt;
  Vt := 3.14159*rt^2*Lt*pt;
  Cmt := Smt*1;
  Cms := Sms*1;
  Rst := Rot*Lt/2/(3.14159*rt^2*pt);
  i_circ := 1000*(Vm_t/Rst - Vm_s/Rst);
  g_Na_s := g_Na*(Sms + Smt)*(1 - fNat);
  g_Na_t := g_Na*(Sms + Smt)*fNat;
  g_Naps_s := g_Naps*(Sms + Smt)*(1 - fNapst);
  g_Naps_t := g_Naps*(Sms + Smt)*fNapst;
  q_Ks_s := q_Ks*(Sms + Smt)*(1 - fKst);
  q_Ks_t := q_Ks*(Sms + Smt)*fKst;
  q_Kr_s := q_Kr*(Sms + Smt)*(1 - fKrt);
  q_Kr_t := q_Kr*(Sms + Smt)*fKrt;
  g_K1_s := g_K1*(Sms + Smt)*(1 - fK1t);
  g_K1_t := g_K1*(Sms + Smt)*fK1t;
  g_Kp_s := g_Kp*(Sms + Smt)*(1 - fKpt);
  g_Kp_t := g_Kp*(Sms + Smt)*fKpt;
  g_Kto_s := g_Kto*(Sms + Smt)*(1 - fKtot);
  g_Kto_t := g_Kto*(Sms + Smt)*fKtot;
  g_KNa_s := g_KNa*(Sms + Smt)*(1 - fKNat);
  g_KNa_t := g_KNa*(Sms + Smt)*fKNat;
  g_Nab_s := g_Nab*(Sms + Smt)*(1 - fNabt);
  g_Nab_t := g_Nab*(Sms + Smt)*fNabt;
  g_Cab_s := g_Cab*(Sms + Smt)*(1 - fCabt);
  g_Cab_t := g_Cab*(Sms + Smt)*fCabt;
  g_KATP_s := g_KATP*(Sms + Smt)*(1 - fKATPt);
  g_KATP_t := g_KATP*(Sms + Smt)*fKATPt;
  P_CaL_s := P_CaL*(Sms + Smt)*(1 - fCaLt);
  P_CaL_t := P_CaL*(Sms + Smt)*fCaLt;
  P_KL_s := P_KL*(Sms + Smt)*(1 - fCaLt);
  P_KL_t := P_KL*(Sms + Smt)*fCaLt;
  P_nsNa_s := P_nsNa*(Sms + Smt)*(1 - fnsNat);
  P_nsNa_t := P_nsNa*(Sms + Smt)*fnsNat;
  P_nsK_s := P_nsK*(Sms + Smt)*(1 - fnsKt);
  P_nsK_t := P_nsK*(Sms + Smt)*fnsKt;
  i_NaCa_max_s := i_NaCa_max*(Sms + Smt)*(1 - fNaCat);
  i_NaCa_max_t := i_NaCa_max*(Sms + Smt)*fNaCat;
  i_NaK_max_s := i_NaK_max*(Sms + Smt)*(1 - fNaKt);
  i_NaK_max_t := i_NaK_max*(Sms + Smt)*fNaKt;
  i_pCa_max_s := i_pCa_max*(Sms + Smt)*(1 - fpCat);
  i_pCa_max_t := i_pCa_max*(Sms + Smt)*fpCat;
  i_Kext := piecewise(45*(Sms + Smt), (time - floor(time/stim_Period)*stim_Period >= 0) && (time - floor(time/stim_Period)*stim_Period <= 0.001), 0);
  E_Na_s := ln(Na_e/Na_i)*R*T/F;
  i_Na_s := g_Na_s*m_i_Na_s_m_gate^3*h_i_Na_s_h_gate*(Vm_s - 1*ln((Na_e + 0.12*K_e)/(Na_i + 0.12*K_i))*R*T/F);
  m_infinity_i_Na_s_m_gate := 1/(1 + exp((Vm_s + 52.2 - 9)/(-7.4)));
  tau_m_i_Na_s_m_gate := (0.001/(101.6*exp(Vm_s*0.1135) + 0.02268*exp(-0.0717*Vm_s)) + 0.0001)/4.83;
  h_infinity_i_Na_s_h_gate := 1/(1 + exp((Vm_s + 85.6 - 9)/5.5));
  tau_h_i_Na_s_h_gate := (0.001/(1.1381e-6*exp(-0.1017*Vm_s) + 6.537*exp(Vm_s*0.08016)) + 0.0005)/4.83;
  E_Na_t := ln(Na_t/Na_i)*R*T/F;
  i_Na_t := g_Na_t*m_i_Na_t_m_gate^3*h_i_Na_t_h_gate*(Vm_t - 1*ln((Na_t + 0.12*K_t)/(Na_i + 0.12*K_i))*R*T/F);
  m_infinity_i_Na_t_m_gate := 1/(1 + exp((Vm_t + 52.2 - 9)/(-7.4)));
  tau_m_i_Na_t_m_gate := (0.001/(101.6*exp(Vm_t*0.1135) + 0.02268*exp(-0.0717*Vm_t)) + 0.0001)/4.83;
  h_infinity_i_Na_t_h_gate := 1/(1 + exp((Vm_t + 85.6 - 9)/5.5));
  tau_h_i_Na_t_h_gate := (0.001/(1.1381e-6*exp(-0.1017*Vm_t) + 6.537*exp(Vm_t*0.08016)) + 0.0005)/4.83;
  i_Naps_s := g_Naps_s/(1 + exp(-(54 + Vm_s)/8))*(Vm_s - 1*ln((Na_e + 0.12*K_e)/(Na_i + 0.12*K_i))*R*T/F);
  i_Naps_t := g_Naps_t/(1 + exp(-(54 + Vm_t)/8))*(Vm_t - 1*ln((Na_t + 0.12*K_t)/(Na_i + 0.12*K_i))*R*T/F);
  i_CaL_s := 1*P_CaL_s*4*(Co + Ccao)*y_i_CaL_s_y_gate*Vm_s*F^2/(R*T)*(0.001*exp(2*Vm_s*F/(R*T)) - 0.341*Ca_e)/(exp(2*Vm_s*F/(R*T)) - 1);
  i_KL_s := 1*P_KL_s/(1 - (i_CaL_s + i_CaL_t)/(0.458*(Sms + Smt)))*(Co + Ccao)*y_i_CaL_s_y_gate*Vm_s*F^2/(R*T)*(K_i*exp(Vm_s*F/(R*T)) - K_e)/(exp(Vm_s*F/(R*T)) - 1);
  alfas := 400*exp((Vm_s + 12)/10);
  betas := 50*exp(-(Vm_s + 12)/13);
  gama_i_CaL_s := 187.5*Ca_ss;
  alfa2s := alfas*a_i_CaL_s;
  beta2s := betas/b_i_CaL_s;
  y_infinity_i_CaL_s_y_gate := 1/(1 + exp((Vm_s + 35)/6));
  tau_y_i_CaL_s_y_gate := 0.001/(0.02 + 0.0197*exp(-((Vm_s + 10)*0.0337)^2)) + 0.55/(1 + exp((Vm_s + 40)/9.5*4));
  i_CaL_t := 1*P_CaL_t*4*(TCo + TCcao)*y_i_CaL_t_y_gate*Vm_t*F^2/(R*T)*(0.001*exp(2*Vm_t*F/(R*T)) - 0.341*Ca_t)/(exp(2*Vm_t*F/(R*T)) - 1);
  i_KL_t := 1*P_KL_t/(1 - (i_CaL_s + i_CaL_t)/(0.458*(Sms + Smt)))*(TCo + TCcao)*y_i_CaL_t_y_gate*Vm_t*F^2/(R*T)*(K_i*exp(Vm_t*F/(R*T)) - K_t)/(exp(Vm_t*F/(R*T)) - 1);
  gama_i_CaL_t := 187.5*Ca_ss;
  alfat := 400*exp((Vm_t + 12)/10);
  betat := 50*exp(-(Vm_t + 12)/13);
  alfa2t := alfat*a_i_CaL_t;
  beta2t := betat/b_i_CaL_t;
  y_infinity_i_CaL_t_y_gate := 1/(1 + exp((Vm_t + 35)/6));
  tau_y_i_CaL_t_y_gate := 0.001/(0.02 + 0.0197*exp(-((Vm_t + 10)*0.0337)^2)) + 0.55/(1 + exp((Vm_t + 40)/9.5*4));
  i_Kr_s := q_Kr_s*0.02614*sqrt(K_e/5.4)*xr_i_Kr_s_xr_gate*xri_i_Kr_s_xri_gate*(Vm_s - E_Kr_s);
  E_Kr_s := ln(K_e/K_i)*R*T/F;
  xr_infinity_i_Kr_s_xr_gate := 1/(1 + exp(-(Vm_s + 21.5)/7.5));
  tau_xr_i_Kr_s_xr_gate := 0.001/(0.00138*(Vm_s + 14.2)/(1 - exp(-0.123*(Vm_s + 14.2))) + 0.00061*(Vm_s + 38.9)/(exp(0.145*(Vm_s + 38.9)) - 1));
  xri_i_Kr_s_xri_gate := 1/(1 + exp((Vm_s + 9)/22.4));
  i_Kr_t := q_Kr_t*0.02614*sqrt(K_t/5.4)*xr_i_Kr_t_xr_gate*xri_i_Kr_t_xri_gate*(Vm_t - E_Kr_t);
  E_Kr_t := ln(K_t/K_i)*R*T/F;
  xr_infinity_i_Kr_t_xr_gate := 1/(1 + exp(-(Vm_t + 21.5)/7.5));
  tau_xr_i_Kr_t_xr_gate := 0.001/(0.00138*(Vm_t + 14.2)/(1 - exp(-0.123*(Vm_t + 14.2))) + 0.00061*(Vm_t + 38.9)/(exp(0.145*(Vm_t + 38.9)) - 1));
  xri_i_Kr_t_xri_gate := 1/(1 + exp((Vm_t + 9)/22.4));
  i_Ks_s := q_Ks_s*(0.2308 + 0.7692/(1 + exp((-log10(1*Ca_i) - 4.2)/0.6)))*xs_i_Ks_s_xs_gate^2*(Vm_s - E_Ks_s);
  E_Ks_s := ln((K_e + PRNaK_i_Ks_s*Na_e)/(K_i + PRNaK_i_Ks_s*Na_i))*R*T/F;
  xs_infinity_i_Ks_s_xs_gate := 1/(1 + exp(-(Vm_s - 1.5)/16.7));
  tau_xs_i_Ks_s_xs_gate := 0.001/(7.19e-5*(Vm_s + 30)/(1 - exp(-0.148*(Vm_s + 30))) + 0.000131*(Vm_s + 30)/(exp(0.0687*(Vm_s + 30)) - 1));
  i_Ks_t := q_Ks_t*(0.2308 + 0.7692/(1 + exp((-log10(1*Ca_i) - 4.2)/0.6)))*xs_i_Ks_t_xs_gate^2*(Vm_t - E_Ks_t);
  E_Ks_t := ln((K_t + PRNaK_i_Ks_t*Na_t)/(K_i + PRNaK_i_Ks_t*Na_i))*R*T/F;
  xs_infinity_i_Ks_t_xs_gate := 1/(1 + exp(-(Vm_t - 1.5)/16.7));
  tau_xs_i_Ks_t_xs_gate := 0.001/(7.19e-5*(Vm_t + 30)/(1 - exp(-0.148*(Vm_t + 30))) + 0.000131*(Vm_t + 30)/(exp(0.0687*(Vm_t + 30)) - 1));
  i_K1_s := g_K1_s*sqrt(K_e/5.4)*aK1s/(aK1s + bK1s)*(Vm_s - E_K1_s);
  E_K1_s := E_Kr_s;
  aK1s := 1020/(1 + exp(0.2385*(Vm_s - E_K1_s - 59.215)));
  bK1s := 1000*(0.49124*exp(0.08032*(Vm_s - E_K1_s + 5.476)) + exp(0.06175*(Vm_s - E_K1_s - 594.31)))/(1 + exp(-0.5143*(Vm_s - E_K1_s + 4.753)));
  i_K1_t := g_K1_t*sqrt(K_t/5.4)*aK1t/(aK1t + bK1t)*(Vm_t - E_K1_t);
  E_K1_t := E_Kr_t;
  aK1t := 1020/(1 + exp(0.2385*(Vm_t - E_K1_t - 59.215)));
  bK1t := 1000*(0.49124*exp(0.08032*(Vm_t - E_K1_t + 5.476)) + exp(0.06175*(Vm_t - E_K1_t - 594.31)))/(1 + exp(-0.5143*(Vm_t - E_K1_t + 4.753)));
  i_Kp_s := g_Kp_s*kps*(Vm_s - E_Kp_s);
  E_Kp_s := E_Kr_s;
  kps := 1/(1 + exp((20 - Vm_s)/5));
  i_Kp_t := g_Kp_t*kpt*(Vm_t - E_Kp_t);
  E_Kp_t := E_Kr_t;
  kpt := 1/(1 + exp((20 - Vm_t)/5));
  i_Kto_s := g_Kto_s/((1 + exp((Vm_s + 57.53)/(-5.863)))*(1 + exp((Vm_s - 45.8)/25.87)))*(r2_i_Kto_s_r2_gate*fr2_i_Kto_s + r3_i_Kto_s_r3_gate*(1 - fr2_i_Kto_s))*(Vm_s - E_Kto_s);
  E_Kto_s := E_Kr_s;
  r2_infinity_i_Kto_s_r2_gate := 1.006/(1 + exp((Vm_s + 36.69 + 10)/12.43));
  r3_infinity_i_Kto_s_r3_gate := r2_infinity_i_Kto_s_r2_gate;
  i_Kto_t := g_Kto_t/((1 + exp((Vm_t + 57.53)/(-5.863)))*(1 + exp((Vm_t - 45.8)/25.87)))*(r2_i_Kto_t_r2_gate*fr2_i_Kto_t + r3_i_Kto_t_r3_gate*(1 - fr2_i_Kto_t))*(Vm_t - E_Kto_t);
  E_Kto_t := E_Kr_t;
  r2_infinity_i_Kto_t_r2_gate := 1.006/(1 + exp((Vm_t + 36.69 + 10)/12.43));
  r3_infinity_i_Kto_t_r3_gate := r2_infinity_i_Kto_t_r2_gate;
  i_KNa_s := g_KNa_s*(0.8 - 0.65/(1 + exp((Vm_s + 125)/15)))*0.85/(1 + (66/Na_i)^2.8)*(Vm_s - E_KNa_s);
  E_KNa_s := E_Kr_s;
  i_KNa_t := g_KNa_t*(0.8 - 0.65/(1 + exp((Vm_t + 125)/15)))*0.85/(1 + (66/Na_i)^2.8)*(Vm_t - E_KNa_t);
  E_KNa_t := E_Kr_t;
  i_nsNa_s := 1*P_nsNa_s*Vm_s*F^2/(R*T)*(0.75*Na_i*exp(Vm_s*F/(R*T)) - 0.75*Na_e)/(exp(Vm_s*F/(R*T)) - 1)/(1 + (0.0025/Ca_i)^3);
  i_nsNa_t := 1*P_nsNa_t*Vm_t*F^2/(R*T)*(0.75*Na_i*exp(Vm_t*F/(R*T)) - 0.75*Na_t)/(exp(Vm_t*F/(R*T)) - 1)/(1 + (0.0025/Ca_i)^3);
  i_nsK_s := 1*P_nsK_s*Vm_s*F^2/(R*T)*(0.75*K_i*exp(Vm_s*F/(R*T)) - 0.75*K_e)/(exp(Vm_s*F/(R*T)) - 1)/(1 + (0.0025/Ca_i)^3);
  i_nsK_t := 1*P_nsK_t*Vm_t*F^2/(R*T)*(0.75*K_i*exp(Vm_t*F/(R*T)) - 0.75*K_t)/(exp(Vm_t*F/(R*T)) - 1)/(1 + (0.0025/Ca_i)^3);
  i_Nab_s := g_Nab_s*(Vm_s - E_Na_s);
  i_Nab_t := g_Nab_t*(Vm_t - E_Na_t);
  i_Cab_s := g_Cab_s*(Vm_s - E_Ca_s);
  E_Ca_s := ln(Ca_e/Ca_i)*R*T/(2*F);
  i_Cab_t := g_Cab_t*(Vm_t - E_Ca_t);
  E_Ca_t := ln(Ca_t/Ca_i)*R*T/(2*F);
  i_NaCa_s := i_NaCa_max_s*exp(-0.85*Vm_s*F/(R*T))*(exp(Vm_s*F/(R*T))*Na_i^3*Ca_e - Na_e^3*Ca_i)/(1 + 0.0001*exp(-0.85*Vm_s*F/(R*T))*(exp(Vm_s*F/(R*T))*Na_i^3*Ca_e + Na_e^3*Ca_i));
  i_NaCa_t := i_NaCa_max_t*exp(-0.85*Vm_t*F/(R*T))*(exp(Vm_t*F/(R*T))*Na_i^3*Ca_t - Na_t^3*Ca_i)/(1 + 0.0001*exp(-0.85*Vm_t*F/(R*T))*(exp(Vm_t*F/(R*T))*Na_i^3*Ca_t + Na_t^3*Ca_i));
  i_NaK_s := i_NaK_max_s/(1 + 0.1245*exp(-0.1*Vm_s*F/(R*T)) + 0.0365*1/7*(exp(Na_e/67.3) - 1)*exp(-Vm_s*F/(R*T)))*1/(1 + (10/Na_i)^1.5)*K_e/(K_e + 1.5);
  i_NaK_t := i_NaK_max_t/(1 + 0.1245*exp(-0.1*Vm_t*F/(R*T)) + 0.0365*1/7*(exp(Na_t/67.3) - 1)*exp(-Vm_t*F/(R*T)))*1/(1 + (10/Na_i)^1.5)*K_t/(K_t + 1.5);
  i_pCa_s := i_pCa_max_s*Ca_i/(0.0005 + Ca_i);
  i_pCa_t := i_pCa_max_t*Ca_i/(0.0005 + Ca_i);
  i_KATP_s := g_KATP_s*1/(1 + (ATP_i/0.114)^2)*(K_e/4)^0.24*(Vm_s - E_KATP_s);
  E_KATP_s := E_Kr_s;
  i_KATP_t := g_KATP_t*1/(1 + (ATP_i/0.114)^2)*(K_t/4)^0.24*(Vm_t - E_KATP_t);
  E_KATP_t := E_Kr_t;
  JteNa := 1*Vt/tau_Na*(Na_t - Na_e);
  JteCa := 1*Vt/tau_Ca*(Ca_t - Ca_e);
  JteK := 1*Vt/tau_K*(K_t - K_e);
  JCaSRup := 1*1000*Vmyo*0.0018*Ca_i^2/(Ca_i^2 + 0.0005^2);
  JCaSRleak := 1250*Vmyo*5.8e-5*(CaSRup - Ca_i);
  Jtr := 1*VSRrel/tau_tr*(CaSRup - CaSRrel);
  JCaSRrel := 1800*VSRrel*(F2 + F3)*(CaSRrel - Ca_ss);
  kap := 3*12150000000000;
  kbp := 4050000000;
  JCad := 1*(Ca_ss - Ca_i)*Vmyo/tau_d;
  dBTRH := 20000*Ca_i*(1 - BTRH) - 0.07*BTRH;
  dBTRL := 40000*Ca_i*(1 - BTRL) - BTRL*40;

  // Rate rules:
  m_i_Na_s_m_gate' = (m_infinity_i_Na_s_m_gate - m_i_Na_s_m_gate)/tau_m_i_Na_s_m_gate;
  h_i_Na_s_h_gate' = (h_infinity_i_Na_s_h_gate - h_i_Na_s_h_gate)/tau_h_i_Na_s_h_gate;
  m_i_Na_t_m_gate' = (m_infinity_i_Na_t_m_gate - m_i_Na_t_m_gate)/tau_m_i_Na_t_m_gate;
  h_i_Na_t_h_gate' = (h_infinity_i_Na_t_h_gate - h_i_Na_t_h_gate)/tau_h_i_Na_t_h_gate;
  Cst' = betas*C1 + omega_i_CaL_s*Ccast - (4*alfas + gama_i_CaL_s)*Cst;
  C1' = 4*alfas*Cst + 2*betas*C2 + omega_i_CaL_s/b_i_CaL_s*Cca1 - (betas + 3*alfas + gama_i_CaL_s*a_i_CaL_s)*C1;
  C2' = 3*alfas*C1 + 3*betas*C3 + omega_i_CaL_s/b_i_CaL_s^2*Cca2 - (2*betas + 2*alfas + gama_i_CaL_s*a_i_CaL_s^2)*C2;
  C3' = 2*alfas*C2 + 4*betas*C4 + omega_i_CaL_s/b_i_CaL_s^3*Cca3 - (3*betas + alfas + gama_i_CaL_s*a_i_CaL_s^3)*C3;
  C4' = alfas*C3 + g_i_CaL_s*Co + omega_i_CaL_s/b_i_CaL_s^4*Cca4 - (4*betas + f_i_CaL_s + gama_i_CaL_s*a_i_CaL_s^4)*C4;
  Co' = f_i_CaL_s*C4 - g_i_CaL_s*Co;
  Ccast' = beta2s*Cca1 + gama_i_CaL_s*Cst - (4*alfa2s + omega_i_CaL_s)*Ccast;
  Cca1' = 4*alfa2s*Ccast + 2*beta2s*Cca2 + gama_i_CaL_s*a_i_CaL_s*C1 - (beta2s + 3*alfa2s + omega_i_CaL_s/b_i_CaL_s)*Cca1;
  Cca2' = 3*alfa2s*Cca1 + 3*beta2s*Cca3 + gama_i_CaL_s*a_i_CaL_s^2*C2 - (2*beta2s + 2*alfa2s + omega_i_CaL_s/b_i_CaL_s^2)*Cca2;
  Cca3' = 2*alfa2s*Cca2 + 4*beta2s*Cca4 + gama_i_CaL_s*a_i_CaL_s^3*C3 - (3*beta2s + alfa2s + omega_i_CaL_s/b_i_CaL_s^3)*Cca3;
  Cca4' = alfa2s*Cca3 + g2_i_CaL_s*Ccao + gama_i_CaL_s*a_i_CaL_s^4*C4 - (4*beta2s + f2_i_CaL_s + omega_i_CaL_s/b_i_CaL_s^4)*Cca4;
  Ccao' = f2_i_CaL_s*Cca4 - g2_i_CaL_s*Ccao;
  y_i_CaL_s_y_gate' = (y_infinity_i_CaL_s_y_gate - y_i_CaL_s_y_gate)/tau_y_i_CaL_s_y_gate;
  TCst' = betat*TC1 + omega_i_CaL_t*TCcast - (4*alfat + gama_i_CaL_t)*TCst;
  TC1' = 4*alfat*TCst + 2*betat*TC2 + omega_i_CaL_t/b_i_CaL_t*TCca1 - (betat + 3*alfat + gama_i_CaL_t*a_i_CaL_t)*TC1;
  TC2' = 3*alfat*TC1 + 3*betat*TC3 + omega_i_CaL_t/b_i_CaL_t^2*TCca2 - (2*betat + 2*alfat + gama_i_CaL_t*a_i_CaL_t^2)*TC2;
  TC3' = 2*alfat*TC2 + 4*betat*TC4 + omega_i_CaL_t/b_i_CaL_t^3*TCca3 - (3*betat + alfat + gama_i_CaL_t*a_i_CaL_t^3)*TC3;
  TC4' = alfat*TC3 + g_i_CaL_t*TCo + omega_i_CaL_t/b_i_CaL_t^4*TCca4 - (4*betat + f_i_CaL_t + gama_i_CaL_t*a_i_CaL_t^4)*TC4;
  TCo' = f_i_CaL_t*TC4 - g_i_CaL_t*TCo;
  TCcast' = beta2t*TCca1 + gama_i_CaL_t*TCst - (4*alfa2t + omega_i_CaL_t)*TCcast;
  TCca1' = 4*alfa2t*TCcast + 2*beta2t*TCca2 + gama_i_CaL_t*a_i_CaL_t*TC1 - (beta2t + 3*alfa2t + omega_i_CaL_t/b_i_CaL_t)*TCca1;
  TCca2' = 3*alfa2t*TCca1 + 3*beta2t*TCca3 + gama_i_CaL_t*a_i_CaL_t^2*TC2 - (2*beta2t + 2*alfa2t + omega_i_CaL_t/b_i_CaL_t^2)*TCca2;
  TCca3' = 2*alfa2t*TCca2 + 4*beta2t*TCca4 + gama_i_CaL_t*a_i_CaL_t^3*TC3 - (3*beta2t + alfa2t + omega_i_CaL_t/b_i_CaL_t^3)*TCca3;
  TCca4' = alfa2t*TCca3 + g2_i_CaL_t*TCcao + gama_i_CaL_t*a_i_CaL_t^4*TC4 - (4*beta2t + f2_i_CaL_t + omega_i_CaL_t/b_i_CaL_t^4)*TCca4;
  TCcao' = f2_i_CaL_t*TCca4 - g2_i_CaL_t*TCcao;
  y_i_CaL_t_y_gate' = (y_infinity_i_CaL_t_y_gate - y_i_CaL_t_y_gate)/tau_y_i_CaL_t_y_gate;
  xr_i_Kr_s_xr_gate' = (xr_infinity_i_Kr_s_xr_gate - xr_i_Kr_s_xr_gate)/tau_xr_i_Kr_s_xr_gate;
  xr_i_Kr_t_xr_gate' = (xr_infinity_i_Kr_t_xr_gate - xr_i_Kr_t_xr_gate)/tau_xr_i_Kr_t_xr_gate;
  xs_i_Ks_s_xs_gate' = (xs_infinity_i_Ks_s_xs_gate - xs_i_Ks_s_xs_gate)/tau_xs_i_Ks_s_xs_gate;
  xs_i_Ks_t_xs_gate' = (xs_infinity_i_Ks_t_xs_gate - xs_i_Ks_t_xs_gate)/tau_xs_i_Ks_t_xs_gate;
  r2_i_Kto_s_r2_gate' = (r2_infinity_i_Kto_s_r2_gate - r2_i_Kto_s_r2_gate)/tau_r2_i_Kto_s_r2_gate;
  r3_i_Kto_s_r3_gate' = (r3_infinity_i_Kto_s_r3_gate - r3_i_Kto_s_r3_gate)/tau_r3_i_Kto_s_r3_gate;
  r2_i_Kto_t_r2_gate' = (r2_infinity_i_Kto_t_r2_gate - r2_i_Kto_t_r2_gate)/tau_r2_i_Kto_t_r2_gate;
  r3_i_Kto_t_r3_gate' = (r3_infinity_i_Kto_t_r3_gate - r3_i_Kto_t_r3_gate)/tau_r3_i_Kto_t_r3_gate;
  F1' = F2*kam - F1*kap*Ca_ss^4;
  F2' = F1*kap*Ca_ss^4 + F3*kbm + F4*kcm - F2*(kam + kbp*Ca_ss^3 + kcp);
  F3' = F2*kbp*Ca_ss^3 - F3*kbm;
  F4' = F2*kcp - F4*kcm;
  CaSRrel' = 1/(1 + 15*0.8/(0.8 + CaSRrel)^2)*(Jtr - JCaSRrel)/VSRrel;
  CaSRup' = (JCaSRup - JCaSRleak - Jtr)/(1*VSRup);
  Ca_ss' = 1/(1 + 0.05*0.00238/(0.00238 + Ca_ss)^2)*(-(i_CaL_s + i_CaL_t)/(2*F*Vd) + 1*JCaSRrel/Vd - 1*JCad/Vd);
  Ca_i' = 1/(1 + 0.05*0.00238/(0.00238 + Ca_i)^2)*((-2*(i_NaCa_s + i_NaCa_t) + i_Cab_s + i_Cab_t + i_pCa_s + i_pCa_t)/(-2*F*Vmyo) + 1*(JCad + JCaSRleak - JCaSRup)/Vmyo - dBTRH*0.14 - dBTRL*0.07);
  BTRH' = dBTRH;
  BTRL' = dBTRL;
  Na_i' = -(i_Na_s + i_Na_t + i_Naps_s + i_Naps_t + i_nsNa_s + i_nsNa_t + i_Nab_s + i_Nab_t + 3*i_NaCa_s + 3*i_NaCa_t + 3*i_NaK_s + 3*i_NaK_t)/(F*Vmyo);
  K_i' = -(-0*i_Kext + i_Ks_s + i_Ks_t + i_Kr_s + i_Kr_t + i_K1_s + i_K1_t + i_Kp_s + i_Kp_t + i_KL_s + i_KL_t + i_KNa_s + i_KNa_t + i_nsK_s + i_nsK_t - 2*i_NaK_s - 2*i_NaK_t + i_KATP_s + i_KATP_t + i_Kto_s + i_Kto_t)/(F*Vmyo);
  Na_t' = ((i_Na_t + i_Naps_t + i_nsNa_t + i_Nab_t + 3*i_NaCa_t + 3*i_NaK_t)/F - 1*JteNa)/Vt;
  Ca_t' = ((-2*i_NaCa_t + i_CaL_t + i_Cab_t + i_pCa_t)/(2*F) - 1*JteCa)/Vt;
  K_t' = ((i_Ks_t + i_Kr_t + i_K1_t + i_Kp_t + i_KNa_t + i_KL_t + i_nsK_t - 2*i_NaK_t + i_KATP_t + i_Kto_t)/F - 1*JteK)/Vt;
  Vm_s' = 1000*(i_Kext + i_circ - i_Na_s - i_Naps_s - i_CaL_s - i_KL_s - i_Ks_s - i_Kr_s - i_K1_s - i_Kp_s - i_KNa_s - i_KATP_s - i_nsNa_s - i_nsK_s - i_Nab_s - i_Cab_s - i_NaCa_s - i_NaK_s - i_pCa_s - i_Kto_s)/Cms;
  Vm_t' = 1000*(-i_circ - i_Na_t - i_Naps_t - i_CaL_t - i_KL_t - i_Ks_t - i_Kr_t - i_K1_t - i_Kp_t - i_KNa_t - i_KATP_t - i_nsNa_t - i_nsK_t - i_Nab_t - i_Cab_t - i_NaCa_t - i_NaK_t - i_pCa_t - i_Kto_t)/Cmt;

  // Unit definitions:
  unit per_second = 1 / second;
  unit millivolt = 1e-3 volt;
  unit per_millivolt = 1 / (1e-3 volt);
  unit cm = 0.01 metre;
  unit per_cm = 1 / (0.01 metre);
  unit per_cm2 = 1 / (0.01 metre)^2;
  unit cm2 = (0.01 metre)^2;
  unit milliS = 1e-3 siemens;
  unit milliS_per_cm2 = 1e-3 siemens / (0.01 metre)^2;
  unit microF = 1e-6 farad;
  unit microA = 1e-6 ampere;
  unit microA_per_cm4 = 1e-6 ampere / (0.01 metre)^4;
  unit micromolar = 1e-6 mole / litre;
  unit millimolar = 1e-3 mole / litre;
  unit per_millimolar = litre / (1e-3 mole);
  unit millimolar2 = (1e-3 mole)^2 / litre^2;
  unit millimolar_per_second = 1e-3 mole / (litre * second);
  unit per_millimolar_second = litre / (1e-3 mole * second);
  unit cm3_per_second = (0.01 metre)^3 / second;
  unit millimolar2_per_cm3 = (1e-3 mole)^2 / (litre^2 * (0.01 metre)^3);
  unit per_millimolar_per_second = litre / (1e-3 mole * second);
  unit per_millimolar3_per_second = litre^3 / ((1e-3 mole)^3 * second);
  unit millimolar4 = (1e-3 mole)^4 / litre^4;
  unit per_millimolar4 = litre^4 / (1e-3 mole)^4;
  unit per_millimolar4_per_second = litre^4 / ((1e-3 mole)^4 * second);
  unit microA_per_millimolar = 1e-6 ampere * litre / (1e-3 mole);
  unit microA_per_cm2 = 1e-6 ampere / (0.01 metre)^2;
  unit microF_per_cm2 = 1e-6 farad / (0.01 metre)^2;
  unit ohm_cm = ohm * 0.01 metre;
  unit ohm_per_cm2 = ohm / (0.01 metre)^2;
  unit microA_per_millimolar4 = 1e-6 ampere * litre^4 / (1e-3 mole)^4;
  unit joule_per_kilomole_kelvin = joule / (kelvin * 1000 mole);
  unit coulomb_per_mole = coulomb / mole;
  unit mole_per_coulomb = mole / coulomb;
  unit cm3 = (0.01 metre)^3;
  unit per_cm3 = 1 / (0.01 metre)^3;
  unit per_cm3_second = 1 / ((0.01 metre)^3 * second);
  unit litre_per_second = litre / second;
  unit litre_per_second_cm2 = litre / (second * (0.01 metre)^2);
end
