// SBML level 2 version 3

model Kyrylov2005_HPAaxis()
  // This a model from the article:
  // Modeling robust oscillatory behavior of the hypothalamic-pituitary-adrenal axis.
  // Kyrylov V, Severyanova LA, Vieira A. IEEE Trans Biomed Eng. 2005 Dec;52(12):1977-83. 16366221 ,
  // Abstract:
  // A mathematical model of the hypothalamic-pituitary-adrenal (HPA) axis of the human endocrine system is proposed. This new model provides an improvement over previous models by introducing two nonlinear factors with physiological relevance: 1) a limit to gland size; 2) rejection of negative hormone concentrations. The result is that the new model is by far the most robust; e.g., it can tolerate at least -50% and +100% perturbations to any of its parameters. This high degree of robustness allows one, for the first time, to model features of the system such as circadian rhythm and response to hormone injections. In addition, relative to its closest predecessor, the model is simpler; it contains only about half of the parameters, and yet achieves more functions. The new model provides opportunities for teaching endocrinology within a biological or medical school context; it may also have applications in modeling and studying HPA axis disorders, for example, related to gland size dynamics, abnormal hormone levels, or stress influences.
  // This model was taken from the CellML repository and automatically converted to SBML.
  // The original model was: Kyrylov V, Severyanova LA, Vieira A. (2005) - version02
  // The original CellML model was created by:
  // Lloyd, Catherine, May
  // c.lloyd@aukland.ac.nz
  // The University of Auckland
  // The Bioengineering Institute
  // This model originates from BioModels Database: A Database of Annotated Published Models (http://www.ebi.ac.uk/biomodels/). It is copyright (c) 2005-2011 The BioModels.net Team.
  // To the extent possible under law, all copyright and related or neighbouring rights to this encoded model have been dedicated to the public domain worldwide. Please refer to CC0 Public Domain Dedication for more information.
  // In summary, you are entitled to use this encoded model in absolutely any manner you deem suitable, verbatim, or with modification, alone or embedded it in a larger context, redistribute it, commercially or not, in a restricted way or not..
  // To cite BioModels Database, please use: Li C, Donizelli M, Rodriguez N, Dharuri H, Endler L, Chelliah V, Li L, He E, Henry A, Stefan MI, Snoep JL, Hucka M, Le Novère N, Laibe C (2010) BioModels Database: An enhanced, curated and annotated resource for published quantitative kinetic models. BMC Syst Biol., 4:92.
  // biomodels.db:MODEL0478740924
  // isDescribedBy pubmed:16366221
  // biomodels.db:MODEL0478740924
  // isDescribedBy pubmed:16366221
  // biomodels.db:MODEL0478740924
  // biomodels.db:MODEL0478740924

  // Compartments:
  compartment Compartment = 1 litre;

  // Parameters:
  y0 = 0.4 microg_l;
  g0 has microg_l_min;
  r0 has dimensionless;
  h0 has microg_l_min;
  S0 = 0.01 dimensionless;
  y1 = 1.4 microg_l;
  g1 has microg_l_min;
  r1 has dimensionless;
  h1 has microg_l_min;
  S1 = 0.01 dimensionless;
  y2 = 1.17 microg_l;
  g2 has microg_l_min;
  r2 has dimensionless;
  h2 has microg_l_min;
  S2 = 0.01 dimensionless;
  y3 = 0.95 microg_l;
  g3 has microg_l_min;
  r3 has dimensionless;
  h3 has microg_l_min;
  S3 = 0.01 dimensionless;
  y4 = 0.65 microg_l;
  g4 has microg_l_min;
  r4 has dimensionless;
  h4 has microg_l_min;
  S4 = 0.01 dimensionless;
  a00 = -0.00843 first_order_rate_constant;
  a02 = -0.44 first_order_rate_constant;
  a10 = 0.082 first_order_rate_constant;
  a11 = -0.004 first_order_rate_constant;
  a12 = -0.0668 first_order_rate_constant;
  a20 = 0 first_order_rate_constant;
  a21 = 0.031 first_order_rate_constant;
  a22 = -0.0957 first_order_rate_constant;
  a23 = 0.0576 first_order_rate_constant;
  a24 = 0.000325 first_order_rate_constant;
  a32 = 0.00869 first_order_rate_constant;
  a33 = -0.00857 first_order_rate_constant;
  a42 = 0.000139 first_order_rate_constant;
  a44 = -0.000143 first_order_rate_constant;
  c0 = 0.443 microg_l_min;
  e0 = 0 microg_l_min;
  e1 = 0 microg_l_min;
  e2 = 0 microg_l_min;
  epsilon = 0.5 microg_l;

  // Assignment rules:
  g0 := h0*r0;
  h0 := piecewise((a00*y0 + a02*y2)/(1 + (a00*y0 + a02*y2)/S0*(1 - exp(-((a00*y0 + a02*y2)/S0)))), a00*y0 + a02*y2 > 0, a00*y0 + a02*y2, a00*y0 + a02*y2 <= 0);
  r0 := piecewise(1 - exp(S0*y0^2/((a00*y0 + a02*y2)*(epsilon - y0)^2)), (y0 < epsilon) && (a00*y0 + a02*y2 < 0), 1);
  g1 := h1*r1;
  h1 := piecewise((a10*y0 + a11*y1 + a12*y2)/(1 + (a10*y0 + a11*y1 + a12*y2)/S1*(1 - exp(-((a10*y0 + a11*y1 + a12*y2)/S1)))), a10*y0 + a11*y1 + a12*y2 > 0, a10*y0 + a11*y1 + a12*y2, a10*y0 + a11*y1 + a12*y2 <= 0);
  r1 := piecewise(1 - exp(S1*y1^2/((a10*y0 + a11*y1 + a12*y2)*(epsilon - y1)^2)), (y1 < epsilon) && (a10*y0 + a11*y1 + a12*y2 < 0), 1);
  g2 := h2*r2;
  h2 := piecewise((a20*y0 + a21*y1 + a22*y2 + a23*y3 + a24*y4)/(1 + (a20*y0 + a21*y1 + a22*y2 + a23*y3 + a24*y4)/S2*(1 - exp(-((a20*y0 + a21*y1 + a22*y2 + a23*y3 + a24*y4)/S2)))), a20*y0 + a21*y1 + a22*y2 + a23*y3 + a24*y4 > 0, a20*y0 + a21*y1 + a22*y2 + a23*y3 + a24*y4, a20*y0 + a21*y1 + a22*y2 + a23*y3 + a24*y4 <= 0);
  r2 := piecewise(1 - exp(S2*y2^2/((a20*y0 + a21*y1 + a22*y2 + a23*y3 + a24*y4)*(epsilon - y2)^2)), (y2 < epsilon) && (a20*y0 + a21*y1 + a22*y2 + a23*y3 + a24*y4 < 0), 1);
  g3 := h3*r3;
  h3 := piecewise((a32*y2 + a33*y3)/(1 + (a32*y2 + a33*y3)/S3*(1 - exp(-((a32*y2 + a33*y3)/S3)))), a32*y2 + a33*y3 > 0, a32*y2 + a33*y3, a32*y2 + a33*y3 <= 0);
  r3 := piecewise(1 - exp(S3*y3^2/((a32*y2 + a33*y3)*(epsilon - y3)^2)), (y3 < epsilon) && (a32*y2 + a33*y3 < 0), 1);
  g4 := h4*r4;
  h4 := piecewise((a42*y2 + a44*y4)/(1 + (a42*y2 + a44*y4)/S4*(1 - exp(-((a42*y2 + a44*y4)/S4)))), a42*y2 + a44*y4 > 0, a42*y2 + a44*y4, a42*y2 + a44*y4 <= 0);
  r4 := piecewise(1 - exp(S4*y4^2/((a42*y2 + a44*y4)*(epsilon - y4)^2)), (y4 < epsilon) && (a42*y2 + a44*y4 < 0), 1);

  // Rate rules:
  y0' = g0 + c0 + e0;
  y1' = g1 + e1;
  y2' = g2 + e2;
  y3' = g3;
  y4' = g4;

  // Unit definitions:
  unit minute = 60 second;
  unit hour = 3600 second;
  unit microg_l = 1e-6 gram / litre;
  unit microg_l_min = 1e-6 gram / (litre * 60 second);
  unit first_order_rate_constant = 1 / (60 second);
  unit time = 60 second; time is "minute";
end
