// SBML level 2 version 3

model Leloup2004_CircadianRhythms()
  // This a model from the article:
  // Modeling the mammalian circadian clock: sensitivity analysis and multiplicity of oscillatory mechanisms.
  // Leloup JC, Goldbeter A. J Theor Biol. 2004 Oct 21;230(4):541-62. 15363675 ,
  // Abstract:
  // We extend the study of a computational model recently proposed for the mammalian circadian clock (Proc. Natl Acad. Sci. USA 100 (2003) 7051). The model, based on the intertwined positive and negative regulatory loops involving the Per, Cry, Bmal1, and Clock genes, can give rise to sustained circadian oscillations in conditions of continuous darkness. These limit cycle oscillations correspond to circadian rhythms autonomously generated by suprachiasmatic nuclei and by some peripheral tissues. By using different sets of parameter values producing circadian oscillations, we compare the effect of the various parameters and show that both the occurrence and the period of the oscillations are generally most sensitive to parameters related to synthesis or degradation of Bmal1 mRNA and BMAL1 protein. The mechanism of circadian oscillations relies on the formation of an inactive complex between PER and CRY and the activators CLOCK and BMAL1 that enhance Per and Cry expression. Bifurcation diagrams and computer simulations nevertheless indicate the possible existence of a second source of oscillatory behavior. Thus, sustained oscillations might arise from the sole negative autoregulation of Bmal1 expression. This second oscillatory mechanism may not be functional in physiological conditions, and its period need not necessarily be circadian. When incorporating the light-induced expression of the Per gene, the model accounts for entrainment of the oscillations by light-dark (LD) cycles. Long-term suppression of circadian oscillations by a single light pulse can occur in the model when a stable steady state coexists with a stable limit cycle. The phase of the oscillations upon entrainment in LD critically depends on the parameters that govern the level of CRY protein. Small changes in the parameters governing CRY levels can shift the peak in Per mRNA from the L to the D phase, or can prevent entrainment. The results are discussed in relation to physiological disorders of the sleep-wake cycle linked to perturbations of the human circadian clock, such as the familial advanced sleep phase syndrome or the non-24h sleep-wake syndrome.
  // This model was taken from the CellML repository and automatically converted to SBML.
  // The original model was: Leloup JC, Goldbeter A. (2004) - version02
  // The original CellML model was created by:
  // Lloyd, Catherine, May
  // c.lloyd@aukland.ac.nz
  // The University of Auckland
  // The Bioengineering Institute
  // This model originates from BioModels Database: A Database of Annotated Published Models (http://www.ebi.ac.uk/biomodels/). It is copyright (c) 2005-2011 The BioModels.net Team.
  // To the extent possible under law, all copyright and related or neighbouring rights to this encoded model have been dedicated to the public domain worldwide. Please refer to CC0 Public Domain Dedication for more information.
  // In summary, you are entitled to use this encoded model in absolutely any manner you deem suitable, verbatim, or with modification, alone or embedded it in a larger context, redistribute it, commercially or not, in a restricted way or not..
  // To cite BioModels Database, please use: Li C, Donizelli M, Rodriguez N, Dharuri H, Endler L, Chelliah V, Li L, He E, Henry A, Stefan MI, Snoep JL, Hucka M, Le Novère N, Laibe C (2010) BioModels Database: An enhanced, curated and annotated resource for published quantitative kinetic models. BMC Syst Biol., 4:92.
  // biomodels.db:MODEL0478895291
  // isDescribedBy pubmed:15363675
  // biomodels.db:MODEL0478895291
  // isDescribedBy pubmed:15363675
  // biomodels.db:MODEL0478895291
  // biomodels.db:MODEL0478895291

  // Compartments:
  compartment Compartment = 1 litre;

  // Parameters:
  MP has nanomolar;
  vsP has flux;
  vmP = 1.1 flux;
  kdmp = 0.01 first_order_rate_constant;
  KAP = 0.7 nanomolar;
  KmP = 0.3 nanomolar;
  MC has nanomolar;
  vsC has flux;
  vmC = 1 flux;
  kdmc = 0.01 first_order_rate_constant;
  KAC = 1 nanomolar;
  KmC = 0.4 nanomolar;
  MB has nanomolar;
  vsB has flux;
  vmB = 0.2 flux;
  kdmb = 0.01 first_order_rate_constant;
  KIB = 0.8 nanomolar;
  KmB = 0.4 nanomolar;
  PC has nanomolar;
  CC has nanomolar;
  PCP has nanomolar;
  CCP has nanomolar;
  PCC has nanomolar;
  PCN has nanomolar;
  PCCP has nanomolar;
  PCNP has nanomolar;
  BC has nanomolar;
  BCP has nanomolar;
  BN has nanomolar;
  BNP has nanomolar;
  IN has nanomolar;
  k1 = 0.8 first_order_rate_constant;
  k2 = 0.2 first_order_rate_constant;
  k3 = 0.8 second_order_rate_constant;
  k4 = 0.2 first_order_rate_constant;
  k5 = 0.4 first_order_rate_constant;
  k6 = 0.2 first_order_rate_constant;
  k7 = 0.5 second_order_rate_constant;
  k8 = 0.1 first_order_rate_constant;
  kdnc = 0.01 first_order_rate_constant;
  kdn = 0.01 first_order_rate_constant;
  kstot = 1 first_order_rate_constant;
  ksB has first_order_rate_constant;
  ksC has first_order_rate_constant;
  ksP has first_order_rate_constant;
  m = 4 dimensionless;
  n = 4 dimensionless;
  vstot = 1 flux;
  Kd = 0.3 nanomolar;
  Kdp = 0.3 nanomolar;
  Kp = 0.1 nanomolar;
  Vphos = 0.6 flux;
  V1B = 1 flux;
  V1C = 0.6 flux;
  V1P has flux;
  V1PC has flux;
  V2B = 0.1 flux;
  V2C = 0.1 flux;
  V2P = 0.3 flux;
  V2PC = 0.1 flux;
  V3B = 1 flux;
  V3PC has flux;
  V4B = 0.2 flux;
  V4PC = 0.1 flux;
  vdBC = 1 flux;
  vdBN = 0.5 flux;
  vdCC = 0.7 flux;
  vdIN = 0.8 flux;
  vdPC = 0.7 flux;
  vdPCC = 1 flux;
  vdPCN = 1 flux;

  // Assignment rules:
  vsP := vstot;
  vsC := 0.8*vstot;
  vsB := 0.7*vstot;
  ksB := kstot;
  ksC := kstot;
  ksP := 0.5*kstot;
  V1P := Vphos;
  V1PC := Vphos;
  V3PC := Vphos;

  // Rate rules:
  MP' = vsP*(BN^n/(KAP^n + BN^n)) - (vmP*(MP/(KmP + MP)) + kdmp*MP);
  MC' = vsC*(BN^n/(KAC^n + BN^n)) - (vmC*(MC/(KmC + MC)) + kdmc*MC);
  MB' = vsB*(KIB^m/(KIB^m + BN^m)) - (vmB*(MB/(KmB + MB)) + kdmb*MB);
  PC' = ksP*MP + V2P*(PCP/(Kdp + PCP)) + k4*PCC - (V1P*(PC/(Kp + PC)) + k3*PC*CC + kdn*PC);
  CC' = ksC*MC + V2C*(CCP/(Kdp + CCP)) + k4*PCC - (V1C*(CC/(Kp + CC)) + k3*PC*CC + kdnc*CC);
  PCP' = V1P*(PC/(Kp + PC)) - (V2P*(PCP/(Kdp + PCP)) + vdPC*(PCP/(Kd + PCP)) + kdn*PCP);
  CCP' = V1C*(CC/(Kp + CC)) - (V2C*(CCP/(Kdp + CCP)) + vdCC*(CCP/(Kd + CCP)) + kdn*CCP);
  PCC' = V2PC*(PCCP/(Kdp + PCCP)) + k3*PC*CC + k2*PCN - (V1PC*(PCC/(Kp + PCC)) + k4*PCC + k1*PCC + kdn*PCC);
  PCN' = V4PC*(PCNP/(Kdp + PCNP)) + k1*PCC + k8*IN - (V3PC*(PCN/(Kp + PCN)) + k2*PCN + k7*BN*PCN + kdn*PCN);
  PCCP' = V1PC*(PCC/(Kp + PCC)) - (V2PC*(PCCP/(Kdp + PCCP)) + vdPCC*(PCCP/(Kd + PCCP)) + kdn*PCCP);
  PCNP' = V3PC*(PCN/(Kp + PCN)) - (V4PC*(PCNP/(Kdp + PCNP)) + vdPCN*(PCNP/(Kd + PCNP)) + kdn*PCNP);
  BC' = V2B*(BCP/(Kdp + BCP)) + k6*BN + ksB*MB - (V1B*(BC/(Kp + BC)) + k5*BC + kdn*BC);
  BCP' = V1B*(BC/(Kp + BC)) - (V2B*(BCP/(Kdp + BCP)) + vdBC*(BCP/(Kd + BCP)) + kdn*BCP);
  BN' = V4B*(BNP/(Kdp + BNP)) + k5*BC + k8*IN - (V3B*(BN/(Kp + BN)) + k6*BN + k7*BN*PCN + kdn*BN);
  BNP' = V3B*(BN/(Kp + BN)) - (V4B*(BNP/(Kdp + BNP)) + vdBN*(BNP/(Kd + BNP)) + kdn*BNP);
  IN' = k7*BN*PCN - (k8*IN + vdIN*(IN/(Kd + IN)) + kdn*IN);

  // Unit definitions:
  unit hour = 3600 second;
  unit nanomolar = 1e-9 mole / litre;
  unit flux = 1e-9 mole / (litre * 3600 second);
  unit first_order_rate_constant = 1 / (3600 second);
  unit second_order_rate_constant = litre / (1e-9 mole * 3600 second);
  unit time = 3600 second;
end
