// SBML level 2 version 3

model Luo1991_VentricularCardiacAction()
  // This a model from the article:
  // A model of the ventricular cardiac action potential. Depolarization, repolarization, and their interaction.
  // Luo CH, Rudy Y. Circ Res. 1991 Jun;68(6):1501-26. 1709839 ,
  // Abstract:
  // A mathematical model of the membrane action potential of the mammalian ventricular cell is introduced. The model is based, whenever possible, on recent single-cell and single-channel data and incorporates the possibility of changing extracellular potassium concentration [K]o. The fast sodium current, INa, is characterized by fast upstroke velocity (Vmax = 400 V/sec) and slow recovery from inactivation. The time-independent potassium current, IK1, includes a negative-slope phase and displays significant crossover phenomenon as [K]o is varied. The time-dependent potassium current, IK, shows only a minimal degree of crossover. A novel potassium current that activates at plateau potentials is included in the model. The simulated action potential duplicates the experimentally observed effects of changes in [K]o on action potential duration and rest potential. Physiological simulations focus on the interaction between depolarization and repolarization (i.e., premature stimulation). Results demonstrate the importance of the slow recovery of INa in determining the response of the cell. Simulated responses to periodic stimulation include monotonic Wenckebach patterns and alternans at normal [K]o, whereas at low [K]o nonmonotonic Wenckebach periodicities, aperiodic patterns, and enhanced supernormal excitability that results in unstable responses ("chaotic activity") are observed. The results are consistent with recent experimental observations, and the model simulations relate these phenomena to the underlying ionic channel kinetics.
  // This model was taken from the CellML repository and automatically converted to SBML.
  // The original model was: Luo CH, Rudy Y. (1991) - version06
  // The original CellML model was created by:
  // Lloyd, Catherine, May
  // c.lloyd@aukland.ac.nz
  // The University of Auckland
  // The Bioengineering Institute
  // This model originates from BioModels Database: A Database of Annotated Published Models (http://www.ebi.ac.uk/biomodels/). It is copyright (c) 2005-2011 The BioModels.net Team.
  // To the extent possible under law, all copyright and related or neighbouring rights to this encoded model have been dedicated to the public domain worldwide. Please refer to CC0 Public Domain Dedication for more information.
  // In summary, you are entitled to use this encoded model in absolutely any manner you deem suitable, verbatim, or with modification, alone or embedded it in a larger context, redistribute it, commercially or not, in a restricted way or not..
  // To cite BioModels Database, please use: Li C, Donizelli M, Rodriguez N, Dharuri H, Endler L, Chelliah V, Li L, He E, Henry A, Stefan MI, Snoep JL, Hucka M, Le Novère N, Laibe C (2010) BioModels Database: An enhanced, curated and annotated resource for published quantitative kinetic models. BMC Syst Biol., 4:92.
  // biomodels.db:MODEL0479527919
  // isDescribedBy pubmed:1709839
  // biomodels.db:MODEL0479527919
  // isDescribedBy pubmed:1709839
  // biomodels.db:MODEL0479527919
  // biomodels.db:MODEL0479527919

  // Compartments:
  compartment Compartment = 1 litre;

  // Parameters:
  V_membrane = -83.853 millivolt;
  R = 8314 joule_per_kilomole_kelvin;
  T = 310 kelvin;
  F = 9.64846e4 coulomb_per_mole;
  C = 1 microF_per_cm2;
  I_stim has microA_per_cm2;
  stim_start = 100 millisecond;
  stim_end = 1e11 millisecond;
  stim_period = 1000 millisecond;
  stim_duration = 2 millisecond;
  stim_amplitude = -25.5 microA_per_cm2;
  i_Na has microA_per_cm2;
  g_Na = 23 milliS_per_cm2;
  E_Na has millivolt;
  m = 0.00187018 dimensionless;
  alpha_m has per_millisecond;
  beta_m has per_millisecond;
  V_fast_sodium_current_m_gate has millivolt;
  time_fast_sodium_current_m_gate has millisecond;
  h = 0.9804713 dimensionless;
  alpha_h has per_millisecond;
  beta_h has per_millisecond;
  V_fast_sodium_current_h_gate has millivolt;
  time_fast_sodium_current_h_gate has millisecond;
  j = 0.98767124 dimensionless;
  alpha_j has per_millisecond;
  beta_j has per_millisecond;
  V_fast_sodium_current_j_gate has millivolt;
  time_fast_sodium_current_j_gate has millisecond;
  i_si has microA_per_cm2;
  E_si has millivolt;
  d = 0.00316354 dimensionless;
  alpha_d has per_millisecond;
  beta_d has per_millisecond;
  V_slow_inward_current_d_gate has millivolt;
  time_slow_inward_current_d_gate has millisecond;
  f = 0.99427859 dimensionless;
  alpha_f has per_millisecond;
  beta_f has per_millisecond;
  V_slow_inward_current_f_gate has millivolt;
  time_slow_inward_current_f_gate has millisecond;
  i_K has microA_per_cm2;
  g_K has milliS_per_cm2;
  E_K has millivolt;
  PR_NaK = 0.01833 dimensionless;
  X = 0.16647703 dimensionless;
  alpha_X has per_millisecond;
  beta_X has per_millisecond;
  V_time_dependent_potassium_current_X_gate has millivolt;
  time_time_dependent_potassium_current_X_gate has millisecond;
  Xi has dimensionless;
  V_time_dependent_potassium_current_Xi_gate has millivolt;
  time_time_dependent_potassium_current_Xi_gate has millisecond;
  i_K1 has microA_per_cm2;
  E_K1 has millivolt;
  g_K1 has milliS_per_cm2;
  K1_infinity has dimensionless;
  alpha_K1 has per_millisecond;
  beta_K1 has per_millisecond;
  V_time_independent_potassium_current_K1_gate has millivolt;
  i_Kp has microA_per_cm2;
  E_Kp has millivolt;
  g_Kp = 0.0183 milliS_per_cm2;
  Kp has dimensionless;
  i_b has microA_per_cm2;
  E_b = -59.87 millivolt;
  g_b = 0.03921 milliS_per_cm2;
  Nao = 140 millimolar;
  Nai = 18 millimolar;
  Ki = 145 millimolar;
  Ko = 5.4 millimolar;
  Cai = 0.0002 millimolar;

  // Assignment rules:
  I_stim := piecewise(stim_amplitude, (time >= stim_start) && (time <= stim_end) && (time - stim_start - floor((time - stim_start)/stim_period)*stim_period <= stim_duration), 0);
  E_Na := R*T/F*ln(Nao/Nai);
  i_Na := g_Na*m^3*h*j*(V_membrane - E_Na);
  alpha_m := 0.32*(V_fast_sodium_current_m_gate + 47.13)/(1 - exp(-0.1*(V_fast_sodium_current_m_gate + 47.13)));
  beta_m := 0.08*exp(-V_fast_sodium_current_m_gate/11);
  alpha_h := piecewise(0.135*exp((80 + V_fast_sodium_current_h_gate)/(-6.8)), 40 + V_fast_sodium_current_h_gate < 0, 0);
  beta_h := piecewise(3.56*exp(0.079*V_fast_sodium_current_h_gate) + 310000*exp(0.35*V_fast_sodium_current_h_gate), 40 + V_fast_sodium_current_h_gate < 0, 1/(0.13*(1 + exp((V_fast_sodium_current_h_gate + 10.66)/(-11.1)))));
  alpha_j := piecewise((-127140*exp(0.2444*V_fast_sodium_current_j_gate) - 3.474e-5*exp(-0.04391*V_fast_sodium_current_j_gate))*(V_fast_sodium_current_j_gate + 37.78)/(1 + exp(0.311*(V_fast_sodium_current_j_gate + 79.23))), 40 + V_fast_sodium_current_j_gate < 0, 0);
  beta_j := piecewise(0.1212*exp(-0.01052*V_fast_sodium_current_j_gate)/(1 + exp(-0.1378*(V_fast_sodium_current_j_gate + 40.14))), 40 + V_fast_sodium_current_j_gate < 0, 0.3*exp(-2.535e-7*V_fast_sodium_current_j_gate)/(1 + exp(-0.1*(V_fast_sodium_current_j_gate + 32))));
  E_si := 7.7 - 13.0287*ln(Cai/1);
  i_si := 0.09*d*f*(V_membrane - E_si);
  alpha_d := 0.095*exp(-0.01*(V_slow_inward_current_d_gate - 5))/(1 + exp(-0.072*(V_slow_inward_current_d_gate - 5)));
  beta_d := 0.07*exp(-0.017*(V_slow_inward_current_d_gate + 44))/(1 + exp(0.05*(V_slow_inward_current_d_gate + 44)));
  alpha_f := 0.012*exp(-0.008*(V_slow_inward_current_f_gate + 28))/(1 + exp(0.15*(V_slow_inward_current_f_gate + 28)));
  beta_f := 0.0065*exp(-0.02*(V_slow_inward_current_f_gate + 30))/(1 + exp(-0.2*(V_slow_inward_current_f_gate + 30)));
  g_K := 0.282*sqrt(Ko/5.4);
  E_K := R*T/F*ln((Ko + PR_NaK*Nao)/(Ki + PR_NaK*Nai));
  i_K := g_K*X*Xi*(V_membrane - E_K);
  alpha_X := 0.0005*exp(0.083*(V_time_dependent_potassium_current_X_gate + 50))/(1 + exp(0.057*(V_time_dependent_potassium_current_X_gate + 50)));
  beta_X := 0.0013*exp(-0.06*(V_time_dependent_potassium_current_X_gate + 20))/(1 + exp(-0.04*(V_time_dependent_potassium_current_X_gate + 20)));
  Xi := piecewise(2.837*(exp(0.04*(V_time_dependent_potassium_current_Xi_gate + 77)) - 1)/((V_time_dependent_potassium_current_Xi_gate + 77)*exp(0.04*(V_time_dependent_potassium_current_Xi_gate + 35))), 100 + V_time_dependent_potassium_current_Xi_gate > 0, 1);
  g_K1 := 0.6047*sqrt(Ko/5.4);
  E_K1 := R*T/F*ln(Ko/Ki);
  i_K1 := g_K1*K1_infinity*(V_membrane - E_K1);
  alpha_K1 := 1.02/(1 + exp(0.2385*(V_time_independent_potassium_current_K1_gate - E_K1 - 59.215)));
  beta_K1 := (0.49124*exp(0.08032*(V_time_independent_potassium_current_K1_gate + 5.476 - E_K1)) + 1*exp(0.06175*(V_time_independent_potassium_current_K1_gate - (E_K1 + 594.31))))/(1 + exp(-0.5143*(V_time_independent_potassium_current_K1_gate - E_K1 + 4.753)));
  K1_infinity := alpha_K1/(alpha_K1 + beta_K1);
  E_Kp := E_K1;
  Kp := 1/(1 + exp((7.488 - V_membrane)/5.98));
  i_Kp := g_Kp*Kp*(V_membrane - E_Kp);
  i_b := g_b*(V_membrane - E_b);

  // Rate rules:
  V_membrane' = -1/C*(I_stim + i_Na + i_si + i_K + i_K1 + i_Kp + i_b);
  m' = alpha_m*(1 - m) - beta_m*m;
  h' = alpha_h*(1 - h) - beta_h*h;
  j' = alpha_j*(1 - j) - beta_j*j;
  d' = alpha_d*(1 - d) - beta_d*d;
  f' = alpha_f*(1 - f) - beta_f*f;
  X' = alpha_X*(1 - X) - beta_X*X;
  Cai' = -0.0001/1*i_si + 0.07*(0.0001 - Cai);

  // Unit definitions:
  unit millisecond = 1e-3 second;
  unit per_millisecond = 1 / (1e-3 second);
  unit millivolt = 1e-3 volt;
  unit per_millivolt = 1 / (1e-3 volt);
  unit per_millivolt_millisecond = 1 / (1e-3 volt * 1e-3 second);
  unit per_1000_centimetre = 1 / (10 metre);
  unit milliS_per_cm2 = 1e-3 siemens / (0.01 metre)^2;
  unit microF_per_cm2 = 1e-6 farad / (0.01 metre)^2;
  unit microA_per_cm2 = 1e-6 ampere / (0.01 metre)^2;
  unit millimolar = 1e-3 mole / litre;
  unit joule_per_kilomole_kelvin = joule / (1000 mole * kelvin);
  unit coulomb_per_mole = coulomb / mole;
  unit time = 1e-3 second;
end
