// SBML level 2 version 3

model Lenbury1991_CortisolSecretionSystem()
  // This a model from the article:
  // Modelling fluctuation phenomena in the plasma cortisol secretion system in normal man.
  // Lenbury Y, Pacheenburawana P. Biosystems. 1991;26(2):117-25. 1668715 ,
  // Abstract:
  // A system of three non-linear differential equations with exponential feedback terms is proposed to model the self-regulating cortisol secretion system and explain the fluctuation patterns observed in clinical data. It is shown that the model exhibits bifurcation and chaos patterns for a certain range of parametric values. This helps us to explain clinical observations and characterize different dynamic behaviors of the self-regulative system.
  // This model was taken from the CellML repository and automatically converted to SBML.
  // The original model was: Lenbury Y, Pacheenburawana P. (1991) - version02
  // The original CellML model was created by:
  // Lloyd, Catherine, May
  // c.lloyd@aukland.ac.nz
  // The University of Auckland
  // The Bioengineering Institute
  // This model originates from BioModels Database: A Database of Annotated Published Models (http://www.ebi.ac.uk/biomodels/). It is copyright (c) 2005-2011 The BioModels.net Team.
  // To the extent possible under law, all copyright and related or neighbouring rights to this encoded model have been dedicated to the public domain worldwide. Please refer to CC0 Public Domain Dedication for more information.
  // In summary, you are entitled to use this encoded model in absolutely any manner you deem suitable, verbatim, or with modification, alone or embedded it in a larger context, redistribute it, commercially or not, in a restricted way or not..
  // To cite BioModels Database, please use: Li C, Donizelli M, Rodriguez N, Dharuri H, Endler L, Chelliah V, Li L, He E, Henry A, Stefan MI, Snoep JL, Hucka M, Le Novère N, Laibe C (2010) BioModels Database: An enhanced, curated and annotated resource for published quantitative kinetic models. BMC Syst Biol., 4:92.
  // biomodels.db:MODEL0479926177
  // isDescribedBy pubmed:1668715
  // biomodels.db:MODEL0479926177
  // isDescribedBy pubmed:1668715
  // biomodels.db:MODEL0479926177
  // biomodels.db:MODEL0479926177

  // Compartments:
  compartment Compartment = 1;

  // Parameters:
  alpha = 0.5;
  D = 0.8228;
  a = 8.1252;
  y has substance;
  x has substance;
  beta = 0.38;
  z has substance;
  gamma = 0.6;
  omega = 2;
  b = 1.091;

  // Assignment rules:
  u := cos(omega*time);

  // Rate rules:
  x' = alpha*exp(a*(1 - z^2) + b*(1 - y^2)) + D*u - alpha*x;
  y' = beta*x*exp(b*(1 - z^2)) - beta*y;
  z' = gamma*y - gamma*z;

  // Unit definitions:
  unit substance = dimensionless; substance is "normalised_substance";
  unit time = dimensionless; time is "dimensionless_time";
  unit per_time = 1 / dimensionless;
end
