// SBML level 2 version 3

model Chen2007_NeuronalEndothelialNOS()
  // This a model from the article:
  // Vascular and perivascular nitric oxide release and transport: biochemical pathways of neuronal nitric oxide synthase (NOS1) and endothelial nitric oxide synthase (NOS3).
  // Chen K, Popel AS Free Radic Biol Med. 2007 Mar 15;42(6):811-22. 17320763 ,
  // Abstract:
  // Nitric oxide (NO) derived from nitric oxide synthase (NOS) is an important paracrine effector that maintains vascular tone. The release of NO mediated by NOS isozymes under various O(2) conditions critically determines the NO bioavailability in tissues. Because of experimental difficulties, there has been no direct information on how enzymatic NO production and distribution change around arterioles under various oxygen conditions. In this study, we used computational models based on the analysis of biochemical pathways of enzymatic NO synthesis and the availability of NOS isozymes to quantify the NO production by neuronal NOS (NOS1) and endothelial NOS (NOS3). We compared the catalytic activities of NOS1 and NOS3 and their sensitivities to the concentration of substrate O(2). Based on the NO release rates predicted from kinetic models, the geometric distribution of NO sources, and mass balance analysis, we predicted the NO concentration profiles around an arteriole under various O(2) conditions. The results indicated that NOS1-catalyzed NO production was significantly more sensitive to ambient O(2) concentration than that catalyzed by NOS3. Also, the high sensitivity of NOS1 catalytic activity to O(2) was associated with significantly reduced NO production and therefore NO concentrations, upon hypoxia. Moreover, the major source determining the distribution of NO was NOS1, which was abundantly expressed in the nerve fibers and mast cells close to arterioles, rather than NOS3, which was expressed in the endothelium. Finally, the perivascular NO concentration predicted by the models under conditions of normoxia was paradoxically at least an order of magnitude lower than a number of experimental measurements, suggesting a higher abundance of NOS1 or NOS3 and/or the existence of other enzymatic or nonenzymatic sources of NO in the microvasculature.
  // This model was taken from the CellML repository and automatically converted to SBML.
  // The original model was: Chen K, Popel AS (2007) - version02
  // The original CellML model was created by:
  // Lloyd, Catherine, May
  // c.lloyd@aukland.ac.nz
  // The University of Auckland
  // The Bioengineering Institute
  // This model originates from BioModels Database: A Database of Annotated Published Models (http://www.ebi.ac.uk/biomodels/). It is copyright (c) 2005-2011 The BioModels.net Team.
  // To the extent possible under law, all copyright and related or neighbouring rights to this encoded model have been dedicated to the public domain worldwide. Please refer to CC0 Public Domain Dedication for more information.
  // In summary, you are entitled to use this encoded model in absolutely any manner you deem suitable, verbatim, or with modification, alone or embedded it in a larger context, redistribute it, commercially or not, in a restricted way or not..
  // To cite BioModels Database, please use: Li C, Donizelli M, Rodriguez N, Dharuri H, Endler L, Chelliah V, Li L, He E, Henry A, Stefan MI, Snoep JL, Hucka M, Le Novère N, Laibe C (2010) BioModels Database: An enhanced, curated and annotated resource for published quantitative kinetic models. BMC Syst Biol., 4:92.
  // biomodels.db:MODEL0491251823
  // isDescribedBy pubmed:17320763
  // biomodels.db:MODEL0491251823
  // isDescribedBy pubmed:17320763
  // biomodels.db:MODEL0491251823
  // biomodels.db:MODEL0491251823

  // Compartments:
  compartment Compartment = 1 litre;

  // Parameters:
  Fe3 = 0.3 micromolar;
  Fe3_Arg = 0 micromolar;
  Fe2 = 0 micromolar;
  Fe2_Arg = 0 micromolar;
  Fe3_O2_Arg = 0 micromolar;
  Fe3_NOHA = 0 micromolar;
  Fe2_NOHA = 0 micromolar;
  Fe3_O2_NOHA = 0 micromolar;
  Fe3_NO = 0 micromolar;
  Fe2_NO = 0 micromolar;
  NO = 0 micromolar;
  dNOdt has micromolar_per_second;
  citrulline = 0 micromolar;
  NO3 = 0 micromolar;
  NOHA = 0 micromolar;
  O2 = 100 micromolar;
  Arg = 100 micromolar;
  k1 = 6.6 second_order_rate_constant;
  k_1 = 6.6 first_order_rate_constant;
  k2 = 20.8 first_order_rate_constant;
  k3 = 20.8 first_order_rate_constant;
  k4 = 6.6 second_order_rate_constant;
  k_4 = 6.6 first_order_rate_constant;
  k5 = 8.5 second_order_rate_constant;
  k_5 = 215.6 first_order_rate_constant;
  k6 = 175.6 first_order_rate_constant;
  k7 = 20.8 first_order_rate_constant;
  k8 = 13.2 second_order_rate_constant;
  k_8 = 13.2 first_order_rate_constant;
  k9 = 8.6 second_order_rate_constant;
  k_9 = 399.2 first_order_rate_constant;
  k10 = 39.1 first_order_rate_constant;
  k11 = 20.8 first_order_rate_constant;
  k12 = 0.01 second_order_rate_constant;
  k13 = 39.9 first_order_rate_constant;

  // Assignment rules:
  dNOdt := k13*Fe3_NO;

  // Rate rules:
  Fe3' = k_1*Fe3_Arg + k13*Fe3_NO + k12*Fe2_NO*O2 - (k1*Arg*Fe3 + k2*Fe3);
  Fe3_Arg' = k1*Fe3*Arg - (k_1*Fe3_Arg + k3*Fe3_Arg);
  Fe2' = k2*Fe3 + k_4*Fe2_Arg - k4*Fe2*Arg;
  Fe2_Arg' = k3*Fe3_Arg + k_5*Fe3_O2_Arg + k4*Fe2*Arg - (k5*Fe2_Arg*O2 + k_4*Fe2_Arg);
  Fe3_O2_Arg' = k5*Fe2_Arg*O2 - (k6*Fe3_O2_Arg + k_5*Fe3_O2_Arg);
  Fe3_NOHA' = k6*Fe3_O2_Arg - k7*Fe3_NOHA;
  Fe2_NOHA' = k7*Fe3_NOHA + k_9*Fe3_O2_NOHA + k8*Fe2*NOHA - (k_8*Fe2_NOHA + k9*Fe2_NOHA*O2);
  Fe3_O2_NOHA' = k9*Fe2_NOHA*O2 - (k10*Fe3_O2_NOHA + k_9*Fe3_O2_NOHA);
  Fe3_NO' = k10*Fe3_O2_NOHA - (k13*Fe3_NO + k11*Fe3_NO);
  Fe2_NO' = k11*Fe3_NO - k12*Fe2_NO*O2;
  NO' = k13*Fe3_NO;
  citrulline' = k10*Fe3_O2_NOHA;
  NO3' = k12*Fe2_NO*O2;
  NOHA' = k_8*Fe2_NOHA - k8*Fe2*NOHA;

  // Unit definitions:
  unit micromolar = 1e-6 mole / litre;
  unit first_order_rate_constant = 1 / second;
  unit second_order_rate_constant = litre / (second * 1e-6 mole);
  unit micromolar_per_second = 1e-6 mole / (litre * second);
end
