// SBML level 2 version 3

model Kurata2002_SinoatrialNode()
  // This a model from the article:
  // Dynamical description of sinoatrial node pacemaking: improved mathematical model for primary pacemaker cell.
  // Kurata Y, Hisatome I, Imanishi S, Shibamoto T. Am J Physiol Heart Circ Physiol 2002 Nov;283(5):H2074-101 12384487 ,
  // Abstract:
  // We developed an improved mathematical model for a single primary pacemaker cell of the rabbit sinoatrial node. Original features of our model include 1) incorporation of the sustained inward current (I(st)) recently identified in primary pacemaker cells, 2) reformulation of voltage- and Ca(2+)-dependent inactivation of the L-type Ca(2+) channel current (I(Ca,L)), 3) new expressions for activation kinetics of the rapidly activating delayed rectifier K(+) channel current (I(Kr)), and 4) incorporation of the subsarcolemmal space as a diffusion barrier for Ca(2+). We compared the simulated dynamics of our model with those of previous models, as well as with experimental data, and examined whether the models could accurately simulate the effects of modulating sarcolemmal ionic currents or intracellular Ca(2+) dynamics on pacemaker activity. Our model represents significant improvements over the previous models, because it can 1) simulate whole cell voltage-clamp data for I(Ca,L), I(Kr), and I(st); 2) reproduce the waveshapes of spontaneous action potentials and ionic currents during action potential clamp recordings; and 3) mimic the effects of channel blockers or Ca(2+) buffers on pacemaker activity more accurately than the previous models.
  // This model was taken from the CellML repository and automatically converted to SBML.
  // The original model was: Kurata Y, Hisatome I, Imanishi S, Shibamoto T. (2002) - version05
  // The original CellML model was created by:
  // Noble, Penny,
  // penny.noble@dpag.ox.ac.uk
  // The University of Oxford
  // This model originates from BioModels Database: A Database of Annotated Published Models (http://www.ebi.ac.uk/biomodels/). It is copyright (c) 2005-2011 The BioModels.net Team.
  // To the extent possible under law, all copyright and related or neighbouring rights to this encoded model have been dedicated to the public domain worldwide. Please refer to CC0 Public Domain Dedication for more information.
  // In summary, you are entitled to use this encoded model in absolutely any manner you deem suitable, verbatim, or with modification, alone or embedded it in a larger context, redistribute it, commercially or not, in a restricted way or not..
  // To cite BioModels Database, please use: Li C, Donizelli M, Rodriguez N, Dharuri H, Endler L, Chelliah V, Li L, He E, Henry A, Stefan MI, Snoep JL, Hucka M, Le Novère N, Laibe C (2010) BioModels Database: An enhanced, curated and annotated resource for published quantitative kinetic models. BMC Syst Biol., 4:92.
  // biomodels.db:MODEL0847712949
  // isDescribedBy pubmed:12384487
  // biomodels.db:MODEL0847712949
  // isDescribedBy pubmed:12384487
  // biomodels.db:MODEL0847712949
  // biomodels.db:MODEL0847712949

  // Compartments:
  compartment Compartment = 1 litre;

  // Parameters:
  V_membrane = -58.60029 millivolt;
  R = 8.3144e15 attojoule_per_millimole_kelvin;
  T = 310.15 kelvin;
  F = 9.6485e16 femtocoulomb_per_millimole;
  Cm = 32 picoF;
  E_Na has millivolt;
  E_K has millivolt;
  i_CaL has picoA;
  g_CaL = 0.58 nanoS;
  E_CaL = 45 millivolt;
  d_L_type_calcium_channel_current_d_gate = 0.000602055134 dimensionless;
  d_infinity_L_type_calcium_channel_current_d_gate has dimensionless;
  tau_d_L_type_calcium_channel_current_d_gate has millisecond;
  alpha_d has per_millisecond;
  beta_d has per_millisecond;
  V_L_type_calcium_channel_current_d_gate has millivolt;
  time_L_type_calcium_channel_current_d_gate has millisecond;
  f_L_type_calcium_channel_current_f_gate = 0.6269998 dimensionless;
  f_infinity_L_type_calcium_channel_current_f_gate has dimensionless;
  tau_f_L_type_calcium_channel_current_f_gate has millisecond;
  V_L_type_calcium_channel_current_f_gate has millivolt;
  time_L_type_calcium_channel_current_f_gate has millisecond;
  fCa = 0.5895804 dimensionless;
  alpha_fCa has per_millisecond;
  beta_fCa = 60 per_millimolar_millisecond;
  fCa_infinity has dimensionless;
  tau_fCa has millisecond;
  Km_fCa = 0.00035 millimolar;
  V_L_type_calcium_channel_current_fCa_gate has millivolt;
  Ca_sub_L_type_calcium_channel_current_fCa_gate has millimolar;
  time_L_type_calcium_channel_current_fCa_gate has millisecond;
  i_CaT has picoA;
  g_CaT = 0.458 nanoS;
  E_CaT = 45 millivolt;
  d_T_type_calcium_channel_current_d_gate = 0.004571885 dimensionless;
  d_infinity_T_type_calcium_channel_current_d_gate has dimensionless;
  tau_d_T_type_calcium_channel_current_d_gate has millisecond;
  V_T_type_calcium_channel_current_d_gate has millivolt;
  time_T_type_calcium_channel_current_d_gate has millisecond;
  f_T_type_calcium_channel_current_f_gate = 0.2496376 dimensionless;
  f_infinity_T_type_calcium_channel_current_f_gate has dimensionless;
  tau_f_T_type_calcium_channel_current_f_gate has millisecond;
  V_T_type_calcium_channel_current_f_gate has millivolt;
  time_T_type_calcium_channel_current_f_gate has millisecond;
  i_Kr has picoA;
  g_Kr has nanoS;
  paS = 0.6293231 dimensionless;
  paF = 0.3493634 dimensionless;
  pa_infinity has dimensionless;
  tau_paS has millisecond;
  tau_paF has millisecond;
  V_rapidly_activating_delayed_rectifier_potassium_current_pa_gate has millivolt;
  time_rapidly_activating_delayed_rectifier_potassium_current_pa_gate has millisecond;
  piy = 0.8523966 dimensionless;
  pi_infinity has dimensionless;
  tau_pi has millisecond;
  V_rapidly_activating_delayed_rectifier_potassium_current_pi_gate has millivolt;
  time_rapidly_activating_delayed_rectifier_potassium_current_pi_gate has millisecond;
  i_Ks has picoA;
  g_Ks = 0.0259 nanoS;
  E_Ks has millivolt;
  n = 0.05440972 dimensionless;
  n_infinity has dimensionless;
  tau_n has millisecond;
  alpha_n has per_millisecond;
  beta_n has per_millisecond;
  V_slowly_activating_delayed_rectifier_potassium_current_n_gate has millivolt;
  time_slowly_activating_delayed_rectifier_potassium_current_n_gate has millisecond;
  i_to has picoA;
  i_sus has picoA;
  g_to = 0.18 nanoS;
  g_sus = 0.02 nanoS;
  q = 0.531447 dimensionless;
  q_infinity has dimensionless;
  tau_q has millisecond;
  V_AP_sensitive_currents_q_gate has millivolt;
  time_AP_sensitive_currents_q_gate has millisecond;
  r = 0.005550489 dimensionless;
  r_infinity has dimensionless;
  tau_r has millisecond;
  V_AP_sensitive_currents_r_gate has millivolt;
  time_AP_sensitive_currents_r_gate has millisecond;
  i_h has picoA;
  i_h_Na has picoA;
  i_h_K has picoA;
  g_h_Na = 0.1437375 nanoS;
  g_h_K = 0.2312625 nanoS;
  y = 0.06715669 dimensionless;
  y_infinity has dimensionless;
  tau_y has millisecond;
  V_hyperpolarisation_activated_current_y_gate has millivolt;
  time_hyperpolarisation_activated_current_y_gate has millisecond;
  i_st has picoA;
  g_st = 0.015 nanoS;
  E_st = 37.4 millivolt;
  qa = 0.4260181 dimensionless;
  qa_infinity has dimensionless;
  tau_qa has millisecond;
  alpha_qa has per_millisecond;
  beta_qa has per_millisecond;
  V_sustained_inward_current_qa_gate has millivolt;
  time_sustained_inward_current_qa_gate has millisecond;
  qi = 0.3333304 dimensionless;
  qi_infinity has dimensionless;
  tau_qi has millisecond;
  alpha_qi has per_millisecond;
  beta_qi has per_millisecond;
  V_sustained_inward_current_qi_gate has millivolt;
  time_sustained_inward_current_qi_gate has millisecond;
  i_b_Na has picoA;
  g_b_Na = 0.0054 nanoS;
  i_K_ACh has picoA;
  g_K_ACh has picoA;
  i_NaK has picoA;
  Km_Kp = 1.4 millimolar;
  Km_Nap = 14 millimolar;
  i_NaK_max = 3.6 picoA;
  i_NaCa has picoA;
  kNaCa = 125 picoA;
  x1 has dimensionless;
  x2 has dimensionless;
  x3 has dimensionless;
  x4 has dimensionless;
  k41 has dimensionless;
  k34 has dimensionless;
  k23 has dimensionless;
  k21 has dimensionless;
  k32 has dimensionless;
  k43 has dimensionless;
  k12 has dimensionless;
  k14 has dimensionless;
  Qci = 0.1369 dimensionless;
  Qn = 0.4315 dimensionless;
  Qco = 0 dimensionless;
  K3ni = 26.44 millimolar;
  Kci = 0.0207 millimolar;
  K1ni = 395.3 millimolar;
  K2ni = 2.289 millimolar;
  Kcni = 26.44 millimolar;
  K3no = 4.663 millimolar;
  K1no = 1628 millimolar;
  K2no = 561.4 millimolar;
  Kco = 3.663 millimolar;
  do has dimensionless;
  di has dimensionless;
  j_Ca_dif has millimolar_per_millisecond;
  j_rel has millimolar_per_millisecond;
  j_up has millimolar_per_millisecond;
  j_tr has millimolar_per_millisecond;
  tau_dif_Ca = 0.04 millisecond;
  tau_tr = 60 millisecond;
  K_rel = 0.0012 millimolar;
  P_up = 0.005 millimolar_per_millisecond;
  P_rel = 0.5 per_millisecond;
  K_up = 0.0006 millimolar;
  Cai = 0.000312494921 millimolar;
  Cao = 2 millimolar;
  Ca_up = 1.462338 millimolar;
  Ca_rel = 0.296742 millimolar;
  Ca_sub_intracellular_ion_concentrations = 0.00019074741 millimolar;
  Nai = 9.438646 millimolar;
  Nao = 140 millimolar;
  Ki = 139.9841 millimolar;
  Ko = 5.4 millimolar;
  Mgi = 2.5 millimolar;
  V_i = 1.5835e-12 litre;
  V_rel = 4.2223e-15 litre;
  V_up = 4.0816e-14 litre;
  V_sub = 3.5098e-14 litre;
  TC_tot = 0.031 dimensionless;
  TMC_tot = 0.062 dimensionless;
  CM_tot = 0.045 dimensionless;
  CQ_tot = 10 dimensionless;
  delta_fTC has millimolar_per_millisecond;
  delta_fTMC has millimolar_per_millisecond;
  delta_fCMs has millimolar_per_millisecond;
  delta_fCMi has millimolar_per_millisecond;
  delta_fCQ has millimolar_per_millisecond;
  delta_fTMM has millimolar_per_millisecond;
  fTMM = 0.3506009 millimolar;
  fCMi = 0.1169472 millimolar;
  fCMs = 0.07463197 millimolar;
  fTC = 0.05920629 millimolar;
  fTMC = 0.6029551 millimolar;
  fCQ = 0.2603173 millimolar;
  kf_TC = 88.8 per_millimolar_millisecond;
  kf_TMM = 2.277 per_millimolar_millisecond;
  kf_TMC = 227.7 per_millimolar_millisecond;
  kf_CM = 227.7 per_millimolar_millisecond;
  kf_CQ = 0.534 per_millimolar_millisecond;
  kb_TC = 0.446 per_millisecond;
  kb_TMC = 0.00751 per_millisecond;
  kb_TMM = 0.751 per_millisecond;
  kb_CM = 0.542 per_millisecond;
  kb_CQ = 0.445 per_millisecond;

  // Assignment rules:
  E_Na := R*T/F*ln(Nao/Nai);
  E_K := R*T/F*ln(Ko/Ki);
  i_CaL := g_CaL*(V_membrane - E_CaL)*d_L_type_calcium_channel_current_d_gate*f_L_type_calcium_channel_current_f_gate*fCa;
  d_infinity_L_type_calcium_channel_current_d_gate := 1/(1 + exp(-(V_L_type_calcium_channel_current_d_gate + 14.1)/6));
  tau_d_L_type_calcium_channel_current_d_gate := 1/(alpha_d + beta_d);
  alpha_d := -0.02839*(V_L_type_calcium_channel_current_d_gate + 35)/(exp(-(V_L_type_calcium_channel_current_d_gate + 35)/2.5) - 1) - 0.0849*V_L_type_calcium_channel_current_d_gate/(exp(-V_L_type_calcium_channel_current_d_gate/4.808) - 1);
  beta_d := 0.01143*(V_L_type_calcium_channel_current_d_gate - 5)/(exp((V_L_type_calcium_channel_current_d_gate - 5)/2.5) - 1);
  f_infinity_L_type_calcium_channel_current_f_gate := 1/(1 + exp((V_L_type_calcium_channel_current_f_gate + 30)/5));
  tau_f_L_type_calcium_channel_current_f_gate := 44.3 + 257.1*exp(-((V_L_type_calcium_channel_current_f_gate + 32.5)/13.9)^2);
  alpha_fCa := Km_fCa*beta_fCa;
  fCa_infinity := Km_fCa/(Km_fCa + Ca_sub_L_type_calcium_channel_current_fCa_gate);
  tau_fCa := fCa_infinity/alpha_fCa;
  i_CaT := g_CaT*(V_membrane - E_CaT)*d_T_type_calcium_channel_current_d_gate*f_T_type_calcium_channel_current_f_gate;
  d_infinity_T_type_calcium_channel_current_d_gate := 1/(1 + exp(-(V_T_type_calcium_channel_current_d_gate + 26.3)/6));
  tau_d_T_type_calcium_channel_current_d_gate := 1/(1.068*exp((V_T_type_calcium_channel_current_d_gate + 26.3)/30) + 1.068*exp(-(V_T_type_calcium_channel_current_d_gate + 26.3)/30));
  f_infinity_T_type_calcium_channel_current_f_gate := 1/(1 + exp((V_T_type_calcium_channel_current_f_gate + 61.7)/5.6));
  tau_f_T_type_calcium_channel_current_f_gate := 1/(0.0153*exp(-(V_T_type_calcium_channel_current_f_gate + 61.7)/83.3) + 0.015*exp((V_T_type_calcium_channel_current_f_gate + 61.7)/15.38));
  g_Kr := 0.025*(Ko/1)^0.59;
  i_Kr := g_Kr*(V_membrane - E_K)*(0.6*paF + 0.4*paS)*piy;
  pa_infinity := 1/(1 + exp(-(V_rapidly_activating_delayed_rectifier_potassium_current_pa_gate + 23.2)/10.6));
  tau_paS := 0.84655354/(0.0042*exp(V_rapidly_activating_delayed_rectifier_potassium_current_pa_gate/17) + 0.00015*exp(-V_rapidly_activating_delayed_rectifier_potassium_current_pa_gate/21.6));
  tau_paF := 0.84655354/(0.0372*exp(V_rapidly_activating_delayed_rectifier_potassium_current_pa_gate/15.9) + 0.00096*exp(-V_rapidly_activating_delayed_rectifier_potassium_current_pa_gate/22.5));
  pi_infinity := 1/(1 + exp((V_rapidly_activating_delayed_rectifier_potassium_current_pi_gate + 28.6)/17.1));
  tau_pi := 1/(0.1*exp(-V_rapidly_activating_delayed_rectifier_potassium_current_pi_gate/54.645) + 0.656*exp(V_rapidly_activating_delayed_rectifier_potassium_current_pi_gate/106.157));
  E_Ks := R*T/F*ln((Ko + 0.12*Nao)/(Ki + 0.12*Nai));
  i_Ks := g_Ks*(V_membrane - E_Ks)*n^2;
  n_infinity := alpha_n/(alpha_n + beta_n);
  tau_n := 1/(alpha_n + beta_n);
  alpha_n := 0.014/(1 + exp(-(V_slowly_activating_delayed_rectifier_potassium_current_n_gate - 40)/9));
  beta_n := 0.001*exp(-V_slowly_activating_delayed_rectifier_potassium_current_n_gate/45);
  i_to := g_to*(V_membrane - E_K)*q*r;
  i_sus := g_sus*(V_membrane - E_K)*r;
  q_infinity := 1/(1 + exp((V_AP_sensitive_currents_q_gate + 49)/13));
  tau_q := 0.6*(65.17/(0.57*exp(-0.08*(V_AP_sensitive_currents_q_gate + 44)) + 0.065*exp(0.1*(V_AP_sensitive_currents_q_gate + 45.93))) + 10.1);
  r_infinity := 1/(1 + exp(-(V_AP_sensitive_currents_r_gate - 19.3)/15));
  tau_r := 0.66*1.4*(15.59/(1.037*exp(0.09*(V_AP_sensitive_currents_r_gate + 30.61)) + 0.369*exp(-0.12*(V_AP_sensitive_currents_r_gate + 23.84))) + 2.98);
  i_h_Na := g_h_Na*(V_membrane - E_Na)*y^2;
  i_h_K := g_h_K*(V_membrane - E_K)*y^2;
  i_h := i_h_Na + i_h_K;
  y_infinity := 1/(1 + exp((V_hyperpolarisation_activated_current_y_gate + 64)/13.5));
  tau_y := 0.7166529/(exp(-(V_hyperpolarisation_activated_current_y_gate + 386.9)/45.302) + exp((V_hyperpolarisation_activated_current_y_gate - 73.08)/19.231));
  i_st := g_st*(V_membrane - E_st)*qa*qi;
  qa_infinity := 1/(1 + exp(-(V_sustained_inward_current_qa_gate + 57)/5));
  tau_qa := 1/(alpha_qa + beta_qa);
  alpha_qa := 1/(0.15*exp(-V_sustained_inward_current_qa_gate/11) + 0.2*exp(-V_sustained_inward_current_qa_gate/700));
  beta_qa := 1/(16*exp(V_sustained_inward_current_qa_gate/8) + 15*exp(V_sustained_inward_current_qa_gate/50));
  qi_infinity := alpha_qi/(alpha_qi + beta_qi);
  tau_qi := 6.65/(alpha_qi + beta_qi);
  alpha_qi := 1/(3100*exp(V_sustained_inward_current_qi_gate/13) + 700*exp(V_sustained_inward_current_qi_gate/70));
  beta_qi := 1/(95*exp(-V_sustained_inward_current_qi_gate/10) + 50*exp(-V_sustained_inward_current_qi_gate/700)) + 0.000229/(1 + exp(-V_sustained_inward_current_qi_gate/5));
  i_b_Na := g_b_Na*(V_membrane - E_Na);
  g_K_ACh := 0.0011*(Ko/1)^0.41;
  i_K_ACh := g_K_ACh*(Ki - Ko*exp(-V_membrane*F/(R*T)))/1;
  i_NaK := i_NaK_max*(1 + (Km_Kp/Ko)^1.2)^(-1)*(1 + (Km_Nap/Nai)^1.3)^(-1)*(1 + exp(-(V_membrane - E_Na + 120)/30))^(-1);
  i_NaCa := kNaCa*(x2*k21 - x1*k12)/(x1 + x2 + x3 + x4);
  x1 := k41*k34*(k23 + k21) + k21*k32*(k43 + k41);
  x2 := k32*k43*(k14 + k12) + k41*k12*(k34 + k32);
  x3 := k14*k43*(k23 + k21) + k12*k23*(k43 + k41);
  x4 := k23*k34*(k14 + k12) + k14*k21*(k34 + k32);
  k43 := Nai/(K3ni + Nai);
  k12 := Ca_sub_intracellular_ion_concentrations/Kci*exp(-Qci*V_membrane*F/(R*T))/di;
  k14 := Nai/K1ni*Nai/K2ni*(1 + Nai/K3ni)*exp(Qn*V_membrane*F/(2*R*T))/di;
  k41 := exp(-Qn*V_membrane*F/(2*R*T));
  di := 1 + Ca_sub_intracellular_ion_concentrations/Kci*(1 + exp(-Qci*V_membrane*F/(R*T)) + Nai/Kcni) + Nai/K1ni*(1 + Nai/K2ni*(1 + Nai/K3ni));
  k34 := Nao/(K3no + Nao);
  k21 := Cao/Kco*exp(Qco*V_membrane*F/(R*T))/do;
  k23 := Nao/K1no*Nao/K2no*(1 + Nao/K3no)*exp(-Qn*V_membrane*F/(2*R*T))/do;
  k32 := exp(Qn*V_membrane*F/(2*R*T));
  do := 1 + Cao/Kco*(1 + exp(Qco*V_membrane*F/(R*T))) + Nao/K1no*(1 + Nao/K2no)*(1 + Nao/K3no);
  j_Ca_dif := (Ca_sub_intracellular_ion_concentrations - Cai)/tau_dif_Ca;
  j_rel := P_rel*(Ca_rel - Ca_sub_intracellular_ion_concentrations)/(1 + (K_rel/Ca_sub_intracellular_ion_concentrations)^2);
  j_up := P_up/(1 + K_up/Cai);
  j_tr := (Ca_up - Ca_rel)/tau_tr;
  delta_fTC := kf_TC*Cai*(1 - fTC) - kb_TC*fTC;
  delta_fTMC := kf_TMC*Cai*(1 - (fTMC + fTMM)) - kb_TMC*fTMC;
  delta_fTMM := kf_TMM*Mgi*(1 - (fTMC + fTMM)) - kb_TMM*fTMM;
  delta_fCMi := kf_CM*Cai*(1 - fCMi) - kb_CM*fCMi;
  delta_fCMs := kf_CM*Ca_sub_intracellular_ion_concentrations*(1 - fCMs) - kb_CM*fCMs;
  delta_fCQ := kf_CQ*Ca_rel*(1 - fCQ) - kb_CQ*fCQ;

  // Rate rules:
  V_membrane' = -(i_CaL + i_CaT + i_Kr + i_Ks + i_to + i_sus + i_h + i_st + i_b_Na + i_K_ACh + i_NaK + i_NaCa)/1;
  d_L_type_calcium_channel_current_d_gate' = (d_infinity_L_type_calcium_channel_current_d_gate - d_L_type_calcium_channel_current_d_gate)/tau_d_L_type_calcium_channel_current_d_gate;
  f_L_type_calcium_channel_current_f_gate' = (f_infinity_L_type_calcium_channel_current_f_gate - f_L_type_calcium_channel_current_f_gate)/tau_f_L_type_calcium_channel_current_f_gate;
  fCa' = (fCa_infinity - fCa)/tau_fCa;
  d_T_type_calcium_channel_current_d_gate' = (d_infinity_T_type_calcium_channel_current_d_gate - d_T_type_calcium_channel_current_d_gate)/tau_d_T_type_calcium_channel_current_d_gate;
  f_T_type_calcium_channel_current_f_gate' = (f_infinity_T_type_calcium_channel_current_f_gate - f_T_type_calcium_channel_current_f_gate)/tau_f_T_type_calcium_channel_current_f_gate;
  paS' = (pa_infinity - paS)/tau_paS;
  paF' = (pa_infinity - paF)/tau_paF;
  piy' = (pi_infinity - piy)/tau_pi;
  n' = (n_infinity - n)/tau_n;
  q' = (q_infinity - q)/tau_q;
  r' = (r_infinity - r)/tau_r;
  y' = (y_infinity - y)/tau_y;
  qa' = (qa_infinity - qa)/tau_qa;
  qi' = (qi_infinity - qi)/tau_qi;
  Nai' = -(i_h_Na + i_st + i_b_Na + 3*i_NaK + 3*i_NaCa)*Cm/(1*F*(V_i + V_sub));
  Ki' = -(i_Kr + i_Ks + i_to + i_sus + i_h_K + i_K_ACh + (-2*i_NaK))*Cm/(1*F*(V_i + V_sub));
  Cai' = (j_Ca_dif*V_sub - j_up*V_up)/V_i - (CM_tot*delta_fCMi + TC_tot*delta_fTC + TMC_tot*delta_fTMC);
  Ca_sub_intracellular_ion_concentrations' = (-(i_CaL + i_CaT - 2*i_NaCa)*Cm/(1*2*F) + j_rel*V_rel)/V_sub - (j_Ca_dif + CM_tot*delta_fCMs);
  Ca_up' = j_up - j_tr*V_rel/V_up;
  Ca_rel' = j_tr - (j_rel + CQ_tot*delta_fCQ);
  fTC' = delta_fTC;
  fTMC' = delta_fTMC;
  fTMM' = delta_fTMM;
  fCMi' = delta_fCMi;
  fCMs' = delta_fCMs;
  fCQ' = delta_fCQ;

  // Unit definitions:
  unit per_millisecond = 1 / (1e-3 second);
  unit millimolar_per_millisecond = 1e-3 mole / (litre * 1e-3 second);
  unit per_millimolar_millisecond = litre / (1e-3 mole * 1e-3 second);
  unit millisecond = 1e-3 second;
  unit millivolt = 1e-3 volt;
  unit per_millivolt = 1 / (1e-3 volt);
  unit per_millivolt_millisecond = 1 / (1e-3 volt * 1e-3 second);
  unit nanoS = 1e-9 siemens;
  unit nanoS_per_picoF = 1e-9 siemens / (1e-12 farad);
  unit picoF = 1e-12 farad;
  unit per_picoF = 1 / (1e-12 farad);
  unit picoA_per_millimolar_picoF = 1e-12 ampere * litre / (1e-3 mole * 1e-12 farad);
  unit picoA = 1e-12 ampere;
  unit millimolar = 1e-3 mole / litre;
  unit attojoule_per_millimole_kelvin = 1e-18 joule / (1e-3 mole * kelvin);
  unit femtocoulomb_per_millimole = 1e-15 coulomb / (1e-3 mole);
  unit time = 1e-3 second;
end
