// SBML level 2 version 3

model Jafri1998_VentricularMyocyte()
  // This a model from the article:
  // Cardiac Ca2+ dynamics: the roles of ryanodine receptor adaptation and sarcoplasmic reticulum load.
  // Jafri MS, Rice JJ, Winslow RL. Biophys J 1998 Mar;74(3):1149-68 9512016 ,
  // Abstract:
  // We construct a detailed mathematical model for Ca2+ regulation in the ventricular myocyte that includes novel descriptions of subcellular mechanisms based on recent experimental findings: 1) the Keizer-Levine model for the ryanodine receptor (RyR), which displays adaptation at elevated Ca2+; 2) a model for the L-type Ca2+ channel that inactivates by mode switching; and 3) a restricted subspace into which the RyRs and L-type Ca2+ channels empty and interact via Ca2+. We add membrane currents from the Luo-Rudy Phase II ventricular cell model to our description of Ca2+ handling to formulate a new model for ventricular action potentials and Ca2+ regulation. The model can simulate Ca2+ transients during an action potential similar to those seen experimentally. The subspace [Ca2+] rises more rapidly and reaches a higher level (10-30 microM) than the bulk myoplasmic Ca2+ (peak [Ca2+]i approximately 1 microM). Termination of sarcoplasmic reticulum (SR) Ca2+ release is predominately due to emptying of the SR, but is influenced by RyR adaptation. Because force generation is roughly proportional to peak myoplasmic Ca2+, we use [Ca2+]i in the model to explore the effects of pacing rate on force generation. The model reproduces transitions seen in force generation due to changes in pacing that cannot be simulated by previous models. Simulation of such complex phenomena requires an interplay of both RyR adaptation and the degree of SR Ca2+ loading. This model, therefore, shows improved behavior over existing models that lack detailed descriptions of subcellular Ca2+ regulatory mechanisms.
  // This model was taken from the CellML repository and automatically converted to SBML.
  // The original model was: Jafri MS, Rice JJ, Winslow RL. (1998) - version03
  // The original CellML model was created by:
  // Lloyd, Catherine, May
  // c.lloyd@aukland.ac.nz
  // The University of Auckland
  // The Bioengineering Institute
  // This model originates from BioModels Database: A Database of Annotated Published Models (http://www.ebi.ac.uk/biomodels/). It is copyright (c) 2005-2011 The BioModels.net Team.
  // To the extent possible under law, all copyright and related or neighbouring rights to this encoded model have been dedicated to the public domain worldwide. Please refer to CC0 Public Domain Dedication for more information.
  // In summary, you are entitled to use this encoded model in absolutely any manner you deem suitable, verbatim, or with modification, alone or embedded it in a larger context, redistribute it, commercially or not, in a restricted way or not..
  // To cite BioModels Database, please use: Li C, Donizelli M, Rodriguez N, Dharuri H, Endler L, Chelliah V, Li L, He E, Henry A, Stefan MI, Snoep JL, Hucka M, Le Novère N, Laibe C (2010) BioModels Database: An enhanced, curated and annotated resource for published quantitative kinetic models. BMC Syst Biol., 4:92.
  // biomodels.db:MODEL0847869198
  // isDescribedBy pubmed:9512016
  // biomodels.db:MODEL0847869198
  // isDescribedBy pubmed:9512016
  // biomodels.db:MODEL0847869198
  // biomodels.db:MODEL0847869198

  // Compartments:
  compartment Compartment = 1 litre;

  // Parameters:
  V_membrane = -84.1638 mV;
  R = 8314.5 gas_constant_units;
  T = 310 kelvin;
  F = 96845 faradays_constant_units;
  Cm = 0.01 uF_per_mm2;
  I_stim has uA_per_mm2;
  stim_start = 100 ms;
  stim_end = 10100 ms;
  stim_period = 500 ms;
  stim_duration = 1 ms;
  stim_amplitude = 0.516289 uA_per_mm2;
  i_Na has uA_per_mm2;
  E_Na has mV;
  g_Na = 0.128 mS_per_mm2;
  m = 0.0328302 dimensionless;
  alpha_m has per_ms;
  beta_m has per_ms;
  h = 0.988354 dimensionless;
  alpha_h has per_ms;
  beta_h has per_ms;
  j = 0.99254 dimensionless;
  alpha_j has per_ms;
  beta_j has per_ms;
  i_Ca_L_Ca has uA_per_mm2;
  i_Ca_L_K has uA_per_mm2;
  P_Ca = 3.375e-5 mm_per_ms;
  P_K = 1e-9 mm_per_ms;
  p_k has mm_per_ms;
  i_Ca_L_Ca_half = -0.00458 uA_per_mm2;
  i_Ca_L_Ca_max has uA_per_mm2;
  O = 9.84546e-21 dimensionless;
  O_Ca = 0 dimensionless;
  alpha has per_ms;
  beta has per_ms;
  gamma has per_ms;
  alpha_a has per_ms;
  beta_b has per_ms;
  a = 2 dimensionless;
  b = 2 dimensionless;
  g = 2 per_ms;
  f = 0.3 per_ms;
  g_ = 0 per_ms;
  f_ = 0 per_ms;
  omega = 0.01 per_ms;
  C0 = 0.997208 dimensionless;
  C1 = 6.38897e-5 dimensionless;
  C2 = 1.535e-9 dimensionless;
  C3 = 1.63909e-14 dimensionless;
  C4 = 6.56337e-20 dimensionless;
  C_Ca0 = 0.00272826 dimensionless;
  C_Ca1 = 6.99215e-7 dimensionless;
  C_Ca2 = 6.71989e-11 dimensionless;
  C_Ca3 = 2.87031e-15 dimensionless;
  C_Ca4 = 4.59752e-20 dimensionless;
  y = 0.998983 dimensionless;
  y_infinity has dimensionless;
  tau_y has ms;
  i_K has uA_per_mm2;
  g_K has mS_per_mm2;
  g_K_max = 0.001128 mS_per_mm2;
  E_K has mV;
  P_NaK = 0.01833 dimensionless;
  X = 0.000928836 dimensionless;
  alpha_X has per_ms;
  beta_X has per_ms;
  Xi has dimensionless;
  i_K1 has uA_per_mm2;
  E_K1 has mV;
  g_K1 has mS_per_mm2;
  g_K1_max = 0.0075 mS_per_mm2;
  K1_infinity has dimensionless;
  alpha_K1 has per_ms;
  beta_K1 has per_ms;
  i_Kp has uA_per_mm2;
  E_Kp has mV;
  g_Kp = 8.28e-5 mS_per_mm2;
  Kp has dimensionless;
  i_NaCa has uA_per_mm2;
  k_NaCa = 50 uA_per_mm2;
  K_mNa = 87.5 mM;
  K_mCa = 1.38 mM;
  k_sat = 0.1 dimensionless;
  eta = 0.35 dimensionless;
  i_p_Ca has uA_per_mm2;
  K_mpCa = 0.0005 mM;
  I_pCa = 0.0115 uA_per_mm2;
  i_Na_b has uA_per_mm2;
  g_Nab = 1.41e-5 mS_per_mm2;
  E_NaN has mV;
  i_Ca_b has uA_per_mm2;
  g_Cab = 6.032e-5 mS_per_mm2;
  E_CaN has mV;
  i_NaK has uA_per_mm2;
  I_NaK = 0.013 uA_per_mm2;
  f_NaK has dimensionless;
  K_mNai = 10 mM;
  K_mKo = 1.5 mM;
  sigma has dimensionless;
  i_ns_Ca has uA_per_mm2;
  i_ns_Na has uA_per_mm2;
  i_ns_K has uA_per_mm2;
  I_ns_Na has uA_per_mm2;
  I_ns_K has uA_per_mm2;
  K_m_ns_Ca = 0.0012 mM;
  P_ns_Ca = 1.75e-9 mm_per_ms;
  EnsCa has mV;
  VnsCa has mV;
  Cai = 9.94893e-11 mM;
  Ca_SS = 0.000136058 mM;
  Am = 546.69 per_mm;
  V_myo = 0.92 dimensionless;
  RyR_open has dimensionless;
  P_O1 = 0.00119168 dimensionless;
  P_O2 = 6.30613e-9 dimensionless;
  P_C1 = 0.762527 dimensionless;
  P_C2 = 0.236283 dimensionless;
  v1 = 1.8 per_ms;
  v2 = 5.8e-5 per_ms;
  v3 = 0.0018 mM_per_ms;
  nCa = 4 dimensionless;
  mCa = 3 dimensionless;
  k_a_plus = 1.215e10 per_mM4_per_ms;
  k_a_minus = 0.1425 per_ms;
  k_b_plus = 40500000 per_mM3_per_ms;
  k_b_minus = 1.93 per_ms;
  k_c_plus = 0.018 per_ms;
  k_c_minus = 0.0008 per_ms;
  k_htrpn_plus = 20 per_mM_per_ms;
  k_htrpn_minus = 6.6e-5 per_ms;
  k_ltrpn_plus = 40 per_mM_per_ms;
  k_ltrpn_minus = 0.04 per_ms;
  tau_tr = 34.48 ms;
  Ca_JSR = 1.17504 mM;
  Ca_NSR = 1.243891 mM;
  V_JSR has dimensionless;
  V_NSR has dimensionless;
  V_SS has dimensionless;
  K_mup = 0.0005 mM;
  K_mCMDN = 0.00238 mM;
  K_mCSQN = 0.8 mM;
  tau_xfer = 3.125 ms;
  HTRPN_tot = 0.14 mM;
  LTRPN_tot = 0.07 mM;
  HTRPNCa = 0.13598 mM;
  LTRPNCa = 0.00635 mM;
  CSQN_tot = 15 mM;
  CMDN_tot = 0.05 mM;
  Bi has dimensionless;
  B_SS has dimensionless;
  B_JSR has dimensionless;
  J_rel has mM_per_ms;
  J_leak has mM_per_ms;
  J_up has mM_per_ms;
  J_tr has mM_per_ms;
  J_xfer has mM_per_ms;
  J_trpn has mM_per_ms;
  J_htrpn has mM_per_ms;
  J_ltrpn has mM_per_ms;
  Nai = 10.2042 mM;
  Nao = 140 mM;
  Ki = 143.727 mM;
  Ko = 5.4 mM;
  Cao = 1.8 mM;

  // Assignment rules:
  I_stim := piecewise(stim_amplitude, (time >= stim_start) && (time <= stim_end) && (time - stim_start - floor((time - stim_start)/stim_period)*stim_period <= stim_duration), 0);
  i_Na := g_Na*m^3*h*j*(V_membrane - E_Na);
  E_Na := R*T/F*ln(Nao/Nai);
  alpha_m := 0.32*(V_membrane + 47.13)/(1 - exp(-0.1*(V_membrane + 47.13)));
  beta_m := 0.08*exp(-V_membrane/11);
  alpha_h := piecewise(0.135*exp((80 + V_membrane)/(-6.8)), 40 + V_membrane < 0, 0);
  beta_h := piecewise(3.56*exp(0.079*V_membrane) + 310000*exp(0.35*V_membrane), 40 + V_membrane < 0, 1/(0.13*(1 + exp((V_membrane + 10.66)/(-11.1)))));
  alpha_j := piecewise((-127140*exp(0.2444*V_membrane) - 3.474e-5*exp(-0.04391*V_membrane))*(V_membrane + 37.78)/(1 + exp(0.311*(V_membrane + 79.23))), 40 + V_membrane < 0, 0);
  beta_j := piecewise(0.1212*exp(-0.01052*V_membrane)/(1 + exp(-0.1378*(V_membrane + 40.14))), 40 + V_membrane < 0, 0.3*exp(-2.535e-7*V_membrane)/(1 + exp(-0.1*(V_membrane + 32))));
  i_Ca_L_Ca := i_Ca_L_Ca_max*y*(O + O_Ca);
  i_Ca_L_K := p_k*y*(O + O_Ca)*V_membrane*F^2/(R*T)*(Ki*exp(V_membrane*F/(R*T)) - Ko)/(exp(V_membrane*F/(R*T)) - 1);
  p_k := P_K/(1 + i_Ca_L_Ca_max/i_Ca_L_Ca_half);
  i_Ca_L_Ca_max := P_Ca*4*V_membrane*F^2/(R*T)*(0.001*exp(2*V_membrane*F/(R*T)) - 0.341*Cao)/(exp(2*V_membrane*F/(R*T)) - 1);
  alpha := 0.4*exp((V_membrane + 12)/10);
  beta := 0.05*exp((V_membrane + 12)/(-13));
  alpha_a := alpha*a;
  beta_b := beta/b;
  gamma := 0.1875*Ca_SS;
  y_infinity := 1/(1 + exp((V_membrane + 55)/7.5)) + 0.1/(1 + exp((-V_membrane + 21)/6));
  tau_y := 20 + 600/(1 + exp((V_membrane + 30)/9.5));
  g_K := g_K_max*sqrt(Ko/5.4);
  E_K := R*T/F*ln((Ko + P_NaK*Nao)/(Ki + P_NaK*Nai));
  i_K := g_K*Xi*X^2*(V_membrane - E_K);
  alpha_X := 7.19e-5*(V_membrane + 30)/(1 - exp(-0.148*(V_membrane + 30)));
  beta_X := 0.000131*(V_membrane + 30)/(exp(0.0687*(V_membrane + 30)) - 1);
  Xi := 1/(1 + exp((V_membrane - 56.26)/32.1));
  g_K1 := g_K1_max*sqrt(Ko/5.4);
  E_K1 := R*T/F*ln(Ko/Ki);
  i_K1 := g_K1*K1_infinity*(V_membrane - E_K1);
  alpha_K1 := 1.02/(1 + exp(0.2385*(V_membrane - E_K1 - 59.215)));
  beta_K1 := (0.49124*exp(0.08032*(V_membrane + 5.476 - E_K1)) + exp(0.06175*(V_membrane - (E_K1 + 594.31))))/(1 + exp(-0.5143*(V_membrane - E_K1 + 4.753)));
  K1_infinity := alpha_K1/(alpha_K1 + beta_K1);
  E_Kp := E_K1;
  Kp := 1/(1 + exp((7.488 - V_membrane)/5.98));
  i_Kp := g_Kp*Kp*(V_membrane - E_Kp);
  i_NaCa := k_NaCa*1/(K_mNa^3 + Nao^3)*1/(K_mCa + Cao)*1/(1 + k_sat*exp((eta - 1)*V_membrane*F/(R*T)))*(exp(eta*V_membrane*F/(R*T))*Nai^3*Cao - exp((eta - 1)*V_membrane*F/(R*T))*Nao^3*Cai);
  i_p_Ca := I_pCa*Cai/(K_mpCa + Cai);
  E_NaN := E_Na;
  i_Na_b := g_Nab*(V_membrane - E_NaN);
  E_CaN := R*T/(2*F)*ln(Cao/Cai);
  i_Ca_b := g_Cab*(V_membrane - E_CaN);
  f_NaK := 1/(1 + 0.1245*exp(-0.1*V_membrane*F/(R*T)) + 0.0365*sigma*exp(-V_membrane*F/(R*T)));
  sigma := 1/7*(exp(Nao/67.3) - 1);
  i_NaK := I_NaK*f_NaK*1/(1 + (K_mNai/Nai)^1.5)*Ko/(Ko + K_mKo);
  EnsCa := R*T/F*ln((Ko + Nao)/(Ki + Nai));
  VnsCa := V_membrane - EnsCa;
  i_ns_Na := I_ns_Na*1/(1 + (K_m_ns_Ca/Cai)^3);
  i_ns_K := I_ns_K*1/(1 + (K_m_ns_Ca/Cai)^3);
  i_ns_Ca := i_ns_Na + i_ns_K;
  I_ns_Na := P_ns_Ca*1^2*VnsCa*F^2/(R*T)*(0.75*Nai*exp(VnsCa*F/(R*T)) - 0.75*Nao)/(exp(VnsCa*F/(R*T)) - 1);
  I_ns_K := P_ns_Ca*1^2*VnsCa*F^2/(R*T)*(0.75*Ki*exp(VnsCa*F/(R*T)) - 0.75*Ko)/(exp(VnsCa*F/(R*T)) - 1);
  V_SS := 5.828e-5*V_myo;
  V_NSR := 0.081*V_myo;
  V_JSR := 0.00464*V_myo;
  J_rel := v1*RyR_open*(Ca_JSR - Ca_SS);
  RyR_open := P_O1 + P_O2;
  J_leak := v2*(Ca_NSR - Cai);
  J_up := v3*Cai^2/(K_mup^2 + Cai^2);
  J_tr := (Ca_NSR - Ca_JSR)/tau_tr;
  J_xfer := (Ca_SS - Cai)/tau_xfer;
  J_htrpn := k_htrpn_plus*Cai*(HTRPN_tot - HTRPNCa) - k_htrpn_minus*HTRPNCa;
  J_ltrpn := k_ltrpn_plus*Cai*(LTRPN_tot - LTRPNCa) - k_ltrpn_minus*LTRPNCa;
  J_trpn := J_htrpn + J_ltrpn;
  Bi := 1/(1 + CMDN_tot*K_mCMDN/(K_mCMDN + Cai)^2);
  B_SS := 1/(1 + CMDN_tot*K_mCMDN/(K_mCMDN + Ca_SS)^2);
  B_JSR := 1/(1 + CSQN_tot*K_mCSQN/(K_mCSQN + Ca_JSR)^2);

  // Rate rules:
  V_membrane' = (I_stim - (i_Na + i_Ca_L_Ca + i_Ca_L_K + i_K + i_NaCa + i_K1 + i_Kp + i_p_Ca + i_Na_b + i_Ca_b + i_NaK + i_ns_Ca))/Cm;
  m' = alpha_m*(1 - m) - beta_m*m;
  h' = alpha_h*(1 - h) - beta_h*h;
  j' = alpha_j*(1 - j) - beta_j*j;
  C0' = beta*C1 + omega*C_Ca0 - (4*alpha + gamma)*C0;
  C1' = 4*alpha*C0 + 2*beta*C2 + omega/b*C_Ca1 - (beta + 3*alpha + gamma*a)*C1;
  C2' = 3*alpha*C1 + 3*beta*C3 + omega/b^2*C_Ca2 - (beta*2 + 2*alpha + gamma*a^2)*C2;
  C3' = 2*alpha*C2 + 4*beta*C4 + omega/b^3*C_Ca3 - (beta*3 + alpha + gamma*a^3)*C3;
  C4' = alpha*C3 + g*O + omega/b^4*C_Ca4 - (beta*4 + f + gamma*a^4)*C4;
  O' = f*C4 - g*O;
  C_Ca0' = beta_b*C_Ca1 + gamma*C_Ca0 - (4*alpha_a + omega)*C_Ca0;
  C_Ca1' = 4*alpha_a*C_Ca0 + 2*beta_b*C_Ca2 + gamma*a*C1 - (beta_b + 3*alpha_a + omega/b)*C_Ca1;
  C_Ca2' = 3*alpha_a*C_Ca1 + 3*beta_b*C_Ca3 + gamma*a^2*C2 - (beta_b*2 + 2*alpha_a + omega/b^2)*C_Ca2;
  C_Ca3' = 2*alpha_a*C_Ca2 + 4*beta_b*C_Ca4 + gamma*a^3*C3 - (beta_b*3 + alpha_a + omega/b^3)*C_Ca3;
  C_Ca4' = alpha_a*C_Ca3 + g_*O_Ca + gamma*a^4*C4 - (beta_b*4 + f_ + omega/b^4)*C_Ca4;
  O_Ca' = f_*C_Ca4 - g_*O_Ca;
  y' = (y_infinity - y)/tau_y;
  X' = alpha_X*(1 - X) - beta_X*X;
  P_C1' = -k_a_plus*Ca_SS^nCa*P_C1 + k_a_minus*P_O1;
  P_O1' = k_a_plus*Ca_SS^nCa*P_C1 - (k_a_minus*P_O1 + k_b_plus*Ca_SS^mCa*P_O1 + k_c_plus*P_O1) + k_b_minus*P_O2 + k_c_minus*P_C2;
  P_O2' = k_b_plus*Ca_SS^mCa*P_O1 - k_b_minus*P_O2;
  P_C2' = k_c_plus*P_O1 - k_c_minus*P_C2;
  HTRPNCa' = J_htrpn;
  LTRPNCa' = J_ltrpn;
  Cai' = Bi*(J_leak + J_xfer - (J_up + J_trpn + (i_Ca_b - 2*i_NaCa + i_p_Ca)*Am/(2*V_myo*F)));
  Ca_SS' = B_SS*(J_rel*V_JSR/V_SS - J_xfer*V_myo/V_SS - i_Ca_L_Ca*Am/(2*V_SS*F));
  Ca_JSR' = B_JSR*(J_tr - J_rel);
  Ca_NSR' = (J_up - J_leak)*V_myo/V_NSR - J_tr*V_JSR/V_NSR;
  Nai' = -(i_Na + i_Na_b + i_ns_Na + i_NaCa*3 + i_NaK*3)*Am/(V_myo*F);
  Ki' = -(i_Ca_L_K + i_K + i_K1 + i_Kp + i_ns_K + (-i_NaK*2))*Am/(V_myo*F);
  Ko' = (i_Ca_L_K + i_K + i_K1 + i_Kp + i_ns_K + (-i_NaK*2))*Am/(V_myo*F);

  // Unit definitions:
  unit ms = 1e-3 second;
  unit per_ms = 1 / (1e-3 second);
  unit per_mm = 1 / (1e-3 metre);
  unit mV = 1e-3 volt;
  unit per_mV = 1 / (1e-3 volt);
  unit per_mV_ms = 1 / (1e-3 volt * 1e-3 second);
  unit mS_per_mm2 = 1e-3 siemens / (1e-3 metre)^2;
  unit mm2 = (1e-3 metre)^2;
  unit mM = 1e-9 mole / (1e-3 metre)^3;
  unit mM_per_ms = 1e-9 mole / ((1e-3 metre)^3 * 1e-3 second);
  unit per_mM_per_ms = (1e-3 metre)^3 / (1e-9 mole * 1e-3 second);
  unit per_mM3_per_ms = (1e-3 metre)^9 / ((1e-9 mole)^3 * 1e-3 second);
  unit per_mM4_per_ms = (1e-3 metre)^12 / ((1e-9 mole)^4 * 1e-3 second);
  unit uF_per_mm2 = 1e-6 farad / (1e-3 metre)^2;
  unit uA_per_mm2 = 1e-6 ampere / (1e-3 metre)^2;
  unit uA_per_mmcu = 1e-6 ampere / (1e-3 metre)^3;
  unit mm_per_ms = 1e-3 metre / (1e-3 second);
  unit gas_constant_units = 1e-12 joule / (1e-9 mole * kelvin);
  unit faradays_constant_units = 1e-9 coulomb / (1e-9 mole);
  unit time = 1e-3 second; time is "ms";
end
