// SBML level 2 version 3

model Irvine1999_CardiacSodiumChannel()
  // This a model from the article:
  // Cardiac sodium channel Markov model with temperature dependence and recovery from inactivation.
  // Irvine LA, Jafri MS, Winslow RL. Biophys J 1999 Apr;76(4):1868-85 10096885 ,
  // Abstract:
  // A Markov model of the cardiac sodium channel is presented. The model is similar to the CA1 hippocampal neuron sodium channel model developed by Kuo and Bean (1994. Neuron. 12:819-829) with the following modifications: 1) an additional open state is added; 2) open-inactivated transitions are made voltage-dependent; and 3) channel rate constants are exponential functions of enthalpy, entropy, and voltage and have explicit temperature dependence. Model parameters are determined using a simulated annealing algorithm to minimize the error between model responses and various experimental data sets. The model reproduces a wide range of experimental data including ionic currents, gating currents, tail currents, steady-state inactivation, recovery from inactivation, and open time distributions over a temperature range of 10 degrees C to 25 degrees C. The model also predicts measures of single channel activity such as first latency, probability of a null sweep, and probability of reopening.
  // This model was taken from the CellML repository and automatically converted to SBML.
  // The original model was: Irvine LA, Jafri MS, Winslow RL. (1999) - version02
  // The original CellML model was created by:
  // Lloyd, Catherine, May
  // c.lloyd@aukland.ac.nz
  // The University of Auckland
  // The Bioengineering Institute
  // This model originates from BioModels Database: A Database of Annotated Published Models (http://www.ebi.ac.uk/biomodels/). It is copyright (c) 2005-2011 The BioModels.net Team.
  // To the extent possible under law, all copyright and related or neighbouring rights to this encoded model have been dedicated to the public domain worldwide. Please refer to CC0 Public Domain Dedication for more information.
  // In summary, you are entitled to use this encoded model in absolutely any manner you deem suitable, verbatim, or with modification, alone or embedded it in a larger context, redistribute it, commercially or not, in a restricted way or not..
  // To cite BioModels Database, please use: Li C, Donizelli M, Rodriguez N, Dharuri H, Endler L, Chelliah V, Li L, He E, Henry A, Stefan MI, Snoep JL, Hucka M, Le Novère N, Laibe C (2010) BioModels Database: An enhanced, curated and annotated resource for published quantitative kinetic models. BMC Syst Biol., 4:92.
  // biomodels.db:MODEL0848062679
  // isDescribedBy pubmed:10096885
  // biomodels.db:MODEL0848062679
  // isDescribedBy pubmed:10096885
  // biomodels.db:MODEL0848062679
  // biomodels.db:MODEL0848062679

  // Compartments:
  compartment Compartment = 1 litre;

  // Parameters:
  V = -0.12 V;
  i_Na has dimensionless;
  E_Na = 0.044675 V;
  g_Na = 0.0131 per_V;
  P_open has dimensionless;
  O1 = 0 dimensionless;
  O2 = 0 dimensionless;
  C0 = 1 dimensionless;
  C1 = 0 dimensionless;
  C2 = 0 dimensionless;
  C3 = 0 dimensionless;
  C4 = 0 dimensionless;
  C0I = 0 dimensionless;
  C1I = 0 dimensionless;
  C2I = 0 dimensionless;
  C3I = 0 dimensionless;
  C4I = 0 dimensionless;
  I = 0 dimensionless;
  a = 2.5218 dimensionless;
  alpha has first_order_rate_constant;
  beta has first_order_rate_constant;
  cf has first_order_rate_constant;
  cn has first_order_rate_constant;
  of has first_order_rate_constant;
  on has first_order_rate_constant;
  eta has first_order_rate_constant;
  gamma has first_order_rate_constant;
  delta has first_order_rate_constant;
  epsilon has first_order_rate_constant;
  omega has first_order_rate_constant;
  v has first_order_rate_constant;
  gamma_gamma has first_order_rate_constant;
  delta_delta has first_order_rate_constant;
  R = 8.314472 J_mol_K;
  T = 286 K;
  F = 96500 C_mol;
  k = 1.3806504e-23 J_K;
  h = 6.62607095e-31 J_ms;
  z_alpha = 0;
  z_beta = -0.9701;
  z_gamma = 1.5703;
  z_delta = -1.3266;
  z_on = 0.6625;
  z_of = 0;
  z_gamma_gamma = 0;
  z_delta_delta = -3.5596;
  z_epsilon = 0;
  z_omega = 0;
  z_eta = 1.5717;
  z_v = -1.3281;
  z_cn = 0;
  z_cf = 0;
  delta_H_alpha = 116900 J_mol;
  delta_H_beta = 263870 J_mol;
  delta_H_cf = 57533 J_mol;
  delta_H_cn = 293270 J_mol;
  delta_H_of = 79035 J_mol;
  delta_H_on = 62385 J_mol;
  delta_H_eta = 150333 J_mol;
  delta_H_gamma = 200240 J_mol;
  delta_H_delta = 127970 J_mol;
  delta_H_epsilon = 79183 J_mol;
  delta_H_omega = 123020 J_mol;
  delta_H_v = 121900 J_mol;
  delta_H_gamma_gamma = -99967 J_mol;
  delta_H_delta_delta = 62555 J_mol;
  delta_S_alpha = 224.114 J_mol_K;
  delta_S_beta = 708.146 J_mol_K;
  delta_S_cf = 0.00711 J_mol_K;
  delta_S_cn = 786.217 J_mol_K;
  delta_S_of = 1.51 J_mol_K;
  delta_S_on = 39.295 J_mol_K;
  delta_S_eta = 338.915 J_mol_K;
  delta_S_gamma = 529.952 J_mol_K;
  delta_S_delta = 229.205 J_mol_K;
  delta_S_epsilon = 70.078 J_mol_K;
  delta_S_omega = 225.175 J_mol_K;
  delta_S_v = 193.265 J_mol_K;
  delta_S_gamma_gamma = -578.317 J_mol_K;
  delta_S_delta_delta = -130.639 J_mol_K;

  // Assignment rules:
  i_Na := g_Na*P_open*(V - E_Na);
  P_open := O1 + O2;
  alpha := k*T/h*exp(-delta_H_alpha/(R*T) + delta_S_alpha/R + z_alpha*F*V/(R*T));
  beta := k*T/h*exp(-delta_H_beta/(R*T) + delta_S_beta/R + z_beta*F*V/(R*T));
  gamma := k*T/h*exp(-delta_H_gamma/(R*T) + delta_S_gamma/R + z_gamma*F*V/(R*T));
  delta := k*T/h*exp(-delta_H_delta/(R*T) + delta_S_delta/R + z_delta*F*V/(R*T));
  on := k*T/h*exp(-delta_H_on/(R*T) + delta_S_on/R + z_on*F*V/(R*T));
  of := k*T/h*exp(-delta_H_of/(R*T) + delta_S_of/R + z_of*F*V/(R*T));
  gamma_gamma := k*T/h*exp(-delta_H_gamma_gamma/(R*T) + delta_S_gamma_gamma/R + z_gamma_gamma*F*V/(R*T));
  delta_delta := k*T/h*exp(-delta_H_delta_delta/(R*T) + delta_S_delta_delta/R + z_delta_delta*F*V/(R*T));
  epsilon := k*T/h*exp(-delta_H_epsilon/(R*T) + delta_S_epsilon/R + z_epsilon*F*V/(R*T));
  omega := k*T/h*exp(-delta_H_omega/(R*T) + delta_S_omega/R + z_omega*F*V/(R*T));
  eta := k*T/h*exp(-delta_H_eta/(R*T) + delta_S_eta/R + z_eta*F*V/(R*T));
  v := k*T/h*exp(-delta_H_v/(R*T) + delta_S_v/R + z_v*F*V/(R*T));
  cn := k*T/h*exp(-delta_H_cn/(R*T) + delta_S_cn/R + z_cn*F*V/(R*T));
  cf := k*T/h*exp(-delta_H_cf/(R*T) + delta_S_cf/R + z_cf*F*V/(R*T));

  // Rate rules:
  C0' = beta*C1 + cf*C0I - (cn + 4*alpha)*C0;
  C1' = 2*beta*C2 + 4*alpha*C0 + cf/a*C1I - (beta + 3*alpha + cn*a)*C1;
  C2' = 3*beta*C3 + 3*alpha*C1 + cf/a^2*C2I - (2*beta + 2*alpha + cn*a^2)*C2;
  C3' = 4*beta*C4 + 2*alpha*C2 + cf/a^3*C3I - (3*beta + alpha + cn*a^3)*C3;
  C4' = delta*O1 + v*O2 + alpha*C3 + cf/a^4*C4I - (4*beta + gamma + eta + cn*a^4)*C4;
  O1' = gamma*C4 + omega*O2 + of*I - (delta + epsilon + on)*O1;
  O2' = epsilon*O1 + eta*C4 - (v + omega)*O2;
  C0I' = beta/a*C1I + cn*C0 - (cf + 4*alpha*a)*C0I;
  C1I' = 2*beta/a*C2I + 4*alpha*a*C0I + cn*a*C1 - (beta/a + 3*alpha*a + cf/a)*C1I;
  C2I' = 3*beta/a*C3I + 3*alpha*a*C1I + cn*a^2*C2 - (2*beta/a + 2*alpha*a + cf/a^2)*C2I;
  C3I' = 4*beta/a*C4I + 2*alpha*a*C2I + cn*a^3*C3 - (3*beta/a + alpha*a + cf/a^3)*C3I;
  C4I' = delta_delta*I + alpha*a*C3I + cn*a^4*C4 - (4*beta/a + gamma_gamma + cf/a^4)*C4I;
  I' = gamma_gamma*C4I + on*O1 - (delta_delta + of)*I;

  // Unit definitions:
  unit ms = 1e-3 second;
  unit V = volt;
  unit per_V = 1 / volt;
  unit J_mol = joule / mole;
  unit J_mol_K = joule / (mole * kelvin);
  unit first_order_rate_constant = 1 / (1e-3 second);
  unit J_K = joule / kelvin;
  unit K = kelvin;
  unit J_ms = joule * 1e-3 second;
  unit C_mol = coulomb / mole;
  unit time = 1e-3 second;
end
