// SBML level 2 version 3

model Hund2004_VentricularEpicardialAction()
  // This a model from the article:
  // Rate dependence and regulation of action potential and calcium transient in a canine cardiac ventricular cell model.
  // Hund TJ, Rudy Y. Circulation 2004 Nov 16;110(20):3168-74 15505083 ,
  // Abstract:
  // BACKGROUND: Computational biology is a powerful tool for elucidating arrhythmogenic mechanisms at the cellular level, where complex interactions between ionic processes determine behavior. A novel theoretical model of the canine ventricular epicardial action potential and calcium cycling was developed and used to investigate ionic mechanisms underlying Ca2+ transient (CaT) and action potential duration (APD) rate dependence. METHODS AND RESULTS: The Ca2+/calmodulin-dependent protein kinase (CaMKII) regulatory pathway was integrated into the model, which included a novel Ca2+-release formulation, Ca2+ subspace, dynamic chloride handling, and formulations for major ion currents based on canine ventricular data. Decreasing pacing cycle length from 8000 to 300 ms shortened APD primarily because of I(Ca(L)) reduction, with additional contributions from I(to1), I(NaK), and late I(Na). CaT amplitude increased as cycle length decreased from 8000 to 500 ms. This positive rate-dependent property depended on CaMKII activity. CONCLUSIONS: CaMKII is an important determinant of the rate dependence of CaT but not of APD, which depends on ion-channel kinetics. The model of CaMKII regulation may serve as a paradigm for modeling effects of other regulatory pathways on cell function.
  // This model was taken from the CellML repository and automatically converted to SBML.
  // The original model was: Hund TJ, Rudy Y. (2004) - version03
  // The original CellML model was created by:
  // Noble, Penny
  // penny.noble@dpag.ox.ac.uk
  // University of Oxford
  // This model originates from BioModels Database: A Database of Annotated Published Models (http://www.ebi.ac.uk/biomodels/). It is copyright (c) 2005-2011 The BioModels.net Team.
  // To the extent possible under law, all copyright and related or neighbouring rights to this encoded model have been dedicated to the public domain worldwide. Please refer to CC0 Public Domain Dedication for more information.
  // In summary, you are entitled to use this encoded model in absolutely any manner you deem suitable, verbatim, or with modification, alone or embedded it in a larger context, redistribute it, commercially or not, in a restricted way or not..
  // To cite BioModels Database, please use: Li C, Donizelli M, Rodriguez N, Dharuri H, Endler L, Chelliah V, Li L, He E, Henry A, Stefan MI, Snoep JL, Hucka M, Le Novère N, Laibe C (2010) BioModels Database: An enhanced, curated and annotated resource for published quantitative kinetic models. BMC Syst Biol., 4:92.
  // biomodels.db:MODEL0848116681
  // isDescribedBy pubmed:15505083
  // biomodels.db:MODEL0848116681
  // isDescribedBy pubmed:15505083
  // biomodels.db:MODEL0848116681
  // biomodels.db:MODEL0848116681

  // Compartments:
  compartment Compartment = 1 litre;

  // Parameters:
  time_Environment has ms;
  F = 96485 C_per_mole;
  K_o = 5.4 mM;
  Ca_o = 1.8 mM;
  Na_o = 140 mM;
  Cl_o = 100 mM;
  FonRT = 0.03743588 per_mV;
  tissue = 0 dimensionless;
  V = -85.78184 mV;
  caiont has uA_per_uF;
  naiont has uA_per_uF;
  kiont has uA_per_uF;
  clont has uA_per_uF;
  l = 0.01 cm;
  a = 0.0011 cm;
  vcell has uL;
  ageo has cm2;
  Acap has uF;
  vmyo has uL;
  vmito has uL;
  vsr has uL;
  vnsr has uL;
  vjsr has uL;
  vss has uL;
  AF has uF_mole_per_C;
  stim_offset = 0 ms;
  stim_period = 1000 ms;
  stim_duration = 3 ms;
  stim_amplitude = -15 uA_per_uF;
  i_Stim has uA_per_uF;
  past has ms;
  GNa has mS_per_uF;
  gNa has mS_per_uF;
  H = 0.9873178 dimensionless;
  m = 0.001356538 dimensionless;
  J = 0.991925 dimensionless;
  am has per_ms;
  bm has per_ms;
  ah has per_ms;
  bh has per_ms;
  aj has per_ms;
  bj has per_ms;
  INa has uA_per_uF;
  d = 1.64013e-6 dimensionless;
  dp = 8.982307 dimensionless;
  f = 0.9999615 dimensionless;
  fca = 0.9783662 dimensionless;
  fca2 = 0.8930529 dimensionless;
  f2 = 0.9922345 dimensionless;
  pca = 0.000243 L_per_F_ms;
  gacai = 1 dimensionless;
  gacao = 0.341 dimensionless;
  ibarca has uA_per_uF;
  dss has dimensionless;
  taud has ms;
  fss has dimensionless;
  f2ss has dimensionless;
  tauf has ms;
  tauf2 has ms;
  dpss has dimensionless;
  fcass has dimensionless;
  fca2ss has dimensionless;
  taufca has ms;
  taufca2 has ms;
  ICaL has uA_per_uF;
  ak1 has per_ms;
  bk1 has per_ms;
  IK1 has uA_per_uF;
  gkr has mS_per_uF;
  r has dimensionless;
  xr = 7.24074e-6 dimensionless;
  xrss has dimensionless;
  tauxr has ms;
  IKr has uA_per_uF;
  gks has mS_per_uF;
  xss has dimensionless;
  tauxs has ms;
  xs1 = 0.01988314 dimensionless;
  xs2 = 0.01989065 dimensionless;
  IKs has uA_per_uF;
  gitodv = 0.19 mS_per_uF;
  rv has dimensionless;
  ay has per_ms;
  by has per_ms;
  ay2 has per_ms;
  by2 has per_ms;
  ay3 has per_ms;
  by3 has per_ms;
  ydv = 0.01397079 dimensionless;
  ydv2 = 0.9999647 dimensionless;
  zdv = 0.8292061 dimensionless;
  Ito has uA_per_uF;
  kmnai = 10 mM;
  kmko = 1.5 mM;
  ibarnak = 0.61875 uA_per_uF;
  sigma has dimensionless;
  fnak has dimensionless;
  INaK has uA_per_uF;
  ca_i_NaCa has mM;
  KmCa = 0.000125 mM;
  allo has dimensionless;
  NCXmax = 4.5 uA_per_uF;
  ksat = 0.27 dimensionless;
  eta = 0.35 dimensionless;
  KmNai = 12.3 mM;
  KmNao = 87.5 mM;
  KmCai = 0.0036 mM;
  KmCao = 1.3 mM;
  num has mM4;
  denom1 has dimensionless;
  denom2 has mM4;
  denom3 has mM4;
  INaCa has uA_per_uF;
  IKp has uA_per_uF;
  ibarpca = 0.0575 uA_per_uF;
  kmpca = 0.0005 mM;
  IpCa has uA_per_uF;
  ICab has uA_per_uF;
  PCl = 4e-7 L_per_F_ms;
  AA = 0.000816605172 dimensionless;
  Ito2_max has uA_per_uF;
  AAss has dimensionless;
  Kmto2 = 0.1502 mM;
  Ito2 has uA_per_uF;
  GClb = 0.000225 mS_per_uF;
  IClb has uA_per_uF;
  GNaL = 0.0065 mS_per_uF;
  mL = 0.001356538 dimensionless;
  hL = 0.2613071 dimensionless;
  amL has per_ms;
  bmL has per_ms;
  hLss has dimensionless;
  INal has uA_per_uF;
  prnak = 0.01833 dimensionless;
  ENa has mV;
  EK has mV;
  EKs has mV;
  ECl has mV;
  Grel has per_ms;
  dro_inf has dimensionless;
  dtau_rel_max = 10 ms;
  dtau_rel has ms;
  ross has dimensionless;
  riss has dimensionless;
  tauri has ms;
  irelcicr has mM_per_ms;
  CaMK0 = 0.05 dimensionless;
  Km = 0.0015 mM;
  KmCaMK = 0.15 dimensionless;
  CaMKbound has dimensionless;
  CaMKactive has dimensionless;
  CaMKtrap = 0.0211237 dimensionless;
  ro = 0 dimensionless;
  ri = 0.8626667 dimensionless;
  vg has dimensionless;
  cafac has dimensionless;
  dKmPLBmax = 0.00017 mM;
  dJupmax = 0.75 dimensionless;
  dKmPLB has mM;
  dJup has dimensionless;
  iupmax = 0.004375 mM_per_ms;
  Kmup = 0.00092 mM;
  nsrmax = 15 mM;
  iup has mM_per_ms;
  ileak has mM_per_ms;
  idiff has mM_per_ms;
  itr has mM_per_ms;
  Na_i = 12.97243 mM;
  CTNaCl has mM_per_ms;
  CTNaClmax = 9.8443e-6 mM_per_ms;
  K_i = 135.4695 mM;
  CTKCl has mM_per_ms;
  CTKClmax = 7.0756e-6 mM_per_ms;
  Cl_i = 15.59207 mM;
  Ca_i = 0.00012131666 mM;
  Ca_jsr = 1.737581 mM;
  Ca_nsr = 1.832822 mM;
  Ca_ss = 0.00012271265 mM;
  kmt = 0.0005 mM;
  kmc = 0.00238 mM;
  tbar = 0.07 mM;
  cbar = 0.05 mM;
  kmcsqn = 0.8 mM;
  csqnbar = 10 mM;
  bcsqn has dimensionless;
  bmyo has dimensionless;
  BSRmax = 0.047 mM;
  KmBSR = 0.00087 mM;
  BSLmax = 1.124 mM;
  KmBSL = 0.0087 mM;
  bss has dimensionless;

  // Assignment rules:
  CaMKbound := CaMK0*(1 - CaMKtrap)/(1 + Km/Ca_ss);
  CaMKactive := CaMKbound + CaMKtrap;
  vcell := 1000*pi*a*a*l;
  ageo := 2*pi*a*a + 2*pi*a*l;
  Acap := ageo*2;
  vmyo := vcell*0.68;
  vmito := vcell*0.26;
  vsr := vcell*0.06;
  vnsr := vcell*0.0552;
  vjsr := vcell*0.0048;
  vss := vcell*0.02;
  AF := Acap/F;
  past := floor(time_Environment/stim_period)*stim_period;
  i_Stim := piecewise(stim_amplitude, (time_Environment - past >= stim_offset) && (time_Environment - past <= stim_offset + stim_duration), 0);
  GNa := piecewise(8.25, tissue == 0, 4*8.25);
  gNa := GNa*m*m*m*H*J;
  ah := piecewise(0, 40 - V >= 0, 0.135*exp((80 + V)/(-6.8)));
  aj := piecewise(0, 40 - V >= 0, (-127140*exp(0.2444*V) - 3.474e-5*exp(-0.04391*V))*1*(V + 37.78)/(1 + exp(0.311*(V + 79.23))));
  bh := piecewise(1/(0.13*(1 + exp((V + 10.66)/(-11.1)))), 40 + V >= 0, 3.56*exp(0.079*V) + 310000*exp(0.35*V));
  bj := piecewise(0.3*exp(-2.535e-7*V)/(1 + exp(-0.1*(V + 32))), 40 + V >= 0, 0.1212*exp(-0.01052*V)/(1 + exp(-0.1378*(V + 40.14))));
  am := 0.32*1*(V + 47.13)/(1 - exp(-0.1*(V + 47.13)));
  bm := 0.08*exp(-V/11);
  ibarca := pca*4*(V - 15)*F*FonRT*(gacai*Ca_ss*exp(2*(V - 15)*FonRT) - gacao*Ca_o)/(exp(2*(V - 15)*FonRT) - 1);
  ICaL := piecewise(d^dp*f*f2*fca*fca2*ibarca, tissue == 0, d*f*f2*fca*fca2*ibarca);
  dss := 1/(1 + exp(-(V - 4)/6.74));
  taud := 0.59 + 0.8*exp(0.052*(V + 13))/(1 + exp(0.132*(V + 13)));
  fss := 0.7/(1 + exp((V + 17.12)/7)) + 0.3;
  f2ss := 0.77/(1 + exp((V + 17.12)/7)) + 0.23;
  tauf := 1/(0.2411*exp(-(0.045*(V - 9.6914))^2) + 0.0529);
  tauf2 := 1/(0.0423*exp(-(0.059*(V - 18.5726))^2) + 0.0054);
  dpss := 9 - 8/(1 + exp(-(V + 65)/3.4));
  fcass := 0.3/(1 - ICaL/0.05) + 0.55/(1 + Ca_ss/0.003) + 0.15;
  fca2ss := 1/(1 - ICaL/0.01);
  taufca := 10*CaMKactive/(0.15 + CaMKactive) + 1/(1 + Ca_ss/0.003) + 0.5;
  taufca2 := 300/(1 + exp((-ICaL - 0.175)/0.04)) + 125;
  EK := ln(K_o/K_i)/FonRT;
  EKs := ln((K_o + prnak*Na_o)/(K_i + prnak*Na_i))/FonRT;
  ak1 := 1.02/(1 + exp(0.2385*(V - EK - 59.215)));
  bk1 := (0.49124*exp(0.08032*(V - EK + 5.476)) + 1*exp(0.06175*(V - EK - 594.31)))/(1 + exp(-0.5143*(V - EK + 4.753)));
  IK1 := 0.5*sqrt(K_o/5.4)*ak1/(ak1 + bk1)*(V - EK);
  gkr := 0.0138542*sqrt(K_o/5.4);
  r := 1/(1 + exp((V + 10)/15.4));
  IKr := gkr*xr*r*(V - EK);
  xrss := 1/(1 + exp(-(V + 10.085)/4.25));
  tauxr := 1/(0.0006*(V - 1.7384)/(1 - exp(-0.136*(V - 1.7384))) + 0.0003*(V + 38.3608)/(exp(0.1522*(V + 38.3608)) - 1));
  gks := 0.0248975*(1 + 0.6/(1 + (3.8e-5/Ca_i)^1.4));
  xss := 1/(1 + exp(-(V - 10.5)/24.7));
  tauxs := 1/(7.61e-5*(V + 44.6)/(1 - exp(-9.97*(V + 44.6))) + 0.00036*(V - 0.55)/(exp(0.128*(V - 0.55)) - 1));
  IKs := gks*xs1*xs2*(V - EKs);
  rv := exp(V/300);
  ay := 25*exp((V - 40)/25)/(1 + exp((V - 40)/25));
  by := 25*exp(-(V + 90)/25)/(1 + exp(-(V + 90)/25));
  ay2 := 0.03/(1 + exp((V + 60)/5));
  by2 := 0.2*exp((V + 25)/5)/(1 + exp((V + 25)/5));
  ay3 := 0.00225/(1 + exp((V + 60)/5));
  by3 := 0.1*exp((V + 25)/5)/(1 + exp((V + 25)/5));
  Ito := gitodv*ydv^3*ydv2*zdv*rv*(V - EK);
  sigma := (exp(Na_o/67.3) - 1)/7;
  fnak := 1/(1 + 0.1245*exp(-0.1*V*FonRT) + 0.0365*sigma*exp(-V*FonRT));
  INaK := ibarnak*fnak*1/(1 + (kmnai/Na_i)^2)*K_o/(K_o + kmko);
  ca_i_NaCa := 1.5*Ca_i;
  allo := 1/(1 + (KmCa/ca_i_NaCa)^2);
  num := Na_i^3*Ca_o*exp(eta*V*FonRT) - Na_o^3*ca_i_NaCa*exp((eta - 1)*V*FonRT);
  denom1 := 1 + ksat*exp((eta - 1)*V*FonRT);
  denom2 := KmCao*Na_i^3 + KmNao^3*ca_i_NaCa + KmNai^3*Ca_o*(1 + ca_i_NaCa/KmCai);
  denom3 := KmCai*Na_o^3*(1 + (Na_i/KmNai)^3) + Na_i^3*Ca_o + Na_o^3*ca_i_NaCa;
  INaCa := NCXmax*allo*num/(denom1*(denom2 + denom3));
  IKp := 0.00276*(V - EK)/(1 + exp((7.488 - V)/5.98));
  IpCa := ibarpca*Ca_i/(kmpca + Ca_i);
  ICab := 1.995084e-7*4*V*F*FonRT*(Ca_i*exp(2*V*FonRT) - 0.341*Ca_o)/(exp(2*V*FonRT) - 1);
  Ito2_max := PCl*V*F*FonRT*(Cl_i - Cl_o*exp(V*FonRT))/(1 - exp(V*FonRT));
  AAss := 1/(1 + Kmto2/Ca_ss);
  Ito2 := Ito2_max*AA;
  IClb := GClb*(V - ECl);
  ENa := ln(Na_o/Na_i)/FonRT;
  INal := GNaL*mL^3*hL*(V - ENa);
  INa := gNa*(V - ENa);
  amL := 0.32*1*(V + 47.13)/(1 - exp(-0.1*(V + 47.13)));
  bmL := 0.08*exp(-V/11);
  hLss := 1/(1 + exp((V + 91)/6.1));
  ECl := -ln(Cl_o/Cl_i)/FonRT;
  Grel := 3000*vg;
  vg := piecewise(1/(1 + exp((ibarca + 13)/5)), tissue == 0, 1);
  cafac := 1/(1 + exp((ICaL + 0.05)/0.015));
  dro_inf := Ca_jsr^1.9/(Ca_jsr^1.9 + (49.28*Ca_ss/(Ca_ss + 0.0028))^1.9);
  dtau_rel := dtau_rel_max*CaMKactive/(KmCaMK + CaMKactive);
  ross := dro_inf/((1/ICaL)^2 + 1);
  riss := 1/(1 + exp((Ca_ss - 0.0004 + 0.002*cafac)/2.5e-5));
  tauri := 3 + dtau_rel + (350 - dtau_rel)/(1 + exp((Ca_ss - 0.003 + 0.003*cafac)/0.0002));
  irelcicr := Grel*ro*ri*(Ca_jsr - Ca_ss);
  dKmPLB := dKmPLBmax*CaMKactive/(KmCaMK + CaMKactive);
  dJup := dJupmax*CaMKactive/(KmCaMK + CaMKactive);
  iup := (dJup + 1)*iupmax*Ca_i/(Ca_i + Kmup - dKmPLB);
  ileak := iupmax*Ca_nsr/nsrmax;
  idiff := (Ca_ss - Ca_i)/0.2;
  itr := (Ca_nsr - Ca_jsr)/120;
  CTNaCl := CTNaClmax*(ENa - ECl)^4/((ENa - ECl)^4 + 87.8251^4);
  CTKCl := CTKClmax*(EK - ECl)/(EK - ECl + 87.8251);
  bcsqn := 1/(1 + kmcsqn*csqnbar/(Ca_jsr + kmcsqn)^2);
  bmyo := 1/(1 + cbar*kmc/(Ca_i + kmc)^2 + kmt*tbar/(Ca_i + kmt)^2);
  bss := 1/(1 + BSRmax*KmBSR/(KmBSR + Ca_ss)^2 + BSLmax*KmBSL/(KmBSL + Ca_ss)^2);
  caiont := ICaL + ICab + IpCa - 2*INaCa;
  naiont := INa + 3*INaCa + 3*INaK + INal;
  kiont := IKr + IKs + IK1 + IKp - 2*INaK + Ito + 0.5*i_Stim;
  clont := IClb + Ito2 + 0.5*i_Stim;

  // Rate rules:
  V' = -(naiont + kiont + caiont + clont);
  H' = ah*(1 - H) - bh*H;
  m' = am*(1 - m) - bm*m;
  J' = aj*(1 - J) - bj*J;
  d' = (dss - d)/taud;
  dp' = (dpss - dp)/10;
  f' = (fss - f)/tauf;
  f2' = (f2ss - f2)/tauf2;
  fca' = (fcass - fca)/taufca;
  fca2' = (fca2ss - fca2)/taufca2;
  xr' = (xrss - xr)/tauxr;
  xs1' = (xss - xs1)/tauxs;
  xs2' = (xss - xs2)/tauxs/2;
  ydv' = ay*(1 - ydv) - by*ydv;
  ydv2' = ay2*(1 - ydv2) - by2*ydv2;
  zdv' = ay3*(1 - zdv) - by3*zdv;
  AA' = (AAss - AA)/1;
  mL' = amL*(1 - mL) - bmL*mL;
  hL' = (hLss - hL)/600;
  ro' = (ross - ro)/3;
  ri' = (riss - ri)/tauri;
  CaMKtrap' = 0.05*CaMKactive*(CaMKactive - CaMKtrap) - 0.00068*CaMKtrap;
  Na_i' = CTNaCl - 1*naiont*AF/vmyo;
  K_i' = CTKCl - 1*kiont*AF/vmyo;
  Cl_i' = 1*AF*(clont/vmyo) + CTNaCl + CTKCl;
  Ca_i' = bmyo*(-(ICab + IpCa - 2*INaCa)*AF/(vmyo*2) + (ileak - iup)*vnsr/vmyo + idiff*vss/vmyo);
  Ca_ss' = bss*(-ICaL*AF/(vss*2) + irelcicr*vjsr/vss - idiff);
  Ca_nsr' = iup - itr*(vjsr/vnsr) - ileak;
  Ca_jsr' = bcsqn*(itr - irelcicr);

  // Unit definitions:
  unit ms = 1e-3 second;
  unit per_ms = 1 / (1e-3 second);
  unit uA_per_uF = 1e-6 ampere / (1e-6 farad);
  unit mS_per_uF = 1e-3 siemens / (1e-6 farad);
  unit uL = 1e-6 litre;
  unit mV = 1e-3 volt;
  unit per_mV = 1 / (1e-3 volt);
  unit uF = 1e-6 farad;
  unit cm = 0.01 metre;
  unit cm2 = (0.01 metre)^2;
  unit mJ_per_mole_K = 1e-3 joule / (mole * kelvin);
  unit C_per_mole = coulomb / mole;
  unit mM = 1e-3 mole / litre;
  unit mM_per_ms = 1e-3 mole / (litre * 1e-3 second);
  unit mM4 = (1e-3 mole)^4 / litre^4;
  unit uF_per_cm2 = 1e-6 farad / (0.01 metre)^2;
  unit uF_mole_per_C = 1e-6 farad * mole / coulomb;
  unit L_per_F_ms = litre / (farad * 1e-3 second);
  unit time = 1e-3 second;
end
