// SBML level 2 version 3

model Hornberg2005_MAPKsignalling()
  // This a model from the article:
  // Control of MAPK signalling: from complexity to what really matters.
  // Hornberg JJ, Binder B, Bruggeman FJ, Schoeberl B, Heinrich R, Westerhoff HV. Oncogene 2005 Aug 25;24(36):5533-42 16007170 ,
  // Abstract:
  // Oncogenesis results from changes in kinetics or in abundance of proteins in signal transduction networks. Recently, it was shown that control of signalling cannot reside in a single gene product, and might well be dispersed over many components. Which of the reactions in these complex networks are most important, and how can the existing molecular information be used to understand why particular genes are oncogenes whereas others are not? We implement a new method to help address such questions. We apply control analysis to a detailed kinetic model of the epidermal growth factor-induced mitogen-activated protein kinase network. We determine the control of each reaction with respect to three biologically relevant characteristics of the output of this network: the amplitude, duration and integrated output of the transient phosphorylation of extracellular signal-regulated kinase (ERK). We confirm that control is distributed, but far from randomly: a small proportion of reactions substantially control signalling. In particular, the activity of Raf is in control of all characteristics of the transient profile of ERK phosphorylation, which may clarify why Raf is an oncogene. Most reactions that really matter for one signalling characteristic are also important for the other characteristics. Our analysis also predicts the effects of mutations and changes in gene expression.
  // This model was taken from the CellML repository and automatically converted to SBML.
  // The original model was: Hornberg JJ, Binder B, Bruggeman FJ, Schoeberl B, Heinrich R, Westerhoff HV. (2005) - version02
  // The original CellML model was created by:
  // Lloyd, Catherine, May
  // c.lloyd@aukland.ac.nz
  // The University of Auckland
  // The Bioengineering Institute
  // This model originates from BioModels Database: A Database of Annotated Published Models (http://www.ebi.ac.uk/biomodels/). It is copyright (c) 2005-2011 The BioModels.net Team.
  // To the extent possible under law, all copyright and related or neighbouring rights to this encoded model have been dedicated to the public domain worldwide. Please refer to CC0 Public Domain Dedication for more information.
  // In summary, you are entitled to use this encoded model in absolutely any manner you deem suitable, verbatim, or with modification, alone or embedded it in a larger context, redistribute it, commercially or not, in a restricted way or not..
  // To cite BioModels Database, please use: Li C, Donizelli M, Rodriguez N, Dharuri H, Endler L, Chelliah V, Li L, He E, Henry A, Stefan MI, Snoep JL, Hucka M, Le Novère N, Laibe C (2010) BioModels Database: An enhanced, curated and annotated resource for published quantitative kinetic models. BMC Syst Biol., 4:92.
  // biomodels.db:MODEL0848279215
  // isDescribedBy pubmed:16007170
  // biomodels.db:MODEL0848279215
  // isDescribedBy pubmed:16007170
  // biomodels.db:MODEL0848279215
  // biomodels.db:MODEL0848279215

  // Compartments:
  compartment Compartment = 1 litre;

  // Parameters:
  c1 = 5e-8 molar;
  c2 = 50000 molar;
  c3 = 0 molar;
  c4 = 0 molar;
  c5 = 0 molar;
  c6 = 0 molar;
  c7 = 0 molar;
  c8 = 0 molar;
  c9 = 0 molar;
  c10 = 0 molar;
  c11 = 0 molar;
  c12 = 81000 molar;
  c13 = 0 molar;
  c14 = 12000 molar;
  c15 = 0 molar;
  c16 = 0 molar;
  c17 = 0 molar;
  c18 = 0 molar;
  c19 = 0 molar;
  c20 = 0 molar;
  c21 = 0 molar;
  c22 = 11000 molar;
  c23 = 0 molar;
  c24 = 26300 molar;
  c25 = 0 molar;
  c26 = 72000 molar;
  c27 = 0 molar;
  c28 = 0 molar;
  c29 = 0 molar;
  c30 = 40000 molar;
  c31 = 101000 molar;
  c32 = 0 molar;
  c33 = 0 molar;
  c34 = 0 molar;
  c35 = 0 molar;
  c36 = 0 molar;
  c37 = 0 molar;
  c38 = 0 molar;
  c39 = 0 molar;
  c40 = 0 molar;
  c41 = 40000 molar;
  c42 = 0 molar;
  c43 = 0 molar;
  c44 = 40000 molar;
  c45 = 0 molar;
  c46 = 0 molar;
  c47 = 21000000 molar;
  c48 = 0 molar;
  c49 = 0 molar;
  c50 = 0 molar;
  c51 = 0 molar;
  c52 = 0 molar;
  c53 = 40000 molar;
  c54 = 0 molar;
  c55 = 22100000 molar;
  c56 = 0 molar;
  c57 = 0 molar;
  c58 = 0 molar;
  c59 = 0 molar;
  c60 = 10000000 molar;
  c61 = 0 molar;
  c62 = 0 molar;
  c63 = 0 molar;
  c64 = 0 molar;
  c65 = 0 molar;
  c66 = 0 molar;
  c67 = 0 molar;
  c68 = 0 molar;
  c69 = 0 molar;
  c70 = 0 molar;
  c71 = 0 molar;
  c72 = 0 molar;
  c73 = 0 molar;
  c74 = 0 molar;
  c75 = 0 molar;
  c76 = 0 molar;
  c77 = 0 molar;
  c78 = 0 molar;
  c79 = 0 molar;
  c80 = 0 molar;
  c81 = 0 molar;
  c82 = 0 molar;
  c83 = 0 molar;
  c84 = 0 molar;
  c85 = 0 molar;
  c86 = 0 molar;
  c87 = 0 molar;
  c88 = 0 molar;
  c89 = 0 molar;
  c90 = 0 molar;
  c91 = 0 molar;
  c92 = 0 molar;
  c93 = 0 molar;
  c94 = 0 molar;
  c95 = 0 molar;
  c96 = 0 molar;
  c97 = 0 molar;
  c98 = 0 molar;
  c99 = 0 molar;
  c100 = 0 molar;
  c101 = 0 molar;
  c102 = 0 molar;
  c103 = 0 molar;
  v1 has flux;
  v2 has flux;
  v3 has flux;
  v4 has flux;
  v5 has flux;
  v6 has flux;
  v7 has flux;
  v8 has flux;
  v9 has flux;
  v10 has flux;
  v11 has flux;
  v12 has flux;
  v13 has flux;
  v14 has flux;
  v15 has flux;
  v16 has flux;
  v17 has flux;
  v18 has flux;
  v19 has flux;
  v20 has flux;
  v21 has flux;
  v22 has flux;
  v23 has flux;
  v24 has flux;
  v25 has flux;
  v26 has flux;
  v27 has flux;
  v28 has flux;
  v29 has flux;
  v30 has flux;
  v31 has flux;
  v32 has flux;
  v33 has flux;
  v34 has flux;
  v35 has flux;
  v36 has flux;
  v37 has flux;
  v38 has flux;
  v39 has flux;
  v40 has flux;
  v41 has flux;
  v42 has flux;
  v43 has flux;
  v44 has flux;
  v45 has flux;
  v46 has flux;
  v47 has flux;
  v48 has flux;
  v49 has flux;
  v50 has flux;
  v51 has flux;
  v52 has flux;
  v53 has flux;
  v54 has flux;
  v55 has flux;
  v56 has flux;
  v57 has flux;
  v58 has flux;
  v59 has flux;
  v60 has flux;
  v61 has flux;
  v62 has flux;
  v63 has flux;
  v64 has flux;
  v65 has flux;
  v66 has flux;
  v67 has flux;
  v68 has flux;
  v69 has flux;
  v70 has flux;
  v71 has flux;
  v72 has flux;
  v73 has flux;
  v74 has flux;
  v75 has flux;
  v76 has flux;
  v77 has flux;
  v78 has flux;
  v79 has flux;
  v80 has flux;
  v81 has flux;
  v82 has flux;
  v83 has flux;
  v84 has flux;
  v85 has flux;
  v86 has flux;
  v87 has flux;
  v88 has flux;
  v89 has flux;
  v90 has flux;
  v91 has flux;
  v92 has flux;
  v93 has flux;
  v94 has flux;
  v95 has flux;
  v96 has flux;
  v97 has flux;
  v98 has flux;
  v99 has flux;
  v100 has flux;
  v101 has flux;
  v102 has flux;
  v103 has flux;
  v104 has flux;
  v105 has flux;
  v106 has flux;
  v107 has flux;
  v108 has flux;
  v109 has flux;
  v110 has flux;
  v111 has flux;
  v112 has flux;
  v113 has flux;
  v114 has flux;
  v115 has flux;
  v116 has flux;
  v117 has flux;
  v118 has flux;
  v119 has flux;
  v120 has flux;
  v121 has flux;
  v122 has flux;
  v123 has flux;
  v124 has flux;
  v125 has flux;
  v126 has flux;
  v127 has flux;
  v128 has flux;
  v129 has flux;
  v130 has flux;
  v131 has flux;
  v132 has flux;
  v133 has flux;
  v134 has flux;
  v135 has flux;
  v136 has flux;
  v137 has flux;
  v138 has flux;
  v139 has flux;
  v140 has flux;
  v141 has flux;
  v142 has flux;
  v143 has flux;
  v144 has flux;
  v145 has flux;
  v146 has flux;
  v147 has flux;
  v148 has flux;
  k1 = 30000000 second_order_rate_constant;
  kd1 = 0.00384 first_order_rate_constant;
  k2 = 1.66e-5 second_order_rate_constant;
  kd2 = 0.1 first_order_rate_constant;
  k3 = 1 first_order_rate_constant;
  kd3 = 0.01 first_order_rate_constant;
  k4 = 1.73e-7 second_order_rate_constant;
  kd4 = 0.00166 first_order_rate_constant;
  kd5 = 0.0146 first_order_rate_constant;
  k5 = 0 second_order_rate_constant;
  k6 = 0.0005 first_order_rate_constant;
  kd6 = 0.005 first_order_rate_constant;
  k8 = 1.66e-6 second_order_rate_constant;
  kd8 = 0.2 first_order_rate_constant;
  k10b = 0.0543 second_order_rate_constant;
  kd10 = 0.011 first_order_rate_constant;
  k13 = 2.17 first_order_rate_constant;
  kd13 = 0 first_order_rate_constant;
  k15 = 10000 first_order_rate_constant;
  kd15 = 0 first_order_rate_constant;
  k16 = 1.66e-5 second_order_rate_constant;
  k17 = 1.66e-5 second_order_rate_constant;
  kd17 = 0.06 first_order_rate_constant;
  k18 = 2.5e-5 second_order_rate_constant;
  kd18 = 1.3 first_order_rate_constant;
  k19 = 1.66e-7 second_order_rate_constant;
  kd19 = 0.5 first_order_rate_constant;
  k20 = 3.5e-6 second_order_rate_constant;
  kd20 = 0.4 first_order_rate_constant;
  k21 = 3.66e-7 second_order_rate_constant;
  kd21 = 0.023 first_order_rate_constant;
  k22 = 3.5e-5 second_order_rate_constant;
  kd22 = 0.1 first_order_rate_constant;
  k23 = 6 first_order_rate_constant;
  kd23 = 0.06 first_order_rate_constant;
  kd24 = 0.55 first_order_rate_constant;
  k25 = 1.66e-5 second_order_rate_constant;
  kd25 = 0.0214 first_order_rate_constant;
  k28 = 1.66e-6 second_order_rate_constant;
  kd28 = 0.0053 first_order_rate_constant;
  k29 = 1.17e-6 second_order_rate_constant;
  kd29 = 1 first_order_rate_constant;
  k32 = 4e-7 second_order_rate_constant;
  kd32 = 0.1 first_order_rate_constant;
  k33 = 3.5e-5 second_order_rate_constant;
  kd33 = 0.2 first_order_rate_constant;
  k34 = 7.5e-6 second_order_rate_constant;
  kd34 = 0.03 first_order_rate_constant;
  k35 = 7.5e-6 second_order_rate_constant;
  kd35 = 0.0015 first_order_rate_constant;
  k36 = 0.005 first_order_rate_constant;
  kd36 = 0 first_order_rate_constant;
  k37 = 1.5e-6 second_order_rate_constant;
  kd37 = 0.3 first_order_rate_constant;
  k40 = 5e-5 second_order_rate_constant;
  kd40 = 0.064 first_order_rate_constant;
  k41 = 5e-5 second_order_rate_constant;
  kd41 = 0.0429 first_order_rate_constant;
  k42 = 0.000118 second_order_rate_constant;
  kd42 = 0.2 first_order_rate_constant;
  k43 = 0 second_order_rate_constant;
  kd43 = 1 first_order_rate_constant;
  k44 = 1.95e-5 second_order_rate_constant;
  kd44 = 0.0183 first_order_rate_constant;
  k45 = 0 second_order_rate_constant;
  kd45 = 3.5 first_order_rate_constant;
  k47 = 0 second_order_rate_constant;
  kd47 = 2.9 first_order_rate_constant;
  k48 = 2.38e-5 second_order_rate_constant;
  kd48 = 0.8 first_order_rate_constant;
  k49 = 0 second_order_rate_constant;
  kd49 = 0.0568 first_order_rate_constant;
  k50 = 4.5e-7 second_order_rate_constant;
  kd50 = 0.5 first_order_rate_constant;
  k52 = 8.91e-5 second_order_rate_constant;
  kd52 = 0.033 first_order_rate_constant;
  k53 = 0 second_order_rate_constant;
  kd53 = 16 first_order_rate_constant;
  k55 = 0 second_order_rate_constant;
  kd55 = 5.7 first_order_rate_constant;
  k56 = 2.35e-5 second_order_rate_constant;
  kd56 = 0.6 first_order_rate_constant;
  k57 = 0 second_order_rate_constant;
  kd57 = 0.246 first_order_rate_constant;
  k58 = 8.33e-6 second_order_rate_constant;
  kd58 = 0.5 first_order_rate_constant;
  k60 = 0.0055 first_order_rate_constant;
  kd60 = 0 first_order_rate_constant;
  k61 = 0.00067 first_order_rate_constant;
  kd61 = 0 first_order_rate_constant;
  kd63 = 0.275 first_order_rate_constant;
  k126 = 1.66e-7 second_order_rate_constant;
  kd126 = 2 first_order_rate_constant;
  k127 = 0 second_order_rate_constant;
  kd127 = 0.0001 first_order_rate_constant;

  // Assignment rules:
  v1 := k1*c1*c2 - kd1*c3;
  v2 := k2*c3*c3 - kd2*c4;
  v3 := k3*c4*1 - kd3*c5;
  v4 := k4*c23*c12 - kd4*c7;
  v5 := k5*c18*c9 - kd5*c7;
  v6 := k6*c2 - kd6*c6;
  v7 := k6*c5 - kd6*c8;
  v8 := k8*c5*c14 - kd8*c15;
  v9 := k6*c23 - kd6*c18;
  v10 := k10b*c6*c16 - kd10*c10;
  v11 := k2*c10*c10 - kd2*c11;
  v12 := k3*c11 - kd3*c8;
  v13 := k13*1 - kd13*c2;
  v14 := k8*c8*c14 - kd8*c17;
  v15 := k15*c9 - kd15*c12;
  v16 := k16*c22*c15 - kd63*c23;
  v17 := k17*c24*c23 - kd17*c25;
  v18 := k18*c26*c25 - kd18*c27;
  v19 := k19*c28*c25 - kd19*c27;
  v20 := k20*c25*c43 - kd20*c29;
  v21 := k21*c25*c26 - kd21*c29;
  v22 := k22*c31*c15 - kd22*c32;
  v23 := k23*c32 - kd23*c33;
  v24 := k16*c22*c33 - kd24*c34;
  v25 := k25*c24*c34 - kd25*c35;
  v26 := k18*c26*c35 - kd18*c36;
  v27 := k19*c35*c28 - kd19*c36;
  v28 := k28*c28*c41 - kd28*c42;
  v29 := k29*c43*c45 - kd29*c42;
  v30 := k20*c35*c43 - kd20*c37;
  v31 := k21*c35*c26 - kd21*c37;
  v32 := k32*c38*c15 - kd32*c35;
  v33 := k33*c40*c30 - kd33*c38;
  v34 := k34*c15*c30 - kd34*c25;
  v35 := k35*c24*c22 - kd35*c30;
  v36 := k36*c40 - kd36*c31;
  v37 := k37*c15*c40 - kd37*c33;
  v38 := k16*c22*c40 - kd24*c39;
  v39 := k37*c15*c39 - kd37*c34;
  v40 := k40*c24*c39 - kd40*c38;
  v41 := k41*c30*c33 - kd41*c35;
  v42 := k42*c44*c45 - kd42*c46;
  v43 := k43*c41*c44 - kd43*c46;
  v44 := k44*c47*c45 - kd52*c48;
  v45 := k45*c49*c45 - kd45*c48;
  v46 := k44*c49*c45 - kd52*c50;
  v47 := k47*c51*c45 - kd47*c50;
  v48 := k48*c51*c53 - kd48*c52;
  v49 := k49*c49*c53 - kd49*c52;
  v50 := k50*c53*c49 - kd50*c54;
  v51 := k49*c47*c53 - kd49*c54;
  v52 := k52*c55*c51 - kd44*c56;
  v53 := k53*c51*c57 - kd53*c56;
  v54 := k52*c51*c57 - kd44*c58;
  v55 := k55*c59*c51 - kd55*c58;
  v56 := k56*c59*c60 - kd56*c61;
  v57 := k57*c57*c60 - kd57*c61;
  v58 := k58*c60*c57 - kd58*c62;
  v59 := k57*c55*c60 - kd57*c62;
  v60 := k60*c6 - kd60*c86;
  v61 := k61*c16 - kd61*c13;
  v62 := k60*c8 - kd60*c87;
  v63 := k16*c17*c22 - kd63*c18;
  v64 := k17*c24*c18 - kd17*c19;
  v65 := k18*c26*c19 - kd18*c20;
  v66 := k19*c69*c19 - kd19*c20;
  v67 := k20*c71*c19 - kd20*c21;
  v68 := k21*c19*c26 - kd21*c21;
  v69 := k22*c31*c17 - kd22*c63;
  v70 := k23*c63 - kd23*c64;
  v71 := k16*c22*c64 - kd24*c65;
  v72 := k25*c24*c65 - kd25*c66;
  v73 := k18*c26*c66 - kd18*c67;
  v74 := k19*c66*c69 - kd19*c67;
  v75 := k28*c69*c41 - kd28*c70;
  v76 := k29*c71*c72 - kd29*c70;
  v77 := k20*c71*c66 - kd20*c68;
  v78 := k21*c66*c26 - kd21*c68;
  v79 := k32*c17*c38 - kd32*c66;
  v80 := k34*c17*c30 - kd34*c19;
  v81 := k37*c17*c40 - kd37*c64;
  v82 := k37*c17*c39 - kd37*c65;
  v83 := k41*c30*c64 - kd41*c66;
  v84 := k42*c44*c72 - kd42*c73;
  v85 := k43*c41*c44 - kd43*c73;
  v86 := k44*c47*c72 - kd52*c74;
  v87 := k45*c75*c72 - kd45*c74;
  v88 := k44*c72*c75 - kd52*c76;
  v89 := k47*c72*c77 - kd47*c76;
  v90 := k48*c77*c53 - kd48*c78;
  v91 := k49*c75*c53 - kd49*c78;
  v92 := k50*c53*c75 - kd50*c79;
  v93 := k49*c47*c53 - kd49*c79;
  v94 := k52*c55*c77 - kd44*c80;
  v95 := k53*c81*c77 - kd53*c80;
  v96 := k52*c77*c81 - kd44*c82;
  v97 := k55*c83*c77 - kd55*c82;
  v98 := k56*c83*c60 - kd56*c84;
  v99 := k57*c81*c60 - kd57*c84;
  v100 := k58*c60*c81 - kd58*c85;
  v101 := k57*c55*c60 - kd57*c85;
  v102 := k6*c15 - kd6*c17;
  v103 := k6*c32 - kd6*c63;
  v104 := k6*c33 - kd6*c64;
  v105 := k6*c25 - kd6*c19;
  v106 := k4*c25*c12 - kd4*c88;
  v107 := k5*c9*c19 - kd5*c88;
  v108 := k6*c27 - kd6*c20;
  v109 := k4*c27*c12 - kd4*c89;
  v110 := k5*c9*c20 - kd5*c89;
  v111 := k6*c29 - kd6*c21;
  v112 := k4*c29*c12 - kd4*c90;
  v113 := k5*c9*c21 - kd5*c90;
  v114 := k6*c34 - kd6*c65;
  v115 := k4*c34*c12 - kd4*c91;
  v116 := k5*c9*c65 - kd5*c91;
  v117 := k6*c35 - kd6*c66;
  v118 := k4*c35*c12 - kd4*c92;
  v119 := k5*c9*c66 - kd5*c92;
  v120 := k6*c36 - kd6*c67;
  v121 := k4*c36*c12 - kd4*c93;
  v122 := k5*c9*c67 - kd5*c93;
  v123 := k6*c37 - kd6*c68;
  v124 := k4*c37*c12 - kd4*c94;
  v125 := k5*c68*c9 - kd5*c94;
  v126 := k126*c59*c25 - kd126*c95;
  v127 := k126*c83*c19 - kd126*c96;
  v128 := k126*c59*c35 - kd126*c97;
  v129 := k126*c83*c66 - kd126*c98;
  v130 := k126*c59*c24 - kd126*c101;
  v131 := k126*c83*c24 - kd126*c102;
  v132 := k60*c17 - kd60*c87;
  v133 := k60*c18 - kd60*c87;
  v134 := k60*c19 - kd60*c87;
  v135 := k60*c20 - kd60*c87;
  v136 := k60*c21 - kd60*c87;
  v137 := k60*c63 - kd60*c87;
  v138 := k60*c64 - kd60*c87;
  v139 := k60*c65 - kd60*c87;
  v140 := k60*c66 - kd60*c87;
  v141 := k60*c67 - kd60*c87;
  v142 := k60*c68 - kd60*c87;
  v143 := k127*c59*c99 - kd127*c95;
  v144 := k127*c59*c99 - kd127*c97;
  v145 := k127*c59*c103 - kd127*c101;
  v146 := k127*c83*c100 - kd127*c96;
  v147 := k127*c83*c100 - kd127*c98;
  v148 := k127*c83*c103 - kd127*c102;

  // Rate rules:
  c1' = 0;
  c2' = v13 - (v1 + v6);
  c3' = v1 - 2*v2;
  c4' = v2 - v3;
  c5' = v3 - (v7 + v8);
  c6' = v6 - (v10 + v60);
  c7' = v4 + v5;
  c8' = v7 + v12 - (v14 + v62);
  c9' = -(v5 + v15 + v107 + v110 + v113 + v116 + v119 + v122 + v125);
  c10' = v10 - 2*v11;
  c11' = v11 - v12;
  c12' = v15 - (v4 + v106 + v109 + v112 + v115 + v118 + v121 + v124);
  c13' = v61;
  c14' = -(v8 + v14);
  c15' = v8 - (v16 + v22 + v32 + v34 + v37 + v39 + v102);
  c16' = -(v10 + v61);
  c17' = v14 + v102 - (v63 + v69 + v79 + v80 + v81 + v82 + v132);
  c18' = v9 + v63 - (v5 + v64 + v133);
  c19' = v80 + v64 + v105 - (v65 + v66 + v67 + v68 + v107 + v127 + v134);
  c20' = v65 + v66 + v108 - (v110 + v135);
  c21' = v67 + v68 + v111 - (v113 + v136);
  c22' = -(v16 + v24 + v35 + v38 + v63 + v71);
  c23' = v16 - (v4 + v9 + v17);
  c24' = -(v17 + v25 + v35 + v40 + v64 + v72 + v130 + v131);
  c25' = v17 + v34 - (v18 + v19 + v20 + v21 + v105 + v106 + v126);
  c26' = -(v18 + v21 + v26 + v31 + v65 + v68 + v73 + v78);
  c27' = v18 + v19 - (v108 + v109);
  c28' = -(v19 + v27 + v28);
  c29' = v20 + v21 - (v111 + v112);
  c30' = v35 - (v33 + v34 + v41 + v80 + v83);
  c31' = v36 - (v22 + v69);
  c32' = v22 - (v23 + v103);
  c33' = v23 + v37 - (v24 + v41 + v104);
  c34' = v39 + v24 - (v25 + v114 + v115);
  c35' = v25 + v32 + v41 - (v117 + v118 + v128 + v26 + v27 + v30 + v31);
  c36' = v27 + v26 - (v120 + v121);
  c37' = v30 + v31 - (v123 + v124);
  c38' = v33 + v40 - (v32 + v79);
  c39' = v38 - (v39 + v40 + v82);
  c40' = -(v33 + v36 + v37 + v38 + v81);
  c41' = -(v28 + v43 + v75 + v85);
  c42' = v28 + v29;
  c43' = -(v29 + v20 + v30);
  c44' = -(v42 + v43 + v84 + v85);
  c45' = -(v29 + v42 + v44 + v45 + v46 + v47);
  c46' = v42 + v43;
  c47' = -(v44 + v51 + v86 + v93);
  c48' = v44 + v45;
  c49' = -(v45 + v46 + v49 + v50);
  c50' = v46 + v47;
  c51' = -(v47 + v53 + v55 + v48 + v52 + v54);
  c52' = v48 + v49;
  c53' = -(v48 + v49 + v50 + v51 + v90 + v91 + v92 + v93);
  c54' = v50 + v51;
  c55' = -(v52 + v59 + v94 + v101);
  c56' = v52 + v53;
  c57' = -(v53 + v54 + v57 + v58);
  c58' = v54 + v55;
  c59' = -(v55 + v56 + v126 + v128 + v130 + v143 + v144 + v145);
  c60' = -(v56 + v57 + v58 + v59 + v98 + v99 + v100 + v101);
  c61' = v56 + v57;
  c62' = v58 + v59;
  c63' = v69 + v103 - (v70 + v137);
  c64' = v70 + v81 + v104 - (v71 + v83 + v138);
  c65' = v71 + v82 + v114 - (v72 + v116 + v139);
  c66' = v72 + v79 + v83 + v117 - (v73 + v74 + v77 + v78 + v119 + v129 + v140);
  c67' = v73 + v74 + v120 - (v122 + v141);
  c68' = v77 + v78 + v123 - (v125 + v142);
  c69' = -(v66 + v74 + v75);
  c70' = v75 + v76;
  c71' = -(v67 + v76 + v77);
  c72' = -(v76 + v84 + v86 + v87 + v88 + v89);
  c73' = v84 + v85;
  c74' = v86 + v87;
  c75' = -(v87 + v88 + v91 + v92);
  c76' = v88 + v89;
  c77' = -(v89 + v90 + v94 + v95 + v96 + v97);
  c78' = v90 + v91;
  c79' = v92 + v93;
  c80' = v94 + v95;
  c81' = -(v95 + v96 + v99 + v100);
  c82' = v96 + v97;
  c83' = -(v97 + v98 + v127 + v129 + v131 + v146 + v147 + v148);
  c84' = v98 + v99;
  c85' = v100 + v101;
  c86' = v60;
  c87' = v62 + v132 + v133 + v134 + v135 + v136 + v137 + v138 + v139 + v140 + v141 + v142;
  c88' = v106 + v107;
  c89' = v109 + v110;
  c90' = v112 + v113;
  c91' = v115 + v116;
  c92' = v118 + v119;
  c93' = v121 + v122;
  c94' = v124 + v125;
  c95' = v126 + v143;
  c96' = v127 + v146;
  c97' = v128 + v144;
  c98' = v129 + v147;
  c99' = -(v143 + v144);
  c100' = -(v146 + v147);
  c101' = v130 + v145;
  c102' = v131 + v148;
  c103' = -(v145 + v148);

  // Unit definitions:
  unit molar = mole / litre;
  unit flux = mole / (litre * second);
  unit first_order_rate_constant = 1 / second;
  unit second_order_rate_constant = litre / (mole * second);
end
