// SBML level 2 version 3

model Hinch2004_VentricularMyocytes()
  // This a model from the article:
  // A simplified local control model of calcium-induced calcium release in cardiac ventricular myocytes.
  // Hinch R, Greenstein JL, Tanskanen AJ, Xu L, Winslow RL. Biophys J 2004 Dec;87(6):3723-36 15465866 ,
  // Abstract:
  // Calcium (Ca2+)-induced Ca2+ release (CICR) in cardiac myocytes exhibits high gain and is graded. These properties result from local control of Ca2+ release. Existing local control models of Ca2+ release in which interactions between L-Type Ca2+ channels (LCCs) and ryanodine-sensitive Ca2+ release channels (RyRs) are simulated stochastically are able to reconstruct these properties, but only at high computational cost. Here we present a general analytical approach for deriving simplified models of local control of CICR, consisting of low-dimensional systems of coupled ordinary differential equations, from these more complex local control models in which LCC-RyR interactions are simulated stochastically. The resulting model, referred to as the coupled LCC-RyR gating model, successfully reproduces a range of experimental data, including L-Type Ca2+ current in response to voltage-clamp stimuli, inactivation of LCC current with and without Ca2+ release from the sarcoplasmic reticulum, voltage-dependence of excitation-contraction coupling gain, graded release, and the force-frequency relationship. The model does so with low computational cost.
  // This model was taken from the CellML repository and automatically converted to SBML.
  // The original model was: Hinch R, Greenstein JL, Tanskanen AJ, Xu L, Winslow RL. (2004) - version02
  // The original CellML model was created by:
  // Terkildsen, Jonna,
  // j.terkildsen@auckland.ac.nz
  // University of Auckland
  // Auckland Bioengineering Institute
  // This model originates from BioModels Database: A Database of Annotated Published Models (http://www.ebi.ac.uk/biomodels/). It is copyright (c) 2005-2011 The BioModels.net Team.
  // To the extent possible under law, all copyright and related or neighbouring rights to this encoded model have been dedicated to the public domain worldwide. Please refer to CC0 Public Domain Dedication for more information.
  // In summary, you are entitled to use this encoded model in absolutely any manner you deem suitable, verbatim, or with modification, alone or embedded it in a larger context, redistribute it, commercially or not, in a restricted way or not..
  // To cite BioModels Database, please use: Li C, Donizelli M, Rodriguez N, Dharuri H, Endler L, Chelliah V, Li L, He E, Henry A, Stefan MI, Snoep JL, Hucka M, Le Novère N, Laibe C (2010) BioModels Database: An enhanced, curated and annotated resource for published quantitative kinetic models. BMC Syst Biol., 4:92.
  // biomodels.db:MODEL0848342500
  // isDescribedBy pubmed:15465866
  // biomodels.db:MODEL0848342500
  // isDescribedBy pubmed:15465866
  // biomodels.db:MODEL0848342500
  // biomodels.db:MODEL0848342500

  // Compartments:
  compartment Compartment = 1 litre;

  // Parameters:
  V_myo_cell_geometry = 25840 um3;
  V_SR = 2098 um3;
  A_cap = 15340 um2;
  V_membrane has mV;
  R = 8314.5 mJ_per_mole_K;
  T = 295 kelvin;
  F = 96487 C_per_mole;
  FVRT has dimensionless;
  FVRT_Ca_membrane has dimensionless;
  g_D = 0.065 um3_per_ms;
  J_R = 0.02 um3_per_ms;
  J_L = 0.000913 um3_per_ms;
  N = 50000 dimensionless;
  V_CaRU_Transitions has mV;
  Ca_i_CaRU_Transitions has mM;
  V_L = -2 mV;
  del_VL = 7 mV;
  phi_L = 2.35 dimensionless;
  t_L = 1 ms;
  tau_L = 650 ms;
  t_R has ms;
  tau_R = 2.43 ms;
  phi_R = 0.05 dimensionless;
  theta_R = 0.012 dimensionless;
  K_RyR = 0.041 mM;
  K_L = 0.00022 mM;
  a = 0.0625 dimensionless;
  b = 14 dimensionless;
  c = 0.01 dimensionless;
  d = 100 dimensionless;
  expVL has dimensionless;
  alpha_p has per_ms;
  alpha_m has per_ms;
  beta_poc has per_ms;
  beta_pcc has per_ms;
  beta_m has per_ms;
  epsilon_pco has per_ms;
  epsilon_pcc has per_ms;
  epsilon_m has per_ms;
  mu_poc has per_ms;
  mu_pcc has per_ms;
  mu_moc has per_ms;
  mu_mcc has per_ms;
  Ca_i_DS_Calcium_Concentrations has mM;
  Ca_SR_DS_Calcium_Concentrations has mM;
  Ca_o_DS_Calcium_Concentrations has mM;
  FVRT_Ca_DS_Calcium_Concentrations has dimensionless;
  C_cc has mM;
  C_oc has mM;
  C_co has mM;
  C_oo has mM;
  Ca_i_LCC_and_RyR_fluxes has mM;
  Ca_SR_LCC_and_RyR_fluxes has mM;
  Ca_o_LCC_and_RyR_fluxes has mM;
  FVRT_Ca_LCC_and_RyR_fluxes has dimensionless;
  J_Loo has um3_mM_per_ms;
  J_Loc has um3_mM_per_ms;
  J_Rco has um3_mM_per_ms;
  J_Roo has um3_mM_per_ms;
  denom has per_ms3;
  y_oc has dimensionless;
  y_co has dimensionless;
  y_oo has dimensionless;
  y_cc has dimensionless;
  y_ci has dimensionless;
  y_oi has dimensionless;
  y_ic has dimensionless;
  y_io has dimensionless;
  y_ii has dimensionless;
  r_1 has per_ms;
  r_2 has per_ms;
  r_3 has per_ms;
  r_4 has per_ms;
  r_5 has per_ms;
  r_6 has per_ms;
  r_7 has per_ms;
  r_8 has per_ms;
  z_1 = 0.98859 dimensionless;
  z_2 = 0.0087302 dimensionless;
  z_3 = 0.0026566 dimensionless;
  z_4 has dimensionless;
  time_CaRU_reduced_states has ms;
  V_myo_RyR_current has um3;
  J_R1 has um3_mM_per_ms;
  J_R3 has um3_mM_per_ms;
  I_RyR has mM_per_ms;
  V_myo_LCC_current has um3;
  J_L1 has um3_mM_per_ms;
  J_L2 has um3_mM_per_ms;
  I_LCC has mM_per_ms;
  K_mNa = 87.5 mM;
  K_mCa = 1.38 mM;
  eta = 0.35 dimensionless;
  k_sat = 0.1 dimensionless;
  g_NCX = 0.0385 mM_per_ms;
  I_NaCa has mM_per_ms;
  g_SERCA = 0.00045 mM_per_ms;
  K_SERCA = 0.0005 mM;
  I_SERCA has mM_per_ms;
  g_pCa = 3.5e-6 mM_per_ms;
  K_mpCa = 0.0005 mM;
  I_pCa has mM_per_ms;
  E_Ca has mV;
  g_CaB = 2.6875e-8 mM_per_mV_ms;
  I_CaB has mM_per_ms;
  g_SRl = 1.8951e-5 per_ms;
  I_SR has mM_per_ms;
  k_m_TRPN = 0.04 per_ms;
  k_p_TRPN = 40 per_mM_ms;
  B_TRPN = 0.07 mM;
  I_TRPN has mM_per_ms;
  k_CMDN = 0.002382 mM;
  B_CMDN = 0.05 mM;
  beta_CMDN has dimensionless;
  Na_i = 10 mM;
  Ca_i_intracellular_ion_concentrations = 0.0001 mM;
  Ca_SR_intracellular_ion_concentrations = 0.7 mM;
  TRPN = 0.0636364 mM;
  CaSR_plot has mM;
  Na_o = 140 mM;
  Ca_o_extracellular_ion_concentrations = 1 mM;

  // Assignment rules:
  FVRT := F*V_membrane/(R*T);
  FVRT_Ca_membrane := 2*FVRT;
  V_membrane := piecewise(0, (time >= 0) && (time <= 200), -80);
  expVL := exp((V_CaRU_Transitions - V_L)/del_VL);
  t_R := 1.17*t_L;
  alpha_p := expVL/(t_L*(expVL + 1));
  alpha_m := phi_L/t_L;
  beta_poc := C_oc^2/(t_R*(C_oc^2 + K_RyR^2));
  beta_pcc := Ca_i_CaRU_Transitions^2/(t_R*(Ca_i_CaRU_Transitions^2 + K_RyR^2));
  beta_m := phi_R/t_R;
  epsilon_pco := C_co*(expVL + a)/(tau_L*K_L*(expVL + 1));
  epsilon_pcc := Ca_i_CaRU_Transitions*(expVL + a)/(tau_L*K_L*(expVL + 1));
  epsilon_m := b*(expVL + a)/(tau_L*(b*expVL + a));
  mu_poc := (C_oc^2 + c*K_RyR^2)/(tau_R*(C_oc^2 + K_RyR^2));
  mu_pcc := (Ca_i_CaRU_Transitions^2 + c*K_RyR^2)/(tau_R*(Ca_i_CaRU_Transitions^2 + K_RyR^2));
  mu_moc := theta_R*d*(C_oc^2 + c*K_RyR^2)/(tau_R*(d*C_oc^2 + c*K_RyR^2));
  mu_mcc := theta_R*d*(Ca_i_CaRU_Transitions^2 + c*K_RyR^2)/(tau_R*(d*Ca_i_CaRU_Transitions^2 + c*K_RyR^2));
  C_cc := Ca_i_DS_Calcium_Concentrations;
  C_co := (Ca_i_DS_Calcium_Concentrations + J_R/g_D*Ca_SR_DS_Calcium_Concentrations)/(1 + J_R/g_D);
  C_oc := piecewise((Ca_i_DS_Calcium_Concentrations + J_L/g_D*Ca_o_DS_Calcium_Concentrations*FVRT_Ca_DS_Calcium_Concentrations*exp(-FVRT_Ca_DS_Calcium_Concentrations)/(1 - exp(-FVRT_Ca_DS_Calcium_Concentrations)))/(1 + J_L/g_D*FVRT_Ca_DS_Calcium_Concentrations/(1 - exp(-FVRT_Ca_DS_Calcium_Concentrations))), abs(FVRT_Ca_DS_Calcium_Concentrations) > 1e-9, (Ca_i_DS_Calcium_Concentrations + J_L/g_D*Ca_o_DS_Calcium_Concentrations)/(1 + J_L/g_D));
  C_oo := piecewise((Ca_i_DS_Calcium_Concentrations + J_R/g_D*Ca_SR_DS_Calcium_Concentrations + J_L/g_D*Ca_o_DS_Calcium_Concentrations*FVRT_Ca_DS_Calcium_Concentrations*exp(-FVRT_Ca_DS_Calcium_Concentrations)/(1 - exp(-FVRT_Ca_DS_Calcium_Concentrations)))/(1 + J_R/g_D + J_L/g_D*FVRT_Ca_DS_Calcium_Concentrations/(1 - exp(-FVRT_Ca_DS_Calcium_Concentrations))), abs(FVRT_Ca_DS_Calcium_Concentrations) > 1e-9, (Ca_i_DS_Calcium_Concentrations + J_R/g_D*Ca_SR_DS_Calcium_Concentrations + J_L/g_D*Ca_o_DS_Calcium_Concentrations)/(1 + J_R/g_D + J_L/g_D));
  J_Rco := J_R*(Ca_SR_LCC_and_RyR_fluxes - Ca_i_LCC_and_RyR_fluxes)/(1 + J_R/g_D);
  J_Roo := piecewise(J_R*(Ca_SR_LCC_and_RyR_fluxes - Ca_i_LCC_and_RyR_fluxes + J_L/g_D*FVRT_Ca_LCC_and_RyR_fluxes/(1 - exp(-FVRT_Ca_LCC_and_RyR_fluxes))*(Ca_SR_LCC_and_RyR_fluxes - Ca_o_LCC_and_RyR_fluxes*exp(-FVRT_Ca_LCC_and_RyR_fluxes)))/(1 + J_R/g_D + J_L/g_D*FVRT_Ca_LCC_and_RyR_fluxes/(1 - exp(-FVRT_Ca_LCC_and_RyR_fluxes))), abs(FVRT_Ca_LCC_and_RyR_fluxes) > 1e-5, J_R*(Ca_SR_LCC_and_RyR_fluxes - Ca_i_LCC_and_RyR_fluxes + J_L/g_D*1e-5/(1 - exp(-1e-5))*(Ca_SR_LCC_and_RyR_fluxes - Ca_o_LCC_and_RyR_fluxes*exp(-1e-5)))/(1 + J_R/g_D + J_L/g_D*1e-5/(1 - exp(-1e-5))));
  J_Loc := piecewise(J_L*FVRT_Ca_LCC_and_RyR_fluxes/(1 - exp(-FVRT_Ca_LCC_and_RyR_fluxes))*(Ca_o_LCC_and_RyR_fluxes*exp(-FVRT_Ca_LCC_and_RyR_fluxes) - Ca_i_LCC_and_RyR_fluxes)/(1 + J_L/g_D*FVRT_Ca_LCC_and_RyR_fluxes/(1 - exp(-FVRT_Ca_LCC_and_RyR_fluxes))), abs(FVRT_Ca_LCC_and_RyR_fluxes) > 1e-5, J_L*1e-5/(1 - exp(-1e-5))*(Ca_o_LCC_and_RyR_fluxes*exp(-1e-5) - Ca_i_LCC_and_RyR_fluxes)/(1 + J_L/g_D*1e-5/(1 - exp(-1e-5))));
  J_Loo := piecewise(J_L*FVRT_Ca_LCC_and_RyR_fluxes/(1 - exp(-FVRT_Ca_LCC_and_RyR_fluxes))*(Ca_o_LCC_and_RyR_fluxes*exp(-FVRT_Ca_LCC_and_RyR_fluxes) - Ca_i_LCC_and_RyR_fluxes + J_R/g_D*(Ca_o_LCC_and_RyR_fluxes*exp(-FVRT_Ca_LCC_and_RyR_fluxes) - Ca_SR_LCC_and_RyR_fluxes))/(1 + J_R/g_D + J_L/g_D*FVRT_Ca_LCC_and_RyR_fluxes/(1 - exp(FVRT_Ca_LCC_and_RyR_fluxes))), abs(FVRT_Ca_LCC_and_RyR_fluxes) > 1e-5, J_L*1e-5/(1 - exp(-1e-5))*(Ca_o_LCC_and_RyR_fluxes*exp(-1e-5) - Ca_i_LCC_and_RyR_fluxes + J_R/g_D*(Ca_o_LCC_and_RyR_fluxes*exp(-1e-5) - Ca_SR_LCC_and_RyR_fluxes))/(1 + J_R/g_D + J_L/g_D*1e-5/(1 - exp(-1e-5))));
  denom := (alpha_p + alpha_m)*((alpha_m + beta_m + beta_poc)*(beta_m + beta_pcc) + alpha_p*(beta_m + beta_poc));
  y_oc := alpha_p*beta_m*(alpha_p + alpha_m + beta_m + beta_pcc)/denom;
  y_co := alpha_m*(beta_pcc*(alpha_m + beta_m + beta_poc) + beta_poc*alpha_p)/denom;
  y_oo := alpha_p*(beta_poc*(alpha_p + beta_m + beta_pcc) + beta_pcc*alpha_m)/denom;
  y_cc := alpha_m*beta_m*(alpha_m + alpha_p + beta_m + beta_poc)/denom;
  y_ci := alpha_m/(alpha_p + alpha_m);
  y_oi := alpha_p/(alpha_p + alpha_m);
  y_ic := beta_m/(beta_pcc + beta_m);
  y_io := beta_pcc/(beta_pcc + beta_m);
  y_ii := 1 - y_oc - y_co - y_oo - y_cc - y_ci - y_ic - y_oi - y_io;
  r_1 := y_oc*mu_poc + y_cc*mu_pcc;
  r_2 := (alpha_p*mu_moc + alpha_m*mu_mcc)/(alpha_p + alpha_m);
  r_3 := beta_m*mu_pcc/(beta_m + beta_pcc);
  r_4 := mu_mcc;
  r_5 := y_co*epsilon_pco + y_cc*epsilon_pcc;
  r_6 := epsilon_m;
  r_7 := alpha_m*epsilon_pcc/(alpha_p + alpha_m);
  r_8 := epsilon_m;
  z_4 := 1 - z_1 - z_2 - z_3;
  J_R1 := y_oo*J_Roo + J_Rco*y_co;
  J_R3 := J_Rco*beta_pcc/(beta_m + beta_pcc);
  I_RyR := (z_1*J_R1 + z_3*J_R3)*N/V_myo_RyR_current;
  J_L1 := J_Loo*y_oo + J_Loc*y_oc;
  J_L2 := J_Loc*alpha_p/(alpha_p + alpha_m);
  I_LCC := (z_1*J_L1 + z_2*J_L2)*N/V_myo_LCC_current;
  I_NaCa := g_NCX*(exp(eta*FVRT)*Na_i^3*Ca_o_extracellular_ion_concentrations - exp((eta - 1)*FVRT)*Na_o^3*Ca_i_intracellular_ion_concentrations)/((Na_o^3 + K_mNa^3)*(Ca_o_extracellular_ion_concentrations + K_mCa)*(1 + k_sat*exp((eta - 1)*FVRT)));
  I_SERCA := g_SERCA*Ca_i_intracellular_ion_concentrations^2/(K_SERCA^2 + Ca_i_intracellular_ion_concentrations^2);
  I_pCa := g_pCa*Ca_i_intracellular_ion_concentrations/(K_mpCa + Ca_i_intracellular_ion_concentrations);
  E_Ca := R*T/(2*F)*ln(Ca_o_extracellular_ion_concentrations/Ca_i_intracellular_ion_concentrations);
  I_CaB := g_CaB*(E_Ca - V_membrane);
  I_SR := g_SRl*(Ca_SR_intracellular_ion_concentrations - Ca_i_intracellular_ion_concentrations);
  I_TRPN := k_m_TRPN*(B_TRPN - TRPN) - k_p_TRPN*TRPN*Ca_i_intracellular_ion_concentrations;
  beta_CMDN := (1 + k_CMDN*B_CMDN/(k_CMDN + Ca_i_intracellular_ion_concentrations)^2)^(-1);
  CaSR_plot := Ca_SR_intracellular_ion_concentrations*V_SR/V_myo_cell_geometry;

  // Rate rules:
  z_1' = -(r_1 + r_5)*z_1 + r_2*z_2 + r_6*z_3;
  z_2' = r_1*z_1 - (r_2 + r_7)*z_2 + r_8*z_4;
  z_3' = r_5*z_1 - (r_6 + r_3)*z_3 + r_4*z_4;
  TRPN' = I_TRPN;
  Ca_i_intracellular_ion_concentrations' = beta_CMDN*(I_LCC + I_RyR - I_SERCA + I_SR + I_NaCa - I_pCa + I_CaB + I_TRPN);
  Ca_SR_intracellular_ion_concentrations' = V_myo_cell_geometry/V_SR*(-I_RyR + I_SERCA - I_SR);

  // Unit definitions:
  unit per_ms = 1 / (1e-3 second);
  unit ms = 1e-3 second;
  unit mV = 1e-3 volt;
  unit mM = 1e-3 mole / litre;
  unit mM_per_ms = 1e-3 mole / (litre * 1e-3 second);
  unit per_mM_ms = litre / (1e-3 mole * 1e-3 second);
  unit mM_per_mV_ms = 1e-3 mole / (litre * 1e-3 second * 1e-3 volt);
  unit per_ms3 = 1 / (1e-3 second)^3;
  unit um2 = (1e-6 metre)^2;
  unit um3 = (1e-6 metre)^3;
  unit um3_per_ms = (1e-6 metre)^3 / (1e-3 second);
  unit um3_mM_per_ms = (1e-6 metre)^3 * 1e-3 mole / (litre * 1e-3 second);
  unit mJ_per_mole_K = 1e-3 joule / (mole * kelvin);
  unit C_per_mole = coulomb / mole;
  unit time = 1e-3 second;
end
