// SBML level 2 version 3

model Hilgemann1987_CalciumTransients()
  // This a model from the article:
  // Excitation-contraction coupling and extracellular calcium transients in rabbit atrium: reconstruction of basic cellular mechanisms.
  // Hilgemann DW, Noble D. Proc R Soc Lond B Biol Sci 1987 Mar 23;230(1259):163-205 2884668 ,
  // Abstract:
  // Interactions of electrogenic sodium-calcium exchange, calcium channel and sarcoplasmic reticulum in the mammalian heart have been explored by simulation of extracellular calcium transients measured with tetramethylmurexide in rabbit atrium. The approach has been to use the simplest possible formulations of these mechanisms, which together with a minimum number of additional mechanisms allow reconstruction of action potentials, intracellular calcium transients and extracellular calcium transients. A 3:1 sodium-calcium exchange stoichiometry is assumed. Calcium-channel inactivation is assumed to take place by a voltage-dependent mechanism, which is accelerated by a rise in intracellular calcium; intracellular calcium release becomes a major physiological regulator of calcium influx via calcium channels. A calcium release mechanism is assumed, which is both calcium- and voltage-sensitive, and which undergoes prolonged inactivation. 200 microM cytosolic calcium buffer is assumed. For most simulations only instantaneous potassium conductances are simulated so as to study the other mechanisms independently of time- and calcium-dependent outward current. Thus, the model reconstructs extracellular calcium transients and typical action-potential configuration changes during steady-state and non-steady-state stimulation from the mechanisms directly involved in trans-sarcolemmal calcium movements. The model predicts relatively small trans-sarcolemmal calcium movements during regular stimulation (ca. 2 mumol kg-1 fresh mass per excitation); calcium current is fully activated within 2 ms of excitation, inactivation is substantially complete within 30 ms, and sodium-calcium exchange significantly resists repolarization from approximately -30 mV. Net calcium movements many times larger are possible during non-steady-state stimulation. Long action potentials at premature excitations or after inhibition of calcium release can be supported almost exclusively by calcium current (net calcium influx 5-30 mumol kg-1 fresh mass); action potentials during potentiated post-stimulatory contractions can be supported almost exclusively by sodium-calcium exchange (net calcium efflux 4-20 mumol kg-1 fresh mass). Large calcium movements between the extracellular space and the sarcoplasmic reticulum can take place through the cytosol with virtually no contractile activation. The simulations provide integrated explanations of electrical activity, contractile function and trans-sarcolemmal calcium movements, which were outside the explanatory range of previous models.
  // This model was taken from the CellML repository and automatically converted to SBML.
  // The original model was: Hilgemann DW, Noble D. (1987) - version06
  // The original CellML model was created by:
  // Noble, Penny, J
  // penny.noble@dpag.ox.ac.uk
  // Oxford University
  // Department of Physiology, Anatomy & Genetics
  // This model originates from BioModels Database: A Database of Annotated Published Models (http://www.ebi.ac.uk/biomodels/). It is copyright (c) 2005-2011 The BioModels.net Team.
  // To the extent possible under law, all copyright and related or neighbouring rights to this encoded model have been dedicated to the public domain worldwide. Please refer to CC0 Public Domain Dedication for more information.
  // In summary, you are entitled to use this encoded model in absolutely any manner you deem suitable, verbatim, or with modification, alone or embedded it in a larger context, redistribute it, commercially or not, in a restricted way or not..
  // To cite BioModels Database, please use: Li C, Donizelli M, Rodriguez N, Dharuri H, Endler L, Chelliah V, Li L, He E, Henry A, Stefan MI, Snoep JL, Hucka M, Le Novère N, Laibe C (2010) BioModels Database: An enhanced, curated and annotated resource for published quantitative kinetic models. BMC Syst Biol., 4:92.
  // biomodels.db:MODEL0848444339
  // isDescribedBy pubmed:2884668
  // biomodels.db:MODEL0848444339
  // isDescribedBy pubmed:2884668
  // biomodels.db:MODEL0848444339
  // biomodels.db:MODEL0848444339

  // Compartments:
  compartment Compartment = 1 litre;

  // Parameters:
  V_membrane = -88 millivolt;
  R = 8314.472 joule_per_kilomole_kelvin;
  T = 310 kelvin;
  F = 9.64853415e4 coulomb_per_mole;
  RTONF has millivolt;
  C_m = 0.006 microF;
  i_Stim has nanoA;
  stim_start = 0.1 second;
  stim_end = 10000 second;
  stim_period = 1 second;
  stim_duration = 0.002 second;
  stim_amplitude = -200 nanoA;
  i_Na has nanoA;
  g_Na = 50 microS;
  E_mh has millivolt;
  m = 0.076 dimensionless;
  alpha_m has per_second;
  beta_m has per_second;
  V_fast_sodium_current_m_gate has millivolt;
  time_fast_sodium_current_m_gate has second;
  delta_m = 1e-5 millivolt;
  E0_m has millivolt;
  h = 0.015 dimensionless;
  alpha_h has per_second;
  beta_h has per_second;
  V_fast_sodium_current_h_gate has millivolt;
  time_fast_sodium_current_h_gate has second;
  i_NaK has nanoA;
  i_NaK_max = 14 nanoA;
  K_mK = 1 millimolar;
  K_mNa = 40 millimolar;
  E_Na has millivolt;
  i_b_Na has nanoA;
  g_b_Na = 0.012 microS;
  E_Ca has millivolt;
  i_b_Ca has nanoA;
  g_b_Ca = 0.005 microS;
  i_NaCa has nanoA;
  k_NaCa = 0.01 nanoA;
  n_NaCa = 3 dimensionless;
  d_NaCa = 0.0001 dimensionless;
  gamma = 0.5 dimensionless;
  i_b_K has nanoA;
  g_b_K = 0.17 microS;
  i_K1 has nanoA;
  E_K has millivolt;
  g_K1 = 1.7 microS;
  K_m_K1 = 10 millimolar;
  i_si has nanoA;
  i_siCa has nanoA;
  i_siK has nanoA;
  i_siNa has nanoA;
  P_si = 5 nanoA_per_millimolar;
  d = 0.0011 dimensionless;
  alpha_d has per_second;
  beta_d has per_second;
  V_second_inward_calcium_current_d_gate has millivolt;
  time_second_inward_calcium_current_d_gate has second;
  delta_d = 0.0001 millivolt;
  E0_d has millivolt;
  f_Ca = 0.785 dimensionless;
  alpha_f_Ca has per_second;
  beta_f_Ca has per_second;
  CaChoff has dimensionless;
  CaChon has dimensionless;
  V_second_inward_calcium_current_f_Ca_gate has millivolt;
  time_second_inward_calcium_current_f_Ca_gate has second;
  Ca_i_second_inward_calcium_current_f_Ca_gate has millimolar;
  delta_f = 0.0001 millivolt;
  E0_f has millivolt;
  i_up has millimolar_per_second;
  K_1 has dimensionless;
  K_2 has millimolar;
  K_cyca = 0.0003 millimolar;
  K_xcs = 0.4 dimensionless;
  K_srca = 0.5 millimolar;
  alpha_up = 3 millimolar_per_second;
  beta_up = 0.23 millimolar_per_second;
  i_rel has millimolar_per_second;
  VoltDep has dimensionless;
  RegBindSite has dimensionless;
  ActRate has per_second;
  InactRate has per_second;
  K_leak_rate = 0 per_second;
  K_m_rel = 250 per_second;
  PrecFrac has dimensionless;
  ActFrac = 0 dimensionless;
  ProdFrac = 0 dimensionless;
  i_trans has millimolar_per_second;
  alpha_tr = 50 per_second;
  Na_o = 140 millimolar;
  Na_i = 6.5 millimolar;
  Ca_o = 2 millimolar;
  Cab = 2 millimolar;
  K_diff = 0.0005 per_second;
  K_c = 4 millimolar;
  K_i = 140 millimolar;
  Ca_i_intracellular_calcium_concentration = 1e-5 millimolar;
  Ca_up = 0.3 millimolar;
  Ca_rel = 0.3 millimolar;
  Ca_Calmod = 0.0005 millimolar;
  Ca_Trop = 0.0015 millimolar;
  Calmod = 0.02 millimolar;
  Trop = 0.15 millimolar;
  alpha_Calmod = 100000 per_millimolar_second;
  beta_Calmod = 50 per_second;
  alpha_Trop = 100000 per_millimolar_second;
  beta_Trop = 200 per_second;
  radius = 0.08 micrometre;
  length = 0.08 micrometre;
  V_i has micrometre3;
  Ve has micrometre3;
  V_Cell has micrometre3;
  V_i_ratio has dimensionless;
  V_rel_ratio = 0.1 dimensionless;
  V_e_ratio = 0.4 dimensionless;
  V_up_ratio = 0.01 dimensionless;
  dCaCalmoddt has millimolar_per_second;
  dCaTropdt has millimolar_per_second;

  // Assignment rules:
  RTONF := R*T/F;
  i_Stim := piecewise(stim_amplitude, (time >= stim_start) && (time <= stim_end) && (time - stim_start - floor((time - stim_start)/stim_period)*stim_period <= stim_duration), 0);
  E_mh := RTONF*ln((Na_o + 0.12*K_c)/(Na_i + 0.12*K_i));
  i_Na := g_Na*m^3*h*(V_membrane - E_mh);
  E0_m := V_fast_sodium_current_m_gate + 41;
  alpha_m := piecewise(2000, abs(E0_m) < delta_m, 200*E0_m/(1 - exp(-0.1*E0_m)));
  beta_m := 8000*exp(-0.056*(V_fast_sodium_current_m_gate + 66));
  alpha_h := 20*exp(-0.125*(V_fast_sodium_current_h_gate + 75));
  beta_h := 2000/(1 + 320*exp(-0.1*(V_fast_sodium_current_h_gate + 75)));
  i_NaK := i_NaK_max*K_c/(K_mK + K_c)*Na_i/(K_mNa + Na_i);
  E_Na := RTONF*ln(Na_o/Na_i);
  i_b_Na := g_b_Na*(V_membrane - E_Na);
  E_Ca := 0.5*RTONF*ln(Ca_o/Ca_i_intracellular_calcium_concentration);
  i_b_Ca := g_b_Ca*(V_membrane - E_Ca);
  i_NaCa := k_NaCa*(exp(gamma*(n_NaCa - 2)*V_membrane/RTONF)*Na_i^n_NaCa*Ca_o - exp((gamma - 1)*(n_NaCa - 2)*V_membrane/RTONF)*Na_o^n_NaCa*Ca_i_intracellular_calcium_concentration)/((1 + d_NaCa*(Ca_i_intracellular_calcium_concentration*Na_o^n_NaCa + Ca_o*Na_i^n_NaCa))*(1 + Ca_i_intracellular_calcium_concentration/0.0069));
  i_b_K := g_b_K*(V_membrane - E_K);
  E_K := RTONF*ln(K_c/K_i);
  i_K1 := g_K1*K_c/(K_c + K_m_K1)*(V_membrane - E_K)/(1 + exp((V_membrane - E_K - 10)*2/RTONF));
  i_si := i_siCa + i_siK + i_siNa;
  i_siCa := 4*P_si*d*CaChon*(V_membrane - 50)/RTONF/(1 - exp(-1*(V_membrane - 50)*2/RTONF))*(Ca_i_intracellular_calcium_concentration*exp(100/RTONF) - Ca_o*exp(-2*(V_membrane - 50)/RTONF));
  i_siK := 0.002*P_si*d*CaChon*(V_membrane - 50)/RTONF/(1 - exp(-1*(V_membrane - 50)/RTONF))*(K_i*exp(50/RTONF) - K_c*exp(-1*(V_membrane - 50)/RTONF));
  i_siNa := 0.01*P_si*d*CaChon*(V_membrane - 50)/RTONF/(1 - exp(-1*(V_membrane - 50)/RTONF))*(Na_i*exp(50/RTONF) - Na_o*exp(-1*(V_membrane - 50)/RTONF));
  E0_d := V_second_inward_calcium_current_d_gate + 24 - 5;
  alpha_d := piecewise(120, abs(E0_d) < delta_d, 30*E0_d/(1 - exp(-1*E0_d/4)));
  beta_d := piecewise(120, abs(E0_d) < delta_d, 12*E0_d/(exp(E0_d/10) - 1));
  E0_f := V_second_inward_calcium_current_f_Ca_gate + 34;
  alpha_f_Ca := piecewise(25, abs(E0_f) < delta_f, 6.25*E0_f/(exp(E0_f/4) - 1));
  beta_f_Ca := 12/(1 + exp(-E0_f/4));
  CaChoff := Ca_i_second_inward_calcium_current_f_Ca_gate/(0.001 + Ca_i_second_inward_calcium_current_f_Ca_gate);
  CaChon := (1 - f_Ca)*(1 - CaChoff);
  K_1 := K_cyca*K_xcs/K_srca;
  K_2 := Ca_i_intracellular_calcium_concentration + Ca_up*K_1 + K_cyca*K_xcs + K_cyca;
  i_up := Ca_i_intracellular_calcium_concentration/K_2*alpha_up - Ca_up*K_1/K_2*beta_up;
  PrecFrac := 1 - ActFrac - ProdFrac;
  VoltDep := exp(0.08*(V_membrane - 40));
  RegBindSite := (Ca_i_intracellular_calcium_concentration/(Ca_i_intracellular_calcium_concentration + 0.0005))^2;
  ActRate := 600*VoltDep + 500*RegBindSite;
  InactRate := 60 + 500*RegBindSite;
  i_rel := ((ActFrac/(ActFrac + 0.25))^2*K_m_rel + K_leak_rate)*Ca_rel;
  i_trans := (Ca_up - Ca_rel)*alpha_tr;
  V_Cell := 3.141593*radius^2*length;
  V_i_ratio := 1 - V_e_ratio - V_up_ratio - V_rel_ratio;
  V_i := V_Cell*V_i_ratio;
  Ve := V_Cell*V_e_ratio;
  dCaCalmoddt := alpha_Calmod*Ca_i_intracellular_calcium_concentration*(Calmod - Ca_Calmod) - beta_Calmod*Ca_Calmod;
  dCaTropdt := alpha_Trop*Ca_i_intracellular_calcium_concentration*(Trop - Ca_Trop) - beta_Trop*Ca_Trop;

  // Rate rules:
  V_membrane' = -(i_Stim + i_K1 + i_b_Na + i_b_Ca + i_b_K + i_NaK + i_NaCa + i_Na + i_si)/C_m;
  m' = alpha_m*(1 - m) - beta_m*m;
  h' = alpha_h*(1 - h) - beta_h*h;
  d' = alpha_d*(1 - d) - beta_d*d;
  f_Ca' = (120*(1 - f_Ca)*CaChoff + (1 - f_Ca)*(1 - CaChoff))*beta_f_Ca - alpha_f_Ca*f_Ca;
  ActFrac' = PrecFrac*ActRate - ActFrac*InactRate;
  ProdFrac' = ActFrac*InactRate - 0.6*ProdFrac;
  Na_i' = -1/(1*V_i*F)*(i_Na + i_b_Na + i_NaK*3 + i_NaCa*3 + i_siNa);
  Ca_o' = (Cab - Ca_o)*K_diff - 1*(i_siCa + i_NaCa + i_b_Ca)/(2*1*Ve*F);
  K_i' = -1/(1*V_i*F)*(i_K1 + i_siK + i_b_K - 2*i_NaK);
  Ca_i_intracellular_calcium_concentration' = -1/(2*1*V_i*F)*(i_siCa + i_b_Ca - 2*i_NaCa) + i_rel*V_rel_ratio/V_i_ratio - dCaCalmoddt - dCaTropdt - i_up;
  Ca_up' = V_i_ratio/V_up_ratio*i_up - i_trans;
  Ca_rel' = V_up_ratio/V_rel_ratio*i_trans - i_rel;
  Ca_Calmod' = alpha_Calmod*Ca_i_intracellular_calcium_concentration*(Calmod - Ca_Calmod) - beta_Calmod*Ca_Calmod;
  Ca_Trop' = alpha_Trop*Ca_i_intracellular_calcium_concentration*(Trop - Ca_Trop) - beta_Trop*Ca_Trop;

  // Unit definitions:
  unit per_second = 1 / second;
  unit millivolt = 1e-3 volt;
  unit per_millivolt = 1 / (1e-3 volt);
  unit per_millivolt_second = 1 / (1e-3 volt * second);
  unit microS = 1e-6 siemens;
  unit microF = 1e-6 farad;
  unit nanoA = 1e-9 ampere;
  unit millimolar = 1e-3 mole / litre;
  unit millimolar4 = (1e-3 mole)^4 / litre^4;
  unit nanoA_per_millimolar = 1e-9 ampere * litre / (1e-3 mole);
  unit millimolar_per_second = 1e-3 mole / (litre * second);
  unit per_millimolar_second = litre / (1e-3 mole * second);
  unit micrometre = 1e-6 metre;
  unit joule_per_kilomole_kelvin = joule / (1000 mole * kelvin);
  unit coulomb_per_mole = coulomb / mole;
  unit micrometre3 = (1e-6 metre)^3;
  unit litre_micrometre3 = litre / (1e-6 metre)^3;
end
