// SBML level 2 version 3

model Heinze1998_GnRH_LH()
  // This a model from the article:
  // A mathematical model of luteinizing hormone release from ovine pituitary cells in perifusion.
  // Heinze K, Keener RW, Midgley AR Jr. Am J Physiol 1998 Dec;275(6 Pt 1):E1061-71 9843750 ,
  // Abstract:
  // We model the effect of gonadotropin-releasing hormone (GnRH) on the production of luteinizing hormone (LH) by the ovine pituitary. GnRH, released by the hypothalamus, stimulates the secretion of LH from the pituitary. If stimulus pulses are regular, LH response will follow a similar pattern. However, during application of GnRH at high frequencies or concentrations or with continuous application, the pituitary delivers a decreased release of LH (termed desensitization). The proposed mathematical model consists of a system of nonlinear differential equations and incorporates two possible mechanisms to account for this observed behavior: desensitized receptor and limited, available LH. Desensitization was provoked experimentally in vitro by using ovine pituitary cells in a perifusion system. The model was fit to resulting experimental data by using maximum-likelihood estimation. Consideration of smaller models revealed that the desensitized receptor is significant. Limited, available LH was significant in three of four chambers. Throughout, the proposed model was in excellent agreement with experimental data.
  // This model was taken from the CellML repository and automatically converted to SBML.
  // The original model was: Heinze K, Keener RW, Midgley AR Jr. (1998) - version02
  // The original CellML model was created by:
  // Lloyd, Catherine, May
  // c.lloyd@aukland.ac.nz
  // The University of Auckland
  // The Bioengineering Institute
  // This model originates from BioModels Database: A Database of Annotated Published Models (http://www.ebi.ac.uk/biomodels/). It is copyright (c) 2005-2011 The BioModels.net Team.
  // To the extent possible under law, all copyright and related or neighbouring rights to this encoded model have been dedicated to the public domain worldwide. Please refer to CC0 Public Domain Dedication for more information.
  // In summary, you are entitled to use this encoded model in absolutely any manner you deem suitable, verbatim, or with modification, alone or embedded it in a larger context, redistribute it, commercially or not, in a restricted way or not..
  // To cite BioModels Database, please use: Li C, Donizelli M, Rodriguez N, Dharuri H, Endler L, Chelliah V, Li L, He E, Henry A, Stefan MI, Snoep JL, Hucka M, Le Novère N, Laibe C (2010) BioModels Database: An enhanced, curated and annotated resource for published quantitative kinetic models. BMC Syst Biol., 4:92.
  // biomodels.db:MODEL0848507209
  // isDescribedBy pubmed:9843750
  // biomodels.db:MODEL0848507209
  // isDescribedBy pubmed:9843750
  // biomodels.db:MODEL0848507209
  // biomodels.db:MODEL0848507209

  // Compartments:
  compartment Compartment = 1 litre;

  // Parameters:
  GnRH has nanomolar;
  F = 1 dimensionless;
  D = 0 dimensionless;
  B = 0 dimensionless;
  R = 2115 dimensionless;
  C = 0 dimensionless;
  kfb = 19.35 second_order_rate_constant;
  kdf = 2.52 first_order_rate_constant;
  kbd = 9.91 first_order_rate_constant;
  a1 = 0.0328 first_order_rate_constant;
  a2 = 0.083 first_order_rate_constant;
  s = 6.8 first_order_rate_constant;

  // Assignment rules:
  GnRH := piecewise(0.5, (time >= 0) && (time < 4), 0, (time >= 4) && (time < 24), 0.5, (time >= 24) && (time < 28), 0, (time >= 28) && (time < 148), 0.5, (time >= 148) && (time < 152), 0, (time >= 152) && (time < 157), 0.5, (time >= 157) && (time < 161), 0, (time >= 161) && (time < 281), 0.5, (time >= 281) && (time < 285), 0, (time >= 285) && (time < 295), 0.5, (time >= 295) && (time < 299), 0, (time >= 299) && (time < 419), 0.5, (time >= 419) && (time < 424), 0, (time >= 424) && (time < 464), 0.5, (time >= 464) && (time < 468), 0, (time >= 468) && (time < 588));

  // Rate rules:
  F' = kdf*D - kfb*F*GnRH;
  D' = kbd*B - kdf*D;
  B' = kfb*F*GnRH - kbd*B;
  R' = s - (a1 + a2*B)*R;
  C' = (a1 + a2*B)*R;

  // Unit definitions:
  unit minute = 60 second;
  unit hour = 3600 second;
  unit ng = 1e-9 gram;
  unit ng_ml = 1e-9 gram / (1e-3 litre);
  unit nanomolar = 1e-9 mole / litre;
  unit first_order_rate_constant = 1 / (3600 second);
  unit second_order_rate_constant = litre / (1e-9 mole * 3600 second);
  unit time = 3600 second;
end
