// SBML level 2 version 3

model Haugh2004_hGH()
  // This a model from the article:
  // Mathematical model of human growth hormone (hGH)-stimulated cell proliferation explains the efficacy of hGH variants as receptor agonists or antagonists.
  // Haugh JM. Biotechnol Prog 2004 Sep-Oct;20(5):1337-44 15458315 ,
  // Abstract:
  // Human growth hormone (hGH) is a therapeutically important endocrine factor that signals various cell types. Structurally and functionally, the interactions of hGH with its receptor have been resolved in fine detail, such that hGH and hGH receptor variants can be practically engineered by either random or rational approaches to achieve significant changes in the free energies of binding. A somewhat unique feature of hGH action is its homodimerization of two hGH receptors, which is required for intracellular signaling and stimulation of cell proliferation, yet the potencies of hGH mutants in cell-based assays rarely correlate with their overall receptor-binding avidities. Here, a mathematical model of hGH-stimulated cell signaling is posed, accounting not only for binding interactions at the cell surface but induction of receptor endocytosis and downregulation as well. Receptor internalization affects ligand potency by imposing a limit on the lifetime of an active receptor complex, irrespective of ligand-receptor binding properties. The model thus explains, in quantitative terms, the numerous published observations regarding hGH receptor agonism and antagonism and challenges the interpretations of previous studies that have not considered receptor trafficking as a central regulatory mechanism in hGH signaling.
  // This model was taken from the CellML repository and automatically converted to SBML.
  // The original model was: Haugh JM. (2004) - version02
  // The original CellML model was created by:
  // Lloyd, Catherine, May
  // c.lloyd@aukland.ac.nz
  // The University of Auckland
  // The Bioengineering Institute
  // This model originates from BioModels Database: A Database of Annotated Published Models (http://www.ebi.ac.uk/biomodels/). It is copyright (c) 2005-2011 The BioModels.net Team.
  // To the extent possible under law, all copyright and related or neighbouring rights to this encoded model have been dedicated to the public domain worldwide. Please refer to CC0 Public Domain Dedication for more information.
  // In summary, you are entitled to use this encoded model in absolutely any manner you deem suitable, verbatim, or with modification, alone or embedded it in a larger context, redistribute it, commercially or not, in a restricted way or not..
  // To cite BioModels Database, please use: Li C, Donizelli M, Rodriguez N, Dharuri H, Endler L, Chelliah V, Li L, He E, Henry A, Stefan MI, Snoep JL, Hucka M, Le Novère N, Laibe C (2010) BioModels Database: An enhanced, curated and annotated resource for published quantitative kinetic models. BMC Syst Biol., 4:92.
  // biomodels.db:MODEL0848676877
  // isDescribedBy pubmed:15458315
  // biomodels.db:MODEL0848676877
  // isDescribedBy pubmed:15458315
  // biomodels.db:MODEL0848676877
  // biomodels.db:MODEL0848676877

  // Compartments:
  compartment Compartment = 1 litre;

  // Parameters:
  C = 0 nanomolar;
  D = 0 nanomolar;
  R = 0 nanomolar;
  Ri = 0 nanomolar;
  R0 has nanomolar;
  signal has dimensionless;
  kf1 = 0.1 second_order_rate_constant;
  kr1 has first_order_rate_constant;
  kx2 = 4.83 second_order_rate_constant;
  k_x2 = 0.016 first_order_rate_constant;
  k_x1 has first_order_rate_constant;
  ke = 0.1 first_order_rate_constant;
  kt = 0.005 first_order_rate_constant;
  krec = 0 first_order_rate_constant;
  kdeg = 0.05 first_order_rate_constant;
  Vs = 10 flux;
  L = 0.01 nanomolar;
  kappaE = 0.2 dimensionless;
  KD = 1 nanomolar;

  // Assignment rules:
  R0 := R + C + R + 2*(ke/kt)*(1 + krec/kdeg)*D;
  signal := 2*D/R0/(kappaE + 2*D/R0);
  kr1 := KD*kf1;
  k_x1 := 0.01*kr1;

  // Rate rules:
  C' = kf1*L*R + k_x2*D - (kr1 + kx2*R + kt)*C;
  D' = kx2*R*C - (k_x2 + k_x1 + ke)*D;
  R' = Vs + kr1*C + (k_x2 + 2*k_x1)*D + krec*Ri - (kf1*L + kx2*C + kt)*R;
  Ri' = kt*(R + C) - (krec + kdeg)*Ri;

  // Unit definitions:
  unit nanomolar = 1e-9 mole / litre;
  unit minute = 60 second;
  unit flux = 1e-9 mole / (litre * 60 second);
  unit first_order_rate_constant = 1 / (60 second);
  unit second_order_rate_constant = litre / (1e-9 mole * 60 second);
  unit time = 60 second;
end
