// SBML level 2 version 3

model Guyton1972_volumeReceptors()
  // This a model from the article:
  // Circulation: overall regulation.
  // Guyton AC, Coleman TG, Granger HJ. Annu Rev Physiol 1972;34:13-46 4334846 ,
  // Abstract:
  // No abstract available.
  // This model was taken from the CellML repository and automatically converted to SBML.
  // The original model was: Guyton AC, Coleman TG, Granger HJ. (2008) - version02
  // The original CellML model was created by:
  // Terkildsen, Jonna
  // j.terkildsen@auckland.ac.nz
  // The University of Auckland
  // Auckland Bioengineering Institute
  // This model originates from BioModels Database: A Database of Annotated Published Models (http://www.ebi.ac.uk/biomodels/). It is copyright (c) 2005-2011 The BioModels.net Team.
  // To the extent possible under law, all copyright and related or neighbouring rights to this encoded model have been dedicated to the public domain worldwide. Please refer to CC0 Public Domain Dedication for more information.
  // In summary, you are entitled to use this encoded model in absolutely any manner you deem suitable, verbatim, or with modification, alone or embedded it in a larger context, redistribute it, commercially or not, in a restricted way or not..
  // To cite BioModels Database, please use: Li C, Donizelli M, Rodriguez N, Dharuri H, Endler L, Chelliah V, Li L, He E, Henry A, Stefan MI, Snoep JL, Hucka M, Le Novère N, Laibe C (2010) BioModels Database: An enhanced, curated and annotated resource for published quantitative kinetic models. BMC Syst Biol., 4:92.
  // biomodels.db:MODEL0909931851
  // isDescribedBy pubmed:4334846
  // biomodels.db:MODEL0909931851
  // isDescribedBy pubmed:4334846
  // biomodels.db:MODEL0909931851
  // biomodels.db:MODEL0909931851

  // Compartments:
  compartment Compartment = 1;

  // Parameters:
  PRA = 0.00852183 dimensionless;
  AHZ has dimensionless;
  AHZ1 has dimensionless;
  AHY = 0.301963 dimensionless;
  AH7 has dimensionless;
  ATRRFB has dimensionless;
  ATRVFB has dimensionless;
  AH10 = 0.333 dimensionless;
  AH11 = 1000 dimensionless;
  AH9 = 1 dimensionless;
  ATRFBM = 0 dimensionless;
  ATRVM = 0 dimensionless;
  tu = 1 time; tu is "timeunit";

  // Assignment rules:
  AHZ1 := abs(PRA)^AH10*AH9;
  AHZ := piecewise(-AHZ1, PRA < 0, AHZ1);
  AH7 := AHZ - AHY;
  ATRRFB := AH7*ATRFBM + 1;
  ATRVFB := AH7*ATRVM;

  // Rate rules:
  AHY' = (AHZ - AHY)/AH11/tu;

  // Unit definitions:
  unit substance = dimensionless; substance is "normalised";
  unit time = second; time is "second";
end
