// SBML level 2 version 3

model Guyton1972_ThirstDrinking_SaltAppetite()
  // This a model from the article:
  // Circulation: overall regulation.
  // Guyton AC, Coleman TG, Granger HJ. Annu Rev Physiol 1972;34:13-46 4334846 ,
  // Abstract:
  // No abstract available
  // This model was taken from the CellML repository and automatically converted to SBML.
  // The original model was: Guyton AC, Coleman TG, Granger HJ. (2008) - version02
  // The original CellML model was created by:
  // Terkildsen, Jonna,
  // j.terkildsen@auckland.ac.nz
  // The University of Auckland
  // Auckland Bioengineering Institute
  // This model originates from BioModels Database: A Database of Annotated Published Models (http://www.ebi.ac.uk/biomodels/). It is copyright (c) 2005-2011 The BioModels.net Team.
  // To the extent possible under law, all copyright and related or neighbouring rights to this encoded model have been dedicated to the public domain worldwide. Please refer to CC0 Public Domain Dedication for more information.
  // In summary, you are entitled to use this encoded model in absolutely any manner you deem suitable, verbatim, or with modification, alone or embedded it in a larger context, redistribute it, commercially or not, in a restricted way or not..
  // To cite BioModels Database, please use: Li C, Donizelli M, Rodriguez N, Dharuri H, Endler L, Chelliah V, Li L, He E, Henry A, Stefan MI, Snoep JL, Hucka M, Le Novère N, Laibe C (2010) BioModels Database: An enhanced, curated and annotated resource for published quantitative kinetic models. BMC Syst Biol., 4:92.
  // biomodels.db:MODEL0910846879
  // isDescribedBy pubmed:4334846
  // biomodels.db:MODEL0910846879
  // isDescribedBy pubmed:4334846
  // biomodels.db:MODEL0910846879
  // biomodels.db:MODEL0910846879

  // Compartments:
  compartment Compartment = 1;

  // Parameters:
  ADHC = 1 dimensionless;
  ANM = 0.987545 dimensionless;
  POT = 35.1148 dimensionless;
  STH has dimensionless;
  ANMSML has dimensionless;
  STH1 has dimensionless;
  AHCM has dimensionless;
  ANMTH has dimensionless;
  TVD = 0.000980838 dimensionless;
  AHTH has dimensionless;
  AHTH1 has dimensionless;
  TVZ has dimensionless;
  TVZ1 has dimensionless;
  Z10 = 45 dimensionless;
  Z11 = 0.01 dimensionless;
  ANMSLT = 2 dimensionless;
  AHTHM = 2 dimensionless;
  ANMTM = 1.5 dimensionless;
  DR = 0 dimensionless;
  TVDDL = 30 time;

  // Assignment rules:
  ANMSML := (ANM - 1)*ANMSLT + 1;
  STH1 := (Z10 - POT)^2*Z11*ANMSML;
  STH := piecewise(0.8, STH1 < 0.8, 8, STH1 > 8, STH1);
  AHCM := (ADHC - 1)*AHTHM + 1;
  ANMTH := (ANM - 1)*ANMTM*0.001;
  AHTH1 := AHCM*STH*0.001;
  AHTH := piecewise(0, AHTH1 < 0, AHTH1);
  TVZ1 := ANMTH + AHTH;
  TVZ := piecewise(0, TVZ1 < 0, TVZ1);

  // Rate rules:
  TVD' = (TVZ + DR - TVD)/TVDDL;

  // Unit definitions:
  unit substance = dimensionless; substance is "normalised";
end
