// SBML level 2 version 3

model Guyton1972_RedCells_Viscosity()
  // This a model from the article:
  // Circulation: overall regulation.
  // Guyton AC, Coleman TG, Granger HJ. Annu Rev Physiol 1972;34:13-46 4334846 ,
  // Abstract:
  // No abstract Available
  // This model was taken from the CellML repository and automatically converted to SBML.
  // The original model was: Guyton AC, Coleman TG, Granger HJ. (2008) - version02
  // The original CellML model was created by:
  // Terkildsen, Jonna,
  // j.terkildsen@aukland.ac.nz
  // The University of Auckland
  // Auckland Bioengineering Institute
  // This model originates from BioModels Database: A Database of Annotated Published Models (http://www.ebi.ac.uk/biomodels/). It is copyright (c) 2005-2011 The BioModels.net Team.
  // To the extent possible under law, all copyright and related or neighbouring rights to this encoded model have been dedicated to the public domain worldwide. Please refer to CC0 Public Domain Dedication for more information.
  // In summary, you are entitled to use this encoded model in absolutely any manner you deem suitable, verbatim, or with modification, alone or embedded it in a larger context, redistribute it, commercially or not, in a restricted way or not..
  // To cite BioModels Database, please use: Li C, Donizelli M, Rodriguez N, Dharuri H, Endler L, Chelliah V, Li L, He E, Henry A, Stefan MI, Snoep JL, Hucka M, Le Novère N, Laibe C (2010) BioModels Database: An enhanced, curated and annotated resource for published quantitative kinetic models. BMC Syst Biol., 4:92.
  // biomodels.db:MODEL0910928451
  // isDescribedBy pubmed:4334846
  // biomodels.db:MODEL0910928451
  // isDescribedBy pubmed:4334846
  // biomodels.db:MODEL0910928451
  // biomodels.db:MODEL0910928451

  // Compartments:
  compartment Compartment = 1;

  // Parameters:
  VP = 3.00449 dimensionless;
  HM has dimensionless;
  HM1 has dimensionless;
  VB has dimensionless;
  VIE has dimensionless;
  VIM has dimensionless;
  VIB has dimensionless;
  HM7 has dimensionless;
  PO2AM1 has dimensionless;
  HM3 has dimensionless;
  HM4 has dimensionless;
  HM5 has dimensionless;
  RC1 has dimensionless;
  RC2 has dimensionless;
  VRC = 2.00439 dimensionless;
  RCD has dimensionless;
  HMK = 90 dimensionless;
  HKM = 0.53333 dimensionless;
  PO2AMB = 150 dimensionless;
  HM6 = 1850 dimensionless;
  HM8 = 4.714e-8 dimensionless;
  REK = 1 dimensionless;
  RKC = 5.8e-6 dimensionless;
  TRRBC = 0 dimensionless;
  tu = 1 time; tu is "ime_unit";

  // Assignment rules:
  VB := VP + VRC;
  HM1 := VRC/VB;
  HM := 100*HM1;
  VIE := HM/((HMK - HM)*HKM);
  VIB := VIE + 1.5;
  VIM := 0.3333*VIB;
  PO2AM1 := piecewise(80, PO2AMB > 80, PO2AMB);
  HM3 := (PO2AM1 - 40)*HM;
  HM4 := PO2AMB - 40;
  HM5 := piecewise(0, HM3 + HM4 < 0, HM3 + HM4);
  HM7 := HM6 - HM5;
  RC1 := piecewise(0, HM7*HM8*REK + 5e-6 < 0, HM7*HM8*REK + 5e-6);
  RC2 := VRC*RKC*VIM;
  RCD := RC1 - RC2 + TRRBC;

  // Rate rules:
  VRC' = RCD/tu;

  // Unit definitions:
  unit substance = dimensionless; substance is "normalised";
end
