// SBML level 2 version 3

model Guyton1972_PulmonaryOxygenIntake()
  // This a model from the article:
  // Circulation: overall regulation.
  // Guyton AC, Coleman TG, Granger HJ. Annu Rev Physiol 1972;34:13-46 4334846 ,
  // Abstract:
  // No abstract available
  // This model was taken from the CellML repository and automatically converted to SBML.
  // The original model was: Guyton AC, Coleman TG, Granger HJ. (2008) - version02
  // The original CellML model was created by:
  // Terkildsen, Jonna,
  // j.terkildsen@aukland.ac.nz
  // The University of Auckland
  // Auckland Bioengineering Institute
  // This model originates from BioModels Database: A Database of Annotated Published Models (http://www.ebi.ac.uk/biomodels/). It is copyright (c) 2005-2011 The BioModels.net Team.
  // To the extent possible under law, all copyright and related or neighbouring rights to this encoded model have been dedicated to the public domain worldwide. Please refer to CC0 Public Domain Dedication for more information.
  // In summary, you are entitled to use this encoded model in absolutely any manner you deem suitable, verbatim, or with modification, alone or embedded it in a larger context, redistribute it, commercially or not, in a restricted way or not..
  // To cite BioModels Database, please use: Li C, Donizelli M, Rodriguez N, Dharuri H, Endler L, Chelliah V, Li L, He E, Henry A, Stefan MI, Snoep JL, Hucka M, Le Novère N, Laibe C (2010) BioModels Database: An enhanced, curated and annotated resource for published quantitative kinetic models. BMC Syst Biol., 4:92.
  // biomodels.db:MODEL0911047946
  // isDescribedBy pubmed:4334846
  // biomodels.db:MODEL0911047946
  // isDescribedBy pubmed:4334846
  // biomodels.db:MODEL0911047946
  // biomodels.db:MODEL0911047946

  // Compartments:
  compartment Compartment = 1 litre;

  // Parameters:
  VPF = 0.0123238 litre;
  DOB = 163.508 mL_per_minute;
  QRO = 4.97838 L_per_minute;
  RMO = 56.8057 mL_per_minute;
  HM = 40.0381 dimensionless;
  O2UTIL has mL_per_minute;
  ALVENT has L_per_minute;
  PO2ALV has mmHg;
  O2DFS has mL_per_minute;
  RSPDFC has mL_per_minute_per_mmHg;
  OVA = 204.497 mL_per_L;
  DOVA has mL_per_L_per_minute;
  PO2ART has mmHg;
  OSA has dimensionless;
  O2VTS2 has dimensionless;
  O2VTST has dimensionless;
  O2VTST1 has dimensionless;
  O2VAD2 has dimensionless;
  DO2VAD has per_minute;
  O2VAD1 = 2.368e-7 dimensionless;
  PO2AMB = 150 mmHg;
  PL2 = 1.8 L_mL_per_minute_per_mmHg;
  VPTISS = 0.0175 litre;
  VNTSTM = 1 dimensionless;

  // Assignment rules:
  O2UTIL := DOB + RMO;
  OSA := OVA/HM/5.25;
  PO2ART := piecewise(114 + (OSA - 1)*6667, OSA > 1, 74 + (OSA - 0.936)*625, (OSA > 0.936) && (OSA <= 1), 46 + (OSA - 0.8)*205.882, (OSA > 0.8) && (OSA <= 0.936), OSA*57.5);
  O2VTST1 := (PO2ART - 67)/30;
  O2VTST := piecewise(1, O2VTST1 > 1, 0.6, O2VTST1 < 0.6, O2VTST1);
  O2VTS2 := 1/O2VTST;
  DO2VAD := ((O2VTS2 - 1)*3 - O2VAD1)*0.0005;
  O2VAD2 := O2VAD1 + 1;
  ALVENT := O2UTIL*VNTSTM*0.026667*O2VTS2*O2VAD2;
  PO2ALV := PO2AMB - O2UTIL/ALVENT/0.761;
  RSPDFC := PL2/(VPTISS + VPF);
  O2DFS := (PO2ALV - PO2ART)*RSPDFC;
  DOVA := (O2DFS - O2UTIL)/(QRO*1);

  // Rate rules:
  OVA' = DOVA;
  O2VAD1' = DO2VAD;

  // Unit definitions:
  unit minute = 60 second;
  unit per_minute = 1 / (60 second);
  unit mmHg = 133.322 newton / metre^2;
  unit per_mmHg = metre^2 / (133.322 newton);
  unit mmHg_per_mL = 133.322 newton / (metre^2 * 1e-3 litre);
  unit per_mmHg2 = metre^4 / (133.322 newton)^2;
  unit mmHg3 = (133.322 newton)^3 / metre^6;
  unit monovalent_mEq = 1e-3 mole;
  unit monovalent_mEq_per_minute = 1e-3 mole / (60 second);
  unit monovalent_mEq_per_litre = 1e-3 mole / litre;
  unit monovalent_mEq_per_litre_per_minute = 1e-3 mole / (litre * 60 second);
  unit litre2_per_monovalent_mEq_per_minute = litre^2 / (1e-3 mole * 60 second);
  unit L_per_minute = litre / (60 second);
  unit mL = 1e-3 litre;
  unit mL_per_L = 1e-3 litre / litre;
  unit mL_per_L_per_minute = 1e-3 litre / (litre * 60 second);
  unit mL_per_minute_per_mmHg = 1e-3 litre * metre^2 / (60 second * 133.322 newton);
  unit L_mL_per_minute_per_mmHg = (0.1 litre)^2 * metre^2 / (60 second * 133.322 newton);
  unit mL_per_minute = 1e-3 litre / (60 second);
  unit L_per_minute_per_mmHg = litre * metre^2 / (60 second * 133.322 newton);
  unit time = 60 second;
end
