// SBML level 2 version 3

model Guyton1972_PulmonaryFluidDynamics()
  // This a model from the article:
  // Circulation: overall regulation.
  // Guyton AC, Coleman TG, Granger HJ. Annu Rev Physiol 1972;34:13-46 4334846 ,
  // Abstract:
  // No abstract available
  // This model was taken from the CellML repository and automatically converted to SBML.
  // The original model was: Guyton AC, Coleman TG, Granger HJ. (2008) - version02
  // The original CellML model was created by:
  // Terkildsen, Jonna.
  // j.terkildsen@aukland.ac.nz
  // The University of Auckland
  // Auckland Bioengineering Institute
  // This model originates from BioModels Database: A Database of Annotated Published Models (http://www.ebi.ac.uk/biomodels/). It is copyright (c) 2005-2011 The BioModels.net Team.
  // To the extent possible under law, all copyright and related or neighbouring rights to this encoded model have been dedicated to the public domain worldwide. Please refer to CC0 Public Domain Dedication for more information.
  // In summary, you are entitled to use this encoded model in absolutely any manner you deem suitable, verbatim, or with modification, alone or embedded it in a larger context, redistribute it, commercially or not, in a restricted way or not..
  // To cite BioModels Database, please use: Li C, Donizelli M, Rodriguez N, Dharuri H, Endler L, Chelliah V, Li L, He E, Henry A, Stefan MI, Snoep JL, Hucka M, Le Novère N, Laibe C (2010) BioModels Database: An enhanced, curated and annotated resource for published quantitative kinetic models. BMC Syst Biol., 4:92.
  // biomodels.db:MODEL0911091440
  // isDescribedBy pubmed:4334846
  // biomodels.db:MODEL0911091440
  // isDescribedBy pubmed:4334846
  // biomodels.db:MODEL0911091440
  // biomodels.db:MODEL0911091440

  // Compartments:
  compartment Compartment = 1;

  // Parameters:
  PPC = 29.9941 dimensionless;
  PPA = 15.6376 dimensionless;
  PLA = 2 dimensionless;
  CPP = 71.9719 dimensionless;
  RPV = 1.55719 dimensionless;
  RPA = 1.5683 dimensionless;
  PCP has dimensionless;
  PFI has dimensionless;
  DFP has dimensionless;
  VPF has dimensionless;
  DFZ has dimensionless;
  VPF1 = 0.0123238 dimensionless;
  PPI has dimensionless;
  PPD has dimensionless;
  CPN has dimensionless;
  PPZ has dimensionless;
  PPR1 = 0.419998 dimensionless;
  PPR has dimensionless;
  POS has dimensionless;
  PPN has dimensionless;
  PLF has dimensionless;
  PPO has dimensionless;
  CPF = 0.0003 dimensionless;
  tu = 1 time; tu is "time_unit";

  // Assignment rules:
  PCP := (PPA - PLA)*RPV/(RPV + RPA) + PLA;
  PFI := (PCP - PPI + POS - PPC)*CPF;
  DFZ := PFI - PLF;
  DFP := DFZ;
  VPF := piecewise(0.001, VPF1 < 0.001, VPF1);
  PPI := 2 - 0.15/VPF;
  PPZ := PPN - PPO;
  PPD := PPZ;
  PPR := piecewise(0.025, PPR1 < 0.025, PPR1);
  CPN := PPR/VPF;
  POS := CPN*0.4;
  PPN := (CPP - CPN)*0.000225;
  PLF := (PPI + 11)*0.0003;
  PPO := PLF*CPN;

  // Rate rules:
  VPF1' = DFP/tu;
  PPR1' = PPD/tu;

  // Unit definitions:
  unit substance = dimensionless; substance is "normalised";
end
