// SBML level 2 version 4

model Sorokina2009_PhyA_FHL_ON_OFF_9h()
  // Final version obtained by merging of the PhyA_FHL model with On_OFF 9h long experiment
  // This model originates from BioModels Database: A Database of Annotated Published Models (http://www.ebi.ac.uk/biomodels/). It is copyright (c) 2005-2011 The BioModels.net Team.
  // To the extent possible under law, all copyright and related or neighbouring rights to this encoded model have been dedicated to the public domain worldwide. Please refer to CC0 Public Domain Dedication for more information.
  // In summary, you are entitled to use this encoded model in absolutely any manner you deem suitable, verbatim, or with modification, alone or embedded it in a larger context, redistribute it, commercially or not, in a restricted way or not..
  // To cite BioModels Database, please use: Li C, Donizelli M, Rodriguez N, Dharuri H, Endler L, Chelliah V, Li L, He E, Henry A, Stefan MI, Snoep JL, Hucka M, Le Novère N, Laibe C (2010) BioModels Database: An enhanced, curated and annotated resource for published quantitative kinetic models. BMC Syst Biol., 4:92.
  // biomodels.db:MODEL0911120000
  // isDescribedBy pubmed:19761615
  // biomodels.db:MODEL0911120000
  // isDescribedBy pubmed:19761615
  // biomodels.db:MODEL0911120000
  // biomodels.db:MODEL0911120000

  // Compartments:
  compartment colony in default = 0.0001;
  compartment gel in default = 0.02;
  compartment default = 1;

  // Species:
  species FRL in colony = 0;
  species Pfr_GBD_c in colony = 0;
  species Pfr_GBD_f in colony = 0;
  species Pfr_PIF3 in colony = 0;
  species Pr_GBD_f in colony = 0;
  species Pr_PIF3 in colony = 0;
  species RL in colony = 0;
  species nLUC in colony = 1/colony;
  species nLuc in colony = 1/colony;

  // Parameters:
  Kbase = 0.4577134;
  mLUC = 3;
  Pool_Phy = 40;
  Pool_PIF3 = 99.9996;
  K1 = 1.5;
  K2 = 0.01184609;
  K3 = 9.998706;
  K_dis = 0.03109291;
  K_rev = 0.2047716;
  a_Luc = 2;
  g_Luc = 1.046208;
  n_Luc = 29.40816;
  Ka_R = 0.004953;
  Ka_FR = 3.553e-5;
  Ki_R = 0.0007439;
  Ki_FR = 0.001701;
  p_Luc = 10.00059;
  m_Luc1 = 0;
  m_Luc = 0.7939427;
  k_cat = 499.7903;
  Km = 1900000;
  // optimizedvalue
  RLU = 10.0013;
  RLU_a = 0;
  Ka_560 = 0.0003988;
  Ki_560 = 8.173e-5;
  vCell = 7e-14;
  Navogadro = 6.23e23;
  coefnM = 43.6;
  D = -0.023956;
  r0 = 1.9092e-5;
  A = 0.33707;
  B = 0.5705;
  m_S = 0.00646;

  // Assignment rules:
  kLUC := Kbase/mLUC;
  kLuc := kLUC*p_Luc/m_Luc;
  Luc := nLuc*kLuc;
  LUC := nLUC*kLUC;
  rnaCopies := LUC*kLUC*coefnM;
  lucCopies := Luc*kLuc*coefnM;
  PhyCopies := Pool_Phy*coefnM;
  Pr_GBD_c := Pool_Phy - Pfr_PIF3 - Pr_PIF3 - Pfr_GBD_c - Pfr_GBD_f - Pr_GBD_f;
  PIF3_GAD := Pool_PIF3 - Pfr_PIF3 - Pr_PIF3;
  Scyt := 2500000*(A + B/(time + 1)*exp(-1/4*r0^2/D^2/(time + 1)));
  R_a := k_cat*Luc*kLuc*Scyt/(Km + Scyt)*RLU_a;
  LuM := k_cat*Luc*kLuc*Scyt/(Km + Scyt)*RLU;

  // Reactions:
  LUCtrnbasic: => nLUC; Kbase/kLUC;
  LUCdeg: nLUC => ; mLUC*LUC/kLUC;
  Pfr_GBDtrs: Pfr_GBD_c => Pfr_GBD_f; K2*Pfr_GBD_c;
  Pr_GBDtrs: Pr_GBD_f => ; K3*Pr_GBD_f;
  Darkrev_c: Pfr_GBD_c => ; K_rev*Pfr_GBD_c;
  Darkrev_f: Pfr_GBD_f => Pr_GBD_f; K_rev*Pfr_GBD_f;
  Pfr_PIF3cplx: Pfr_GBD_f => Pfr_PIF3; K1*Pfr_GBD_f*PIF3_GAD;  // modifiers: Pr_PIF3
  Darkrev_cplx: Pfr_PIF3 => Pr_PIF3; K_rev*Pfr_PIF3;
  Pr_PIF3diss: Pr_PIF3 => Pr_GBD_f; K_dis*Pr_PIF3;
  Pfr_PIF3_fcon: Pfr_PIF3 => Pr_PIF3; (Ki_R*RL + Ki_FR*FRL + Ki_560*R_a)*Pfr_PIF3;  // modifiers: FRL, RL, nLuc
  LUCtrnind: => nLUC; n_Luc*(Pfr_PIF3 + Pr_PIF3)^a_Luc/(g_Luc^a_Luc + (Pfr_PIF3 + Pr_PIF3)^a_Luc)/kLUC;  // modifiers: Pfr_PIF3, Pr_PIF3
  Phyact_f: Pr_GBD_f -> Pfr_GBD_f; (Ka_R*RL + Ka_FR*FRL + Ka_560*R_a)*Pr_GBD_f - (Ki_R*RL + Ki_FR*FRL + Ki_560*R_a)*Pfr_GBD_f;  // modifiers: FRL, RL, nLuc
  Phyact_c: -> Pfr_GBD_c; (Ka_R*RL + Ka_FR*FRL + Ka_560*R_a)*Pr_GBD_c - (Ki_R*RL + Ki_FR*FRL + Ki_560*R_a)*Pfr_GBD_c;  // modifiers: FRL, Pfr_GBD_f, Pfr_PIF3, Pr_GBD_f, Pr_PIF3, RL, nLuc
  Luctrl: => nLuc; p_Luc*LUC/kLuc;  // modifiers: nLUC
  Lucdeg: nLuc => ; m_Luc*Luc/kLuc;
  LucSdeg: nLuc => ; m_Luc1*Luc*Scyt/kLuc;
  redLight: => RL; 0;
  farRedLight: => FRL; 0;

  // Events:
  StateChange_1: at (time >= 16): RL = 252000;
  StateChange_2: at (time >= 16.16): RL = 0;
  StateChange_3: at (time >= 24.5): FRL = 288000;
  StateChange_4: at (time >= 24.66): FRL = 0;
end
