// SBML level 2 version 3

model Guyton1972_NonMuscleBloodFlowControl()
  // This a model from the article:
  // Circulation: overall regulation.
  // Guyton AC, Coleman TG, Granger HJ. Annu Rev Physiol 1972;34:13-46 4334846 ,
  // Abstract:
  // No abstract available
  // This model was taken from the CellML repository and automatically converted to SBML.
  // The original model was: Guyton AC, Coleman TG, Granger HJ. (2008) - version02
  // The original CellML model was created by:
  // Terkildsen, Jonna,
  // j.terkildsen@aukland.ac.nz
  // The University of Auckland
  // Auckland Bioengineering Institute
  // This model originates from BioModels Database: A Database of Annotated Published Models (http://www.ebi.ac.uk/biomodels/). It is copyright (c) 2005-2011 The BioModels.net Team.
  // To the extent possible under law, all copyright and related or neighbouring rights to this encoded model have been dedicated to the public domain worldwide. Please refer to CC0 Public Domain Dedication for more information.
  // In summary, you are entitled to use this encoded model in absolutely any manner you deem suitable, verbatim, or with modification, alone or embedded it in a larger context, redistribute it, commercially or not, in a restricted way or not..
  // To cite BioModels Database, please use: Li C, Donizelli M, Rodriguez N, Dharuri H, Endler L, Chelliah V, Li L, He E, Henry A, Stefan MI, Snoep JL, Hucka M, Le Novère N, Laibe C (2010) BioModels Database: An enhanced, curated and annotated resource for published quantitative kinetic models. BMC Syst Biol., 4:92.
  // biomodels.db:MODEL0911169699
  // isDescribedBy pubmed:4334846
  // biomodels.db:MODEL0911169699
  // isDescribedBy pubmed:4334846
  // biomodels.db:MODEL0911169699
  // biomodels.db:MODEL0911169699

  // Compartments:
  compartment Compartment = 1;

  // Parameters:
  POT = 35.1148 dimensionless;
  POD has dimensionless;
  POB has dimensionless;
  AR1 has dimensionless;
  AR1T = 1.02127 dimensionless;
  POA has dimensionless;
  AR2 has dimensionless;
  AR2T = 1.01179 dimensionless;
  POC has dimensionless;
  AR3 has dimensionless;
  AR3T = 1.1448 dimensionless;
  ARM1 has dimensionless;
  ARM has dimensionless;
  POR = 35 dimensionless;
  POK = 0.1 dimensionless;
  A1K = 0.5 dimensionless;
  PON = 0.1 dimensionless;
  A2K = 60 dimensionless;
  A3K = 40000 dimensionless;
  POZ = 2 dimensionless;
  AUTOSN = 0.9 dimensionless;
  tu = 1 time; tu is "time_unit";

  // Assignment rules:
  POD := POT - POR;
  POB := POD*POK + 1;
  AR1 := piecewise(0.5, AR1T < 0.5, AR1T);
  POA := PON*POD + 1;
  AR2 := piecewise(0.5, AR2T < 0.5, AR2T);
  POC := POZ*POD + 1;
  AR3 := piecewise(0.3, AR3T < 0.3, AR3T);
  ARM1 := AR1*AR2*AR3;
  ARM := (ARM1 - 1)*AUTOSN + 1;

  // Rate rules:
  AR1T' = (POB - AR1T)/(tu/A1K);
  AR2T' = (POA - AR2T)/(tu/A2K);
  AR3T' = (POC - AR3T)/(tu/A3K);

  // Unit definitions:
  unit substance = dimensionless; substance is "normalised";
end
