// SBML level 2 version 3

model Guyton1972_MuscleBloodFlowControl()
  // This a model from the article:
  // Circulation: overall regulation.
  // Guyton AC, Coleman TG, Granger HJ. Annu Rev Physiol 1972;34:13-46 4334846 ,
  // Abstract:
  // No abstract available
  // This model was taken from the CellML repository and automatically converted to SBML.
  // The original model was: Guyton AC, Coleman TG, Granger HJ. (2008) - version02
  // The original CellML model was created by:
  // Terkildsen, Jonna,
  // j.terkildsen@aukland.ac.nz
  // The University of Auckland
  // Auckland Bioengineering Institute
  // This model originates from BioModels Database: A Database of Annotated Published Models (http://www.ebi.ac.uk/biomodels/). It is copyright (c) 2005-2011 The BioModels.net Team.
  // To the extent possible under law, all copyright and related or neighbouring rights to this encoded model have been dedicated to the public domain worldwide. Please refer to CC0 Public Domain Dedication for more information.
  // In summary, you are entitled to use this encoded model in absolutely any manner you deem suitable, verbatim, or with modification, alone or embedded it in a larger context, redistribute it, commercially or not, in a restricted way or not..
  // To cite BioModels Database, please use: Li C, Donizelli M, Rodriguez N, Dharuri H, Endler L, Chelliah V, Li L, He E, Henry A, Stefan MI, Snoep JL, Hucka M, Le Novère N, Laibe C (2010) BioModels Database: An enhanced, curated and annotated resource for published quantitative kinetic models. BMC Syst Biol., 4:92.
  // biomodels.db:MODEL0911202318
  // isDescribedBy pubmed:4334846
  // biomodels.db:MODEL0911202318
  // isDescribedBy pubmed:4334846
  // biomodels.db:MODEL0911202318
  // biomodels.db:MODEL0911202318

  // Compartments:
  compartment Compartment = 1;

  // Parameters:
  PMO = 38.0666 dimensionless;
  PDO has dimensionless;
  POE has dimensionless;
  AMM1 has dimensionless;
  AMM1T = 1.00269 dimensionless;
  POF has dimensionless;
  AMM2 = 1.09071 dimensionless;
  AMM has dimensionless;
  POM = 0.04 dimensionless;
  A4K = 0.1 dimensionless;
  AMM4 = 0.005 dimensionless;
  POM2 = 2 dimensionless;
  A4K2 = 40000 dimensionless;
  tu = 1 time; tu is "time_unit";

  // Assignment rules:
  PDO := PMO - 38;
  POE := PDO*POM + 1;
  AMM1 := piecewise(AMM4, AMM1T < AMM4, AMM1T);
  POF := POM2*PDO + 1;
  AMM := AMM1*AMM2;

  // Rate rules:
  AMM1T' = (POE - AMM1T)/(A4K*tu);
  AMM2' = (POF - AMM2)/(A4K2*tu);

  // Unit definitions:
  unit substance = dimensionless; substance is "normalised";
end
