// SBML level 2 version 3

model Guyton1972_HeartHypertrophy()
  // This a model from the article:
  // Circulation: overall regulation.
  // Guyton AC, Coleman TG, Granger HJ. Annu Rev Physiol 1972;34:13-46 4334846 ,
  // Abstract:
  // No abstract available
  // This model was taken from the CellML repository and automatically converted to SBML.
  // The original model was: Guyton AC, Coleman TG, Granger HJ. (2008) - version02
  // The original CellML model was created by:
  // Terkildsen, Jonna,
  // j.terkildsen@aukland.ac.nz
  // The University of Auckland
  // Auckland Bioengineering Institute
  // This model originates from BioModels Database: A Database of Annotated Published Models (http://www.ebi.ac.uk/biomodels/). It is copyright (c) 2005-2011 The BioModels.net Team.
  // To the extent possible under law, all copyright and related or neighbouring rights to this encoded model have been dedicated to the public domain worldwide. Please refer to CC0 Public Domain Dedication for more information.
  // In summary, you are entitled to use this encoded model in absolutely any manner you deem suitable, verbatim, or with modification, alone or embedded it in a larger context, redistribute it, commercially or not, in a restricted way or not..
  // To cite BioModels Database, please use: Li C, Donizelli M, Rodriguez N, Dharuri H, Endler L, Chelliah V, Li L, He E, Henry A, Stefan MI, Snoep JL, Hucka M, Le Novère N, Laibe C (2010) BioModels Database: An enhanced, curated and annotated resource for published quantitative kinetic models. BMC Syst Biol., 4:92.
  // biomodels.db:MODEL0911231713
  // isDescribedBy pubmed:4334846
  // biomodels.db:MODEL0911231713
  // isDescribedBy pubmed:4334846
  // biomodels.db:MODEL0911231713
  // biomodels.db:MODEL0911231713

  // Compartments:
  compartment Compartment = 1;

  // Parameters:
  QAO = 5.00707 dimensionless;
  PA = 103.525 dimensionless;
  POT = 35.1148 dimensionless;
  PPA = 15.6376 dimensionless;
  HPL = 1.00163 dimensionless;
  HPR = 1.00237 dimensionless;
  HMD has dimensionless;
  HMD1 = 1 dimensionless;
  DHM has dimensionless;
  HSL = 1 dimensionless;
  Z13 = 0.625 dimensionless;
  HSR = 1 dimensionless;
  DHDTR = 0.05 dimensionless;
  tu = 1 time; tu is "time_unit";

  // Assignment rules:
  DHM := (POT - 10)*DHDTR;
  HMD := piecewise(1, HMD1 > 1, HMD1);

  // Rate rules:
  HPL' = ((PA*QAO/(500*HSL))^Z13 - HPL)/57600;
  HPR' = ((PPA*QAO/(75*HSR))^Z13 - HPR)/57600;
  HMD1' = DHM/tu;

  // Unit definitions:
  unit substance = dimensionless; substance is "normalised";
end
