// SBML level 2 version 4

model GonzalezHeydrich1994_HPAaxisRegulation_CortisolProduction()
  // This a model from the article:
  // A computer simulation of the hypothalamic-pituitary-adrenal axis.
  // Gonzalez-Heydrich J, Steingard RJ, Kohane I. Proc Annu Symp Comput Appl Med Care 1994;:1010 7949852 ,
  // Abstract:
  // This paper describes the construction of a computer model that simulates the hypothalamic-pituitary-adrenal axis (HPA axis) regulation of cortisol production. It is presented to illustrate the process of physiological modeling using standard "off the shelf" technologies. The model simulates components of the HPA axis involved in the continuous secretion and elimination of cortisol, adrenocorticotropin (ACTH), and corticotropin releasing hormone (CRH). The physiological relations of these component pieces were modeled based on the current knowledge of their functioning. Rate constants, half lives, and receptor affinities were assigned values derived from the experimental literature. At its current level of development the model is able to accurately simulate the timing, magnitude and decay of the ACTH and cortisol concentration peaks resulting from the ovine-CRH stimulation test in normal and hypercortisolemic patients. The model will be used to predict the effects of lesions in different components of the HPA axis on the time course of cortisol and ACTH levels. We plan to use the model to explore the experimental conditions required to distinguish mechanisms underlying various disorders of the HPA axis, particularly depression. Efforts are currently underway to validate the model for a large variety of normal and pathological perturbations of the HPA axis.
  // This model was taken from the CellML repository and automatically converted to SBML.
  // The original model was: Gonzalez-Heydrich J, Steingard RJ, Kohane I. (1994) - version02
  // This model originates from BioModels Database: A Database of Annotated Published Models (http://www.ebi.ac.uk/biomodels/). It is copyright (c) 2005-2011 The BioModels.net Team.
  // To the extent possible under law, all copyright and related or neighbouring rights to this encoded model have been dedicated to the public domain worldwide. Please refer to CC0 Public Domain Dedication for more information.
  // In summary, you are entitled to use this encoded model in absolutely any manner you deem suitable, verbatim, or with modification, alone or embedded it in a larger context, redistribute it, commercially or not, in a restricted way or not..
  // To cite BioModels Database, please use: Li C, Donizelli M, Rodriguez N, Dharuri H, Endler L, Chelliah V, Li L, He E, Henry A, Stefan MI, Snoep JL, Hucka M, Le Novère N, Laibe C (2010) BioModels Database: An enhanced, curated and annotated resource for published quantitative kinetic models. BMC Syst Biol., 4:92.
  // biomodels.db:MODEL0911270004
  // isDescribedBy pubmed:7949852
  // biomodels.db:MODEL0911270004
  // isDescribedBy pubmed:7949852
  // biomodels.db:MODEL0911270004
  // biomodels.db:MODEL0911270004

  // Compartments:
  compartment Compartment = 1 litre;

  // Parameters:
  cortisol = 0 mcg_ml;
  k1 = 500000 first_order_rate_constant;
  k2 = 0.01 flux;
  k3 = 0.01 first_order_rate_constant;
  ACTH = 0 mcg_ml;
  k4 = 10 first_order_rate_constant;
  k5 = 0.004 flux;
  k6 = 0.035 first_order_rate_constant;
  Kd = 0.004 mcg_ml;
  Imax = 0.99 dimensionless;
  CRH = 50 mcg_ml;
  k7 = 1e-6 flux;
  k8 = 0.01 first_order_rate_constant;
  pulse = 50 flux;

  // Rate rules:
  cortisol' = k1*ACTH + k2 - k3*cortisol;
  ACTH' = k4*CRH + k5 - (k6*ACTH + (k4*CRH + k5)*(Imax*cortisol/(Kd + cortisol)));
  CRH' = pulse + k7 - k8*CRH;

  // Unit definitions:
  unit mcg_ml = 1e-6 gram / (1e-3 litre);
  unit minute = 60 second;
  unit flux = 1e-6 gram / (1e-3 litre * 60 second);
  unit first_order_rate_constant = 1 / (60 second);
  unit time = 60 second;
end
