// SBML level 2 version 4

model Guyton1972_Autonomics()
  // This a model from the article:
  // Circulation: overall regulation.
  // Guyton AC, Coleman TG, Granger HJ. Annu Rev Physiol 1972;34:13-46 4334846 ,
  // Abstract:
  // This article is an experiment, one undertaken primarily because of the long-term belief of Dr. Victor Hall, Editor of the Annual Review of Physiology fo r many years, that physiology is, or at least should be, an analytical subject, and that a method not utilized to its fullest advantage for organizing review material is the systems analysis. Furthermore, one of the most likely areas in physiology for which a systems analysis could be of value would be in a discussion of circulatory regulation. Therefore, this article was undertaken directly at the request of the editors of the A ogy to attempt the welding togeth er of a systemsn annuaally Rsiesv ioewf coifr cPuhlaytsoiorlyregulation with a review of the current literature in this field. The systems analysis of circulatory regulation developed for this article is based on earlier, much less extensive analyses (Guyton and Coleman 1, 2); it i s illustrated in Figure 1. This analysis is comprised of 354 blocks, each of which represents one or more mathematical equations describing some physiological facet of circulatory function. In general, each of the functional blocks has been the subject of research investigation by one or many investigator s, but the analysis is based on cumulative knowledge of the circulation rather than simply on current literature. Therefore, the analysis presented here is not a review of the current literature but is a framework to show how the different regulations operate together in the overall system. Later in this review we will attempt to show some of the voids still present in our knowledge of circulatory regulation (which is perhaps the most important value of performing systems analyses), and we will discuss the current research that is attempting to fill these voids. A criticism that has often been made against systems analyses, and very justly so, is that they are usually designed to explain specific phenomena. Therefore, they too often are based on such bizarre concepts of function that they not only fail to give correct predictions (other than the specific ones for which they are designed) but, indeed, often give exactly reverse predictions. Therefore, the analysis of Figure 1 was based almost entirely on act ual experimental data, and it has been tested in computer simulations to see whether or not it can predict the animal or human results of many different types of circulatory stresses induced either experimentally or as the result of clinical abnormalities. Figures 2 through 5 present simulations of some of these experiments or clinical conditions. They will be described later in the article.
  // This model was taken from the CellML repository and automatically converted to SBML.
  // The original model was: Guyton AC, Coleman TG, Granger HJ. (2008) - version01
  // This model originates from BioModels Database: A Database of Annotated Published Models (http://www.ebi.ac.uk/biomodels/). It is copyright (c) 2005-2011 The BioModels.net Team.
  // To the extent possible under law, all copyright and related or neighbouring rights to this encoded model have been dedicated to the public domain worldwide. Please refer to CC0 Public Domain Dedication for more information.
  // In summary, you are entitled to use this encoded model in absolutely any manner you deem suitable, verbatim, or with modification, alone or embedded it in a larger context, redistribute it, commercially or not, in a restricted way or not..
  // To cite BioModels Database, please use: Li C, Donizelli M, Rodriguez N, Dharuri H, Endler L, Chelliah V, Li L, He E, Henry A, Stefan MI, Snoep JL, Hucka M, Le Novère N, Laibe C (2010) BioModels Database: An enhanced, curated and annotated resource for published quantitative kinetic models. BMC Syst Biol., 4:92.
  // biomodels.db:MODEL0911270005
  // isDescribedBy pubmed:4334846
  // biomodels.db:MODEL0911270005
  // isDescribedBy pubmed:4334846
  // biomodels.db:MODEL0911270005
  // biomodels.db:MODEL0911270005

  // Compartments:
  compartment Compartment = 1 litre;

  // Parameters:
  PA = 103.525 dimensionless;
  PO2ART = 97.0439 dimensionless;
  PLA = 2 dimensionless;
  PRA = 0.00852183 dimensionless;
  PPA = 15.6376 dimensionless;
  PA1 has dimensionless;
  AUC has dimensionless;
  AUC3 has dimensionless;
  AUC2 has dimensionless;
  AU6C has dimensionless;
  AUB has dimensionless;
  A1B has dimensionless;
  AU6A has dimensionless;
  AU4 = -0.060024 dimensionless;
  AU6 = 1.00132 dimensionless;
  AUN has dimensionless;
  AULP has dimensionless;
  AUEX has dimensionless;
  AUTTL has dimensionless;
  AUTTL1 has dimensionless;
  AU has dimensionless;
  DAU has dimensionless;
  AU1 = 1.00007 dimensionless;
  AUT has dimensionless;
  VVR has dimensionless;
  AUH has dimensionless;
  AUR has dimensionless;
  AOM has dimensionless;
  AUM has dimensionless;
  AVE has dimensionless;
  AUO has dimensionless;
  VV9 = 2.51 dimensionless;
  AUL = 1.5 dimensionless;
  AULPM = 0 dimensionless;
  AUY = 0 dimensionless;
  AUV = 0.55 dimensionless;
  AUS = 1 dimensionless;
  O2A = 0.1 dimensionless;
  AUM1 = 3 dimensionless;
  AUM2 = 1 dimensionless;
  AUDMP = 0.3 dimensionless;
  AUMAX = 5 dimensionless;
  AUMIN = 0.4 dimensionless;
  AUSLP = 1.5 dimensionless;
  EXC = 1 dimensionless;
  EXCML = 0.01 dimensionless;
  EXCXP = 1 dimensionless;
  AUN1 = 0.5 dimensionless;
  MDMP = 0 dimensionless;
  BAROTC = 0.16 dimensionless;
  AUK = 0.004 dimensionless;
  AUX = 1 dimensionless;
  O2CHMO = 0.01 dimensionless;
  AUC1 = 0.3 dimensionless;
  CRRFLX = 0 dimensionless;
  EXE = 0 dimensionless;

  // Assignment rules:
  PA1 := piecewise(PA - EXE, CRRFLX > 1e-7, CRRFLX);
  AUC := piecewise(0.005*(80 - PA1)*AUC1, PA1 < 80, 0.2*AUC1, PA1 < 40, 0);
  AUC2 := piecewise(O2CHMO*(80 - PO2ART), PO2ART < 80, O2CHMO*40, PO2ART < 40, 0);
  AUC3 := AUC + AUC2;
  AUB := piecewise(0.016667*(160 - PA1), PA1 < 160, 1.3336, PA1 < 80, 0);
  A1B := (AUB - 1)*AUX + 1;
  AU6A := A1B - AU4;
  AU6C := AU6;
  AUN := piecewise(0.04*(40 - PA1)*AUN1, PA1 < 40, 0);
  AULP := (15/(PLA + PRA + PPA) - 1)*AULPM + 1;
  AUEX := EXC^EXCXP;
  AUTTL1 := (AUEX*AULP*(AUC3 + AU6C + AUN) - 1)*EXCML + 1;
  AUTTL := piecewise(0, AUTTL1 < 0, AUTTL1);
  DAU := AUTTL - AU1;
  AUT := AUMAX - (AUMAX - 1)/exp(AUSLP*(AU1 - 1));
  AU := piecewise(AUMIN, AUT < AUMIN, AUT);
  VVR := VV9 - AU*AUL + AUL;
  AUO := AU - 1;
  AUH := AUO*AUV + 1;
  AUR := AUO*AUS + 1;
  AOM := AUO*O2A + 1;
  AUM := (AUO*AUM1 + 1)^AUM2;
  AVE := AUO*AUY + 1;

  // Rate rules:
  AU6' = (AU6A - AU6)/BAROTC;
  AU1' = DAU/AUDMP;
end
