// SBML level 2 version 4

model Karagiannis2004_CollagenIproteolysis()
  // This a model from the article:
  // A theoretical model of type I collagen proteolysis by matrix metalloproteinase (MMP) 2 and membrane type 1 MMP in the presence of tissue inhibitor of metalloproteinase 2.
  // Karagiannis ED, Popel AS. J Biol Chem 2004 Sep 10;279(37):39105-14 15252025 ,
  // Abstract:
  // One well documented family of enzymes responsible for the proteolytic processes that occur in the extracellular matrix is the soluble and membrane-associated matrix metalloproteinases. Here we present the first theoretical model of the biochemical network describing the proteolysis of collagen I by matrix metalloproteinases 2 (MMP2) and membrane type 1 matrix metalloproteinases (MT1-MMP) in the presence of the tissue inhibitor of metalloproteinases 2 (TIMP2) in a bulk, cell-free, well stirred environment. The model can serve as a tool for describing quantitatively the activation of the MMP2 proenzyme (pro-MMP2), the ectodomain shedding of MT1-MMP, and the collagenolysis arising from both of the enzymes. We show that pro-MMP2 activation, a process that involves a trimer formation of the proenzyme with TIMP2 and MT1-MMP, is suppressed at high inhibitor levels and paradoxically attains maximum only at intermediate TIMP2 concentrations. We also calculate the conditions for which pro-MMP2 activation is maximal. Furthermore we demonstrate that the ectodomain shedding of MT1-MMP can serve as a mechanism controlling the MT1-MMP availability and therefore the pro-MMP2 activation. Finally the proteolytic synergism of MMP2 and MT1-MMP is introduced and described quantitatively. The model provides us a tool to determine the conditions under which the synergism is optimized. Our approach is the first step toward a more complete description of the proteolytic processes that occur in the extracellular matrix and include a wider spectrum of enzymes and substrates as well as naturally occurring or artificial inhibitors.
  // This model was taken from the CellML repository and automatically converted to SBML.
  // The original model was: Karagiannis ED, Popel AS. (2004) - version01
  // This model originates from BioModels Database: A Database of Annotated Published Models (http://www.ebi.ac.uk/biomodels/). It is copyright (c) 2005-2011 The BioModels.net Team.
  // To the extent possible under law, all copyright and related or neighbouring rights to this encoded model have been dedicated to the public domain worldwide. Please refer to CC0 Public Domain Dedication for more information.
  // In summary, you are entitled to use this encoded model in absolutely any manner you deem suitable, verbatim, or with modification, alone or embedded it in a larger context, redistribute it, commercially or not, in a restricted way or not..
  // To cite BioModels Database, please use: Li C, Donizelli M, Rodriguez N, Dharuri H, Endler L, Chelliah V, Li L, He E, Henry A, Stefan MI, Snoep JL, Hucka M, Le Novère N, Laibe C (2010) BioModels Database: An enhanced, curated and annotated resource for published quantitative kinetic models. BMC Syst Biol., 4:92.
  // biomodels.db:MODEL0911270007
  // isDescribedBy pubmed:15252025
  // biomodels.db:MODEL0911270007
  // isDescribedBy pubmed:15252025
  // biomodels.db:MODEL0911270007
  // biomodels.db:MODEL0911270007

  // Compartments:
  compartment Compartment = 1 litre;

  // Parameters:
  v2 has flux;
  v3 has flux;
  v4 has flux;
  v5 has flux;
  v6 has flux;
  v7 has flux;
  v8 has flux;
  v9 has flux;
  v10 has flux;
  v12 has flux;
  MT1 = 1e-8 molar;
  MT1cat = 0 molar;
  MT1t = 0 molar;
  T2 = 4e-9 molar;
  MT1_T2 = 0 molar;
  M2p = 5e-8 molar;
  MT1_T2_M2p = 0 molar;
  MT1_T2_M2p_MT1 = 0 molar;
  MT1_T2_star = 0 molar;
  M2 = 3e-11 molar;
  M2_T2 = 0 molar;
  M2_T2_star = 0 molar;
  M2_C1 = 0 molar;
  C1 = 0.000176 molar;
  C1D = 0 molar;
  kon_M2T2 = 5900000 second_order_rate_constant;
  koff_M2T2 = 6.3 first_order_rate_constant;
  kiso_M2T2 = 33 first_order_rate_constant;
  k_iso_M2T2 = 2e-8 first_order_rate_constant;
  kon_M2C1 = 2600 second_order_rate_constant;
  koff_M2C1 = 0.0021 first_order_rate_constant;
  kcat_M2C1 = 0.0045 first_order_rate_constant;
  kact_M2 = 0.02 first_order_rate_constant;
  kon_MT1T2M2p = 140000 second_order_rate_constant;
  koff_MT1T2M2p = 0.0047 first_order_rate_constant;
  kon_MT1T2M2pMT1 = 3000 second_order_rate_constant;
  koff_MT1T2M2pMT1 = 0.0009 first_order_rate_constant;
  kcat_MT1C1 = 0.00197 first_order_rate_constant;
  kshed_MT1 = 2800 second_order_rate_constant;
  kon_MT1T2 = 3540000 second_order_rate_constant;
  koff_MT1T2 = 20.2 first_order_rate_constant;
  km_M2C1 = 8.5e-6 molar;
  km_MT1C1 = 8.5e-6 molar;

  // Assignment rules:
  v2 := -(kshed_MT1*MT1*MT1);
  v3 := kon_MT1T2*MT1*T2 - koff_MT1T2*MT1_T2;
  v4 := kon_MT1T2M2p*M2p*MT1_T2 - koff_MT1T2M2p*MT1_T2_M2p;
  v5 := kon_MT1T2M2pMT1*MT1*MT1_T2_M2p - koff_MT1T2M2pMT1*MT1_T2_M2p_MT1;
  v6 := -(kact_M2*MT1_T2_M2p_MT1);
  v7 := kon_M2T2*M2*T2 - koff_M2T2*M2_T2;
  v8 := kiso_M2T2*M2_T2 - k_iso_M2T2*M2_T2_star;
  v9 := kon_M2C1*M2*C1 - koff_M2C1*M2_C1;
  v10 := kcat_M2C1*M2*C1/(km_M2C1 + C1);
  v12 := kcat_MT1C1*MT1*C1/(km_MT1C1 + C1);

  // Rate rules:
  MT1' = v2 + v6 + v12 - (2*v2 + v3 + v5 + v12);
  MT1cat' = v2;
  MT1t' = v2;
  T2' = -(v3 + v7);
  MT1_T2' = v3 - v4;
  M2p' = -v4;
  MT1_T2_M2p' = v5 - v4;
  MT1_T2_M2p_MT1' = v5 - v6;
  MT1_T2_star' = -v6;
  M2' = v6 + v10 - (v7 + v9);
  M2_T2' = v7 - v8;
  M2_T2_star' = v8;
  M2_C1' = v9;
  C1' = -(v9 + v10 + v12);
  C1D' = v10 + v12;

  // Unit definitions:
  unit molar = mole / litre;
  unit flux = mole / (litre * second);
  unit first_order_rate_constant = 1 / second;
  unit second_order_rate_constant = litre / (second * mole);
end
