// SBML level 2 version 3

model Guyton1972_AtrialNatriureticPeptide()
  // This a model from the article:
  // Circulation: overall regulation.
  // Guyton AC, Coleman TG, Granger HJ. Annu Rev Physiol 1972;34:13-46 4334846 ,
  // Abstract:
  // No abstract available
  // This model was taken from the CellML repository and automatically converted to SBML.
  // The original model was: Guyton AC, Coleman TG, Granger HJ. (2008) - version02
  // The original CellML model was created by:
  // Terkildsen, Jonna,
  // j.terkildsen@aukland.ac.nz
  // The University of Auckland
  // Auckland Bioengineering Institute
  // This model originates from BioModels Database: A Database of Annotated Published Models (http://www.ebi.ac.uk/biomodels/). It is copyright (c) 2005-2011 The BioModels.net Team.
  // To the extent possible under law, all copyright and related or neighbouring rights to this encoded model have been dedicated to the public domain worldwide. Please refer to CC0 Public Domain Dedication for more information.
  // In summary, you are entitled to use this encoded model in absolutely any manner you deem suitable, verbatim, or with modification, alone or embedded it in a larger context, redistribute it, commercially or not, in a restricted way or not..
  // To cite BioModels Database, please use: Li C, Donizelli M, Rodriguez N, Dharuri H, Endler L, Chelliah V, Li L, He E, Henry A, Stefan MI, Snoep JL, Hucka M, Le Novère N, Laibe C (2010) BioModels Database: An enhanced, curated and annotated resource for published quantitative kinetic models. BMC Syst Biol., 4:92.
  // biomodels.db:MODEL0911272039
  // isDescribedBy pubmed:4334846
  // biomodels.db:MODEL0911272039
  // isDescribedBy pubmed:4334846
  // biomodels.db:MODEL0911272039
  // biomodels.db:MODEL0911272039

  // Compartments:
  compartment Compartment = 1;

  // Parameters:
  PLA = 2 dimensionless;
  PRA = 0.00852183 dimensionless;
  ANP has dimensionless;
  ANPL has dimensionless;
  ANPR2 has dimensionless;
  ANP1 has dimensionless;
  ANPC = 1 dimensionless;
  ANPX has dimensionless;
  ANPKNS = 0 dimensionless;
  ANPINF = 0 dimensionless;
  ANPTC = 4 dimensionless;
  ANPXUL = 10 dimensionless;
  tu = 1 time; tu is "time_unit";

  // Assignment rules:
  ANPL := piecewise(0, PLA - 1 < 0, PLA - 1);
  ANPR2 := piecewise(0, (PRA + 1)*2 < 0, (PRA + 1)*2);
  ANP := (ANPL + ANPR2)/3;
  ANP1 := piecewise(ANPKNS, ANPKNS > 0, ANP + ANPINF);
  ANPX1 := ANPXUL - ANPXUL/(0.5555556*(1 + ANPC));
  ANPX := piecewise(-1, 1 + ANPX1 < 0, ANPX1);

  // Rate rules:
  ANPC' = (ANP1 - ANPC)/(tu*ANPTC);

  // Unit definitions:
  unit substance = dimensionless; substance is "normalised";
end
