// SBML level 2 version 3

model Guyton1972_AntidiureticHormone()
  // This a model from the article:
  // Circulation: overall regulation.
  // Guyton AC, Coleman TG, Granger HJ. Annu Rev Physiol 1972;34:13-46 4334846 ,
  // Abstract:
  // No abstract available
  // This model was taken from the CellML repository and automatically converted to SBML.
  // The original model was: Guyton AC, Coleman TG, Granger HJ. (2008) - version02
  // The original CellML model was created by:
  // Terkildsen, Jonna,
  // j.terkildsen@aukland.ac.nz
  // The University of Auckland
  // Auckland Bioengineering Institute
  // This model originates from BioModels Database: A Database of Annotated Published Models (http://www.ebi.ac.uk/biomodels/). It is copyright (c) 2005-2011 The BioModels.net Team.
  // To the extent possible under law, all copyright and related or neighbouring rights to this encoded model have been dedicated to the public domain worldwide. Please refer to CC0 Public Domain Dedication for more information.
  // In summary, you are entitled to use this encoded model in absolutely any manner you deem suitable, verbatim, or with modification, alone or embedded it in a larger context, redistribute it, commercially or not, in a restricted way or not..
  // To cite BioModels Database, please use: Li C, Donizelli M, Rodriguez N, Dharuri H, Endler L, Chelliah V, Li L, He E, Henry A, Stefan MI, Snoep JL, Hucka M, Le Novère N, Laibe C (2010) BioModels Database: An enhanced, curated and annotated resource for published quantitative kinetic models. BMC Syst Biol., 4:92.
  // biomodels.db:MODEL0911309080
  // isDescribedBy pubmed:4334846
  // biomodels.db:MODEL0911309080
  // isDescribedBy pubmed:4334846
  // biomodels.db:MODEL0911309080
  // biomodels.db:MODEL0911309080

  // Compartments:
  compartment Compartment = 1;

  // Parameters:
  CNA = 142.035 dimensionless;
  PA1 = 103.525 dimensionless;
  ADHNA has dimensionless;
  ADHNA1 has dimensionless;
  ADHPR has dimensionless;
  ADHPA has dimensionless;
  ADH has dimensionless;
  ADH1 has dimensionless;
  ADHC = 1 dimensionless;
  ADHMV has dimensionless;
  ADHMV1 has dimensionless;
  ADHMK has dimensionless;
  ADHMK1 has dimensionless;
  CNR = 139 dimensionless;
  ADHPUL = 85 dimensionless;
  ADHPAM = 0.3 dimensionless;
  ADHINF = 0 dimensionless;
  ADHTC = 15 dimensionless;
  ADHVUL = 2.5 dimensionless;
  ADHVLL = 0.93617 dimensionless;
  ADHKLL = 0.2 dimensionless;
  ADHKUL = 5 dimensionless;
  tu = 1 time; tu is "time_unit";

  // Assignment rules:
  ADHNA1 := (CNA - CNR)/(142 - CNR);
  ADHNA := piecewise(0, ADHNA1 < 0, ADHNA1);
  ADHPA := piecewise(ADHPUL, PA1 > ADHPUL, PA1);
  ADHPR := (ADHPUL - ADHPA)^2*ADHPAM;
  ADH1 := ADHNA + ADHPR + ADHINF;
  ADH := piecewise(0, ADH1 < 0, ADH1);
  ADHMV1 := ADHVUL - (ADHVUL - 1)/((ADHVLL - 1)/(ADHVLL - ADHVUL)*(ADHC - 1) + 1);
  ADHMV := piecewise(ADHVLL, ADHMV1 < ADHVLL, ADHMV1);
  ADHMK1 := ADHKUL - (ADHKUL - 1)/((ADHKLL - 1)/(ADHKLL - ADHKUL)*(ADHC - 1) + 1);
  ADHMK := piecewise(ADHKLL, ADHMK1 < ADHKLL, ADHMK1);

  // Rate rules:
  ADHC' = (ADH - ADHC)/(tu*ADHTC);

  // Unit definitions:
  unit substance = dimensionless; substance is "normalised";
end
