// SBML level 2 version 3

model Guyton1972_Angiotensin()
  // This a model from the article:
  // Circulation: overall regulation.
  // Guyton AC, Coleman TG, Granger HJ. Annu Rev Physiol 1972;34:13-46 4334846 ,
  // Abstract:
  // No abstract available
  // This model was taken from the CellML repository and automatically converted to SBML.
  // The original model was: Guyton AC, Coleman TG, Granger HJ. (2008) - version02
  // The original CellML model was created by:
  // Terkildsen, Jonna,
  // j.terkildsen@aukland.ac.nz
  // The University of Auckland
  // Auckland Bioengineering Institute
  // This model originates from BioModels Database: A Database of Annotated Published Models (http://www.ebi.ac.uk/biomodels/). It is copyright (c) 2005-2011 The BioModels.net Team.
  // To the extent possible under law, all copyright and related or neighbouring rights to this encoded model have been dedicated to the public domain worldwide. Please refer to CC0 Public Domain Dedication for more information.
  // In summary, you are entitled to use this encoded model in absolutely any manner you deem suitable, verbatim, or with modification, alone or embedded it in a larger context, redistribute it, commercially or not, in a restricted way or not..
  // To cite BioModels Database, please use: Li C, Donizelli M, Rodriguez N, Dharuri H, Endler L, Chelliah V, Li L, He E, Henry A, Stefan MI, Snoep JL, Hucka M, Le Novère N, Laibe C (2010) BioModels Database: An enhanced, curated and annotated resource for published quantitative kinetic models. BMC Syst Biol., 4:92.
  // biomodels.db:MODEL0911342562
  // isDescribedBy pubmed:4334846
  // biomodels.db:MODEL0911342562
  // isDescribedBy pubmed:4334846
  // biomodels.db:MODEL0911342562
  // biomodels.db:MODEL0911342562

  // Compartments:
  compartment Compartment = 1;

  // Parameters:
  MDFLW = 1.00051 dimensionless;
  ANGSCR has dimensionless;
  MDFLW3 has dimensionless;
  ANX1 = 0 dimensionless;
  ANX has dimensionless;
  ANPR has dimensionless;
  ANPRT has dimensionless;
  ANPR1 has dimensionless;
  ANC = 0.859476 dimensionless;
  ANM has dimensionless;
  ANU has dimensionless;
  ANU1 has dimensionless;
  ANUVN has dimensionless;
  ANXM = 0 dimensionless;
  ANV = 5000 dimensionless;
  REK = 1 dimensionless;
  ANGINF = 0 dimensionless;
  ANGKNS = 0 dimensionless;
  ANT = 12 dimensionless;
  Z12 = 5 dimensionless;
  ANMUL = 1.8 dimensionless;
  ANMLL = 0.7 dimensionless;
  ANCSNS = 0.4 dimensionless;
  ANULL = 0.8 dimensionless;
  ANUM = 6 dimensionless;
  ANUVM = 0 dimensionless;
  tu = 1 time; tu is "time_unit";

  // Assignment rules:
  MDFLW3 := MDFLW;
  ANGSCR := piecewise(1/(1 + (MDFLW3 - 1)*72), MDFLW3 > 1, 10 - 9/(1 + (1 - MDFLW3)*8));
  ANX := (ANGSCR - 1)*ANXM;
  ANPRT := (ANGSCR + ANX1)*REK;
  ANPR := piecewise(1e-5, ANPRT < 1e-5, ANPRT);
  ANPR1 := piecewise(ANGKNS, ANGKNS > 0, ANPR + ANGINF);
  ANM := ANMUL - (ANMUL - 1)/((ANMLL - 1)/(ANMLL - ANMUL)*(ANC - 1)*ANCSNS + 1);
  ANU1 := (ANM - 1)*ANUM + 1;
  ANU := piecewise(ANULL, ANU1 < ANULL, ANU1);
  ANUVN := (ANU - 1)*ANUVM + 1;

  // Rate rules:
  ANX1' = (ANX - ANX1)/(tu*ANV);
  ANC' = (ANPR1 - ANC)/(tu*ANT);

  // Unit definitions:
  unit substance = dimensionless; substance is "normalised";
end
