// SBML level 2 version 3

model Guyton1972_Aldosterone()
  // This a model from the article:
  // Circulation: overall regulation.
  // Guyton AC, Coleman TG, Granger HJ. Annu Rev Physiol 1972;34:13-46 4334846 ,
  // Abstract:
  // No abstract available
  // This model was taken from the CellML repository and automatically converted to SBML.
  // The original model was: Guyton AC, Coleman TG, Granger HJ. (2008) - version02
  // The original CellML model was created by:
  // Terkildsen, Jonna,
  // j.terkildsen@aukland.ac.nz
  // The University of Auckland
  // Auckland Bioengineering Institute
  // This model originates from BioModels Database: A Database of Annotated Published Models (http://www.ebi.ac.uk/biomodels/). It is copyright (c) 2005-2011 The BioModels.net Team.
  // To the extent possible under law, all copyright and related or neighbouring rights to this encoded model have been dedicated to the public domain worldwide. Please refer to CC0 Public Domain Dedication for more information.
  // In summary, you are entitled to use this encoded model in absolutely any manner you deem suitable, verbatim, or with modification, alone or embedded it in a larger context, redistribute it, commercially or not, in a restricted way or not..
  // To cite BioModels Database, please use: Li C, Donizelli M, Rodriguez N, Dharuri H, Endler L, Chelliah V, Li L, He E, Henry A, Stefan MI, Snoep JL, Hucka M, Le Novère N, Laibe C (2010) BioModels Database: An enhanced, curated and annotated resource for published quantitative kinetic models. BMC Syst Biol., 4:92.
  // biomodels.db:MODEL0911376350
  // isDescribedBy pubmed:4334846
  // biomodels.db:MODEL0911376350
  // isDescribedBy pubmed:4334846
  // biomodels.db:MODEL0911376350
  // biomodels.db:MODEL0911376350

  // Compartments:
  compartment Compartment = 1;

  // Parameters:
  ANM = 0.987545 dimensionless;
  CKE = 4.44092 dimensionless;
  ANMAL has dimensionless;
  OSMAL has dimensionless;
  AMR1 has dimensionless;
  AMRBSC has dimensionless;
  AMRT has dimensionless;
  AMR has dimensionless;
  AMC = 1 dimensionless;
  AM has dimensionless;
  AM1 has dimensionless;
  AMK has dimensionless;
  AMKT has dimensionless;
  AMNA has dimensionless;
  AMNAT has dimensionless;
  ANMALD = 2.5 dimensionless;
  AMKMUL = 12 dimensionless;
  ALDINF = 0 dimensionless;
  ALDKNS = 0 dimensionless;
  AMT = 60 dimensionless;
  AM1UL = 5 dimensionless;
  AM1LL = 0 dimensionless;
  AMCSNS = 0.65 dimensionless;
  ALDMM = 2.5 dimensionless;
  AMKM = 0.5 dimensionless;
  AMNAM = 0.8 dimensionless;
  AMNAUL = 15 dimensionless;
  AMNALL = 0.04 dimensionless;
  tu = 1 time; tu is "time_unit";

  // Assignment rules:
  ANMAL := (ANM - 1)*ANMALD + 1;
  OSMAL := CKE - 3.3;
  AMRBSC := ANMAL*0.909*OSMAL;
  AMRT := (AMRBSC - 1)*AMKMUL + 1;
  AMR := piecewise(0, AMRT < 0, AMRT);
  AMR1 := piecewise(ALDKNS, ALDKNS > 0, AMR + ALDINF);
  AM1 := AM1UL - (AM1UL - 1)/((AM1LL - 1)/(AM1LL - AM1UL)*(AMC - 1)*AMCSNS + 1);
  AM := (AM1 - 1)*ALDMM + 1;
  AMKT := (AM - 1)*AMKM + 1;
  AMK := piecewise(0.2, AMKT < 0.2, AMKT);
  AMNAT := (AM - 1)*AMNAM + 1;
  AMNA := piecewise(AMNALL, AMNAT < AMNALL, AMNAUL, AMNAT > AMNAUL, AMNAT);

  // Rate rules:
  AMC' = (AMR1 - AMC)/(tu*AMT);

  // Unit definitions:
  unit substance = dimensionless; substance is "normalised";
end
