// SBML level 2 version 3

model Goodwin1965_EnzymeControlProcess()
  // This a model from the article:
  // Oscillatory behavior in enzymatic control processes.
  // Goodwin BC. Adv Enzyme Regul 1965;3:425-38 5861813 ,
  // Abstract:
  // The demonstration of negative feedback control processes operating at the molecular level in cells is one of the most significant developments in modern biology. The phenomena of feedback inhibition and feedback repression, whereby enzymatic activities are controlled at the level of the enzyme and the gene, respectively, provide a firm experimental basis for the construction of dynamic models which represent the fundamental regulatory activity of cells. The behavior of these and other molecular control circuits thus constitutes the basis of cell physiology, and in effect provides the physiologist with his elementary units of function. The purpose of this paper is to illustrate the type of periodic behavior which can arise in model systems incorporating the essential control features of enzymatic regulatory processes, and to discuss the significance of oscillatory motion in relation to the organization of cellular processes in time.
  // This model was taken from the CellML repository and automatically converted to SBML.
  // The original model was: Goodwin BC. (1965) - version02
  // The original CellML model was created by:
  // Lloyd, Catherine, May
  // c.lloyd@aukland.ac.nz
  // The University of Auckland
  // The Bioengineering Institute
  // This model originates from BioModels Database: A Database of Annotated Published Models (http://www.ebi.ac.uk/biomodels/). It is copyright (c) 2005-2011 The BioModels.net Team.
  // To the extent possible under law, all copyright and related or neighbouring rights to this encoded model have been dedicated to the public domain worldwide. Please refer to CC0 Public Domain Dedication for more information.
  // In summary, you are entitled to use this encoded model in absolutely any manner you deem suitable, verbatim, or with modification, alone or embedded it in a larger context, redistribute it, commercially or not, in a restricted way or not..
  // To cite BioModels Database, please use: Li C, Donizelli M, Rodriguez N, Dharuri H, Endler L, Chelliah V, Li L, He E, Henry A, Stefan MI, Snoep JL, Hucka M, Le Novère N, Laibe C (2010) BioModels Database: An enhanced, curated and annotated resource for published quantitative kinetic models. BMC Syst Biol., 4:92.
  // biomodels.db:MODEL0911532520
  // isDescribedBy pubmed:5861813
  // biomodels.db:MODEL0911532520
  // isDescribedBy pubmed:5861813
  // biomodels.db:MODEL0911532520
  // biomodels.db:MODEL0911532520

  // Compartments:
  compartment Compartment = 1 litre;

  // Parameters:
  Xi = 7 nanomolar;
  ai = 72 flux;
  bi = 2 flux;
  Ai = 36 dimensionless;
  ki = 1 per_nanomolar;
  Yi = -10 nanomolar;
  beta_i = 0 flux;
  alpha_i = 1 first_order_rate_constant;

  // Rate rules:
  Xi' = ai/(Ai + ki*Yi) - bi;
  Yi' = alpha_i*Xi - beta_i;

  // Unit definitions:
  unit first_order_rate_constant = 1 / second;
  unit flux = 1e-9 mole / (litre * second);
  unit nanomolar = 1e-9 mole / litre;
  unit per_nanomolar = litre / (1e-9 mole);
end
