// SBML level 2 version 3

model Garny2003_SinoatrialNode()
  // This a model from the article:
  // One-dimensional rabbit sinoatrial node models: benefits and limitations.
  // Garny A, Kohl P, Hunter PJ, Boyett MR, Noble D. J Cardiovasc Electrophysiol 2003 Oct;14(10 Suppl):S121-32 14760914 ,
  // Abstract:
  // INTRODUCTION: Cardiac multicellular modeling has traditionally focused on ventricular electromechanics. More recently, models of the atria have started to emerge, and there is much interest in addressing sinoatrial node structure and function. METHODS AND RESULTS: We implemented a variety of one-dimensional sinoatrial models consisting of descriptions of central, transitional, and peripheral sinoatrial node cells, as well as rabbit or human atrial cells. These one-dimensional models were implemented using CMISS on an SGI Origin 2000 supercomputer. Intercellular coupling parameters recorded in experimental studies on sinoatrial node and atrial cell-pairs under-represent the electrotonic interactions that any cardiomyocyte would have in a multidimensional setting. Unsurprisingly, cell-to-cell coupling had to be scaled-up (by a factor of 5) in order to obtain a stable leading pacemaker site in the sinoatrial node center. Further critical parameters include the gradual increase in intercellular coupling from sinoatrial node center to periphery, and the presence of electrotonic interaction with atrial cells. Interestingly, the electrotonic effect of the atrium on sinoatrial node periphery is best described as opposing depolarization, rather than necessarily hyperpolarizing, as often assumed. CONCLUSION: Multicellular one-dimensional models of sinoatrial node and atrium can provide useful insight into the origin and spread of normal cardiac excitation. They require larger than "physiologic" intercellular conductivities in order to make up for a lack of "anatomical" spatial scaling. Multicellular models for more in-depth quantitative studies will require more realistic anatomico-physiologic properties.
  // This model was taken from the CellML repository and automatically converted to SBML.
  // The original model was: Garny A, Kohl P, Hunter PJ, Boyett MR, Noble D. (2003) - version05
  // The original CellML model was created by:
  // Noble, Penny, J
  // penny.noble@dpag.ox.ac.uk
  // Oxford University
  // Department of Physiology, Anatomy & Genetics
  // This model originates from BioModels Database: A Database of Annotated Published Models (http://www.ebi.ac.uk/biomodels/). It is copyright (c) 2005-2011 The BioModels.net Team.
  // To the extent possible under law, all copyright and related or neighbouring rights to this encoded model have been dedicated to the public domain worldwide. Please refer to CC0 Public Domain Dedication for more information.
  // In summary, you are entitled to use this encoded model in absolutely any manner you deem suitable, verbatim, or with modification, alone or embedded it in a larger context, redistribute it, commercially or not, in a restricted way or not..
  // To cite BioModels Database, please use: Li C, Donizelli M, Rodriguez N, Dharuri H, Endler L, Chelliah V, Li L, He E, Henry A, Stefan MI, Snoep JL, Hucka M, Le Novère N, Laibe C (2010) BioModels Database: An enhanced, curated and annotated resource for published quantitative kinetic models. BMC Syst Biol., 4:92.
  // biomodels.db:MODEL0911601070
  // isDescribedBy pubmed:14760914
  // biomodels.db:MODEL0911601070
  // isDescribedBy pubmed:14760914
  // biomodels.db:MODEL0911601070
  // biomodels.db:MODEL0911601070

  // Compartments:
  compartment Compartment = 1 litre;

  // Parameters:
  Version_membrane = 1 dimensionless;
  dCell = 0 dimensionless;
  FCellConstant = 1.0309347 dimensionless;
  FCell_membrane has dimensionless;
  V_membrane = -39.01356 millivolt;
  R = 8314 millijoule_per_mole_kelvin;
  T = 310 kelvin;
  F = 96845 coulomb_per_mole;
  Cm has microF;
  CmCentre = 2e-5 microF;
  CmPeriphery = 6.5e-5 microF;
  i_Na has nanoA;
  g_Na has microlitre_per_second;
  g_Na_Centre_Published = 0 microlitre_per_second;
  g_Na_Centre_0DCapable = 0 microlitre_per_second;
  g_Na_Centre_1DCapable = 0 microlitre_per_second;
  g_Na_Periphery_Published = 1.2e-6 microlitre_per_second;
  g_Na_Periphery_0DCapable = 1.204e-6 microlitre_per_second;
  g_Na_Periphery_1DCapable = 3.7e-7 microlitre_per_second;
  Version_sodium_current_m_gate has dimensionless;
  m = 0.0923617 dimensionless;
  m_infinity has dimensionless;
  tau_m has second;
  V_sodium_current_m_gate has millivolt;
  time_sodium_current_m_gate has second;
  Version_sodium_current_h_gate has dimensionless;
  h has dimensionless;
  F_Na has dimensionless;
  h1 = 0.01590538 dimensionless;
  h2 = 0.01445216 dimensionless;
  h1_infinity has dimensionless;
  h2_infinity has dimensionless;
  tau_h1 has second;
  tau_h2 has second;
  V_sodium_current_h_gate has millivolt;
  time_sodium_current_h_gate has second;
  i_Ca_L has nanoA;
  g_Ca_L_Centre_Published = 0.0058 microS;
  g_Ca_L_Centre_0DCapable = 0.0057938 microS;
  g_Ca_L_Centre_1DCapable = 0.0082 microS;
  g_Ca_L_Periphery_Published = 0.0659 microS;
  g_Ca_L_Periphery_0DCapable = 0.06588648 microS;
  g_Ca_L_Periphery_1DCapable = 0.0659 microS;
  g_Ca_L has microS;
  E_Ca_L = 46.4 millivolt;
  Version_L_type_Ca_channel_d_gate has dimensionless;
  FCell_L_type_Ca_channel_d_gate has dimensionless;
  d_L = 0.04804901 dimensionless;
  alpha_d_L has per_second;
  beta_d_L has per_second;
  d_L_infinity has dimensionless;
  tau_d_L has second;
  V_L_type_Ca_channel_d_gate has millivolt;
  time_L_type_Ca_channel_d_gate has second;
  Version_L_type_Ca_channel_f_gate has dimensionless;
  FCell_L_type_Ca_channel_f_gate has dimensionless;
  f_L = 0.4877985 dimensionless;
  alpha_f_L has per_second;
  beta_f_L has per_second;
  f_L_infinity has dimensionless;
  tau_f_L has second;
  V_L_type_Ca_channel_f_gate has millivolt;
  time_L_type_Ca_channel_f_gate has second;
  i_Ca_T has nanoA;
  g_Ca_T_Centre_Published = 0.0043 microS;
  g_Ca_T_Centre_0DCapable = 0.00427806 microS;
  g_Ca_T_Centre_1DCapable = 0.0021 microS;
  g_Ca_T_Periphery_Published = 0.0139 microS;
  g_Ca_T_Periphery_0DCapable = 0.0138823 microS;
  g_Ca_T_Periphery_1DCapable = 0.00694 microS;
  g_Ca_T has microS;
  E_Ca_T = 45 millivolt;
  d_T = 0.4207405 dimensionless;
  alpha_d_T has per_second;
  beta_d_T has per_second;
  d_T_infinity has dimensionless;
  tau_d_T has second;
  V_T_type_Ca_channel_d_gate has millivolt;
  time_T_type_Ca_channel_d_gate has second;
  Version_T_type_Ca_channel_f_gate has dimensionless;
  FCell_T_type_Ca_channel_f_gate has dimensionless;
  f_T = 0.03896842 dimensionless;
  alpha_f_T has per_second;
  beta_f_T has per_second;
  f_T_infinity has dimensionless;
  tau_f_T has second;
  V_T_type_Ca_channel_f_gate has millivolt;
  time_T_type_Ca_channel_f_gate has second;
  i_to has nanoA;
  i_sus has nanoA;
  g_to_Centre_Published = 0.00491 microS;
  g_to_Centre_0DCapable = 0.004905 microS;
  g_to_Centre_1DCapable = 0.004905 microS;
  g_to_Periphery_Published = 0.03649 microS;
  g_to_Periphery_0DCapable = 0.036495 microS;
  g_to_Periphery_1DCapable = 0.0365 microS;
  g_to has microS;
  g_sus_Centre_Published = 6.65e-5 microS;
  g_sus_Centre_0DCapable = 6.645504e-5 microS;
  g_sus_Centre_1DCapable = 0.000266 microS;
  g_sus_Periphery_Published = 0.0114 microS;
  g_sus_Periphery_0DCapable = 0.01138376 microS;
  g_sus_Periphery_1DCapable = 0.0114 microS;
  g_sus has microS;
  Version_four_AP_sensitive_currents_q_gate has dimensionless;
  FCell_four_AP_sensitive_currents_q_gate has dimensionless;
  q = 0.2976054 dimensionless;
  q_infinity has dimensionless;
  tau_q has second;
  V_four_AP_sensitive_currents_q_gate has millivolt;
  time_four_AP_sensitive_currents_q_gate has second;
  Version_four_AP_sensitive_currents_r_gate has dimensionless;
  r = 0.06440295 dimensionless;
  r_infinity has dimensionless;
  tau_r has second;
  V_four_AP_sensitive_currents_r_gate has millivolt;
  time_four_AP_sensitive_currents_r_gate has second;
  i_K_r has nanoA;
  g_K_r_Centre_Published = 0.000797 microS;
  g_K_r_Centre_0DCapable = 0.00079704 microS;
  g_K_r_Centre_1DCapable = 0.000738 microS;
  g_K_r_Periphery_Published = 0.016 microS;
  g_K_r_Periphery_0DCapable = 0.016 microS;
  g_K_r_Periphery_1DCapable = 0.0208 microS;
  g_K_r has microS;
  P_a has dimensionless;
  Version_rapid_delayed_rectifying_potassium_current_P_af_gate has dimensionless;
  P_af = 0.130342 dimensionless;
  P_af_infinity has dimensionless;
  tau_P_af has second;
  V_rapid_delayed_rectifying_potassium_current_P_af_gate has millivolt;
  time_rapid_delayed_rectifying_potassium_current_P_af_gate has second;
  Version_rapid_delayed_rectifying_potassium_current_P_as_gate has dimensionless;
  P_as = 0.4696096 dimensionless;
  P_as_infinity has dimensionless;
  tau_P_as has second;
  V_rapid_delayed_rectifying_potassium_current_P_as_gate has millivolt;
  time_rapid_delayed_rectifying_potassium_current_P_as_gate has second;
  Version_rapid_delayed_rectifying_potassium_current_P_i_gate has dimensionless;
  P_i = 0.8799338 dimensionless;
  P_i_infinity has dimensionless;
  tau_P_i has second;
  V_rapid_delayed_rectifying_potassium_current_P_i_gate has millivolt;
  time_rapid_delayed_rectifying_potassium_current_P_i_gate has second;
  i_K_s has nanoA;
  g_K_s_Centre_Published = 0.000518 microS;
  g_K_s_Centre_0DCapable = 0.0003445 microS;
  g_K_s_Centre_1DCapable = 0.000345 microS;
  g_K_s_Periphery_Published = 0.0104 microS;
  g_K_s_Periphery_0DCapable = 0.0104 microS;
  g_K_s_Periphery_1DCapable = 0.0104 microS;
  g_K_s has microS;
  xs = 0.08229383 dimensionless;
  alpha_xs has per_second;
  beta_xs has per_second;
  V_slow_delayed_rectifying_potassium_current_xs_gate has millivolt;
  time_slow_delayed_rectifying_potassium_current_xs_gate has second;
  i_f_Na has nanoA;
  i_f_K has nanoA;
  g_f_Na_Centre_Published = 0.000548 microS;
  g_f_Na_Centre_0DCapable = 0.0005465 microS;
  g_f_Na_Centre_1DCapable = 0.000437 microS;
  g_f_Na_Periphery_Published = 0.0069 microS;
  g_f_Na_Periphery_0DCapable = 0.006875 microS;
  g_f_Na_Periphery_1DCapable = 0.0055 microS;
  g_f_Na has microS;
  g_f_K_Centre_Published = 0.000548 microS;
  g_f_K_Centre_0DCapable = 0.0005465 microS;
  g_f_K_Centre_1DCapable = 0.000437 microS;
  g_f_K_Periphery_Published = 0.0069 microS;
  g_f_K_Periphery_0DCapable = 0.006875 microS;
  g_f_K_Periphery_1DCapable = 0.0055 microS;
  g_f_K has microS;
  Version_hyperpolarisation_activated_current_y_gate has dimensionless;
  y = 0.03889292 dimensionless;
  alpha_y has per_second;
  beta_y has per_second;
  V_hyperpolarisation_activated_current_y_gate has millivolt;
  time_hyperpolarisation_activated_current_y_gate has second;
  i_b_Na has nanoA;
  g_b_Na_Centre_Published = 5.8e-5 microS;
  g_b_Na_Centre_0DCapable = 5.81818e-5 microS;
  g_b_Na_Centre_1DCapable = 5.8e-5 microS;
  g_b_Na_Periphery_Published = 0.000189 microS;
  g_b_Na_Periphery_0DCapable = 0.0001888 microS;
  g_b_Na_Periphery_1DCapable = 0.000189 microS;
  g_b_Na has microS;
  i_b_K has nanoA;
  g_b_K_Centre_Published = 2.52e-5 microS;
  g_b_K_Centre_0DCapable = 2.523636e-5 microS;
  g_b_K_Centre_1DCapable = 2.52e-5 microS;
  g_b_K_Periphery_Published = 8.19e-5 microS;
  g_b_K_Periphery_0DCapable = 8.1892e-5 microS;
  g_b_K_Periphery_1DCapable = 8.19e-5 microS;
  g_b_K has microS;
  i_b_Ca has nanoA;
  g_b_Ca_Centre_Published = 1.32e-5 microS;
  g_b_Ca_Centre_0DCapable = 1.3236e-5 microS;
  g_b_Ca_Centre_1DCapable = 1.323e-5 microS;
  g_b_Ca_Periphery_Published = 4.3e-5 microS;
  g_b_Ca_Periphery_0DCapable = 4.2952e-5 microS;
  g_b_Ca_Periphery_1DCapable = 4.29e-5 microS;
  g_b_Ca has microS;
  i_NaCa has nanoA;
  k_NaCa_Centre_Published = 2.7e-6 nanoA;
  k_NaCa_Centre_0DCapable = 2.7229e-6 nanoA;
  k_NaCa_Centre_1DCapable = 2.8e-6 nanoA;
  k_NaCa_Periphery_Published = 8.8e-6 nanoA;
  k_NaCa_Periphery_0DCapable = 8.83584e-6 nanoA;
  k_NaCa_Periphery_1DCapable = 8.8e-6 nanoA;
  k_NaCa has nanoA;
  d_NaCa = 0.0001 dimensionless;
  gamma_NaCa = 0.5 dimensionless;
  i_p has nanoA;
  K_m_Na = 5.64 millimolar;
  K_m_K = 0.621 millimolar;
  i_p_max_Centre_Published = 0.0478 nanoA;
  i_p_max_Centre_0DCapable = 0.04782545 nanoA;
  i_p_max_Centre_1DCapable = 0.0478 nanoA;
  i_p_max_Periphery_Published = 0.16 nanoA;
  i_p_max_Periphery_0DCapable = 0.1551936 nanoA;
  i_p_max_Periphery_1DCapable = 0.16 nanoA;
  i_p_max has nanoA;
  i_Ca_p has nanoA;
  i_Ca_p_max_Centre_Published = 0 nanoA;
  i_Ca_p_max_Centre_0DCapable = 0 nanoA;
  i_Ca_p_max_Centre_1DCapable = 0.0042 nanoA;
  i_Ca_p_max_Periphery_Published = 0 nanoA;
  i_Ca_p_max_Periphery_0DCapable = 0 nanoA;
  i_Ca_p_max_Periphery_1DCapable = 0.03339 nanoA;
  i_Ca_p_max has nanoA;
  Na_i = 8 millimolar;
  Na_o = 140 millimolar;
  Ca_i = 0.0001 millimolar;
  Ca_o = 2 millimolar;
  K_i = 140 millimolar;
  K_o = 5.4 millimolar;
  E_Na has millivolt;
  E_K has millivolt;
  E_K_s has millivolt;
  E_Ca has millivolt;

  // Assignment rules:
  FCell_membrane := piecewise(1.07*(3*dCell - 0.1)/(3*(1 + 0.7745*exp(-(3*dCell - 2.05)/0.295))), Version_membrane == 0, FCellConstant*dCell/(1 + 0.7745*exp(-(3*dCell - 2.05)/0.295)), Version_membrane == 1, 1.07*29*dCell/(30*(1 + 0.7745*exp(-(29*dCell - 24.5)/1.95))));
  Cm := CmCentre + FCell_membrane*(CmPeriphery - CmCentre);
  g_Na := piecewise(g_Na_Centre_Published + FCell_membrane*(g_Na_Periphery_Published - g_Na_Centre_Published), Version_membrane == 0, g_Na_Centre_0DCapable + FCell_membrane*(g_Na_Periphery_0DCapable - g_Na_Centre_0DCapable), Version_membrane == 1, g_Na_Centre_1DCapable + FCell_membrane*(g_Na_Periphery_1DCapable - g_Na_Centre_1DCapable));
  i_Na := g_Na*m^3*h*Na_o*F^2/(R*T)*(exp((V_membrane - E_Na)*F/(R*T)) - 1)/(exp(V_membrane*F/(R*T)) - 1)*V_membrane;
  m_infinity := piecewise((1/(1 + exp(-V_sodium_current_m_gate/5.46)))^(1/3), Version_sodium_current_m_gate == 0, (1/(1 + exp(-(V_sodium_current_m_gate + 30.32)/5.46)))^(1/3));
  tau_m := piecewise(0.0006247/(0.832*exp(-0.335*(V_sodium_current_m_gate + 56.7)) + 0.627*exp(0.082*(V_sodium_current_m_gate + 65.01))) + 4e-5, Version_sodium_current_m_gate == 0, 0.0006247/(0.8322166*exp(-0.33566*(V_sodium_current_m_gate + 56.7062)) + 0.6274*exp(0.0823*(V_sodium_current_m_gate + 65.0131))) + 4.569e-5);
  F_Na := piecewise(0.0952*exp(-0.063*(V_sodium_current_h_gate + 34.4))/(1 + 1.66*exp(-0.225*(V_sodium_current_h_gate + 63.7))) + 0.0869, Version_sodium_current_h_gate == 0, 0.09518*exp(-0.06306*(V_sodium_current_h_gate + 34.4))/(1 + 1.662*exp(-0.2251*(V_sodium_current_h_gate + 63.7))) + 0.08693);
  h := (1 - F_Na)*h1 + F_Na*h2;
  h1_infinity := 1/(1 + exp((V_sodium_current_h_gate + 66.1)/6.4));
  h2_infinity := h1_infinity;
  tau_h1 := 3.717e-6*exp(-0.2815*(V_sodium_current_h_gate + 17.11))/(1 + 0.003732*exp(-0.3426*(V_sodium_current_h_gate + 37.76))) + 0.0005977;
  tau_h2 := 3.186e-8*exp(-0.6219*(V_sodium_current_h_gate + 18.8))/(1 + 7.189e-5*exp(-0.6683*(V_sodium_current_h_gate + 34.07))) + 0.003556;
  g_Ca_L := piecewise(g_Ca_L_Centre_Published + FCell_membrane*(g_Ca_L_Periphery_Published - g_Ca_L_Centre_Published), Version_membrane == 0, g_Ca_L_Centre_0DCapable + FCell_membrane*(g_Ca_L_Periphery_0DCapable - g_Ca_L_Centre_0DCapable), Version_membrane == 1, g_Ca_L_Centre_1DCapable + FCell_membrane*(g_Ca_L_Periphery_1DCapable - g_Ca_L_Centre_1DCapable));
  i_Ca_L := g_Ca_L*(f_L*d_L + 0.006/(1 + exp(-(V_membrane + 14.1)/6)))*(V_membrane - E_Ca_L);
  alpha_d_L := piecewise(-28.38*(V_L_type_Ca_channel_d_gate + 35)/(exp(-(V_L_type_Ca_channel_d_gate + 35)/2.5) - 1) - 84.9*V_L_type_Ca_channel_d_gate/(exp(-0.208*V_L_type_Ca_channel_d_gate) - 1), Version_L_type_Ca_channel_d_gate == 0, -28.39*(V_L_type_Ca_channel_d_gate + 35)/(exp(-(V_L_type_Ca_channel_d_gate + 35)/2.5) - 1) - 84.9*V_L_type_Ca_channel_d_gate/(exp(-0.208*V_L_type_Ca_channel_d_gate) - 1), Version_L_type_Ca_channel_d_gate == 1, -28.4*(V_L_type_Ca_channel_d_gate + 35)/(exp(-(V_L_type_Ca_channel_d_gate + 35)/2.5) - 1) - 84.9*V_L_type_Ca_channel_d_gate/(exp(-0.208*V_L_type_Ca_channel_d_gate) - 1));
  beta_d_L := piecewise(11.43*(V_L_type_Ca_channel_d_gate - 5)/(exp(0.4*(V_L_type_Ca_channel_d_gate - 5)) - 1), Version_L_type_Ca_channel_d_gate == 1, 11.42*(V_L_type_Ca_channel_d_gate - 5)/(exp(0.4*(V_L_type_Ca_channel_d_gate - 5)) - 1));
  tau_d_L := 2/(alpha_d_L + beta_d_L);
  d_L_infinity := piecewise(1/(1 + exp(-(V_L_type_Ca_channel_d_gate + 23.1)/6)), Version_L_type_Ca_channel_d_gate == 0, 1/(1 + exp(-(V_L_type_Ca_channel_d_gate + 22.3 + 0.8*FCell_L_type_Ca_channel_d_gate)/6)), Version_L_type_Ca_channel_d_gate == 1, 1/(1 + exp(-(V_L_type_Ca_channel_d_gate + 22.2)/6)));
  alpha_f_L := piecewise(3.75*(V_L_type_Ca_channel_f_gate + 28)/(exp((V_L_type_Ca_channel_f_gate + 28)/4) - 1), Version_L_type_Ca_channel_f_gate == 1, 3.12*(V_L_type_Ca_channel_f_gate + 28)/(exp((V_L_type_Ca_channel_f_gate + 28)/4) - 1));
  beta_f_L := piecewise(30/(1 + exp(-(V_L_type_Ca_channel_f_gate + 28)/4)), Version_L_type_Ca_channel_f_gate == 1, 25/(1 + exp(-(V_L_type_Ca_channel_f_gate + 28)/4)));
  tau_f_L := piecewise((1.2 - 0.2*FCell_L_type_Ca_channel_f_gate)/(alpha_f_L + beta_f_L), Version_L_type_Ca_channel_f_gate == 1, 1/(alpha_f_L + beta_f_L));
  f_L_infinity := 1/(1 + exp((V_L_type_Ca_channel_f_gate + 45)/5));
  g_Ca_T := piecewise(g_Ca_T_Centre_Published + FCell_membrane*(g_Ca_T_Periphery_Published - g_Ca_T_Centre_Published), Version_membrane == 0, g_Ca_T_Centre_0DCapable + FCell_membrane*(g_Ca_T_Periphery_0DCapable - g_Ca_T_Centre_0DCapable), Version_membrane == 1, g_Ca_T_Centre_1DCapable + FCell_membrane*(g_Ca_T_Periphery_1DCapable - g_Ca_T_Centre_1DCapable));
  i_Ca_T := g_Ca_T*d_T*f_T*(V_membrane - E_Ca_T);
  alpha_d_T := 1068*exp((V_T_type_Ca_channel_d_gate + 26.3)/30);
  beta_d_T := 1068*exp(-(V_T_type_Ca_channel_d_gate + 26.3)/30);
  tau_d_T := 1/(alpha_d_T + beta_d_T);
  d_T_infinity := 1/(1 + exp(-(V_T_type_Ca_channel_d_gate + 37)/6.8));
  alpha_f_T := piecewise(15.3*exp(-(V_T_type_Ca_channel_f_gate + 71 + 0.7*FCell_T_type_Ca_channel_f_gate)/83.3), Version_T_type_Ca_channel_f_gate == 1, 15.3*exp(-(V_T_type_Ca_channel_f_gate + 71.7)/83.3));
  beta_f_T := piecewise(15*exp((V_T_type_Ca_channel_f_gate + 71)/15.38), Version_T_type_Ca_channel_f_gate == 1, 15*exp((V_T_type_Ca_channel_f_gate + 71.7)/15.38));
  tau_f_T := 1/(alpha_f_T + beta_f_T);
  f_T_infinity := 1/(1 + exp((V_T_type_Ca_channel_f_gate + 71)/9));
  g_to := piecewise(g_to_Centre_Published + FCell_membrane*(g_to_Periphery_Published - g_to_Centre_Published), Version_membrane == 0, g_to_Centre_0DCapable + FCell_membrane*(g_to_Periphery_0DCapable - g_to_Centre_0DCapable), Version_membrane == 1, g_to_Centre_1DCapable + FCell_membrane*(g_to_Periphery_1DCapable - g_to_Centre_1DCapable));
  g_sus := piecewise(g_sus_Centre_Published + FCell_membrane*(g_sus_Periphery_Published - g_sus_Centre_Published), Version_membrane == 0, g_sus_Centre_0DCapable + FCell_membrane*(g_sus_Periphery_0DCapable - g_sus_Centre_0DCapable), Version_membrane == 1, g_sus_Centre_1DCapable + FCell_membrane*(g_sus_Periphery_1DCapable - g_sus_Centre_1DCapable));
  i_to := g_to*q*r*(V_membrane - E_K);
  i_sus := g_sus*r*(V_membrane - E_K);
  q_infinity := 1/(1 + exp((V_four_AP_sensitive_currents_q_gate + 59.37)/13.1));
  tau_q := piecewise(0.0101 + 0.06517/(0.57*exp(-0.08*(V_four_AP_sensitive_currents_q_gate + 49))) + 2.4e-5*exp(0.1*(V_four_AP_sensitive_currents_q_gate + 50.93)), Version_four_AP_sensitive_currents_q_gate == 0, 0.001/3*(30.31 + 195.5/(0.5686*exp(-0.08161*(V_four_AP_sensitive_currents_q_gate + 39 + 10*FCell_four_AP_sensitive_currents_q_gate)) + 0.7174*exp((0.2719 - 0.1719*FCell_four_AP_sensitive_currents_q_gate)*1*(V_four_AP_sensitive_currents_q_gate + 40.93 + 10*FCell_four_AP_sensitive_currents_q_gate)))), Version_four_AP_sensitive_currents_q_gate == 1, 0.0101 + 0.06517/(0.5686*exp(-0.08161*(V_four_AP_sensitive_currents_q_gate + 39)) + 0.7174*exp(0.2719*(V_four_AP_sensitive_currents_q_gate + 40.93))));
  r_infinity := 1/(1 + exp(-(V_four_AP_sensitive_currents_r_gate - 10.93)/19.7));
  tau_r := piecewise(0.001*(2.98 + 15.59/(1.037*exp(0.09*(V_four_AP_sensitive_currents_r_gate + 30.61)) + 0.369*exp(-0.12*(V_four_AP_sensitive_currents_r_gate + 23.84)))), Version_four_AP_sensitive_currents_r_gate == 0, 0.0025*(1.191 + 7.838/(1.037*exp(0.09012*(V_four_AP_sensitive_currents_r_gate + 30.61)) + 0.369*exp(-0.119*(V_four_AP_sensitive_currents_r_gate + 23.84)))), Version_four_AP_sensitive_currents_r_gate == 1, 0.001*(2.98 + 19.59/(1.037*exp(0.09012*(V_four_AP_sensitive_currents_r_gate + 30.61)) + 0.369*exp(-0.119*(V_four_AP_sensitive_currents_r_gate + 23.84)))));
  g_K_r := piecewise(g_K_r_Centre_Published + FCell_membrane*(g_K_r_Periphery_Published - g_K_r_Centre_Published), Version_membrane == 0, g_K_r_Centre_0DCapable + FCell_membrane*(g_K_r_Periphery_0DCapable - g_K_r_Centre_0DCapable), Version_membrane == 1, g_K_r_Centre_1DCapable + FCell_membrane*(g_K_r_Periphery_1DCapable - g_K_r_Centre_1DCapable));
  i_K_r := g_K_r*P_a*P_i*(V_membrane - E_K);
  P_a := 0.6*P_af + 0.4*P_as;
  P_af_infinity := piecewise(1/(1 + exp(-(V_rapid_delayed_rectifying_potassium_current_P_af_gate + 14.2)/10.6)), Version_rapid_delayed_rectifying_potassium_current_P_af_gate != 2, 1/(1 + exp(-(V_rapid_delayed_rectifying_potassium_current_P_af_gate + 13.2)/10.6)));
  tau_P_af := piecewise(1/(37.2*exp((V_rapid_delayed_rectifying_potassium_current_P_af_gate - 9)/15.9) + 0.96*exp(-(V_rapid_delayed_rectifying_potassium_current_P_af_gate - 9)/22.5)), Version_rapid_delayed_rectifying_potassium_current_P_af_gate != 2, 1/(37.2*exp((V_rapid_delayed_rectifying_potassium_current_P_af_gate - 10)/15.9) + 0.96*exp(-(V_rapid_delayed_rectifying_potassium_current_P_af_gate - 10)/22.5)));
  P_as_infinity := P_af_infinity;
  tau_P_as := piecewise(1/(4.2*exp((V_rapid_delayed_rectifying_potassium_current_P_as_gate - 9)/17) + 0.15*exp(-(V_rapid_delayed_rectifying_potassium_current_P_as_gate - 9)/21.6)), Version_rapid_delayed_rectifying_potassium_current_P_as_gate != 2, 1/(4.2*exp((V_rapid_delayed_rectifying_potassium_current_P_as_gate - 10)/17) + 0.15*exp(-(V_rapid_delayed_rectifying_potassium_current_P_as_gate - 10)/21.6)));
  tau_P_i := piecewise(0.002, Version_rapid_delayed_rectifying_potassium_current_P_i_gate == 0, 0.002, Version_rapid_delayed_rectifying_potassium_current_P_i_gate == 1, 0.006);
  P_i_infinity := 1/(1 + exp((V_rapid_delayed_rectifying_potassium_current_P_i_gate + 18.6)/10.1));
  g_K_s := piecewise(g_K_s_Centre_Published + FCell_membrane*(g_K_s_Periphery_Published - g_K_s_Centre_Published), Version_membrane == 0, g_K_s_Centre_0DCapable + FCell_membrane*(g_K_s_Periphery_0DCapable - g_K_s_Centre_0DCapable), Version_membrane == 1, g_K_s_Centre_1DCapable + FCell_membrane*(g_K_s_Periphery_1DCapable - g_K_s_Centre_1DCapable));
  i_K_s := g_K_s*xs^2*(V_membrane - E_K_s);
  alpha_xs := 14/(1 + exp(-(V_slow_delayed_rectifying_potassium_current_xs_gate - 40)/9));
  beta_xs := 1*exp(-V_slow_delayed_rectifying_potassium_current_xs_gate/45);
  g_f_Na := piecewise(g_f_Na_Centre_Published + FCell_membrane*(g_f_Na_Periphery_Published - g_f_Na_Centre_Published), Version_membrane == 0, g_f_Na_Centre_0DCapable + FCell_membrane*(g_f_Na_Periphery_0DCapable - g_f_Na_Centre_0DCapable), Version_membrane == 1, g_f_Na_Centre_1DCapable + FCell_membrane*(g_f_Na_Periphery_1DCapable - g_f_Na_Centre_1DCapable));
  i_f_Na := piecewise(g_f_Na*y*(V_membrane - E_Na), Version_membrane != 2, g_f_Na*y*(V_membrane - 77.6));
  g_f_K := piecewise(g_f_K_Centre_Published + FCell_membrane*(g_f_K_Periphery_Published - g_f_K_Centre_Published), Version_membrane == 0, g_f_K_Centre_0DCapable + FCell_membrane*(g_f_K_Periphery_0DCapable - g_f_K_Centre_0DCapable), Version_membrane == 1, g_f_K_Centre_1DCapable + FCell_membrane*(g_f_K_Periphery_1DCapable - g_f_K_Centre_1DCapable));
  i_f_K := piecewise(g_f_K*y*(V_membrane - E_K), Version_membrane != 2, g_f_K*y*(V_membrane + 102));
  alpha_y := piecewise(1*exp(-(V_hyperpolarisation_activated_current_y_gate + 78.91)/26.62), Version_hyperpolarisation_activated_current_y_gate == 0, 1*exp(-(V_hyperpolarisation_activated_current_y_gate + 78.91)/26.63));
  beta_y := 1*exp((V_hyperpolarisation_activated_current_y_gate + 75.13)/21.25);
  g_b_Na := piecewise(g_b_Na_Centre_Published + FCell_membrane*(g_b_Na_Periphery_Published - g_b_Na_Centre_Published), Version_membrane == 0, g_b_Na_Centre_0DCapable + FCell_membrane*(g_b_Na_Periphery_0DCapable - g_b_Na_Centre_0DCapable), Version_membrane == 1, g_b_Na_Centre_1DCapable + FCell_membrane*(g_b_Na_Periphery_1DCapable - g_b_Na_Centre_1DCapable));
  i_b_Na := g_b_Na*(V_membrane - E_Na);
  g_b_K := piecewise(g_b_K_Centre_Published + FCell_membrane*(g_b_K_Periphery_Published - g_b_K_Centre_Published), Version_membrane == 0, g_b_K_Centre_0DCapable + FCell_membrane*(g_b_K_Periphery_0DCapable - g_b_K_Centre_0DCapable), Version_membrane == 1, g_b_K_Centre_1DCapable + FCell_membrane*(g_b_K_Periphery_1DCapable - g_b_K_Centre_1DCapable));
  i_b_K := g_b_K*(V_membrane - E_K);
  g_b_Ca := piecewise(g_b_Ca_Centre_Published + FCell_membrane*(g_b_Ca_Periphery_Published - g_b_Ca_Centre_Published), Version_membrane == 0, g_b_Ca_Centre_0DCapable + FCell_membrane*(g_b_Ca_Periphery_0DCapable - g_b_Ca_Centre_0DCapable), Version_membrane == 1, g_b_Ca_Centre_1DCapable + FCell_membrane*(g_b_Ca_Periphery_1DCapable - g_b_Ca_Centre_1DCapable));
  i_b_Ca := g_b_Ca*(V_membrane - E_Ca);
  k_NaCa := piecewise(k_NaCa_Centre_Published + FCell_membrane*(k_NaCa_Periphery_Published - k_NaCa_Centre_Published), Version_membrane == 0, k_NaCa_Centre_0DCapable + FCell_membrane*(k_NaCa_Periphery_0DCapable - k_NaCa_Centre_0DCapable), Version_membrane == 1, k_NaCa_Centre_1DCapable + FCell_membrane*(k_NaCa_Periphery_1DCapable - k_NaCa_Centre_1DCapable));
  i_NaCa := piecewise(k_NaCa*(Na_i^3*Ca_o*exp(0.03743*V_membrane*gamma_NaCa) - Na_o^3*Ca_i*exp(0.0374*V_membrane*(gamma_NaCa - 1)))/(1 + d_NaCa*(Ca_i*Na_o^3 + Ca_o*Na_i^3)), Version_membrane == 0, k_NaCa*(Na_i^3*Ca_o*exp(0.03743*V_membrane*gamma_NaCa) - Na_o^3*Ca_i*exp(0.03743*V_membrane*(gamma_NaCa - 1)))/(1 + d_NaCa*(Ca_i*Na_o^3 + Ca_o*Na_i^3)));
  i_p_max := piecewise(i_p_max_Centre_Published + FCell_membrane*(i_p_max_Periphery_Published - i_p_max_Centre_Published), Version_membrane == 0, i_p_max_Centre_0DCapable + FCell_membrane*(i_p_max_Periphery_0DCapable - i_p_max_Centre_0DCapable), Version_membrane == 1, i_p_max_Centre_1DCapable + FCell_membrane*(i_p_max_Periphery_1DCapable - i_p_max_Centre_1DCapable));
  i_p := i_p_max*(Na_i/(K_m_Na + Na_i))^3*(K_o/(K_m_K + K_o))^2*1.6/(1.5 + exp(-(V_membrane + 60)/40));
  i_Ca_p_max := piecewise(i_Ca_p_max_Centre_Published + FCell_membrane*(i_Ca_p_max_Periphery_Published - i_Ca_p_max_Centre_Published), Version_membrane == 0, i_Ca_p_max_Centre_0DCapable + FCell_membrane*(i_Ca_p_max_Periphery_0DCapable - i_Ca_p_max_Centre_0DCapable), Version_membrane == 1, i_Ca_p_max_Centre_1DCapable + FCell_membrane*(i_Ca_p_max_Periphery_1DCapable - i_Ca_p_max_Centre_1DCapable));
  i_Ca_p := i_Ca_p_max*Ca_i/(Ca_i + 0.0004);
  E_Na := R*T/F*ln(Na_o/Na_i);
  E_K := R*T/F*ln(K_o/K_i);
  E_Ca := R*T/(2*F)*ln(Ca_o/Ca_i);
  E_K_s := piecewise(R*T/F*ln((K_o + 0.12*Na_o)/(K_i + 0.12*Na_i)), Version_membrane == 0, R*T/F*ln((K_o + 0.03*Na_o)/(K_i + 0.03*Na_i)));

  // Rate rules:
  V_membrane' = -1/Cm*(i_Na + i_Ca_L + i_Ca_T + i_to + i_sus + i_K_r + i_K_s + i_f_Na + i_f_K + i_b_Na + i_b_Ca + i_b_K + i_NaCa + i_p + i_Ca_p);
  m' = (m_infinity - m)/tau_m;
  h1' = (h1_infinity - h1)/tau_h1;
  h2' = (h2_infinity - h2)/tau_h2;
  d_L' = (d_L_infinity - d_L)/tau_d_L;
  f_L' = (f_L_infinity - f_L)/tau_f_L;
  d_T' = (d_T_infinity - d_T)/tau_d_T;
  f_T' = (f_T_infinity - f_T)/tau_f_T;
  q' = (q_infinity - q)/tau_q;
  r' = (r_infinity - r)/tau_r;
  P_af' = (P_af_infinity - P_af)/tau_P_af;
  P_as' = (P_as_infinity - P_as)/tau_P_as;
  P_i' = (P_i_infinity - P_i)/tau_P_i;
  xs' = alpha_xs*(1 - xs) - beta_xs*xs;
  y' = alpha_y*(1 - y) - beta_y*y;

  // Unit definitions:
  unit per_second = 1 / second;
  unit millivolt = 1e-3 volt;
  unit per_millivolt = 1 / (1e-3 volt);
  unit per_millivolt_second = 1 / (1e-3 volt * second);
  unit microS = 1e-6 siemens;
  unit microF = 1e-6 farad;
  unit nanoA = 1e-9 ampere;
  unit millimolar = 1e-3 mole / litre;
  unit millimolar4 = (1e-3 mole)^4 / litre^4;
  unit millijoule_per_mole_kelvin = 1e-3 joule / (mole * kelvin);
  unit coulomb_per_mole = coulomb / mole;
  unit microlitre_per_second = 1e-6 litre / second;
end
