// SBML level 2 version 3

model Fox2002_IonicMechanism_CardiacMyocytes()
  // This a model from the article:
  // Ionic mechanism of electrical alternans.
  // Fox JJ, McHarg JL, Gilmour RF Jr. Am J Physiol Heart Circ Physiol 2002 Feb;282(2):H516-30 11788399 ,
  // Abstract:
  // Although alternans of action potential duration (APD) is a robust feature of the rapidly paced canine ventricle, currently available ionic models of cardiac myocytes do not recreate this phenomenon. To address this problem, we developed a new ionic model using formulations of currents based on previous models and recent experimental data. Compared with existing models, the inward rectifier K(+) current (I(K1)) was decreased at depolarized potentials, the maximum conductance and rectification of the rapid component of the delayed rectifier K(+) current (I(Kr)) were increased, and I(Kr) activation kinetics were slowed. The slow component of the delayed rectifier K(+) current (I(Ks)) was increased in magnitude and activation shifted to less positive voltages, and the L-type Ca(2+) current (I(Ca)) was modified to produce a smaller, more rapidly inactivating current. Finally, a simplified form of intracellular calcium dynamics was adopted. In this model, APD alternans occurred at cycle lengths = 150-210 ms, with a maximum alternans amplitude of 39 ms. APD alternans was suppressed by decreasing I(Ca) magnitude or calcium-induced inactivation and by increasing the magnitude of I(K1), I(Kr), or I(Ks). These results establish an ionic basis for APD alternans, which should facilitate the development of pharmacological approaches to eliminating alternans.
  // This model was taken from the CellML repository and automatically converted to SBML.
  // The original model was: Fox JJ, McHarg JL, Gilmour RF Jr. (2002) - version02
  // The original CellML model was created by:
  // Noble, Penny,
  // penny.noble@dpag.oc.ac.uk
  // Oxford University
  // This model originates from BioModels Database: A Database of Annotated Published Models (http://www.ebi.ac.uk/biomodels/). It is copyright (c) 2005-2011 The BioModels.net Team.
  // To the extent possible under law, all copyright and related or neighbouring rights to this encoded model have been dedicated to the public domain worldwide. Please refer to CC0 Public Domain Dedication for more information.
  // In summary, you are entitled to use this encoded model in absolutely any manner you deem suitable, verbatim, or with modification, alone or embedded it in a larger context, redistribute it, commercially or not, in a restricted way or not..
  // To cite BioModels Database, please use: Li C, Donizelli M, Rodriguez N, Dharuri H, Endler L, Chelliah V, Li L, He E, Henry A, Stefan MI, Snoep JL, Hucka M, Le Novère N, Laibe C (2010) BioModels Database: An enhanced, curated and annotated resource for published quantitative kinetic models. BMC Syst Biol., 4:92.
  // biomodels.db:MODEL0911665321
  // isDescribedBy pubmed:11788399
  // biomodels.db:MODEL0911665321
  // isDescribedBy pubmed:11788399
  // biomodels.db:MODEL0911665321
  // biomodels.db:MODEL0911665321

  // Compartments:
  compartment Compartment = 1 litre;

  // Parameters:
  V_membrane = -94.7 millivolt;
  R_membrane = 8.314 joule_per_mole_kelvin;
  T_membrane = 310 kelvin;
  F_membrane = 96.5 coulomb_per_millimole;
  i_Stim has microA_per_microF;
  stim_start = 50 millisecond;
  stim_end = 9000 millisecond;
  stim_period = 1000 millisecond;
  stim_duration = 1 millisecond;
  stim_amplitude = -80 microA_per_microF;
  i_Na has microA_per_microF;
  E_Na has millivolt;
  g_Na = 12.8 milliS_per_microF;
  m = 0.00024676 dimensionless;
  alpha_m has per_millisecond;
  beta_m has per_millisecond;
  E0_m_fast_sodium_current_m_gate has millivolt;
  V_fast_sodium_current_m_gate has millivolt;
  time_fast_sodium_current_m_gate has millisecond;
  h = 0.99869 dimensionless;
  alpha_h has per_millisecond;
  beta_h has per_millisecond;
  V_fast_sodium_current_h_gate has millivolt;
  time_fast_sodium_current_h_gate has millisecond;
  j = 0.99887 dimensionless;
  alpha_j has per_millisecond;
  beta_j has per_millisecond;
  V_fast_sodium_current_j_gate has millivolt;
  time_fast_sodium_current_j_gate has millisecond;
  i_K1 has microA_per_microF;
  g_K1 = 2.8 milliS_per_microF;
  K_mK1 = 13 millimolar;
  K1_infinity has dimensionless;
  V_time_independent_potassium_current_K1_gate has millivolt;
  time_time_independent_potassium_current_K1_gate has millisecond;
  E_K_time_independent_potassium_current_K1_gate has millivolt;
  R_time_independent_potassium_current_K1_gate has joule_per_mole_kelvin;
  T_time_independent_potassium_current_K1_gate has kelvin;
  F_time_independent_potassium_current_K1_gate has coulomb_per_millimole;
  i_Kr has microA_per_microF;
  E_K_rapid_activating_delayed_rectifiyer_K_current has millivolt;
  g_Kr = 0.0136 milliS_per_microF;
  R_V has dimensionless;
  X_kr = 0.229 dimensionless;
  X_kr_inf has dimensionless;
  tau_X_kr has millisecond;
  V_rapid_activating_delayed_rectifiyer_K_current_X_kr_gate has millivolt;
  time_rapid_activating_delayed_rectifiyer_K_current_X_kr_gate has millisecond;
  i_Ks has microA_per_microF;
  g_Ks = 0.0245 milliS_per_microF;
  E_Ks has millivolt;
  X_ks = 0.0001 dimensionless;
  tau_X_ks has millisecond;
  X_ks_infinity has dimensionless;
  V_slow_activating_delayed_rectifiyer_K_current_X_ks_gate has millivolt;
  time_slow_activating_delayed_rectifiyer_K_current_X_ks_gate has millisecond;
  i_to has microA_per_microF;
  g_to = 0.23815 milliS_per_microF;
  X_to = 3.742e-5 dimensionless;
  alpha_X_to has per_millisecond;
  beta_X_to has per_millisecond;
  V_transient_outward_potassium_current_X_to_gate has millivolt;
  time_transient_outward_potassium_current_X_to_gate has millisecond;
  Y_to = 1 dimensionless;
  alpha_Y_to has per_millisecond;
  beta_Y_to has per_millisecond;
  V_transient_outward_potassium_current_Y_to_gate has millivolt;
  time_transient_outward_potassium_current_Y_to_gate has millisecond;
  i_Kp has microA_per_microF;
  g_Kp = 0.002216 milliS_per_microF;
  Kp_V has dimensionless;
  V_plateau_potassium_current_Kp_gate has millivolt;
  time_plateau_potassium_current_Kp_gate has millisecond;
  i_NaK has microA_per_microF;
  i_NaK_max = 0.693 microA_per_microF;
  f_NaK has dimensionless;
  K_mNai = 10 millimolar;
  K_mKo = 1.5 millimolar;
  sigma has dimensionless;
  i_NaCa has microA_per_microF;
  K_mCa = 1380 micromolar;
  K_mNa = 87.5 millimolar;
  K_NaCa = 1500 microA_per_microF;
  K_sat = 0.2 dimensionless;
  eta = 0.35 dimensionless;
  i_p_Ca has microA_per_microF;
  K_mpCa = 0.05 micromolar;
  i_pCa_max = 0.05 microA_per_microF;
  i_Ca_b has microA_per_microF;
  g_Cab = 0.0003842 milliS_per_microF;
  E_Ca has millivolt;
  i_Na_b has microA_per_microF;
  g_Nab = 0.0031 milliS_per_microF;
  i_Ca has microA_per_microF;
  i_CaK has microA_per_microF;
  P_Ca = 2.26e-5 cm_per_millisecond;
  P_CaK = 5.79e-7 cm_per_millisecond;
  i_Ca_half = -0.265 microA_per_microF;
  i_Ca_max has microA_per_microF;
  C_sc = 1 microF_per_cm2;
  f_L_type_Ca_current_f_gate = 0.983 dimensionless;
  f_infinity has dimensionless;
  tau_f has millisecond;
  V_L_type_Ca_current_f_gate has millivolt;
  time_L_type_Ca_current_f_gate has millisecond;
  d_L_type_Ca_current_d_gate = 0.0001 dimensionless;
  d_infinity has dimensionless;
  tau_d has millisecond;
  V_L_type_Ca_current_d_gate has millivolt;
  time_L_type_Ca_current_d_gate has millisecond;
  E0_m_L_type_Ca_current_d_gate has millivolt;
  f_Ca_L_type_Ca_current_f_Ca_gate = 0.942 dimensionless;
  tau_f_Ca has millisecond;
  f_Ca_infinity has dimensionless;
  K_mfCa = 0.18 micromolar;
  V_L_type_Ca_current_f_Ca_gate has millivolt;
  time_L_type_Ca_current_f_Ca_gate has millisecond;
  Ca_i_L_type_Ca_current_f_Ca_gate has micromolar;
  Ca_i_calcium_dynamics = 0.0472 micromolar;
  beta_i has dimensionless;
  K_mCMDN = 2 micromolar;
  CMDN_tot = 10 micromolar;
  V_myo = 2.584e-5 microlitre;
  A_Cap = 0.0001534 cm2;
  J_rel has micromolar_per_millisecond;
  J_leak has micromolar_per_millisecond;
  J_up has micromolar_per_millisecond;
  Ca_SR = 320 micromolar;
  P_rel = 6 per_millisecond;
  P_leak = 1e-6 per_millisecond;
  K_mCSQN = 600 micromolar;
  CSQN_tot = 10000 micromolar;
  V_SR = 2e-6 microlitre;
  V_up = 0.1 micromolar_per_millisecond;
  K_mup = 0.32 micromolar;
  gamma has dimensionless;
  f_Ca_calcium_dynamics has dimensionless;
  f_calcium_dynamics has dimensionless;
  d_calcium_dynamics has dimensionless;
  beta_SR has dimensionless;
  Na_i = 10 millimolar;
  Na_o = 138 millimolar;
  Ca_o = 2000 micromolar;
  K_i = 149.4 millimolar;
  K_o = 4 millimolar;

  // Assignment rules:
  i_Stim := piecewise(stim_amplitude, (time >= stim_start) && (time <= stim_end) && (time - stim_start - floor((time - stim_start)/stim_period)*stim_period <= stim_duration), 0);
  E_Na := R_membrane*T_membrane/F_membrane*ln(Na_o/Na_i);
  i_Na := g_Na*m^3*h*j*(V_membrane - E_Na);
  E0_m_fast_sodium_current_m_gate := V_fast_sodium_current_m_gate + 47.13;
  alpha_m := 0.32*E0_m_fast_sodium_current_m_gate/(1 - exp(-0.1*E0_m_fast_sodium_current_m_gate));
  beta_m := 0.08*exp(-V_fast_sodium_current_m_gate/11);
  alpha_h := 0.135*exp((V_fast_sodium_current_h_gate + 80)/(-6.8));
  beta_h := 7.5/(1 + exp(-0.1*(V_fast_sodium_current_h_gate + 11)));
  alpha_j := 0.175*exp((V_fast_sodium_current_j_gate + 100)/(-23))/(1 + exp(0.15*(V_fast_sodium_current_j_gate + 79)));
  beta_j := 0.3/(1 + exp(-0.1*(V_fast_sodium_current_j_gate + 32)));
  i_K1 := g_K1*K1_infinity*K_o/(K_o + K_mK1)*(V_membrane - E_K_rapid_activating_delayed_rectifiyer_K_current);
  K1_infinity := 1/(2 + exp(1.62*F_time_independent_potassium_current_K1_gate/(R_time_independent_potassium_current_K1_gate*T_time_independent_potassium_current_K1_gate)*(V_time_independent_potassium_current_K1_gate - E_K_time_independent_potassium_current_K1_gate)));
  E_K_rapid_activating_delayed_rectifiyer_K_current := R_membrane*T_membrane/F_membrane*ln(K_o/K_i);
  R_V := 1/(1 + 2.5*exp(0.1*(V_membrane + 28)));
  i_Kr := g_Kr*R_V*X_kr*sqrt(K_o/4)*(V_membrane - E_K_rapid_activating_delayed_rectifiyer_K_current);
  X_kr_inf := 1/(1 + exp(-2.182 - 0.1819*V_rapid_activating_delayed_rectifiyer_K_current_X_kr_gate));
  tau_X_kr := 43 + 1/(exp(-5.495 + 0.1691*V_rapid_activating_delayed_rectifiyer_K_current_X_kr_gate) + exp(-7.677 - 0.0128*V_rapid_activating_delayed_rectifiyer_K_current_X_kr_gate));
  E_Ks := R_membrane*T_membrane/F_membrane*ln((K_o + 0.01833*Na_o)/(K_i + 0.01833*Na_i));
  i_Ks := g_Ks*X_ks^2*(V_membrane - E_Ks);
  X_ks_infinity := 1/(1 + exp((V_slow_activating_delayed_rectifiyer_K_current_X_ks_gate - 16)/(-13.6)));
  tau_X_ks := 1/(7.19e-5*(V_slow_activating_delayed_rectifiyer_K_current_X_ks_gate - 10)/(1 - exp(-0.148*(V_slow_activating_delayed_rectifiyer_K_current_X_ks_gate - 10))) + 0.000131*(V_slow_activating_delayed_rectifiyer_K_current_X_ks_gate - 10)/(exp(0.0687*(V_slow_activating_delayed_rectifiyer_K_current_X_ks_gate - 10)) - 1));
  i_to := g_to*X_to*Y_to*(V_membrane - E_K_rapid_activating_delayed_rectifiyer_K_current);
  alpha_X_to := 0.04516*exp(0.03577*V_transient_outward_potassium_current_X_to_gate);
  beta_X_to := 0.0989*exp(-0.06237*V_transient_outward_potassium_current_X_to_gate);
  alpha_Y_to := 0.005415*exp((V_transient_outward_potassium_current_Y_to_gate + 33.5)/(-5))/(1 + 0.051335*exp((V_transient_outward_potassium_current_Y_to_gate + 33.5)/(-5)));
  beta_Y_to := 0.005415*exp((V_transient_outward_potassium_current_Y_to_gate + 33.5)/5)/(1 + 0.051335*exp((V_transient_outward_potassium_current_Y_to_gate + 33.5)/5));
  i_Kp := g_Kp*Kp_V*(V_membrane - E_K_rapid_activating_delayed_rectifiyer_K_current);
  Kp_V := 1/(1 + exp((7.488 - V_plateau_potassium_current_Kp_gate)/5.98));
  f_NaK := 1/(1 + 0.1245*exp(-0.1*V_membrane*F_membrane/(R_membrane*T_membrane)) + 0.0365*sigma*exp(-V_membrane*F_membrane/(R_membrane*T_membrane)));
  sigma := 1/7*(exp(Na_o/67.3) - 1);
  i_NaK := i_NaK_max*f_NaK/(1 + (K_mNai/Na_i)^1.5)*K_o/(K_o + K_mKo);
  i_NaCa := K_NaCa/((K_mNa^3 + Na_o^3)*(K_mCa + Ca_o)*(1 + K_sat*exp((eta - 1)*V_membrane*F_membrane/(R_membrane*T_membrane))))*(exp(eta*V_membrane*F_membrane/(R_membrane*T_membrane))*Na_i^3*Ca_o - exp((eta - 1)*V_membrane*F_membrane/(R_membrane*T_membrane))*Na_o^3*Ca_i_calcium_dynamics);
  i_p_Ca := i_pCa_max*Ca_i_calcium_dynamics/(K_mpCa + Ca_i_calcium_dynamics);
  E_Ca := R_membrane*T_membrane/(2*F_membrane)*ln(Ca_o/Ca_i_calcium_dynamics);
  i_Ca_b := g_Cab*(V_membrane - E_Ca);
  i_Na_b := g_Nab*(V_membrane - E_Na);
  i_Ca := i_Ca_max*f_L_type_Ca_current_f_gate*d_L_type_Ca_current_d_gate*f_Ca_L_type_Ca_current_f_Ca_gate;
  i_Ca_max := P_Ca/C_sc*4*V_membrane*F_membrane^2/(R_membrane*T_membrane)*(Ca_i_calcium_dynamics*exp(2*V_membrane*F_membrane/(R_membrane*T_membrane)) - 0.341*Ca_o)/(exp(2*V_membrane*F_membrane/(R_membrane*T_membrane)) - 1);
  i_CaK := P_CaK/C_sc*f_L_type_Ca_current_f_gate*d_L_type_Ca_current_d_gate*f_Ca_L_type_Ca_current_f_Ca_gate/(1 + i_Ca_max/i_Ca_half)*1000*V_membrane*F_membrane^2/(R_membrane*T_membrane)*(K_i*exp(V_membrane*F_membrane/(R_membrane*T_membrane)) - K_o)/(exp(V_membrane*F_membrane/(R_membrane*T_membrane)) - 1);
  f_infinity := 1/(1 + exp((V_L_type_Ca_current_f_gate + 12.5)/5));
  tau_f := 30 + 200/(1 + exp((V_L_type_Ca_current_f_gate + 20)/9.5));
  d_infinity := 1/(1 + exp((V_L_type_Ca_current_d_gate + 10)/(-6.24)));
  E0_m_L_type_Ca_current_d_gate := V_L_type_Ca_current_d_gate + 40;
  tau_d := 1/(0.25*exp(-0.01*V_L_type_Ca_current_d_gate)/(1 + exp(-0.07*V_L_type_Ca_current_d_gate)) + 0.07*exp(-0.05*E0_m_L_type_Ca_current_d_gate)/(1 + exp(0.05*E0_m_L_type_Ca_current_d_gate)));
  f_Ca_infinity := 1/(1 + (Ca_i_L_type_Ca_current_f_Ca_gate/K_mfCa)^3);
  tau_f_Ca := 30;
  J_up := V_up/(1 + (K_mup/Ca_i_calcium_dynamics)^2);
  gamma := 1/(1 + (2000/Ca_SR)^3);
  J_rel := P_rel*f_calcium_dynamics*d_calcium_dynamics*f_Ca_calcium_dynamics*(gamma*Ca_SR - Ca_i_calcium_dynamics)/(1 + 1.65*exp(V_membrane/20));
  J_leak := P_leak*(Ca_SR - Ca_i_calcium_dynamics);
  beta_SR := 1/(1 + CSQN_tot*K_mCSQN/(K_mCSQN + Ca_SR)^2);
  beta_i := 1/(1 + CMDN_tot*K_mCMDN/(K_mCMDN + Ca_i_calcium_dynamics)^2);

  // Rate rules:
  V_membrane' = -(i_Na + i_Ca + i_CaK + i_Kr + i_Ks + i_to + i_K1 + i_Kp + i_NaCa + i_NaK + i_p_Ca + i_Na_b + i_Ca_b + i_Stim);
  m' = alpha_m*(1 - m) - beta_m*m;
  h' = alpha_h*(1 - h) - beta_h*h;
  j' = alpha_j*(1 - j) - beta_j*j;
  X_kr' = (X_kr_inf - X_kr)/tau_X_kr;
  X_ks' = (X_ks_infinity - X_ks)/tau_X_ks;
  X_to' = alpha_X_to*(1 - X_to) - beta_X_to*X_to;
  Y_to' = alpha_Y_to*(1 - Y_to) - beta_Y_to*Y_to;
  f_L_type_Ca_current_f_gate' = (f_infinity - f_L_type_Ca_current_f_gate)/tau_f;
  d_L_type_Ca_current_d_gate' = (d_infinity - d_L_type_Ca_current_d_gate)/tau_d;
  f_Ca_L_type_Ca_current_f_Ca_gate' = (f_Ca_infinity - f_Ca_L_type_Ca_current_f_Ca_gate)/tau_f_Ca;
  Ca_SR' = beta_SR*(J_up - J_leak - J_rel)*V_myo/V_SR;
  Ca_i_calcium_dynamics' = beta_i*(J_rel + J_leak - J_up - A_Cap*C_sc/(2*F_membrane*V_myo)*(i_Ca + i_Ca_b + i_p_Ca - 2*i_NaCa));

  // Unit definitions:
  unit millisecond = 1e-3 second;
  unit per_millisecond = 1 / (1e-3 second);
  unit centimeter = 0.01 metre;
  unit millivolt = 1e-3 volt;
  unit per_millivolt = 1 / (1e-3 volt);
  unit per_millivolt_millisecond = 1 / (1e-3 volt * 1e-3 second);
  unit milliS_per_microF = 1e-3 siemens / (1e-6 farad);
  unit microF_per_cm2 = 1e-6 farad / (0.01 metre)^2;
  unit microA_per_microF = 1e-6 ampere / (1e-6 farad);
  unit millimolar = 1e-3 mole / litre;
  unit micromolar = 1e-6 mole / litre;
  unit micromolar_per_millisecond = 1e-6 mole / (litre * 1e-3 second);
  unit joule_per_mole_kelvin = joule / (mole * kelvin);
  unit coulomb_per_millimole = coulomb / (1e-3 mole);
  unit cm_per_millisecond = 0.01 metre / (1e-3 second);
  unit cm2 = (0.01 metre)^2;
  unit microlitre = 1e-6 litre;
  unit time = 1e-3 second;
end
