// SBML level 2 version 3

model Fenton1998_MyocardiumVortexDynamics()
  // This a model from the article:
  // Vortex dynamics in three-dimensional continuous myocardium with fiber rotation: Filament instability and fibrillation.
  // Fenton F, Karma A. Chaos 1998 Mar;8(1):20-47 12779708 ,
  // Abstract:
  // Wave propagation in ventricular muscle is rendered highly anisotropic by the intramural rotation of the fiber. This rotational anisotropy is especially important because it can produce a twist of electrical vortices, which measures the rate of rotation (in degree/mm) of activation wavefronts in successive planes perpendicular to a line of phase singularity, or filament. This twist can then significantly alter the dynamics of the filament. This paper explores this dynamics via numerical simulation. After a review of the literature, we present modeling tools that include: (i) a simplified ionic model with three membrane currents that approximates well the restitution properties and spiral wave behavior of more complex ionic models of cardiac action potential (Beeler-Reuter and others), and (ii) a semi-implicit algorithm for the fast solution of monodomain cable equations with rotational anisotropy. We then discuss selected results of a simulation study of vortex dynamics in a parallelepipedal slab of ventricular muscle of varying wall thickness (S) and fiber rotation rate (theta(z)). The main finding is that rotational anisotropy generates a sufficiently large twist to destabilize a single transmural filament and cause a transition to a wave turbulent state characterized by a high density of chaotically moving filaments. This instability is manifested by the propagation of localized disturbances along the filament and has no previously known analog in isotropic excitable media. These disturbances correspond to highly twisted and distorted regions of filament, or "twistons," that create vortex rings when colliding with the natural boundaries of the ventricle. Moreover, when sufficiently twisted, these rings expand and create additional filaments by further colliding with boundaries. This instability mechanism is distinct from the commonly invoked patchy failure or wave breakup that is not observed here during the initial instability. For modified Beeler-Reuter-like kinetics with stable reentry in two dimensions, decay into turbulence occurs in the left ventricle in about one second above a critical wall thickness in the range of 4-6 mm that matches experiment. However this decay is suppressed by uniformly decreasing excitability. Specific experiments to test these results, and a method to characterize the filament density during fibrillation are discussed. Results are contrasted with other mechanisms of fibrillation and future prospects are summarized. (c)1998 American Institute of Physics.
  // This model was taken from the CellML repository and automatically converted to SBML.
  // The original model was: Fenton F, Karma A. (1998) - version05
  // The original CellML model was created by:
  // Noble, Penny, J
  // penny.noble@dpag.ox.ac.uk
  // Oxford University
  // Department of Physiology, Anatomy & Genetics
  // This model originates from BioModels Database: A Database of Annotated Published Models (http://www.ebi.ac.uk/biomodels/). It is copyright (c) 2005-2011 The BioModels.net Team.
  // To the extent possible under law, all copyright and related or neighbouring rights to this encoded model have been dedicated to the public domain worldwide. Please refer to CC0 Public Domain Dedication for more information.
  // In summary, you are entitled to use this encoded model in absolutely any manner you deem suitable, verbatim, or with modification, alone or embedded it in a larger context, redistribute it, commercially or not, in a restricted way or not..
  // To cite BioModels Database, please use: Li C, Donizelli M, Rodriguez N, Dharuri H, Endler L, Chelliah V, Li L, He E, Henry A, Stefan MI, Snoep JL, Hucka M, Le Novère N, Laibe C (2010) BioModels Database: An enhanced, curated and annotated resource for published quantitative kinetic models. BMC Syst Biol., 4:92.
  // biomodels.db:MODEL0911989198
  // isDescribedBy pubmed:12779708
  // biomodels.db:MODEL0911989198
  // isDescribedBy pubmed:12779708
  // biomodels.db:MODEL0911989198
  // biomodels.db:MODEL0911989198

  // Compartments:
  compartment Compartment = 1 litre;

  // Parameters:
  Istim has per_ms;
  IstimStart = 100 ms;
  IstimEnd = 50000 ms;
  IstimAmplitude = -0.2 per_ms;
  IstimPeriod = 1000 ms;
  IstimPulseDuration = 1 ms;
  u_membrane = 0 dimensionless;
  Cm = 1 uF_per_cm2;
  Vm has mV;
  V_0 = -85 mV;
  V_fi = 15 mV;
  p_p has dimensionless;
  u_c = 0.13 dimensionless;
  q_q has dimensionless;
  u_v = 0 dimensionless;
  J_fi has per_ms;
  tau_d has ms;
  g_fi_max = 5.8 mS_per_cm2;
  v = 1 dimensionless;
  tau_v_minus has ms;
  tau_v1_minus = 18.2 ms;
  tau_v2_minus = 18.2 ms;
  tau_v_plus = 10 ms;
  q_fast_inward_current_v_gate has dimensionless;
  p_fast_inward_current_v_gate has dimensionless;
  u_fast_inward_current_v_gate has dimensionless;
  time_fast_inward_current_v_gate has ms;
  J_so has per_ms;
  tau_0 = 12.5 ms;
  tau_r = 130 ms;
  J_si has per_ms;
  tau_si = 127 ms;
  u_csi = 0.85 dimensionless;
  k = 10 dimensionless;
  w = 1 dimensionless;
  tau_w_minus = 80 ms;
  tau_w_plus = 1020 ms;
  p_slow_inward_current_w_gate has dimensionless;
  u_slow_inward_current_w_gate has dimensionless;
  time_slow_inward_current_w_gate has ms;

  // Assignment rules:
  Istim := piecewise(IstimAmplitude, (time >= IstimStart) && (time <= IstimEnd) && (time - IstimStart - floor((time - IstimStart)/IstimPeriod)*IstimPeriod <= IstimPulseDuration), 0);
  Vm := V_0 + u_membrane*(V_fi - V_0);
  p_p := piecewise(0, u_membrane < u_c, 1);
  q_q := piecewise(0, u_membrane < u_v, 1);
  tau_d := Cm/g_fi_max;
  J_fi := -v*p_p*(1 - u_membrane)*(u_membrane - u_c)/tau_d;
  tau_v_minus := q_fast_inward_current_v_gate*tau_v1_minus + (1 - q_fast_inward_current_v_gate)*tau_v2_minus;
  J_so := u_membrane*(1 - p_p)/tau_0 + p_p/tau_r;
  J_si := -w*(1 + tanh(k*(u_membrane - u_csi)))/(2*tau_si);

  // Rate rules:
  u_membrane' = -(J_fi + J_so + J_si + Istim);
  v' = (1 - p_fast_inward_current_v_gate)*(1 - v)/tau_v_minus - p_fast_inward_current_v_gate*v/tau_v_plus;
  w' = (1 - p_slow_inward_current_w_gate)*(1 - w)/tau_w_minus - p_slow_inward_current_w_gate*w/tau_w_plus;

  // Unit definitions:
  unit ms = 1e-3 second;
  unit per_ms = 1 / (1e-3 second);
  unit mV = 1e-3 volt;
  unit per_mV = 1 / (1e-3 volt);
  unit per_mV_ms = 1 / (1e-3 volt * 1e-3 second);
  unit mS_per_cm2 = 1e-3 siemens / (0.01 metre)^2;
  unit uF_per_cm2 = 1e-6 farad / (0.01 metre)^2;
  unit uA_per_cm2 = 1e-6 ampere / (0.01 metre)^2;
  unit concentration_units = 1e-9 mole / (1e-3 metre)^3;
  unit time = 1e-3 second;
end
