// SBML level 2 version 3

model Faville2008_UPdepolarization()
  // This a model from the article:
  // A biophysically based mathematical model of unitary potential activity in interstitial cells of Cajal.
  // Faville RA, Pullan AJ, Sanders KM, Smith NP. Biophys J 2008 Jul;95(1):88-104 18339738 ,
  // Abstract:
  // Unitary potential (UP) depolarizations are the basic intracellular events responsible for pacemaker activity in interstitial cells of Cajal (ICCs), and are generated at intracellular sites termed "pacemaker units". In this study, we present a mathematical model of the transmembrane ion flows and intracellular Ca(2+) dynamics from a single ICC pacemaker unit acting at near-resting membrane potential. This model quantitatively formalizes the framework of a novel ICC pacemaking mechanism that has recently been proposed. Model simulations produce spontaneously rhythmic UP depolarizations with an amplitude of approximately 3 mV at a frequency of 0.05 Hz. The model predicts that the main inward currents, carried by a Ca(2+)-inhibited nonselective cation conductance, are activated by depletion of sub-plasma-membrane [Ca(2+)] caused by sarcoendoplasmic reticulum calcium ATPase Ca(2+) sequestration. Furthermore, pacemaker activity predicted by our model persists under simulated voltage clamp and is independent of [IP(3)] oscillations. The model presented here provides a basis to quantitatively analyze UP depolarizations and the biophysical mechanisms underlying their production.
  // This model was taken from the CellML repository and automatically converted to SBML.
  // The original model was: Faville RA, Pullan AJ, Sanders KM, Smith NP. (2008) - version02
  // The original CellML model was created by:
  // Lloyd, Catherine, May
  // c.lloyd@aukland.ac.nz
  // The University of Auckland
  // The Bioengineering Institute
  // This model originates from BioModels Database: A Database of Annotated Published Models (http://www.ebi.ac.uk/biomodels/). It is copyright (c) 2005-2011 The BioModels.net Team.
  // To the extent possible under law, all copyright and related or neighbouring rights to this encoded model have been dedicated to the public domain worldwide. Please refer to CC0 Public Domain Dedication for more information.
  // In summary, you are entitled to use this encoded model in absolutely any manner you deem suitable, verbatim, or with modification, alone or embedded it in a larger context, redistribute it, commercially or not, in a restricted way or not..
  // To cite BioModels Database, please use: Li C, Donizelli M, Rodriguez N, Dharuri H, Endler L, Chelliah V, Li L, He E, Henry A, Stefan MI, Snoep JL, Hucka M, Le Novère N, Laibe C (2010) BioModels Database: An enhanced, curated and annotated resource for published quantitative kinetic models. BMC Syst Biol., 4:92.
  // biomodels.db:MODEL0912044015
  // isDescribedBy pubmed:18339738
  // biomodels.db:MODEL0912044015
  // isDescribedBy pubmed:18339738
  // biomodels.db:MODEL0912044015
  // biomodels.db:MODEL0912044015

  // Compartments:
  compartment Compartment = 1 litre;

  // Parameters:
  Vm = -70.1 millivolt;
  I_iCa has picoampere;
  I_iNa has picoampere;
  Cm = 20 picofarad;
  I_Ca has picoampere;
  gCa = 0.01 picosiemens;
  ECa has millivolt;
  I_NSCC_Ca has picoampere;
  gNSCC_Ca_ = 0.12 picosiemens;
  gNSCC_Ca has picosiemens;
  I_NSCC_Na has picoampere;
  gNSCC_Na_ = 220 picosiemens;
  gNSCC_Na has picosiemens;
  I_PM has picoampere;
  gPM = 420 femtoampere;
  KPM = 1 micromolar;
  I_Na has picoampere;
  gNa = 15000 femtoampere;
  KNa = 10000 micromolar;
  hNa = 4 dimensionless;
  JSERCA has flux;
  VSERCA = 100000 first_order_rate_constant;
  A2 = 0.0006 dimensionless;
  A4 = 3.57 per_micromolar;
  A5 = 2.7e-5 per_micromolar;
  A6 = 2.31e-5 per_micromolar2;
  JMCU has flux;
  VMCU = 800 flux;
  KMCU = 10 micromolar;
  epsilon_INH has dimensionless;
  KINH = 10 micromolar;
  hINH = 4 dimensionless;
  JNCX has flux;
  VNCX = 0.5 flux;
  KNCX = 0.3 micromolar;
  JS1S2 has flux;
  mu_S1S2 = 0.04 first_order_rate_constant;
  JIPR has flux;
  kIPR = 2000 first_order_rate_constant;
  k_1 = 6.4 flux;
  k1 = 0 first_order_rate_constant;
  k2 = 4 first_order_rate_constant;
  r2 = 200 first_order_rate_constant;
  r_2 = 0 flux;
  r4 = 750 first_order_rate_constant;
  R1 = 36 micromolar;
  R3 = 300 micromolar;
  phi1 has first_order_rate_constant;
  phi_1 has flux;
  phi2 has first_order_rate_constant;
  phi3 = 0.306 first_order_rate_constant;
  H = 0.787 dimensionless;
  g_beta = 300 first_order_rate_constant;
  h_beta = 2 dimensionless;
  g_alpha = 0.02 per_second_squared;
  K_beta = 2 micromolar;
  alpha_phi3 has per_second_squared;
  beta_phi3 has first_order_rate_constant;
  CS1 = 0.12 micromolar;
  lambda_MT_S1 has dimensionless;
  lambda_ER_S1 has dimensionless;
  CS2 = 0.023 micromolar;
  lambda_MT_S2 has dimensionless;
  lambda_ER_S2 has dimensionless;
  lambda_S1_S2 has dimensionless;
  CER = 203 micromolar;
  CMT = 0.22 micromolar;
  fm has dimensionless;
  Km = 0.01 micromolar;
  Bm = 100 micromolar;
  NS1 = 10100 micromolar;
  R = 0.008314 attojoule_per_zeptomole_kelvin;
  F = 0.09649 femtocoulomb_per_zeptomole;
  T = 310.16 kelvin;
  CO = 1800 micromolar;
  P = 1 micromolar;
  delta_s = 26 micromolar_coulomb;
  gamma_S1 = 100 dimensionless;
  gamma_S2 = 1 dimensionless;
  gamma_MT = 200 dimensionless;
  gamma_ER = 20 dimensionless;
  KNSCC = 0.12 micromolar;
  ENSCC = 0 millivolt;
  hNSCC = 3 dimensionless;

  // Assignment rules:
  I_iCa := I_Ca + I_NSCC_Ca + I_PM;
  I_iNa := I_NSCC_Na + I_Na;
  ECa := R*T/(2*F)*ln(CO/CS1);
  I_Ca := gCa*(Vm - ECa);
  gNSCC_Ca := gNSCC_Ca_*(KNSCC^hNSCC/(KNSCC^hNSCC + CS1^hNSCC));
  I_NSCC_Ca := gNSCC_Ca*(Vm - ENSCC);
  gNSCC_Na := gNSCC_Na_*(KNSCC^hNSCC/(KNSCC^hNSCC + CS1^hNSCC));
  I_NSCC_Na := gNSCC_Na*(Vm - ENSCC);
  I_PM := gPM*(CS1^2/(KPM^2 + CS1^2));
  I_Na := gNa*(NS1^hNa/(KNa^hNa + NS1^hNa));
  JSERCA := VSERCA*(CS1 - A2*CER)/(1 + A4*CS1 + A5*CER + A6*CS1*CER);
  JMCU := VMCU*(CS2^2/(KMCU^2 + CS2^2))*epsilon_INH;
  epsilon_INH := KINH^hINH/(KINH^hINH + CMT^hINH);
  JNCX := VNCX*(CMT/(CMT + KNCX));
  JS1S2 := mu_S1S2*(CS2 - CS1);
  JIPR := kIPR*(P*phi1*H/(P*phi1 + phi_1))^4*(CER - CS2);
  phi1 := (k1*R1 + r2*CS2)/(R1 + CS2);
  phi_1 := (k_1 + r_2)*R3/(R3 + CS2);
  phi2 := (k2*R3 + r4*CS2)/(R3 + CS2);
  alpha_phi3 := g_alpha;
  beta_phi3 := g_beta*(CS2^h_beta/(K_beta^h_beta + CS2^h_beta));
  lambda_MT_S1 := gamma_MT/gamma_S1;
  lambda_ER_S1 := gamma_ER/gamma_S1;
  lambda_MT_S2 := gamma_MT/gamma_S2;
  lambda_ER_S2 := gamma_ER/gamma_S2;
  lambda_S1_S2 := gamma_S1/gamma_S2;
  fm := 1/(1 + Km*Bm/(Km + CMT)^2);

  // Rate rules:
  Vm' = -((I_iCa + I_iNa)/Cm);
  H' = phi3*(1 - H) - P*phi1*phi2/(P*phi1 + phi_1)*H;
  phi3' = alpha_phi3 - beta_phi3*phi3;
  CS1' = JS1S2 + lambda_MT_S1*JNCX - (delta_s/2*I_iCa + lambda_ER_S1*JSERCA);
  CS2' = lambda_ER_S2*JIPR - (lambda_S1_S2*JS1S2 + lambda_MT_S2*JMCU);
  CER' = JSERCA - JIPR;
  CMT' = fm*(JMCU - JNCX);
  NS1' = -(delta_s/1)*I_iNa;

  // Unit definitions:
  unit millivolt = 1e-3 volt;
  unit micromolar = 1e-6 mole / litre;
  unit per_micromolar = litre / (1e-6 mole);
  unit per_micromolar2 = litre^2 / (1e-6 mole)^2;
  unit picofarad = 1e-12 farad;
  unit picosiemens = 1e-12 siemens;
  unit picoampere = 1e-12 ampere;
  unit femtoampere = 1e-15 ampere;
  unit micromolar_coulomb = 1e-6 mole / (litre * coulomb);
  unit femtocoulomb_per_zeptomole = 1e-15 coulomb / (1e-21 mole);
  unit attojoule_per_zeptomole_kelvin = 1e-18 joule / (1e-21 mole * kelvin);
  unit first_order_rate_constant = 1 / second;
  unit per_second_squared = 1 / second^2;
  unit flux = 1e-6 mole / (litre * second);
end
