// SBML level 2 version 3

model Farhy2007_hGHregulation()
  // This a model from the article:
  // Model-projected mechanistic bases for sex differences in growth hormone regulation in humans.
  // Farhy LS, Bowers CY, Veldhuis JD. Am J Physiol Regul Integr Comp Physiol 2007 Apr;292(4):R1577-93 17185408 ,
  // Abstract:
  // Models of physiological systems facilitate rational experimental design, inference, and prediction. A recent construct of regulated growth hormone (GH) secretion interlinks the actions of GH-releasing hormone (GHRH), somatostatin (SRIF), and GH secretagogues (GHS) with GH feedback in the rat (Farhy LS, Veldhuis JD. Am J Physiol Regul Integr Comp Physiol 288: R1649-R1663, 2005). In contrast, no comparable formalism exists to explicate GH dynamics in any other species. The present analyses explore whether a unifying model structure can represent species- and sex-defined distinctions in the human and rodent. The consensus principle that GHRH and GHS synergize in vivo but not in vitro was explicable by assuming that GHS 1) evokes GHRH release from the brain, 2) opposes inhibition by SRIF both in the hypothalamus and on the pituitary gland, and 3) stimulates pituitary GH release directly and additively with GHRH. The gender-selective principle that GH pulses are larger and more irregular in women than men was conferrable by way of 4) higher GHRH potency and 5) greater GHS efficacy. The overall construct predicts GHRH/GHS synergy in the human only in the presence of SRIF when the brain-pituitary nexus is intact, larger and more irregular GH pulses in women, and observed gender differences in feedback by GH and the single and paired actions of GHRH, GHS, and SRIF. The proposed model platform should enhance the framing and interpretation of novel clinical hypotheses and create a basis for interspecies generalization of GH-axis regulation.
  // This model was taken from the CellML repository and automatically converted to SBML.
  // The original model was: Farhy LS, Bowers CY, Veldhuis JD. (2007) - version03
  // The original CellML model was created by:
  // Lloyd, Catherine, May
  // c.lloyd@aukland.ac.nz
  // The University of Auckland
  // The Bioengineering Institute
  // This model originates from BioModels Database: A Database of Annotated Published Models (http://www.ebi.ac.uk/biomodels/). It is copyright (c) 2005-2011 The BioModels.net Team.
  // To the extent possible under law, all copyright and related or neighbouring rights to this encoded model have been dedicated to the public domain worldwide. Please refer to CC0 Public Domain Dedication for more information.
  // In summary, you are entitled to use this encoded model in absolutely any manner you deem suitable, verbatim, or with modification, alone or embedded it in a larger context, redistribute it, commercially or not, in a restricted way or not..
  // To cite BioModels Database, please use: Li C, Donizelli M, Rodriguez N, Dharuri H, Endler L, Chelliah V, Li L, He E, Henry A, Stefan MI, Snoep JL, Hucka M, Le Novère N, Laibe C (2010) BioModels Database: An enhanced, curated and annotated resource for published quantitative kinetic models. BMC Syst Biol., 4:92.
  // biomodels.db:MODEL0912096133
  // isDescribedBy pubmed:17185408
  // biomodels.db:MODEL0912096133
  // isDescribedBy pubmed:17185408
  // biomodels.db:MODEL0912096133
  // biomodels.db:MODEL0912096133

  // Compartments:
  compartment Compartment = 1 litre;

  // Parameters:
  GH = 0 ng_ml;
  GHS = 20 dimensionless;
  k1 = 3 first_order_rate_constant;
  kr1 = 600 ng_ml_hr;
  t1 = 357 pg_ml;
  n1 = 5 dimensionless;
  n2 = 2 dimensionless;
  g0 = 2 dimensionless;
  ng0 = 2.9 dimensionless;
  tg0 = 200 dimensionless;
  t2 = 10 pg_ml;
  SRIF_PeV = 0 pg_ml;
  k4 = 25 first_order_rate_constant;
  kr4 = 20400 pg_ml_hr;
  t5 = 10 ng_ml;
  n5 = 2 dimensionless;
  S_basal = 900 pg_ml_hr;
  SRIF_ArC = 0 pg_ml;
  k2 = 25 first_order_rate_constant;
  kr2 = 2200 pg_ml_hr;
  t3 = 400 pg_ml;
  n3 = 2 dimensionless;
  GHRH = 0 pg_ml;
  k3 = 40 first_order_rate_constant;
  kr3 = 63000 pg_ml_hr;
  t4 = 28 pg_ml;
  n4 = 5 dimensionless;
  F1_GHS has dimensionless;
  F2_GHS has dimensionless;
  g1 = 90000 dimensionless;
  g2 = 100 dimensionless;
  tg1 = 390 dimensionless;
  tg2 = 10000 dimensionless;
  ng1 = 3 dimensionless;
  ng2 = 2 dimensionless;
  ghr_GHRH = 0 pg_ml;
  dghr_GHRH_dt has pg_ml_hr;
  inject has pg_ml_hr;
  kghr = 15 first_order_rate_constant;
  C = 10000 pg_ml_hr;
  onset = 2 hour;
  duration = 0.2 hour;

  // Assignment rules:
  F1_GHS := g1*((GHS/tg1)^ng1/(1 + (GHS/tg1)^ng1));
  F2_GHS := g2*((GHS/tg2)^ng2/(1 + (GHS/tg2)^ng2));
  dghr_GHRH_dt := inject - kghr*ghr_GHRH;
  inject := piecewise(0, time < onset, C, (time >= onset) && (time <= onset + duration), 0, time > onset + duration);

  // Rate rules:
  GH' = kr1*(((GHRH + ghr_GHRH)/t1)^n1/(((GHRH + ghr_GHRH)/t1)^n1 + 1) + g0*((GHS/tg0)^ng0/(1 + (GHS/tg0)^ng0)) + (1 + F1_GHS)/(1 + (SRIF_PeV/t2)^n2 + F1_GHS)) - k1*GH;
  SRIF_PeV' = -(k4*SRIF_PeV) + kr4*((GH/t5)^n5/((GH/t5)^n5 + 1)) + S_basal;
  SRIF_ArC' = kr2*(((GHRH + ghr_GHRH)/t3)^n3/(1 + ((GHRH + ghr_GHRH)/t3)^n3)) - k2*SRIF_ArC;
  GHRH' = kr3*((1 + F2_GHS)/(1 + ((SRIF_PeV + SRIF_ArC)/t4)^n4 + F2_GHS)) + ghr_GHRH*1 - k3*GHRH;
  ghr_GHRH' = inject - kghr*ghr_GHRH;

  // Unit definitions:
  unit ng_ml = 1e-9 gram / (1e-3 litre);
  unit pg_ml = 1e-12 gram / (1e-3 litre);
  unit ng_ml_hr = 1e-9 gram / (1e-3 litre * 3600 second);
  unit pg_ml_hr = 1e-12 gram / (1e-3 litre * 3600 second);
  unit hour = 3600 second;
  unit first_order_rate_constant = 1 / (3600 second);
  unit time = 3600 second;
end
