// SBML level 2 version 3

model Faber2000_LRmodel_CardiacMyocytes()
  // This a model from the article:
  // Action potential and contractility changes in [Na(+)](i) overloaded cardiac myocytes: a simulation study.
  // Faber GM, Rudy Y. Biophys J 2000 May;78(5):2392-404 10777735 ,
  // Abstract:
  // Sodium overload of cardiac cells can accompany various pathologies and induce fatal cardiac arrhythmias. We investigate effects of elevated intracellular sodium on the cardiac action potential (AP) and on intracellular calcium using the Luo-Rudy model of a mammalian ventricular myocyte. The results are: 1) During rapid pacing, AP duration (APD) shortens in two phases, a rapid phase without Na(+) accumulation and a slower phase that depends on [Na(+)](i). 2) The rapid APD shortening is due to incomplete deactivation (accumulation) of I(Ks). 3) The slow phase is due to increased repolarizing currents I(NaK) and reverse-mode I(NaCa), secondary to elevated [Na(+)](i). 4) Na(+)-overload slows the rate of AP depolarization, allowing time for greater I(Ca(L)) activation; it also enhances reverse-mode I(NaCa). The resulting increased Ca(2+) influx triggers a greater [Ca(2+)](i) transient. 5) Reverse-mode I(NaCa) alone can trigger Ca(2+) release in a voltage and [Na(+)](i)-dependent manner. 6) During I(NaK) block, Na(+) and Ca(2+) accumulate and APD shortens due to enhanced reverse-mode I(NaCa); contribution of I(K(Na)) to APD shortening is negligible. By slowing AP depolarization (hence velocity) and shortening APD, Na(+)-overload acts to enhance inducibility of reentrant arrhythmias. Shortened APD with elevated [Ca(2+)](i) (secondary to Na(+)-overload) also predisposes the myocardium to arrhythmogenic delayed afterdepolarizations.
  // This model was taken from the CellML repository and automatically converted to SBML.
  // The original model was: Faber GM, Rudy Y. (2000) - version06
  // The original CellML model was created by:
  // Ashton, Jesse,
  // j.ashton@aukland.ac.nz
  // The University of Auckland
  // Auckland Bioengineering Institute
  // This model originates from BioModels Database: A Database of Annotated Published Models (http://www.ebi.ac.uk/biomodels/). It is copyright (c) 2005-2011 The BioModels.net Team.
  // To the extent possible under law, all copyright and related or neighbouring rights to this encoded model have been dedicated to the public domain worldwide. Please refer to CC0 Public Domain Dedication for more information.
  // In summary, you are entitled to use this encoded model in absolutely any manner you deem suitable, verbatim, or with modification, alone or embedded it in a larger context, redistribute it, commercially or not, in a restricted way or not..
  // To cite BioModels Database, please use: Li C, Donizelli M, Rodriguez N, Dharuri H, Endler L, Chelliah V, Li L, He E, Henry A, Stefan MI, Snoep JL, Hucka M, Le Novère N, Laibe C (2010) BioModels Database: An enhanced, curated and annotated resource for published quantitative kinetic models. BMC Syst Biol., 4:92.
  // biomodels.db:MODEL0912153452
  // isDescribedBy pubmed:10777735
  // biomodels.db:MODEL0912153452
  // isDescribedBy pubmed:10777735
  // biomodels.db:MODEL0912153452
  // biomodels.db:MODEL0912153452

  // Compartments:
  compartment Compartment = 1 litre;

  // Parameters:
  V_cell = -85.1262 millivolt;
  R = 8314 joule_per_kilomole_kelvin;
  T = 310 kelvin;
  F = 96485 coulomb_per_mole;
  I_st has microA_per_microF;
  dVdt has microA_per_microF;
  stim_start = 10 ms;
  stim_end = 9000000 ms;
  stim_period = 300 ms;
  stim_duration = 0.5 ms;
  stim_amplitude = -80 microA_per_microF;
  i_Na has microA_per_microF;
  E_Na has millivolt;
  g_Na = 16 milliS_per_microF;
  m = 0.001513296 dimensionless;
  alpha_m has per_ms;
  beta_m has per_ms;
  V_fast_sodium_current_m_gate has millivolt;
  E0_m has millivolt;
  time_fast_sodium_current_m_gate has ms;
  h = 0.9853187 dimensionless;
  alpha_h has per_ms;
  beta_h has per_ms;
  V_fast_sodium_current_h_gate has millivolt;
  time_fast_sodium_current_h_gate has ms;
  j = 0.9907317 dimensionless;
  alpha_j has per_ms;
  beta_j has per_ms;
  V_fast_sodium_current_j_gate has millivolt;
  time_fast_sodium_current_j_gate has ms;
  i_Ca_L has microA_per_microF;
  i_CaCa has microA_per_microF;
  i_CaK has microA_per_microF;
  i_CaNa has microA_per_microF;
  gamma_Nai = 0.75 dimensionless;
  gamma_Nao = 0.75 dimensionless;
  gamma_Ki = 0.75 dimensionless;
  gamma_Ko = 0.75 dimensionless;
  gamma_Cai = 1 dimensionless;
  gamma_Cao = 0.341 dimensionless;
  I_CaCa has microA_per_microF;
  I_CaK has microA_per_microF;
  I_CaNa has microA_per_microF;
  P_Ca = 0.00054 litre_per_farad_millisecond;
  P_Na = 6.75e-7 litre_per_farad_millisecond;
  P_K = 1.93e-7 litre_per_farad_millisecond;
  d = 5.906564e-6 dimensionless;
  alpha_d has per_ms;
  beta_d has per_ms;
  d_infinity has dimensionless;
  tau_d has ms;
  V_L_type_Ca_channel_d_gate has millivolt;
  time_L_type_Ca_channel_d_gate has ms;
  E0_d has millivolt;
  f = 0.9993909 dimensionless;
  alpha_f has per_ms;
  beta_f has per_ms;
  f_infinity has dimensionless;
  tau_f has ms;
  V_L_type_Ca_channel_f_gate has millivolt;
  time_L_type_Ca_channel_f_gate has ms;
  f_Ca has dimensionless;
  Km_Ca = 0.0006 millimolar;
  V_L_type_Ca_channel_f_Ca_gate has millivolt;
  Cai_L_type_Ca_channel_f_Ca_gate has millimolar;
  i_Ca_T has microA_per_microF;
  g_CaT = 0.05 milliS_per_microF;
  b = 0.001378275 dimensionless;
  V_T_type_Ca_channel_b_gate has millivolt;
  time_T_type_Ca_channel_b_gate has ms;
  b_inf has dimensionless;
  tau_b has ms;
  g = 0.9885975 dimensionless;
  V_T_type_Ca_channel_g_gate has millivolt;
  time_T_type_Ca_channel_g_gate has ms;
  g_inf has dimensionless;
  tau_g has ms;
  i_Kr has microA_per_microF;
  g_Kr has milliS_per_microF;
  G_Kr = 0.02614 milliS_per_microF;
  Rect has dimensionless;
  xr = 0.000207067204 dimensionless;
  xr_infinity has dimensionless;
  tau_xr has ms;
  V_rapid_delayed_rectifier_potassium_current_xr_gate has millivolt;
  time_rapid_delayed_rectifier_potassium_current_xr_gate has ms;
  i_Ks has microA_per_microF;
  g_Ks has milliS_per_microF;
  G_Ks = 0.433 milliS_per_microF;
  E_Ks has millivolt;
  PNaK = 0.01833 dimensionless;
  xs1 = 0.007136102 dimensionless;
  xs1_infinity has dimensionless;
  tau_xs1 has ms;
  V_slow_delayed_rectifier_potassium_current_xs1_gate has millivolt;
  time_slow_delayed_rectifier_potassium_current_xs1_gate has ms;
  xs2 = 0.039519 dimensionless;
  xs2_infinity has dimensionless;
  tau_xs2 has ms;
  V_slow_delayed_rectifier_potassium_current_xs2_gate has millivolt;
  time_slow_delayed_rectifier_potassium_current_xs2_gate has ms;
  i_K_ATP has microA_per_microF;
  g_K_ATP has milliS_per_microF;
  i_K_ATP_on = 1 dimensionless;
  nATP = 0.24 dimensionless;
  nicholsarea = 5e-5 dimensionless;
  ATPi = 3 millimolar;
  hATP = 2 dimensionless;
  kATP = 0.00025 millimolar;
  pATP has dimensionless;
  GKbaraATP has milliS_per_microF;
  i_to has microA_per_microF;
  g_to has milliS_per_microF;
  rvdv has dimensionless;
  zdv = 0.01453778 dimensionless;
  alpha_zdv has per_ms;
  beta_zdv has per_ms;
  tau_zdv has ms;
  zdv_ss has dimensionless;
  V_transient_outward_current_zdv_gate has millivolt;
  time_transient_outward_current_zdv_gate has ms;
  ydv = 0.9999394 dimensionless;
  alpha_ydv has per_ms;
  beta_ydv has per_ms;
  tau_ydv has ms;
  ydv_ss has dimensionless;
  V_transient_outward_current_ydv_gate has millivolt;
  time_transient_outward_current_ydv_gate has ms;
  i_K1 has microA_per_microF;
  E_K has millivolt;
  g_K1 has milliS_per_microF;
  G_K1 = 0.75 milliS_per_microF;
  K1_infinity has dimensionless;
  alpha_K1 has per_ms;
  beta_K1 has per_ms;
  V_time_independent_potassium_current_K1_gate has millivolt;
  i_Kp has microA_per_microF;
  g_Kp = 0.00552 milliS_per_microF;
  Kp has dimensionless;
  i_K_Na has microA_per_microF;
  g_K_Na = 0.12848 milliS_per_microF;
  nKNa = 2.8 dimensionless;
  pona has dimensionless;
  pov has dimensionless;
  kdKNa = 66 millimolar;
  i_p_Ca has microA_per_microF;
  K_mpCa = 0.0005 millimolar;
  I_pCa = 1.15 microA_per_microF;
  i_Na_b has microA_per_microF;
  g_Nab = 0.004 milliS_per_microF;
  i_Ca_b has microA_per_microF;
  g_Cab = 0.003016 milliS_per_microF;
  E_Ca has millivolt;
  i_NaK has microA_per_microF;
  I_NaK = 2.25 microA_per_microF;
  f_NaK has dimensionless;
  K_mNai = 10 millimolar;
  K_mKo = 1.5 millimolar;
  sigma has dimensionless;
  i_ns_Ca has microA_per_microF;
  i_ns_Na has microA_per_microF;
  i_ns_K has microA_per_microF;
  P_ns_Ca has litre_per_farad_millisecond;
  I_ns_Na has microA_per_microF;
  I_ns_K has microA_per_microF;
  K_m_ns_Ca = 0.0012 millimolar;
  i_NaCa has microA_per_microF;
  c1 = 0.00025 microA_per_microF;
  c2 = 0.0001 dimensionless;
  gamma = 0.15 dimensionless;
  i_up has millimolar_per_ms;
  i_leak has millimolar_per_ms;
  i_tr has millimolar_per_ms;
  tau_tr = 120 ms;
  CSQN_max = 10 millimolar;
  K_mCSQN = 0.8 millimolar;
  K_mup = 0.00092 millimolar;
  K_leak has per_ms;
  I_up = 0.00875 millimolar_per_ms;
  Ca_NSR_max = 15 millimolar;
  CaT = 0.01544711 millimolar;
  Cao = 1.8 millimolar;
  Ca_JSR has millimolar;
  JSR = 8.290468 millimolar;
  NSR = 1.516756 millimolar;
  Cai_calcium_dynamics has millimolar;
  bjsr has millimolar;
  cjsr has millimolar2;
  bmyo has millimolar;
  cmyo has millimolar2;
  dmyo has millimolar3;
  K_mTRPN = 0.0005 millimolar;
  K_mCMDN = 0.00238 millimolar;
  TRPN_max = 0.07 millimolar;
  CMDN_max = 0.05 millimolar;
  kappa = 0.125 mM_per_millivolt_ms;
  tau = 4.75 ms;
  K_relss = 1 millimolar;
  qn = 9 dimensionless;
  alpha_rel has millimolar_per_mV;
  tau_rel has ms;
  I_relss has millimolar_per_ms;
  i_rel = -4.74565e-19 millimolar_per_ms;
  Nai = 10 millimolar;
  Nao = 140 millimolar;
  Ki = 144.4732 millimolar;
  Ko = 5.4 millimolar;
  preplength = 0.1 mm;
  radius = 0.011 mm;
  volume has micro_litre;
  V_myo has micro_litre;
  V_JSR has micro_litre;
  V_NSR has micro_litre;
  A_cap = 0.0001534 cm2;

  // Assignment rules:
  I_st := piecewise(stim_amplitude, (time >= stim_start) && (time <= stim_end) && (time - stim_start - floor((time - stim_start)/stim_period)*stim_period <= stim_duration), 0);
  dVdt := -(i_Na + i_Ca_L + i_Ca_T + i_Kr + i_Ks + i_K_Na + i_K1 + i_K_ATP + i_to + i_Kp + i_NaCa + i_p_Ca + i_Na_b + i_Ca_b + i_NaK + i_ns_Ca + I_st);
  E_Na := R*T/F*ln(Nao/Nai);
  i_Na := g_Na*m^3*h*j*(V_cell - E_Na);
  E0_m := V_fast_sodium_current_m_gate + 47.13;
  alpha_m := 0.32*E0_m/(1 - exp(-0.1*E0_m));
  beta_m := 0.08*exp(-V_fast_sodium_current_m_gate/11);
  alpha_h := piecewise(0.135*exp((80 + V_fast_sodium_current_h_gate)/(-6.8)), 40 - V_fast_sodium_current_h_gate < 0, 0);
  beta_h := piecewise(3.56*exp(0.079*V_fast_sodium_current_h_gate) + 310000*exp(0.35*V_fast_sodium_current_h_gate), 40 - V_fast_sodium_current_h_gate < 0, 1/(0.13*(1 + exp((V_fast_sodium_current_h_gate + 10.66)/(-11.1)))));
  alpha_j := piecewise(-(127140*exp(0.2444*V_fast_sodium_current_j_gate) + 3.474e-5*exp(-0.04391*V_fast_sodium_current_j_gate))*(V_fast_sodium_current_j_gate + 37.78)/(1 + exp(0.311*(V_fast_sodium_current_j_gate + 79.23))), 40 + V_fast_sodium_current_j_gate < 0, 0);
  beta_j := piecewise(0.1212*exp(-(0.01052*V_fast_sodium_current_j_gate))/(1 + exp(-(0.1378*(V_fast_sodium_current_j_gate + 40.14)))), 40 + V_fast_sodium_current_j_gate < 0, 0.3*exp(-2.535e-7*V_fast_sodium_current_j_gate)/(1 + exp(-0.1*(V_fast_sodium_current_j_gate + 32))));
  I_CaCa := P_Ca*2^2*V_cell*F^2/(R*T)*(gamma_Cai*Cai_calcium_dynamics*exp(2*V_cell*F/(R*T)) - gamma_Cao*Cao)/(exp(2*V_cell*F/(R*T)) - 1);
  I_CaNa := P_Na*1^2*V_cell*F^2/(R*T)*(gamma_Nai*Nai*exp(1*V_cell*F/(R*T)) - gamma_Nao*Nao)/(exp(1*V_cell*F/(R*T)) - 1);
  I_CaK := P_K*1^2*V_cell*F^2/(R*T)*(gamma_Ki*Ki*exp(1*V_cell*F/(R*T)) - gamma_Ko*Ko)/(exp(1*V_cell*F/(R*T)) - 1);
  i_CaCa := d*f*f_Ca*I_CaCa;
  i_CaNa := d*f*f_Ca*I_CaNa;
  i_CaK := d*f*f_Ca*I_CaK;
  i_Ca_L := i_CaCa + i_CaK + i_CaNa;
  E0_d := V_L_type_Ca_channel_d_gate + 10;
  d_infinity := 1/(1 + exp(-E0_d/6.24));
  tau_d := 1*d_infinity*(1 - exp(-E0_d/6.24))/(0.035*E0_d);
  alpha_d := d_infinity/tau_d;
  beta_d := (1 - d_infinity)/tau_d;
  f_infinity := 1/(1 + exp((V_L_type_Ca_channel_f_gate + 32)/8)) + 0.6/(1 + exp((50 - V_L_type_Ca_channel_f_gate)/20));
  tau_f := 1/(0.0197*exp(-(0.0337*(V_L_type_Ca_channel_f_gate + 10))^2) + 0.02);
  alpha_f := f_infinity/tau_f;
  beta_f := (1 - f_infinity)/tau_f;
  f_Ca := 1/(1 + Cai_L_type_Ca_channel_f_Ca_gate/Km_Ca);
  i_Ca_T := g_CaT*b*b*g*(V_cell - E_Ca);
  b_inf := 1/(1 + exp(-(V_T_type_Ca_channel_b_gate + 14)/10.8));
  tau_b := 3.7 + 6.1/(1 + exp((V_T_type_Ca_channel_b_gate + 25)/4.5));
  g_inf := 1/(1 + exp((V_T_type_Ca_channel_g_gate + 60)/5.6));
  tau_g := piecewise(12 - 0.875*V_T_type_Ca_channel_g_gate, V_T_type_Ca_channel_g_gate <= 0, 12);
  g_Kr := G_Kr*sqrt(Ko/5.4);
  Rect := 1/(1 + exp((V_cell + 9)/22.4));
  i_Kr := g_Kr*xr*Rect*(V_cell - E_K);
  xr_infinity := 1/(1 + exp(-(V_rapid_delayed_rectifier_potassium_current_xr_gate + 21.5)/7.5));
  tau_xr := 1/(0.00138*(V_rapid_delayed_rectifier_potassium_current_xr_gate + 14.2)/(1 - exp(-0.123*(V_rapid_delayed_rectifier_potassium_current_xr_gate + 14.2))) + 0.00061*(V_rapid_delayed_rectifier_potassium_current_xr_gate + 38.9)/(exp(0.145*(V_rapid_delayed_rectifier_potassium_current_xr_gate + 38.9)) - 1));
  E_Ks := R*T/F*ln((Ko + PNaK*Nao)/(Ki + PNaK*Nai));
  g_Ks := G_Ks*(1 + 0.6/(1 + (3.8e-5/Cai_calcium_dynamics)^1.4));
  i_Ks := g_Ks*xs1*xs2*(V_cell - E_Ks);
  xs1_infinity := 1/(1 + exp(-(V_slow_delayed_rectifier_potassium_current_xs1_gate - 1.5)/16.7));
  tau_xs1 := 1/(7.19e-5*(V_slow_delayed_rectifier_potassium_current_xs1_gate + 30)/(1 - exp(-0.148*(V_slow_delayed_rectifier_potassium_current_xs1_gate + 30))) + 0.000131*(V_slow_delayed_rectifier_potassium_current_xs1_gate + 30)/(exp(0.0687*(V_slow_delayed_rectifier_potassium_current_xs1_gate + 30)) - 1));
  xs2_infinity := 1/(1 + exp(-(V_slow_delayed_rectifier_potassium_current_xs2_gate - 1.5)/16.7));
  tau_xs2 := 4/(7.19e-5*(V_slow_delayed_rectifier_potassium_current_xs2_gate + 30)/(1 - exp(-0.148*(V_slow_delayed_rectifier_potassium_current_xs2_gate + 30))) + 0.000131*(V_slow_delayed_rectifier_potassium_current_xs2_gate + 30)/(exp(0.0687*(V_slow_delayed_rectifier_potassium_current_xs2_gate + 30)) - 1));
  g_K_ATP := i_K_ATP_on*0.000193/nicholsarea;
  pATP := 1/(1 + (ATPi/kATP)^hATP);
  GKbaraATP := g_K_ATP*pATP*(Ko/4)^nATP;
  i_K_ATP := GKbaraATP*(V_cell - E_K);
  g_to := 0*0.5;
  rvdv := exp(V_cell/100);
  i_to := g_to*zdv^3*ydv*rvdv*(V_cell - E_K);
  alpha_zdv := 10*exp((V_transient_outward_current_zdv_gate - 40)/25)/(1 + exp((V_transient_outward_current_zdv_gate - 40)/25));
  beta_zdv := 10*exp(-(V_transient_outward_current_zdv_gate + 90)/25)/(1 + exp(-(V_transient_outward_current_zdv_gate + 90)/25));
  tau_zdv := 1/(alpha_zdv + beta_zdv);
  zdv_ss := alpha_zdv/(alpha_zdv + beta_zdv);
  alpha_ydv := 0.015/(1 + exp((V_transient_outward_current_ydv_gate + 60)/5));
  beta_ydv := 0.1*exp((V_transient_outward_current_ydv_gate + 25)/5)/(1 + exp((V_transient_outward_current_ydv_gate + 25)/5));
  tau_ydv := 1/(alpha_ydv + beta_ydv);
  ydv_ss := alpha_ydv/(alpha_ydv + beta_ydv);
  g_K1 := G_K1*sqrt(Ko/5.4);
  E_K := R*T/F*ln(Ko/Ki);
  i_K1 := g_K1*K1_infinity*(V_cell - E_K);
  alpha_K1 := 1.02/(1 + exp(0.2385*(V_time_independent_potassium_current_K1_gate - E_K - 59.215)));
  beta_K1 := 1*(0.49124*exp(0.08032*(V_time_independent_potassium_current_K1_gate - E_K + 5.476)) + exp(0.06175*(V_time_independent_potassium_current_K1_gate - E_K - 594.31)))/(1 + exp(-0.5143*(V_time_independent_potassium_current_K1_gate - E_K + 4.753)));
  K1_infinity := alpha_K1/(alpha_K1 + beta_K1);
  Kp := 1/(1 + exp((7.488 - V_cell)/5.98));
  i_Kp := g_Kp*Kp*(V_cell - E_K);
  pona := 0.85/(1 + (kdKNa/Nai)^nKNa);
  pov := 0.8 - 0.65/(1 + exp((V_cell + 125)/15));
  i_K_Na := g_K_Na*pona*pov*(V_cell - E_K);
  i_p_Ca := I_pCa*Cai_calcium_dynamics/(K_mpCa + Cai_calcium_dynamics);
  i_Na_b := g_Nab*(V_cell - E_Na);
  E_Ca := R*T/(2*F)*ln(Cao/Cai_calcium_dynamics);
  i_Ca_b := g_Cab*(V_cell - E_Ca);
  sigma := 1/7*(exp(Nao/67.3) - 1);
  f_NaK := 1/(1 + 0.1245*exp(-0.1*V_cell*F/(R*T)) + 0.0365*sigma*exp(-V_cell*F/(R*T)));
  i_NaK := I_NaK*f_NaK/(1 + (K_mNai/Nai)^2)/(1 + K_mKo/Ko);
  P_ns_Ca := 1.75e-7;
  I_ns_Na := P_ns_Ca*1^2*V_cell*F^2/(R*T)*(gamma_Nai*Nai*exp(1*V_cell*F/(R*T)) - gamma_Nao*Nao)/(exp(1*V_cell*F/(R*T)) - 1);
  I_ns_K := P_ns_Ca*1^2*V_cell*F^2/(R*T)*(gamma_Ki*Ki*exp(1*V_cell*F/(R*T)) - gamma_Ko*Ko)/(exp(1*V_cell*F/(R*T)) - 1);
  i_ns_Na := I_ns_Na*1/(1 + (K_m_ns_Ca/Cai_calcium_dynamics)^3);
  i_ns_K := I_ns_K*1/(1 + (K_m_ns_Ca/Cai_calcium_dynamics)^3);
  i_ns_Ca := i_ns_Na + i_ns_K;
  i_NaCa := c1*exp((gamma - 1)*V_cell*F/(R*T))*(exp(V_cell*F/(R*T))*Nai^3*Cao - Nao^3*Cai_calcium_dynamics)/(1 + c2*exp((gamma - 1)*V_cell*F/(R*T))*(exp(V_cell*F/(R*T))*Nai^3*Cao + Nao^3*Cai_calcium_dynamics));
  bjsr := CSQN_max + K_mCSQN + (-JSR);
  cjsr := K_mCSQN*JSR;
  Ca_JSR := (sqrt(bjsr^2 + 4*cjsr) - bjsr)/2;
  bmyo := CMDN_max + TRPN_max + K_mCMDN + K_mTRPN + (-CaT);
  cmyo := K_mCMDN*K_mTRPN + TRPN_max*K_mCMDN + CMDN_max*K_mTRPN + (-CaT*(K_mTRPN + K_mCMDN));
  dmyo := -K_mTRPN*K_mCMDN*CaT;
  Cai_calcium_dynamics := 2/3*sqrt(bmyo^2 - 3*cmyo)*cos(acos((9*bmyo*cmyo - (2*bmyo^3 + 27*dmyo))/(2*sqrt((bmyo^2 - 3*cmyo)^3)))/3) - bmyo/3;
  i_up := I_up*Cai_calcium_dynamics/(Cai_calcium_dynamics + K_mup);
  K_leak := I_up/Ca_NSR_max;
  i_leak := K_leak*NSR;
  i_tr := (NSR - Ca_JSR)/tau_tr;
  alpha_rel := kappa*tau;
  I_relss := i_CaCa*alpha_rel/(1 + (K_relss/Ca_JSR)^qn);
  tau_rel := tau/(1 + 0.0123/Ca_JSR);
  volume := pi*preplength*radius^2;
  V_myo := 0.68*volume;
  V_JSR := 0.0048*volume;
  V_NSR := 0.0552*volume;

  // Rate rules:
  V_cell' = dVdt;
  m' = alpha_m*(1 - m) - beta_m*m;
  h' = alpha_h*(1 - h) - beta_h*h;
  j' = alpha_j*(1 - j) - beta_j*j;
  d' = alpha_d*(1 - d) - beta_d*d;
  f' = alpha_f*(1 - f) - beta_f*f;
  b' = (b_inf - b)/tau_b;
  g' = (g_inf - g)/tau_g;
  xr' = (xr_infinity - xr)/tau_xr;
  xs1' = (xs1_infinity - xs1)/tau_xs1;
  xs2' = (xs2_infinity - xs2)/tau_xs2;
  zdv' = (zdv_ss - zdv)/tau_zdv;
  ydv' = (ydv_ss - ydv)/tau_ydv;
  JSR' = i_tr - i_rel;
  NSR' = i_up - (i_tr*(V_JSR/V_NSR) + i_leak);
  CaT' = -1*A_cap*(i_CaCa + i_Ca_T + i_p_Ca + i_Ca_b + (-2*i_NaCa))/(2*V_myo*F) + i_rel*V_JSR/V_myo + (i_leak - i_up)*V_NSR/V_myo;
  i_rel' = -(I_relss + i_rel)/tau_rel;
  Nai' = -1*(i_Na + i_CaNa + i_Na_b + i_ns_Na + i_NaCa*3 + i_NaK*3)*A_cap/(V_myo*F);
  Ki' = -1*(I_st + i_CaK + i_Kr + i_Ks + i_K1 + i_K_ATP + i_to + i_Kp + i_K_Na + i_ns_K + (-i_NaK*2))*A_cap/(V_myo*F);

  // Unit definitions:
  unit ms = 1e-3 second;
  unit per_ms = 1 / (1e-3 second);
  unit millivolt = 1e-3 volt;
  unit per_millivolt = 1 / (1e-3 volt);
  unit ms_per_millivolt = 1e-3 second / (1e-3 volt);
  unit per_millivolt_ms = 1 / (1e-3 volt * 1e-3 second);
  unit mM_per_millivolt_ms = 1e-3 mole / (litre * 1e-3 volt * 1e-3 second);
  unit millivolt_per_ms = 1e-3 volt / (1e-3 second);
  unit milliS_per_microF = 1e-3 siemens / (1e-6 farad);
  unit cm2 = (0.01 metre)^2;
  unit milliS_per_cm2 = 1e-3 siemens / (0.01 metre)^2;
  unit nanoS_per_cm2 = 1e-9 siemens / (0.01 metre)^2;
  unit microF_per_cm2 = 1e-6 farad / (0.01 metre)^2;
  unit microF = 1e-6 farad;
  unit microA_per_microF = 1e-6 ampere / (1e-6 farad);
  unit millimolar_per_ms = 1e-3 mole / (litre * 1e-3 second);
  unit millimolar_per_mV = 1e-3 mole / (litre * 1e-3 volt);
  unit millimolar = 1e-3 mole / litre;
  unit millimolar2 = (1e-3 mole)^2 / litre^2;
  unit millimolar3 = (1e-3 mole)^3 / litre^3;
  unit millimolar4 = (1e-3 mole)^4 / litre^4;
  unit micromolar = 1e-6 mole / litre;
  unit joule_per_kilomole_kelvin = joule / (1000 mole * kelvin);
  unit coulomb_per_mole = coulomb / mole;
  unit cm_per_second = 0.01 metre / second;
  unit mm = 1e-3 metre;
  unit mm2 = (1e-3 metre)^2;
  unit micro_litre = 1e-6 litre;
  unit litre_per_farad_millisecond = litre / (farad * 1e-3 second);
  unit time = 1e-3 second;
end
