// SBML level 2 version 4

model Guyton1972_CapillaryDynamics()
  // This a model from the article:
  // Circulation: overall regulation.
  // Guyton AC, Coleman TG, Granger HJ. Annu Rev Physiol 1972;34:13-46 4334846 ,
  // Abstract:
  // This article is an experiment, one undertaken primarily because of the long-term belief of Dr. Victor Hall, Editor of the Annual Review of Physiology fo r many years, that physiology is, or at least should be, an analytical subject, and that a method not utilized to its fullest advantage for organizing review material is the systems analysis. Furthermore, one of the most likely areas in physiology for which a systems analysis could be of value would be in a discussion of circulatory regulation. Therefore, this article was undertaken directly at the request of the editors of the A ogy to attempt the welding togeth er of a systemsn annuaally Rsiesv ioewf coifr cPuhlaytsoiorlyregulation with a review of the current literature in this field. The systems analysis of circulatory regulation developed for this article is based on earlier, much less extensive analyses (Guyton and Coleman 1, 2); it i s illustrated in Figure 1. This analysis is comprised of 354 blocks, each of which represents one or more mathematical equations describing some physiological facet of circulatory function. In general, each of the functional blocks has been the subject of research investigation by one or many investigator s, but the analysis is based on cumulative knowledge of the circulation rather than simply on current literature. Therefore, the analysis presented here is not a review of the current literature but is a framework to show how the different regulations operate together in the overall system. Later in this review we will attempt to show some of the voids still present in our knowledge of circulatory regulation (which is perhaps the most important value of performing systems analyses), and we will discuss the current research that is attempting to fill these voids. A criticism that has often been made against systems analyses, and very justly so, is that they are usually designed to explain specific phenomena. Therefore, they too often are based on such bizarre concepts of function that they not only fail to give correct predictions (other than the specific ones for which they are designed) but, indeed, often give exactly reverse predictions. Therefore, the analysis of Figure 1 was based almost entirely on act ual experimental data, and it has been tested in computer simulations to see whether or not it can predict the animal or human results of many different types of circulatory stresses induced either experimentally or as the result of clinical abnormalities. Figures 2 through 5 present simulations of some of these experiments or clinical conditions. They will be described later in the article.
  // This model was taken from the CellML repository and automatically converted to SBML.
  // The original model was: Guyton AC, Coleman TG, Granger HJ. (2008) - version01
  // This model originates from BioModels Database: A Database of Annotated Published Models (http://www.ebi.ac.uk/biomodels/). It is copyright (c) 2005-2011 The BioModels.net Team.
  // To the extent possible under law, all copyright and related or neighbouring rights to this encoded model have been dedicated to the public domain worldwide. Please refer to CC0 Public Domain Dedication for more information.
  // In summary, you are entitled to use this encoded model in absolutely any manner you deem suitable, verbatim, or with modification, alone or embedded it in a larger context, redistribute it, commercially or not, in a restricted way or not..
  // To cite BioModels Database, please use: Li C, Donizelli M, Rodriguez N, Dharuri H, Endler L, Chelliah V, Li L, He E, Henry A, Stefan MI, Snoep JL, Hucka M, Le Novère N, Laibe C (2010) BioModels Database: An enhanced, curated and annotated resource for published quantitative kinetic models. BMC Syst Biol., 4:92.
  // biomodels.db:MODEL0912160000
  // isDescribedBy pubmed:4334846
  // biomodels.db:MODEL0912160000
  // isDescribedBy pubmed:4334846
  // biomodels.db:MODEL0912160000
  // biomodels.db:MODEL0912160000

  // Compartments:
  compartment Compartment = 1 litre;

  // Parameters:
  VEC = 14.8548 dimensionless;
  PPD = 4.4805e-6 dimensionless;
  RVS = 2.77751 dimensionless;
  DFP = -4.078e-7 dimensionless;
  VPF = 0.0123238 dimensionless;
  BFN = 2.79521 dimensionless;
  PVS = 3.71612 dimensionless;
  PC = 16.9144 dimensionless;
  VTC has dimensionless;
  VP = 3.00449 dimensionless;
  VPD has dimensionless;
  CPP has dimensionless;
  DLP has dimensionless;
  CPPD has dimensionless;
  VTCPL has dimensionless;
  PRCD has dimensionless;
  DPC has dimensionless;
  PRP = 216.243 dimensionless;
  DPP has dimensionless;
  PPC has dimensionless;
  VTS has dimensionless;
  VTS1 has dimensionless;
  VTS2 = 0 dimensionless;
  TSP = 279.945 dimensionless;
  DPI has dimensionless;
  CPI has dimensionless;
  PTCPR has dimensionless;
  DPL has dimensionless;
  CHY has dimensionless;
  PGH has dimensionless;
  POSHYL has dimensionless;
  PTC has dimensionless;
  PTT has dimensionless;
  PIF has dimensionless;
  PTS has dimensionless;
  VTL has dimensionless;
  PLD1 has dimensionless;
  PLD has dimensionless;
  VG has dimensionless;
  VIF has dimensionless;
  CFC = 0.01167 dimensionless;
  TRPL = 0 dimensionless;
  CPR = 40 dimensionless;
  LPDE = 8 dimensionless;
  PCE = 1 dimensionless;
  PCR = 15 dimensionless;
  LPK = 2.728e-14 dimensionless;
  LPPR = 0.03 dimensionless;
  CPK = 0.000253 dimensionless;
  TSSLML = 0.15 dimensionless;
  TSSLTC = 0.005 dimensionless;
  HYL = 60 dimensionless;
  CMPTSS = 2 dimensionless;
  PGHF = -2 dimensionless;
  GCOPF = 0.8092 dimensionless;
  VTSF = 6 dimensionless;
  PLDF = 4.2 dimensionless;

  // Assignment rules:
  VTC := (PC - PPC - PGH + PTC)*CFC + VTCPL;
  VPD := VTL - VTC - DFP + TRPL;
  CPP := PRP/VP;
  CPPD := piecewise(0, CPP - CPR < 0, CPP - CPR);
  DLP := LPPR - CPPD^LPDE*LPK;
  PRCD := piecewise(0, PC - PCR < 0, PC - PCR);
  VTCPL := (PRCD*CPK)^PCE;
  DPC := VTCPL*CPP + (CPP - CPI)*0.00104;
  DPP := DLP + DPL - DPC - PPD + TRPL*72;
  PPC := 0.28*CPP + 0.0019*CPP^2;
  VTS := VEC - VP - VPF;
  VTS1 := VTS - VTS2;
  DPI := DPC - DPL;
  CPI := TSP/VTS;
  PTCPR := 0.28*CPI + 0.0019*CPI^2;
  DPL := CPI*VTL;
  CHY := (HYL/VTS/5)^CMPTSS;
  PGH := CHY*PGHF + PTT;
  POSHYL := CHY*2;
  PTC := POSHYL*PTCPR*GCOPF;
  PTT := ((VTS1 - VTSF)/VTSF)^2;
  PIF := PGH - POSHYL;
  PTS := PTT - PIF;
  PLD1 := PIF + PLDF - PTT;
  PLD := piecewise(7, PLD1 > 7, PLD1);
  VTL := piecewise(0, PLD < 0, PLD*0.02);
  VG := piecewise(0, VTS <= 0, 0 + (11.4 - 0)*(VTS - 0)/(12 - 0), (VTS > 0) && (VTS <= 12), 11.4 + (14 - 11.4)*(VTS - 12)/(15 - 12), (VTS > 12) && (VTS <= 15), 14 + (16 - 14)*(VTS - 15)/(18 - 15), (VTS > 15) && (VTS <= 18), 16 + (17.3 - 16)*(VTS - 18)/(21 - 18), (VTS > 18) && (VTS <= 21), 17.3 + (18 - 17.3)*(VTS - 21)/(24 - 21), (VTS > 21) && (VTS <= 24), 18);
  VIF := VTS - VG;

  // Rate rules:
  PC' = RVS*1.7*BFN + PVS;
  VP' = VPD;
  PRP' = DPP;
  VTS2' = ((VTS - 12)*TSSLML - VTS2)*TSSLTC;
  TSP' = DPI;
end
