// SBML level 2 version 4

model Guyton1972_Electrolytes()
  // This a model from the article:
  // Circulation: overall regulation.
  // Guyton AC, Coleman TG, Granger HJ. Annu Rev Physiol 1972;34:13-46 4334846 ,
  // Abstract:
  // This article is an experiment, one undertaken primarily because of the long-term belief of Dr. Victor Hall, Editor of the Annual Review of Physiology fo r many years, that physiology is, or at least should be, an analytical subject, and that a method not utilized to its fullest advantage for organizing review material is the systems analysis. Furthermore, one of the most likely areas in physiology for which a systems analysis could be of value would be in a discussion of circulatory regulation. Therefore, this article was undertaken directly at the request of the editors of the A ogy to attempt the welding togeth er of a systemsn annuaally Rsiesv ioewf coifr cPuhlaytsoiorlyregulation with a review of the current literature in this field. The systems analysis of circulatory regulation developed for this article is based on earlier, much less extensive analyses (Guyton and Coleman 1, 2); it i s illustrated in Figure 1. This analysis is comprised of 354 blocks, each of which represents one or more mathematical equations describing some physiological facet of circulatory function. In general, each of the functional blocks has been the subject of research investigation by one or many investigator s, but the analysis is based on cumulative knowledge of the circulation rather than simply on current literature. Therefore, the analysis presented here is not a review of the current literature but is a framework to show how the different regulations operate together in the overall system. Later in this review we will attempt to show some of the voids still present in our knowledge of circulatory regulation (which is perhaps the most important value of performing systems analyses), and we will discuss the current research that is attempting to fill these voids. A criticism that has often been made against systems analyses, and very justly so, is that they are usually designed to explain specific phenomena. Therefore, they too often are based on such bizarre concepts of function that they not only fail to give correct predictions (other than the specific ones for which they are designed) but, indeed, often give exactly reverse predictions. Therefore, the analysis of Figure 1 was based almost entirely on act ual experimental data, and it has been tested in computer simulations to see whether or not it can predict the animal or human results of many different types of circulatory stresses induced either experimentally or as the result of clinical abnormalities. Figures 2 through 5 present simulations of some of these experiments or clinical conditions. They will be described later in the article.
  // This model was taken from the CellML repository and automatically converted to SBML.
  // The original model was: Guyton AC, Coleman TG, Granger HJ. (2008) - version02
  // This model originates from BioModels Database: A Database of Annotated Published Models (http://www.ebi.ac.uk/biomodels/). It is copyright (c) 2005-2011 The BioModels.net Team.
  // To the extent possible under law, all copyright and related or neighbouring rights to this encoded model have been dedicated to the public domain worldwide. Please refer to CC0 Public Domain Dedication for more information.
  // In summary, you are entitled to use this encoded model in absolutely any manner you deem suitable, verbatim, or with modification, alone or embedded it in a larger context, redistribute it, commercially or not, in a restricted way or not..
  // To cite BioModels Database, please use: Li C, Donizelli M, Rodriguez N, Dharuri H, Endler L, Chelliah V, Li L, He E, Henry A, Stefan MI, Snoep JL, Hucka M, Le Novère N, Laibe C (2010) BioModels Database: An enhanced, curated and annotated resource for published quantitative kinetic models. BMC Syst Biol., 4:92.
  // biomodels.db:MODEL0912160001
  // isDescribedBy pubmed:4334846
  // biomodels.db:MODEL0912160001
  // isDescribedBy pubmed:4334846
  // biomodels.db:MODEL0912160001
  // biomodels.db:MODEL0912160001

  // Compartments:
  compartment Compartment = 1 litre;

  // Parameters:
  AMK = 1.037 dimensionless;
  TVD = 0.000980838 dimensionless;
  NOD = 0.0959449 dimensionless;
  STH = 0.977181 dimensionless;
  KOD = 0.0804374 dimensionless;
  VUD = 0.000989 dimensionless;
  CNA has dimensionless;
  NED has dimensionless;
  NAE = 2109.91 dimensionless;
  AMK1 has dimensionless;
  CKE has dimensionless;
  KE has dimensionless;
  KTOT = 3622.54 dimensionless;
  KTOTD has dimensionless;
  CKI has dimensionless;
  KI has dimensionless;
  VIC = 25.0404 dimensionless;
  VID has dimensionless;
  CCD has dimensionless;
  VTW = 39.8952 dimensionless;
  VEC has dimensionless;
  TRPL = 0 dimensionless;
  NID = 0.1 dimensionless;
  ALCLK = 0.3 dimensionless;
  KID = 0.08 dimensionless;
  VIDML = 0.01 dimensionless;

  // Assignment rules:
  NED := NID*STH - NOD + TRPL*142;
  CNA := NAE/VEC;
  AMK1 := (AMK - 1)*ALCLK + 1;
  KTOTD := KID - KOD;
  KE := (KTOT - 3000)/(AMK1*9.3333);
  CKE := KE/VEC;
  KI := KTOT - KE;
  CKI := KI/VIC;
  CCD := CKI - CNA;
  VID := CCD*VIDML;
  VEC := VTW - VIC;

  // Rate rules:
  NAE' = NED;
  KTOT' = KTOTD;
  VIC' = VID;
  VTW' = TVD - VUD;
end
