// SBML level 2 version 4

model Luo1994_CardiacVentricularActionPotential()
  // This a model from the article:
  // A dynamic model of the cardiac ventricular action potential. I. Simulations of ionic currents and concentration changes.
  // Luo CH, Rudy Y. Circ Res 1994 Jun;74(6):1071-96 7514509 ,
  // Abstract:
  // A mathematical model of the cardiac ventricular action potential is presented. In our previous work, the membrane Na+ current and K+ currents were formulated. The present article focuses on processes that regulate intracellular Ca2+ and depend on its concentration. The model presented here for the mammalian ventricular action potential is based mostly on the guinea pig ventricular cell. However, it provides the framework for modeling other types of ventricular cells with appropriate modifications made to account for species differences. The following processes are formulated: Ca2+ current through the L-type channel (ICa), the Na(+)-Ca2+ exchanger, Ca2+ release and uptake by the sarcoplasmic reticulum (SR), buffering of Ca2+ in the SR and in the myoplasm, a Ca2+ pump in the sarcolemma, the Na(+)-K+ pump, and a nonspecific Ca(2+)-activated membrane current. Activation of ICa is an order of magnitude faster than in previous models. Inactivation of ICa depends on both the membrane voltage and [Ca2+]i. SR is divided into two subcompartments, a network SR (NSR) and a junctional SR (JSR). Functionally, Ca2+ enters the NSR and translocates to the JSR following a monoexponential function. Release of Ca2+ occurs at JSR and can be triggered by two different mechanisms, Ca(2+)-induced Ca2+ release and spontaneous release. The model provides the basis for the study of arrhythmogenic activity of the single myocyte including afterdepolarizations and triggered activity. It can simulate cellular responses under different degrees of Ca2+ overload. Such simulations are presented in our accompanying article in this issue of Circulation Research.
  // This model was taken from the CellML repository and automatically converted to SBML.
  // The original model was: Luo CH, Rudy Y. (1994) - version02
  // This model originates from BioModels Database: A Database of Annotated Published Models (http://www.ebi.ac.uk/biomodels/). It is copyright (c) 2005-2011 The BioModels.net Team.
  // To the extent possible under law, all copyright and related or neighbouring rights to this encoded model have been dedicated to the public domain worldwide. Please refer to CC0 Public Domain Dedication for more information.
  // In summary, you are entitled to use this encoded model in absolutely any manner you deem suitable, verbatim, or with modification, alone or embedded it in a larger context, redistribute it, commercially or not, in a restricted way or not..
  // To cite BioModels Database, please use: Li C, Donizelli M, Rodriguez N, Dharuri H, Endler L, Chelliah V, Li L, He E, Henry A, Stefan MI, Snoep JL, Hucka M, Le Novère N, Laibe C (2010) BioModels Database: An enhanced, curated and annotated resource for published quantitative kinetic models. BMC Syst Biol., 4:92.
  // biomodels.db:MODEL0912160003
  // isDescribedBy pubmed:7514509
  // biomodels.db:MODEL0912160003
  // isDescribedBy pubmed:7514509
  // biomodels.db:MODEL0912160003
  // biomodels.db:MODEL0912160003

  // Compartments:
  compartment Compartment = 1 litre;

  // Parameters:
  V_membrane = -84.624 mV;
  R = 8314.5 gas_constant_units;
  T = 310 kelvin;
  F = 96845 faradays_constant_units;
  dV_dt has mV_per_ms;
  Cm = 0.01 uF_per_mm2;
  I_st has uA_per_mm2;
  IStimC has uA_per_mm2;
  i_Na has uA_per_mm2;
  E_Na has mV;
  g_Na = 0.16 mS_per_mm2;
  m = 0 dimensionless;
  alpha_m has per_ms;
  beta_m has per_ms;
  V_fast_sodium_current_m_gate has mV;
  time_fast_sodium_current_m_gate has ms;
  h = 1 dimensionless;
  alpha_h has per_ms;
  beta_h has per_ms;
  V_fast_sodium_current_h_gate has mV;
  time_fast_sodium_current_h_gate has ms;
  j = 1 dimensionless;
  alpha_j has per_ms;
  beta_j has per_ms;
  V_fast_sodium_current_j_gate has mV;
  time_fast_sodium_current_j_gate has ms;
  i_Ca_L has uA_per_mm2;
  i_CaCa has uA_per_mm2;
  i_CaK has uA_per_mm2;
  i_CaNa has uA_per_mm2;
  gamma_Nai = 0.75 dimensionless;
  gamma_Nao = 0.75 dimensionless;
  gamma_Ki = 0.75 dimensionless;
  gamma_Ko = 0.75 dimensionless;
  I_CaCa has uA_per_mm2;
  I_CaK has uA_per_mm2;
  I_CaNa has uA_per_mm2;
  P_Ca = 5.4e-6 mm_per_ms;
  P_Na = 6.75e-9 mm_per_ms;
  P_K = 1.93e-9 mm_per_ms;
  gamma_Cai = 1 dimensionless;
  gamma_Cao = 0.34 dimensionless;
  d = 0 dimensionless;
  alpha_d has per_ms;
  beta_d has per_ms;
  d_infinity has dimensionless;
  tau_d has ms;
  V_L_type_Ca_channel_d_gate has mV;
  time_L_type_Ca_channel_d_gate has ms;
  f = 1 dimensionless;
  alpha_f has per_ms;
  beta_f has per_ms;
  f_infinity has dimensionless;
  tau_f has ms;
  V_L_type_Ca_channel_f_gate has mV;
  time_L_type_Ca_channel_f_gate has ms;
  f_Ca has dimensionless;
  Km_Ca = 0.0006 mM;
  V_L_type_Ca_channel_f_Ca_gate has mV;
  time_L_type_Ca_channel_f_Ca_gate has ms;
  Cai_L_type_Ca_channel_f_Ca_gate has mM;
  i_K has uA_per_mm2;
  g_K_max = 0.00282 mS_per_mm2;
  g_K has mS_per_mm2;
  E_K has mV;
  PR_NaK = 0.01833 dimensionless;
  X = 0 dimensionless;
  alpha_X has per_ms;
  beta_X has per_ms;
  V_time_dependent_potassium_current_X_gate has mV;
  time_time_dependent_potassium_current_X_gate has ms;
  Xi has dimensionless;
  V_time_dependent_potassium_current_Xi_gate has mV;
  time_time_dependent_potassium_current_Xi_gate has ms;
  i_K1 has uA_per_mm2;
  E_K1 has mV;
  g_K1_max = 0.0075 mS_per_mm2;
  g_K1 has mS_per_mm2;
  K1_infinity has dimensionless;
  alpha_K1 has per_ms;
  beta_K1 has per_ms;
  V_time_independent_potassium_current_K1_gate has mV;
  time_time_independent_potassium_current_K1_gate has ms;
  i_Kp has uA_per_mm2;
  E_Kp has mV;
  g_Kp = 0.000183 mS_per_mm2;
  Kp has dimensionless;
  i_p_Ca has uA_per_mm2;
  K_mpCa = 0.0005 mM;
  I_pCa = 0.0115 uA_per_mm2;
  i_Na_b has uA_per_mm2;
  g_Nab = 1.41e-5 mS_per_mm2;
  E_NaN has mV;
  i_Ca_b has uA_per_mm2;
  g_Cab = 3.016e-5 mS_per_mm2;
  E_CaN has mV;
  i_NaK has uA_per_mm2;
  I_NaK = 0.015 uA_per_mm2;
  f_NaK has dimensionless;
  K_mNai = 10 mM;
  K_mKo = 1.5 mM;
  sigma has dimensionless;
  i_ns_Ca has uA_per_mm2;
  i_ns_Na has uA_per_mm2;
  i_ns_K has uA_per_mm2;
  P_ns_Ca = 1.75e-9 mm_per_ms;
  I_ns_Na has uA_per_mm2;
  I_ns_K has uA_per_mm2;
  K_m_ns_Ca = 0.0012 mM;
  Vns has mV;
  EnsCa has mV;
  i_NaCa has uA_per_mm2;
  K_NaCa = 20 uA_per_mm2;
  K_mNa = 87.5 mM;
  K_mCa = 1.38 mM;
  K_sat = 0.1 dimensionless;
  eta = 0.35 dimensionless;
  i_rel has mM_per_ms;
  i_up has mM_per_ms;
  i_leak has mM_per_ms;
  i_tr has mM_per_ms;
  G_rel has per_ms;
  G_rel_peak has per_ms;
  G_rel_max = 60 per_ms;
  tau_on = 2 ms;
  tau_off = 2 ms;
  t_CICR has ms;
  tau_tr = 180 ms;
  K_mrel = 0.0008 mM;
  K_mup = 0.00092 mM;
  K_leak has per_ms;
  I_up = 0.005 mM_per_ms;
  Ca_NSR_max = 15 mM;
  delta_Ca_i2 has mM;
  delta_Ca_ith = 0.00018 mM;
  Nai = 10 mM;
  Nao = 140 mM;
  Cai_ionic_concentrations = 0.00012 mM;
  Cao = 1.8 mM;
  Ki = 145 mM;
  Ko = 5.4 mM;
  Ca_JSR = 1.8 mM;
  Ca_NSR = 1.8 mM;
  Am = 200 per_mm;
  V_myo = 0.68 dimensionless;
  V_JSR = 0.0048 dimensionless;
  V_NSR = 0.0552 dimensionless;

  // Assignment rules:
  dV_dt := (I_st - (i_Na + i_Ca_L + i_K + i_K1 + i_Kp + i_NaCa + i_p_Ca + i_Na_b + i_Ca_b + i_NaK + i_ns_Ca))/Cm;
  IStimC := I_st;
  i_Na := g_Na*m^3*h*j*(V_membrane - E_Na);
  E_Na := R*T/F*ln(Nao/Nai);
  alpha_m := 0.32*(V_fast_sodium_current_m_gate + 47.13)/(1 - exp(-0.1*(V_fast_sodium_current_m_gate + 47.13)));
  beta_m := 0.08*exp(-V_fast_sodium_current_m_gate/11);
  alpha_h := piecewise(0.135*exp((80 + V_fast_sodium_current_h_gate)/(-6.8)), V_fast_sodium_current_h_gate < -40, 0);
  beta_h := piecewise(3.56*exp(0.079*V_fast_sodium_current_h_gate) + 310000*exp(0.35*V_fast_sodium_current_h_gate), V_fast_sodium_current_h_gate < -40, 1/(0.13*(1 + exp((V_fast_sodium_current_h_gate + 10.66)/(-11.1)))));
  alpha_j := piecewise((-127140*exp(0.2444*V_fast_sodium_current_j_gate) - 3.474e-5*exp(-0.04391*V_fast_sodium_current_j_gate))*((V_fast_sodium_current_j_gate + 37.78)/(1 + exp(0.311*(V_fast_sodium_current_j_gate + 79.23)))), V_fast_sodium_current_j_gate < -40, 0);
  beta_j := piecewise(0.1212*exp(-0.01052*V_fast_sodium_current_j_gate)/(1 + exp(-0.1378*(V_fast_sodium_current_j_gate + 40.14))), V_fast_sodium_current_j_gate < -40, 0.3*exp(-2.535e-7*V_fast_sodium_current_j_gate)/(1 + exp(-0.1*(V_fast_sodium_current_j_gate + 32))));
  i_CaCa := d*f*f_Ca*I_CaCa;
  i_CaNa := d*f*f_Ca*I_CaNa;
  i_CaK := d*f*f_Ca*I_CaK;
  I_CaCa := P_Ca*2^2*(V_membrane*F^2/(R*T))*((gamma_Cai*Cai_ionic_concentrations*exp(2*V_membrane*F/(R*T)) - gamma_Cao*Cao)/(exp(2*V_membrane*F/(R*T)) - 1));
  I_CaNa := P_Na*1^2*(V_membrane*F^2/(R*T))*((gamma_Nai*Nai*exp(1*V_membrane*F/(R*T)) - gamma_Nao*Nao)/(exp(1*V_membrane*F/(R*T)) - 1));
  I_CaK := P_K*1^2*(V_membrane*F^2/(R*T))*((gamma_Ki*Ki*exp(1*V_membrane*F/(R*T)) - gamma_Ko*Ko)/(exp(1*V_membrane*F/(R*T)) - 1));
  i_Ca_L := i_CaCa + i_CaK + i_CaNa;
  alpha_d := d_infinity/tau_d;
  d_infinity := 1/(1 + exp(-((V_L_type_Ca_channel_d_gate + 10)/6.24)));
  tau_d := d_infinity*((1 - exp(-((V_L_type_Ca_channel_d_gate + 10)/6.24)))/(0.035*(V_L_type_Ca_channel_d_gate + 10)));
  beta_d := (1 - d_infinity)/tau_d;
  alpha_f := f_infinity/tau_f;
  f_infinity := 1/(1 + exp((V_L_type_Ca_channel_f_gate + 35.06)/8.6)) + 0.6/(1 + exp((50 - V_L_type_Ca_channel_f_gate)/20));
  tau_f := 1/(0.0197*exp(-(0.0337*(V_L_type_Ca_channel_f_gate + 10))^2) + 0.02);
  beta_f := (1 - f_infinity)/tau_f;
  f_Ca := 1/(1 + (Cai_L_type_Ca_channel_f_Ca_gate/Km_Ca)^2);
  g_K := g_K_max*sqrt(Ko/5.4);
  E_K := R*T/F*ln((Ko + PR_NaK*Nao)/(Ki + PR_NaK*Nai));
  i_K := g_K*X^2*Xi*(V_membrane - E_K);
  alpha_X := 7.19e-5*(V_time_dependent_potassium_current_X_gate + 30)/(1 - exp(-0.148*(V_time_dependent_potassium_current_X_gate + 30)));
  beta_X := 0.000131*(V_time_dependent_potassium_current_X_gate + 30)/(-1 + exp(0.0687*(V_time_dependent_potassium_current_X_gate + 30)));
  Xi := 1/(1 + exp((V_time_dependent_potassium_current_Xi_gate - 56.26)/32.1));
  g_K1 := g_K1_max*sqrt(Ko/5.4);
  E_K1 := R*T/F*ln(Ko/Ki);
  i_K1 := g_K1*K1_infinity*(V_membrane - E_K1);
  alpha_K1 := 1.02/(1 + exp(0.2385*(V_time_independent_potassium_current_K1_gate - E_K1 - 59.215)));
  beta_K1 := (0.49124*exp(0.08032*(V_time_independent_potassium_current_K1_gate + 5.476 - E_K1)) + exp(0.06175*(V_time_independent_potassium_current_K1_gate - (E_K1 + 594.31))))/(1 + exp(-0.5143*(V_time_independent_potassium_current_K1_gate - E_K1 + 4.753)));
  K1_infinity := alpha_K1/(alpha_K1 + beta_K1);
  E_Kp := E_K1;
  Kp := 1/(1 + exp((7.488 - V_membrane)/5.98));
  i_Kp := g_Kp*Kp*(V_membrane - E_Kp);
  i_p_Ca := I_pCa*(Cai_ionic_concentrations/(K_mpCa + Cai_ionic_concentrations));
  E_NaN := E_Na;
  i_Na_b := g_Nab*(V_membrane - E_NaN);
  E_CaN := R*T/(2*F)*ln(Cao/Cai_ionic_concentrations);
  i_Ca_b := g_Cab*(V_membrane - E_CaN);
  f_NaK := 1/(1 + 0.1245*exp(-0.1*(V_membrane*F/(R*T))) + 0.0365*sigma*exp(-(V_membrane*F/(R*T))));
  sigma := 1/7*(exp(Nao/67.3) - 1);
  i_NaK := I_NaK*f_NaK*(1/(1 + (K_mNai/Nai)^1.5))*(Ko/(Ko + K_mKo));
  EnsCa := R*T/F*ln((Ko + Nao)/(Ki + Nai));
  Vns := V_membrane - EnsCa;
  i_ns_Na := I_ns_Na*(1/(1 + (K_m_ns_Ca/Cai_ionic_concentrations)^3));
  i_ns_K := I_ns_K*(1/(1 + (K_m_ns_Ca/Cai_ionic_concentrations)^3));
  i_ns_Ca := i_ns_Na + i_ns_K;
  I_ns_Na := P_ns_Ca*1^2*(Vns*F^2/(R*T))*((gamma_Nai*Nai*exp(1*Vns*F/(R*T)) - gamma_Nao*Nao)/(exp(1*Vns*F/(R*T)) - 1));
  I_ns_K := P_ns_Ca*1^2*(Vns*F^2/(R*T))*((gamma_Ki*Ki*exp(1*Vns*F/(R*T)) - gamma_Ko*Ko)/(exp(1*Vns*F/(R*T)) - 1));
  i_NaCa := K_NaCa*(1/(K_mNa^3 + Nao^3))*(1/(K_mCa + Cao))*(1/(1 + K_sat*exp((eta - 1)*V_membrane*(F/(R*T)))))*(exp(eta*V_membrane*(F/(R*T)))*Nai^3*Cao - exp((eta - 1)*V_membrane*(F/(R*T)))*Nao^3*Cai_ionic_concentrations);
  i_rel := G_rel*(Ca_JSR - Cai_ionic_concentrations);
  G_rel := G_rel_peak*((delta_Ca_i2 - delta_Ca_ith)/(K_mrel + delta_Ca_i2 - delta_Ca_ith))*(1 - exp(-(t_CICR/tau_on)))*exp(-(t_CICR/tau_off));
  G_rel_peak := piecewise(0, delta_Ca_i2 < delta_Ca_ith, G_rel_max);
  i_up := I_up*(Cai_ionic_concentrations/(Cai_ionic_concentrations + K_mup));
  i_leak := K_leak*Ca_NSR;
  K_leak := I_up/Ca_NSR_max;
  i_tr := (Ca_NSR - Ca_JSR)/tau_tr;

  // Rate rules:
  V_membrane' = dV_dt;
  m' = alpha_m*(1 - m) - beta_m*m;
  h' = alpha_h*(1 - h) - beta_h*h;
  j' = alpha_j*(1 - j) - beta_j*j;
  d' = alpha_d*(1 - d) - beta_d*d;
  f' = alpha_f*(1 - f) - beta_f*f;
  X' = alpha_X*(1 - X) - beta_X*X;
  Nai' = -(i_Na + i_CaNa + i_Na_b + i_ns_Na + i_NaCa*3 + i_NaK*3)*(Am/(V_myo*F));
  Cai_ionic_concentrations' = -(i_CaCa + i_p_Ca + i_Ca_b - i_NaCa)*(Am/(2*V_myo*F)) + i_rel*(V_JSR/V_myo) + (i_leak - i_up)*(V_NSR/V_myo);
  Ki' = -(i_CaK + i_K + i_K1 + i_Kp + i_ns_K + (-(i_NaK*2)))*(Am/(V_myo*F));
  Ca_JSR' = -(i_rel - i_tr*(V_NSR/V_JSR));
  Ca_NSR' = -(i_leak + i_tr - i_up);

  // Unit definitions:
  unit ms = 1e-3 second;
  unit per_ms = 1 / (1e-3 second);
  unit per_mm = 1 / (1e-3 metre);
  unit mV = 1e-3 volt;
  unit mV_per_ms = 1e-3 volt / (1e-3 second);
  unit per_mV = 1 / (1e-3 volt);
  unit per_mV_ms = 1 / (1e-3 volt * 1e-3 second);
  unit mS_per_mm2 = 1e-3 siemens / (1e-3 metre)^2;
  unit uF_per_mm2 = 1e-6 farad / (1e-3 metre)^2;
  unit uA_per_mm2 = 1e-6 ampere / (1e-3 metre)^2;
  unit mM_per_ms = 1e-9 mole / ((1e-3 metre)^3 * 1e-3 second);
  unit mM = 1e-9 mole / (1e-3 metre)^3;
  unit gas_constant_units = 1e-12 joule / (1e-9 mole * kelvin);
  unit faradays_constant_units = 1e-9 coulomb / (1e-9 mole);
  unit mm_per_ms = 1e-3 metre / (1e-3 second);
  unit mm2 = (1e-3 metre)^2;
  unit time = 1e-3 second;
end
