// SBML level 2 version 4

model Shorten2007_SkeletalMuscleFatigue()
  // This a model from the article:
  // A mathematical model of fatigue in skeletal muscle force contraction.
  // Shorten PR, O'Callaghan P, Davidson JB, Soboleva TK. J Muscle Res Cell Motil 2007;28(6):293-313 18080210 ,
  // Abstract:
  // The ability for muscle to repeatedly generate force is limited by fatigue. The cellular mechanisms behind muscle fatigue are complex and potentially include breakdown at many points along the excitation-contraction pathway. In this paper we construct a mathematical model of the skeletal muscle excitation-contraction pathway based on the cellular biochemical events that link excitation to contraction. The model includes descriptions of membrane voltage, calcium cycling and crossbridge dynamics and was parameterised and validated using the response characteristics of mouse skeletal muscle to a range of electrical stimuli. This model was used to uncover the complexities of skeletal muscle fatigue. We also parameterised our model to describe force kinetics in fast and slow twitch fibre types, which have a number of biochemical and biophysical differences. How these differences interact to generate different force/fatigue responses in fast- and slow- twitch fibres is not well understood and we used our modelling approach to bring new insights to this relationship.
  // This model was taken from the CellML repository and automatically converted to SBML.
  // The original model was: Shorten PR, O'Callaghan P, Davidson JB, Soboleva TK. (2007) - version02
  // This model originates from BioModels Database: A Database of Annotated Published Models (http://www.ebi.ac.uk/biomodels/). It is copyright (c) 2005-2011 The BioModels.net Team.
  // To the extent possible under law, all copyright and related or neighbouring rights to this encoded model have been dedicated to the public domain worldwide. Please refer to CC0 Public Domain Dedication for more information.
  // In summary, you are entitled to use this encoded model in absolutely any manner you deem suitable, verbatim, or with modification, alone or embedded it in a larger context, redistribute it, commercially or not, in a restricted way or not..
  // To cite BioModels Database, please use: Li C, Donizelli M, Rodriguez N, Dharuri H, Endler L, Chelliah V, Li L, He E, Henry A, Stefan MI, Snoep JL, Hucka M, Le Novère N, Laibe C (2010) BioModels Database: An enhanced, curated and annotated resource for published quantitative kinetic models. BMC Syst Biol., 4:92.
  // biomodels.db:MODEL0912160004
  // isDescribedBy pubmed:18080210
  // biomodels.db:MODEL0912160004
  // isDescribedBy pubmed:18080210
  // biomodels.db:MODEL0912160004
  // biomodels.db:MODEL0912160004

  // Compartments:
  compartment Compartment = 1 litre;

  // Parameters:
  time_cell has millisecond;
  C_m = 1 microF_per_cm2;
  gam = 4.8 dimensionless;
  R_a = 150 ohm_cm2;
  tsi = 1e-6 centi_metre;
  tsi2 = 0.0025 centi_metre;
  tsi3 = 0.0005 centi_metre;
  FF = 96485 C_per_mol;
  tau_K = 350 millisecond;
  tau_Na = 350 millisecond;
  f_T = 0.0032 dimensionless;
  tau_K2 = 21875 millisecond;
  tau_Na2 = 21875 millisecond;
  I_K_rest = 1.02 microA_per_cm2;
  I_Na_rest = -1.29 microA_per_cm2;
  alpha_h_bar = 0.0081 per_millisecond;
  alpha_m_bar = 0.288 per_millisecond_per_millivolt;
  alpha_n_bar = 0.0131 per_millisecond_per_millivolt;
  beta_h_bar = 4.38 per_millisecond;
  beta_m_bar = 1.38 per_millisecond;
  beta_n_bar = 0.067 per_millisecond;
  V_m = -46 millivolt;
  V_n = -40 millivolt;
  V_h = -45 millivolt;
  V_a = 70 millivolt;
  V_S_inf = -78 millivolt;
  V_h_K_inf = -40 millivolt;
  A_a = 150 millivolt;
  A_S_inf = 5.8 millivolt;
  A_h_K_inf = 7.5 millivolt;
  K_alpha_h = 14.7 millivolt;
  K_beta_h = 9 millivolt;
  K_alpha_m = 10 millivolt;
  K_alpha_n = 7 millivolt;
  K_beta_m = 18 millivolt;
  K_beta_n = 40 millivolt;
  RR = 8314.41 milliJ_per_degreeK_per_mol;
  TT = 293 degreeK;
  g_Cl_bar = 19.65 milliS_per_cm2;
  g_K_bar = 64.8 milliS_per_cm2;
  g_Na_bar = 804 milliS_per_cm2;
  G_K = 11.1 milliS_per_cm2;
  del = 0.4 dimensionless;
  K_K = 950 milliM2;
  K_S = 1 milliM2;
  K_m_K = 1 milliM;
  K_m_Na = 13 milliM;
  S_i = 10 milliM;
  J_NaK_bar = 0.000621 micro_mol_per_cm2_per_second;
  V_tau = 90 millivolt;
  I_T has microA_per_cm2;
  vS = -79.974 millivolt;
  vT = -80.2 millivolt;
  I_ionic_s has microA_per_cm2;
  I_ionic_t has microA_per_cm2;
  K_t = 5.9 milliM;
  K_i = 150.9 milliM;
  K_e = 5.9 milliM;
  Na_i = 12.7 milliM;
  Na_t = 133 milliM;
  Na_e = 133 milliM;
  E_K has millivolt;
  E_K_t has millivolt;
  Cl_i has milliM;
  Cl_o has milliM;
  Cl_i_t has milliM;
  Cl_o_t has milliM;
  J_K has milliV_milliM;
  J_K_t has milliV_milliM;
  eta_Cl = 0.1 dimensionless;
  eta_IR = 1 dimensionless;
  eta_DR = 0.45 dimensionless;
  eta_Na = 0.1 dimensionless;
  eta_NaK = 0.1 dimensionless;
  I_HH has microA_per_cm2;
  a has dimensionless;
  J_Cl has milliV_milliM;
  g_Cl has milliS_per_cm2;
  I_Cl has microA_per_cm2;
  time_sarco_Cl_channel has millisecond;
  K_R has milliM;
  g_IR_bar has milliS_per_cm2;
  y has dimensionless;
  g_IR has milliS_per_cm2;
  I_IR has microA_per_cm2;
  time_sarco_IR_channel has millisecond;
  alpha_n has per_millisecond;
  beta_n has per_millisecond;
  h_K_inf has dimensionless;
  tau_h_K has millisecond;
  n = 0.009466 dimensionless;
  h_K = 0.9952 dimensionless;
  g_DR has milliS_per_cm2;
  I_DR has microA_per_cm2;
  time_sarco_DR_channel has millisecond;
  alpha_h has per_millisecond;
  beta_h has per_millisecond;
  alpha_m has per_millisecond;
  beta_m has per_millisecond;
  S_inf has dimensionless;
  tau_S has millisecond;
  m = 0.0358 dimensionless;
  h = 0.4981 dimensionless;
  S = 0.581 dimensionless;
  g_Na has milliS_per_cm2;
  J_Na has milliV_milliM;
  I_Na has microA_per_cm2;
  time_sarco_Na_channel has millisecond;
  sig has dimensionless;
  f1 has dimensionless;
  I_NaK_bar has microA_per_cm2;
  I_NaK has microA_per_cm2;
  time_sarco_NaK_channel has millisecond;
  a_t has dimensionless;
  J_Cl_t has milliV_milliM;
  I_Cl_t has microA_per_cm2;
  g_Cl_t has milliS_per_cm2;
  time_t_Cl_channel has millisecond;
  K_R_t has milliM;
  g_IR_bar_t has milliS_per_cm2;
  y_t has dimensionless;
  g_IR_t has milliS_per_cm2;
  I_IR_t has microA_per_cm2;
  time_t_IR_channel has millisecond;
  alpha_n_t has per_millisecond;
  beta_n_t has per_millisecond;
  h_K_inf_t has dimensionless;
  tau_h_K_t has millisecond;
  n_t = 0.009466 dimensionless;
  h_K_t = 0.9952 dimensionless;
  g_DR_t has milliS_per_cm2;
  I_DR_t has microA_per_cm2;
  time_t_DR_channel has millisecond;
  alpha_h_t has per_millisecond;
  beta_h_t has per_millisecond;
  alpha_m_t has per_millisecond;
  beta_m_t has per_millisecond;
  S_inf_t has dimensionless;
  tau_S_t has millisecond;
  m_t = 0.0358 dimensionless;
  h_t = 0.4981 dimensionless;
  S_t = 0.581 dimensionless;
  g_Na_t has milliS_per_cm2;
  J_Na_t has milliV_milliM;
  I_Na_t has microA_per_cm2;
  time_t_Na_channel has millisecond;
  sig_t has dimensionless;
  f1_t has dimensionless;
  I_NaK_bar_t has microA_per_cm2;
  I_NaK_t has microA_per_cm2;
  time_t_NaK_channel has millisecond;
  O_0 = 0 dimensionless;
  O_1 = 0 dimensionless;
  O_2 = 0 dimensionless;
  O_3 = 0 dimensionless;
  O_4 = 0 dimensionless;
  k_L = 0.002 per_millisecond;
  k_Lm = 1000 per_millisecond;
  f = 0.2 dimensionless;
  alpha1 = 0.2 per_millisecond;
  K = 4.5 millivolt;
  Vbar = -20 millivolt;
  C_0 = 1 dimensionless;
  C_1 = 0 dimensionless;
  C_2 = 0 dimensionless;
  C_3 = 0 dimensionless;
  C_4 = 0 dimensionless;
  k_C has per_millisecond;
  k_Cm has per_millisecond;
  nu_SR = 4.875 micromolar_per_millisecond_micrometre3;
  K_SR = 1 micromolar;
  L_e = 2e-5 micrometre3_per_millisecond;
  tau_R = 0.75 micrometre3_per_millisecond;
  tau_SR_R = 0.75 micrometre3_per_millisecond;
  L_x = 1.1 micrometre;
  R_R = 0.5 micrometre;
  V_o has micrometre3;
  V_1 has micrometre3;
  V_2 has micrometre3;
  V_SR has micrometre3;
  V_SR1 has micrometre3;
  V_SR2 has micrometre3;
  k_T_on = 0.04425 per_micromolar_per_millisecond;
  k_T_off = 0.115 per_millisecond;
  T_tot = 140 micromolar;
  k_P_on = 0.0417 per_micromolar_per_millisecond;
  k_P_off = 0.0005 per_millisecond;
  P_tot = 1500 micromolar;
  k_Mg_on = 3.3e-5 per_micromolar_per_millisecond;
  k_Mg_off = 0.003 per_millisecond;
  k_Cs_on = 4e-6 per_micromolar_per_millisecond;
  k_Cs_off = 0.005 per_millisecond;
  Cs_tot = 31000 micromolar;
  k_CATP_on = 0.15 per_micromolar_per_millisecond;
  k_CATP_off = 30 per_millisecond;
  k_MATP_on = 0.0015 per_micromolar_per_millisecond;
  k_MATP_off = 0.15 per_millisecond;
  tau_ATP = 0.375 micrometre3_per_millisecond;
  tau_Mg = 1.5 micrometre3_per_millisecond;
  k_0_on = 0 per_millisecond;
  k_0_off = 0.15 per_millisecond;
  k_Ca_on = 0.15 per_millisecond;
  k_Ca_off = 0.05 per_millisecond;
  f_o = 1.5 per_millisecond;
  f_p = 15 per_millisecond;
  h_o = 0.24 per_millisecond;
  h_p = 0.18 per_millisecond;
  g_o = 0.12 per_millisecond;
  b_p = 2.867e-5 per_millisecond;
  k_p = 3.62e-6 micrometre3_per_millisecond;
  A_p = 1 per_milliM3_per_millisecond;
  B_p = 0.0001 per_milliM2_per_millisecond;
  PP = 6 milliM2;
  T_0 has micromolar;
  Ca_1 = 0.1 micromolar;
  Ca_SR1 = 1500 micromolar;
  Ca_2 = 0.1 micromolar;
  Ca_SR2 = 1500 micromolar;
  Ca_T_2 = 25 micromolar;
  Ca_P1 = 615 micromolar;
  Ca_P2 = 615 micromolar;
  Mg_P1 = 811 micromolar;
  Mg_P2 = 811 micromolar;
  Ca_Cs1 = 16900 micromolar;
  Ca_Cs2 = 16900 micromolar;
  Ca_ATP1 = 0.4 micromolar;
  Ca_ATP2 = 0.4 micromolar;
  Mg_ATP1 = 7200 micromolar;
  Mg_ATP2 = 7200 micromolar;
  ATP1 = 799.6 micromolar;
  ATP2 = 799.6 micromolar;
  Mg1 = 1000 micromolar;
  Mg2 = 1000 micromolar;
  Ca_CaT2 = 3 micromolar;
  D_0 = 0.8 micromolar;
  D_1 = 1.2 micromolar;
  D_2 = 3 micromolar;
  A_1 = 0.3 micromolar;
  A_2 = 0.23 micromolar;
  P = 0.23 milliM;
  P_SR = 0.23 milliM;
  P_C_SR = 0.23 milliM;
  i2 = 300 micrometre3_per_millisecond;

  // Assignment rules:
  I_T := 1000/1*((vS - vT)/R_a);
  I_ionic_s := I_Cl + I_IR + I_DR + I_Na + I_NaK + (-I_HH);
  E_K := RR*TT/FF*ln(K_e/K_i);
  E_K_t := RR*TT/FF*ln(K_t/K_i);
  Cl_i := 156.5/(5 + exp(-FF*E_K/(RR*TT)));
  Cl_o := 156.5 - 5*Cl_i;
  Cl_i_t := 156.5/(5 + exp(-FF*E_K_t/(RR*TT)));
  Cl_o_t := 156.5 - 5*Cl_i_t;
  J_K := vS*((K_i - K_e*exp(-1*FF*vS/(RR*TT)))/(1 - exp(-1*FF*vS/(RR*TT))));
  J_K_t := vT*((K_i - K_t*exp(-1*FF*vT/(RR*TT)))/(1 - exp(-1*FF*vT/(RR*TT))));
  I_HH := piecewise(150, (time_cell >= 0) && (time_cell < 0.5), 150, (time_cell >= 50) && (time_cell < 50.5), 150, (time_cell >= 100) && (time_cell < 100.5), 150, (time_cell >= 150) && (time_cell < 150.5), 150, (time_cell >= 200) && (time_cell < 200.5), 150, (time_cell >= 250) && (time_cell < 250.5), 150, (time_cell >= 300) && (time_cell < 300.5), 150, (time_cell >= 350) && (time_cell < 350.5), 150, (time_cell >= 400) && (time_cell < 400.5), 0);
  a := 1/(1 + exp((vS - V_a)/A_a));
  J_Cl := vS*((Cl_i - Cl_o*exp(FF*vS/(RR*TT)))/(1 - exp(FF*vS/(RR*TT))));
  g_Cl := g_Cl_bar*a^4;
  I_Cl := g_Cl*(J_Cl/45);
  K_R := K_e*exp(-del*E_K*(FF/(RR*TT)));
  g_IR_bar := G_K*(K_R^2/(K_K + K_R^2));
  y := 1 - (1 + K_S*(1 + K_R^2/K_K)/(S_i^2*exp(2*(1 - del)*vS*FF/(RR*TT))))^(-1);
  g_IR := g_IR_bar*y;
  I_IR := g_IR*piecewise(1, J_K > 0, 0)*(J_K/50);
  alpha_n := alpha_n_bar*((vS - V_n)/(1 - exp(-((vS - V_n)/K_alpha_n))));
  beta_n := beta_n_bar*exp(-((vS - V_n)/K_beta_n));
  h_K_inf := 1/(1 + exp((vS - V_h_K_inf)/A_h_K_inf));
  tau_h_K := 1000*exp(-((vS + 40)/25.75));
  g_DR := g_K_bar*n^4*h_K;
  I_DR := g_DR*(J_K/50);
  alpha_h := alpha_h_bar*exp(-((vS - V_h)/K_alpha_h));
  beta_h := beta_h_bar/(1 + exp(-((vS - V_h)/K_beta_h)));
  alpha_m := alpha_m_bar*((vS - V_m)/(1 - exp(-((vS - V_m)/K_alpha_m))));
  beta_m := beta_m_bar*exp(-((vS - V_m)/K_beta_m));
  S_inf := 1/(1 + exp((vS - V_S_inf)/A_S_inf));
  tau_S := 8571/(0.2 + 5.65*((vS + V_tau)/100)^2);
  J_Na := vS*((Na_i - Na_e*exp(-1*FF*vS/(RR*TT)))/(1 - exp(-1*FF*vS/(RR*TT))));
  g_Na := g_Na_bar*m^3*h*S;
  I_Na := g_Na*(J_Na/75);
  sig := 1/7*(exp(Na_e/67.3) - 1);
  f1 := (1 + 0.12*exp(-0.1*vS*(FF/(RR*TT))) + 0.04*sig*exp(-(vS*(FF/(RR*TT)))))^(-1);
  I_NaK_bar := FF*(J_NaK_bar/((1 + K_m_K/K_e)^2*(1 + K_m_Na/Na_i)^3));
  I_NaK := I_NaK_bar*f1;
  a_t := 1/(1 + exp((vT - V_a)/A_a));
  J_Cl_t := vT*((Cl_i_t - Cl_o_t*exp(FF*vT/(RR*TT)))/(1 - exp(FF*vT/(RR*TT))));
  g_Cl_t := g_Cl_bar*a_t^4;
  I_Cl_t := eta_Cl*g_Cl_t*(J_Cl_t/45);
  K_R_t := K_t*exp(-del*E_K_t*(FF/(RR*TT)));
  g_IR_bar_t := G_K*(K_R_t^2/(K_K + K_R_t^2));
  y_t := 1 - (1 + K_S*(1 + K_R_t^2/K_K)/(S_i^2*exp(2*(1 - del)*vT*FF/(RR*TT))))^(-1);
  g_IR_t := g_IR_bar_t*y_t;
  I_IR_t := eta_IR*g_IR_t*(J_K_t/50);
  alpha_n_t := alpha_n_bar*((vT - V_n)/(1 - exp(-((vT - V_n)/K_alpha_n))));
  beta_n_t := beta_n_bar*exp(-((vT - V_n)/K_beta_n));
  h_K_inf_t := 1/(1 + exp((vT - V_h_K_inf)/A_h_K_inf));
  tau_h_K_t := 1*exp(-((vT + 40)/25.75));
  g_DR_t := g_K_bar*n_t^4*h_K_t;
  I_DR_t := eta_DR*g_DR_t*(J_K_t/50);
  alpha_h_t := alpha_h_bar*exp(-((vT - V_h)/K_alpha_h));
  beta_h_t := beta_h_bar/(1 + exp(-((vT - V_h)/K_beta_h)));
  alpha_m_t := alpha_m_bar*((vT - V_m)/(1 - exp(-((vT - V_m)/K_alpha_m))));
  beta_m_t := beta_m_bar*exp(-((vT - V_m)/K_beta_m));
  S_inf_t := 1/(1 + exp((vT - V_S_inf)/A_S_inf));
  tau_S_t := 8571/(0.2 + 5.65*((vT + V_tau)/100)^2);
  J_Na_t := vT*((Na_i - Na_t*exp(-1*FF*vT/(RR*TT)))/(1 - exp(-1*FF*vT/(RR*TT))));
  g_Na_t := g_Na_bar*m_t^3*h_t*S_t;
  I_Na_t := eta_Na*g_Na_t*(J_Na_t/75);
  sig_t := 1/7*(exp(Na_t/67.3) - 1);
  f1_t := (1 + 0.12*exp(-0.1*vT*(FF/(RR*TT))) + 0.04*sig_t*exp(-(vT*(FF/(RR*TT)))))^(-1);
  I_NaK_bar_t := FF*(J_NaK_bar/((1 + K_m_K/K_t)^2*(1 + K_m_Na/Na_i)^3));
  I_NaK_t := eta_NaK*I_NaK_bar_t*f1_t;
  I_ionic_t := I_Cl_t + I_IR_t + I_DR_t + I_Na_t + I_NaK_t;
  k_C := 0.5*alpha1*exp((vT - Vbar)/(8*K));
  k_Cm := 0.5*alpha1*exp((Vbar - vT)/(8*K));
  V_o := 0.95*L_x*pi*R_R^2;
  V_1 := 0.01*V_o;
  V_2 := 0.99*V_o;
  V_SR := 0.05*L_x*pi*R_R^2;
  V_SR1 := 0.01*V_SR;
  V_SR2 := 0.99*V_SR;
  T_0 := T_tot + (-Ca_T_2) + (-Ca_CaT2) + (-D_0) + (-D_1) + (-D_2) + (-A_1) + (-A_2);

  // Rate rules:
  vS' = -((I_ionic_s + I_T)/C_m);
  vT' = -((I_ionic_t - I_T/gam)/C_m);
  K_i' = -f_T*((I_IR_t + I_DR_t + I_K_rest + (-2*I_NaK_t))/(1000/1*FF*tsi)) - (I_IR + I_DR + I_K_rest + (-2*I_NaK))/(1000/1*FF*tsi2);
  K_t' = (I_IR_t + I_DR_t + I_K_rest + (-2*I_NaK_t))/(1000/1*FF*tsi) - (K_t - K_e)/tau_K;
  K_e' = (I_IR + I_DR + I_K_rest + (-2*I_NaK))/(1000/1*FF*tsi3) + (K_t - K_e)/tau_K2;
  Na_i' = -f_T*((I_Na_t + I_Na_rest + 3*I_NaK_t)/(1000/1*FF*tsi)) - (I_Na + I_Na_rest + 3*I_NaK)/(1000/1*FF*tsi2);
  Na_t' = (I_Na_t + I_Na_rest + 3*I_NaK_t)/(1000/1*FF*tsi) - (Na_t - Na_e)/tau_Na;
  Na_e' = (I_Na + I_Na_rest + 3*I_NaK)/(1000/1*FF*tsi3) + (Na_t - Na_e)/tau_Na2;
  n' = alpha_n*(1 - n) - beta_n*n;
  h_K' = (h_K_inf - h_K)/tau_h_K;
  m' = alpha_m*(1 - m) - beta_m*m;
  h' = alpha_h*(1 - h) - beta_h*h;
  S' = (S_inf - S)/tau_S;
  n_t' = alpha_n_t*(1 - n_t) - beta_n_t*n_t;
  h_K_t' = (h_K_inf_t - h_K_t)/tau_h_K_t;
  m_t' = alpha_m_t*(1 - m_t) - beta_m_t*m_t;
  h_t' = alpha_h_t*(1 - h_t) - beta_h_t*h_t;
  S_t' = (S_inf_t - S_t)/tau_S_t;
  C_0' = -k_L*C_0 + k_Lm*O_0 + (-4*k_C*C_0) + k_Cm*C_1;
  O_0' = k_L*C_0 + (-k_Lm*O_0) + (-4*k_C*O_0/f) + f*k_Cm*O_1;
  C_1' = 4*k_C*C_0 + (-k_Cm*C_1) + (-k_L*C_1/f) + f*k_Lm*O_1 + (-3*k_C*C_1) + 2*k_Cm*C_2;
  O_1' = k_L*C_1/f + (-k_Lm*f*O_1) + 4*k_C*O_0/f + (-f*k_Cm*O_1) + (-3*k_C*O_1/f) + 2*f*k_Cm*O_2;
  C_2' = 3*k_C*C_1 + (-2*k_Cm*C_2) + (-k_L*C_2/f^2) + f^2*k_Lm*O_2 + (-2*k_C*C_2) + 3*k_Cm*C_3;
  O_2' = 3*k_C*O_1/f + (-2*f*k_Cm*O_2) + k_L*C_2/f^2 + (-k_Lm*f^2*O_2) + (-2*k_C*O_2/f) + 3*f*k_Cm*O_3;
  C_3' = 2*k_C*C_2 + (-3*k_Cm*C_3) + (-k_L*C_3/f^3) + k_Lm*f^3*O_3 + (-k_C*C_3) + 4*k_Cm*C_4;
  O_3' = k_L*C_3/f^3 + (-k_Lm*f^3*O_3) + 2*k_C*O_2/f + (-3*k_Cm*f*O_3) + (-k_C*O_3/f) + 4*f*k_Cm*O_4;
  C_4' = k_C*C_3 + (-4*k_Cm*C_4) + (-k_L*C_4/f^4) + k_Lm*f^4*O_4;
  O_4' = k_C*O_3/f + (-4*f*k_Cm*O_4) + k_L*C_4/f^4 + (-k_Lm*f^4*O_4);
  Ca_1' = i2*(O_0 + O_1 + O_2 + O_3 + O_4)*((Ca_SR1 - Ca_1)/V_1) - nu_SR*(Ca_1/(Ca_1 + K_SR)/V_1) + L_e*((Ca_SR1 - Ca_1)/V_1) + (-tau_R*((Ca_1 - Ca_2)/V_1)) + (-(k_P_on*Ca_1*(P_tot + (-Ca_P1) + (-Mg_P1)) + (-k_P_off*Ca_P1))) + (-(k_CATP_on*Ca_1*ATP1 + (-k_CATP_off*Ca_ATP1)));
  Ca_SR1' = -(i2*(O_0 + O_1 + O_2 + O_3 + O_4))*((Ca_SR1 - Ca_1)/V_SR1) + nu_SR*(Ca_1/(Ca_1 + K_SR)/V_SR1) + (-L_e*((Ca_SR1 - Ca_1)/V_SR1)) + (-tau_SR_R*((Ca_SR1 - Ca_SR2)/V_SR1)) + (-(k_Cs_on*Ca_SR1*(Cs_tot - Ca_Cs1) + (-k_Cs_off*Ca_Cs1)));
  Ca_2' = -nu_SR*(Ca_2/(Ca_2 + K_SR)/V_2) + L_e*((Ca_SR2 + (-Ca_2))/V_2) + tau_R*((Ca_1 - Ca_2)/V_2) + (-(k_T_on*Ca_2*T_0 + (-k_T_off*Ca_T_2) + k_T_on*Ca_2*Ca_T_2 + (-k_T_off*Ca_CaT2) + k_T_on*Ca_2*D_0 + (-k_T_off*D_1) + k_T_on*Ca_2*D_1 + (-k_T_off*D_2))) + (-(k_P_on*Ca_2*(P_tot + (-Ca_P2) + (-Mg_P2)) + (-k_P_off*Ca_P2))) + (-(k_CATP_on*Ca_2*ATP2 + (-k_CATP_off*Ca_ATP2)));
  Ca_SR2' = nu_SR*(Ca_2/(Ca_2 + K_SR)/V_SR2) + (-L_e*((Ca_SR2 + (-Ca_2))/V_SR2)) + tau_SR_R*((Ca_SR1 + (-Ca_SR2))/V_SR2) + (-(k_Cs_on*Ca_SR2*(Cs_tot + (-Ca_Cs2)) + (-k_Cs_off*Ca_Cs2))) - 1000/1*(A_p*(P_SR*(0.001/1)*Ca_SR2 - PP)*piecewise(1, P_SR*(0.001/1)*Ca_SR2 - PP > 0, 0)*(0.001/1)*P_SR*Ca_SR2 - B_p*P_C_SR*(PP - P_SR*(0.001/1)*Ca_SR2)*piecewise(1, PP - P_SR*(0.001/1)*Ca_SR2 > 0, 0));
  Ca_T_2' = k_T_on*Ca_2*T_0 + (-k_T_off*Ca_T_2) + (-k_T_on*Ca_2*Ca_T_2) + k_T_off*Ca_CaT2 + (-k_0_on*Ca_T_2) + k_0_off*D_1;
  Ca_P1' = k_P_on*Ca_1*(P_tot + (-Ca_P1) + (-Mg_P1)) + (-k_P_off*Ca_P1);
  Ca_P2' = k_P_on*Ca_2*(P_tot + (-Ca_P2) + (-Mg_P2)) + (-k_P_off*Ca_P2);
  Mg_P1' = k_Mg_on*(P_tot + (-Ca_P1) + (-Mg_P1))*Mg1 + (-k_Mg_off*Mg_P1);
  Mg_P2' = k_Mg_on*(P_tot + (-Ca_P2) + (-Mg_P2))*Mg2 + (-k_Mg_off*Mg_P2);
  Ca_Cs1' = k_Cs_on*Ca_SR1*(Cs_tot + (-Ca_Cs1)) + (-k_Cs_off*Ca_Cs1);
  Ca_Cs2' = k_Cs_on*Ca_SR2*(Cs_tot + (-Ca_Cs2)) + (-k_Cs_off*Ca_Cs2);
  Ca_ATP1' = k_CATP_on*Ca_1*ATP1 + (-k_CATP_off*Ca_ATP1) + (-tau_ATP*((Ca_ATP1 + (-Ca_ATP2))/V_1));
  Ca_ATP2' = k_CATP_on*Ca_2*ATP2 + (-k_CATP_off*Ca_ATP2) + tau_ATP*((Ca_ATP1 + (-Ca_ATP2))/V_2);
  Mg_ATP1' = k_MATP_on*Mg1*ATP1 + (-k_MATP_off*Mg_ATP1) + (-tau_ATP*((Mg_ATP1 + (-Mg_ATP2))/V_1));
  Mg_ATP2' = k_MATP_on*Mg2*ATP2 + (-k_MATP_off*Mg_ATP2) + tau_ATP*((Mg_ATP1 + (-Mg_ATP2))/V_2);
  ATP1' = -(k_CATP_on*Ca_1*ATP1 + (-k_CATP_off*Ca_ATP1)) + (-(k_MATP_on*Mg1*ATP1 + (-k_MATP_off*Mg_ATP1))) + (-tau_ATP*((ATP1 + (-ATP2))/V_1));
  ATP2' = -(k_CATP_on*Ca_2*ATP2 + (-k_CATP_off*Ca_ATP2)) + (-(k_MATP_on*Mg2*ATP2 + (-k_MATP_off*Mg_ATP2))) + tau_ATP*((ATP1 + (-ATP2))/V_2);
  Mg1' = -(k_Mg_on*(P_tot + (-Ca_P1) + (-Mg_P1))*Mg1 + (-k_Mg_off*Mg_P1)) + (-(k_MATP_on*Mg1*ATP1 + (-k_MATP_off*Mg_ATP1))) + (-tau_Mg*((Mg1 + (-Mg2))/V_1));
  Mg2' = -(k_Mg_on*(P_tot + (-Ca_P2) + (-Mg_P2))*Mg2 + (-k_Mg_off*Mg_P2)) + (-(k_MATP_on*Mg2*ATP2 + (-k_MATP_off*Mg_ATP2))) + tau_Mg*((Mg1 + (-Mg2))/V_2);
  Ca_CaT2' = k_T_on*Ca_2*Ca_T_2 + (-k_T_off*Ca_CaT2) + (-k_Ca_on*Ca_CaT2) + k_Ca_off*D_2;
  D_0' = -k_T_on*Ca_2*D_0 + k_T_off*D_1 + k_0_on*T_0 + (-k_0_off*D_0);
  D_1' = k_T_on*Ca_2*D_0 + (-k_T_off*D_1) + k_0_on*Ca_T_2 + (-k_0_off*D_1) + (-k_T_on*Ca_2*D_1) + k_T_off*D_2;
  D_2' = k_T_on*Ca_2*D_1 + (-k_T_off*D_2) + k_Ca_on*Ca_CaT2 + (-k_Ca_off*D_2) + (-f_o*D_2) + f_p*A_1 + g_o*A_2;
  A_1' = f_o*D_2 + (-f_p*A_1) + h_p*A_2 + (-h_o*A_1);
  A_2' = -h_p*A_2 + h_o*A_1 + (-g_o*A_2);
  P' = 0.001/1*(h_o*A_1 - h_p*A_2) + (-1*b_p*P) + (-1*k_p*((P - P_SR)/V_2));
  P_SR' = k_p*((P - P_SR)/V_SR2) - 1*(A_p*(P_SR*(0.001/1)*Ca_SR2 - PP)*piecewise(1, P_SR*(0.001/1)*Ca_SR2 - PP > 0, 0)*(0.001/1)*P_SR*Ca_SR2 - B_p*P_C_SR*(PP - P_SR*(0.001/1)*Ca_SR2)*piecewise(1, PP - P_SR*(0.001/1)*Ca_SR2 > 0, 0));
  P_C_SR' = 1*(A_p*(P_SR*(0.001/1)*Ca_SR2 - PP)*piecewise(1, P_SR*(0.001/1)*Ca_SR2 - PP > 0, 0)*(0.001/1)*P_SR*Ca_SR2 - B_p*P_C_SR*(PP - P_SR*(0.001/1)*Ca_SR2)*piecewise(1, PP - P_SR*(0.001/1)*Ca_SR2 > 0, 0));

  // Unit definitions:
  unit millisecond = 1e-3 second;
  unit per_millisecond = 1 / (1e-3 second);
  unit millivolt = 1e-3 volt;
  unit milliS_per_cm2 = 1e-3 siemens / (0.01 metre)^2;
  unit microF_per_cm2 = 1e-6 farad / (0.01 metre)^2;
  unit microA_per_cm2 = 1e-6 ampere / (0.01 metre)^2;
  unit ohm_cm2 = ohm * (0.01 metre)^2;
  unit centi_metre = 0.01 metre;
  unit C_per_mol = coulomb / mole;
  unit per_millisecond_per_millivolt = 1 / (1e-3 second * 1e-3 volt);
  unit milliJ_per_degreeK_per_mol = 1e-3 joule / (kelvin * mole);
  unit degreeK = kelvin;
  unit milliM = 1e-3 mole / litre;
  unit M = mole / litre;
  unit micro_mol_per_cm2_per_second = 1e-6 mole / ((0.01 metre)^2 * second);
  unit micrometre3_per_millisecond = (1e-6 metre)^3 / (1e-3 second);
  unit per_micromolar2_per_millisecond = litre^2 / ((1e-6 mole)^2 * 1e-3 second);
  unit per_micromolar_per_millisecond = litre / (1e-6 mole * 1e-3 second);
  unit micromolar = 1e-6 mole / litre;
  unit micromolar_per_millisecond_micrometre3 = 1e-6 mole * (1e-6 metre)^3 / (litre * 1e-3 second);
  unit micrometre = 1e-6 metre;
  unit micrometre3 = (1e-6 metre)^3;
  unit milliV_milliM = 1e-3 volt * 1e-3 mole / litre;
  unit milliM2 = (1e-3 mole)^2 / litre^2;
  unit per_milliM3_per_millisecond = litre^3 / ((1e-3 mole)^3 * 1e-3 second);
  unit per_milliM2_per_millisecond = litre^2 / ((1e-3 mole)^2 * 1e-3 second);
  unit time = 1e-3 second;
end
