// SBML level 2 version 3

model Endresen1997_SinoatrialActionPotential()
  // This a model from the article:
  // Chaos in weakly-coupled pacemaker cells.
  // Endresen LP. J Theor Biol 1997 Jan 7;184(1):41-50 9039399 ,
  // Abstract:
  // A model of the rabbit sinoatrial action potential is introduced, based on a model by Morris & Lecar. One cell is described by two nonlinear first-order ordinary differential equations, with ten constant parameters. The model is much simpler than most other models in use, but can reproduce perfectly experimentally recorded action potentials. The dynamics of two coupled cells, with and without the presence of periodic acetylcholine pulses, shows examples of bifurcations and strange attractors, mathematical phenomena characterizing chaotic motion. It remains to be clarified whether such dynamics is actually observed, for example in the small irregular variations of the normal heart rate.
  // This model was taken from the CellML repository and automatically converted to SBML.
  // The original model was: Endresen LP. (1996) - version01
  // The original CellML model was created by:
  // Noble, Penny, J
  // penny.noble@dpag.ox.ac.uk
  // Oxford University
  // Department of Physiology, Anatomoy & Genetics
  // This model originates from BioModels Database: A Database of Annotated Published Models (http://www.ebi.ac.uk/biomodels/). It is copyright (c) 2005-2011 The BioModels.net Team.
  // To the extent possible under law, all copyright and related or neighbouring rights to this encoded model have been dedicated to the public domain worldwide. Please refer to CC0 Public Domain Dedication for more information.
  // In summary, you are entitled to use this encoded model in absolutely any manner you deem suitable, verbatim, or with modification, alone or embedded it in a larger context, redistribute it, commercially or not, in a restricted way or not..
  // To cite BioModels Database, please use: Li C, Donizelli M, Rodriguez N, Dharuri H, Endler L, Chelliah V, Li L, He E, Henry A, Stefan MI, Snoep JL, Hucka M, Le Novère N, Laibe C (2010) BioModels Database: An enhanced, curated and annotated resource for published quantitative kinetic models. BMC Syst Biol., 4:92.
  // biomodels.db:MODEL0912388235
  // isDescribedBy pubmed:9039399
  // biomodels.db:MODEL0912388235
  // isDescribedBy pubmed:9039399
  // biomodels.db:MODEL0912388235
  // biomodels.db:MODEL0912388235

  // Compartments:
  compartment Compartment = 1 litre;

  // Parameters:
  V_membrane = -52.07606 millivolt;
  Cm = 60 picoF;
  i_s has femtoA;
  g_s = 382.9118 picoS;
  V_s = 214.1429 millivolt;
  V_1 = -35.9358 millivolt;
  V_2 = 7.8589 millivolt;
  i_K has femtoA;
  g_K = 536.1093 picoS;
  V_K = -259.0783 millivolt;
  w = 0.0008971 dimensionless;
  lambda_w = 20.7796 per_second;
  V_3 = -27.9375 millivolt;
  V_4 = 6.321 millivolt;
  V_potassium_channel_w_gate has millivolt;
  time_potassium_channel_w_gate has second;
  i_K_ACh has femtoA;
  u = 0.2344555 dimensionless;
  alpha has per_second;
  beta has per_second;
  ACh = 1e-6 molar;
  V_acetyl_choline_activated_potassium_channel_u_gate has millivolt;
  time_acetyl_choline_activated_potassium_channel_u_gate has second;
  i_j has femtoA;
  g_j = 0 picoS;
  V_B = -50 millivolt;

  // Assignment rules:
  i_s := 1/2*g_s*(1 + tanh((V_membrane - V_1)/V_2))*(V_membrane - V_s);
  i_K := g_K*w*(V_membrane - V_K);
  i_K_ACh := 1*0.27*u*(V_membrane + 90);
  alpha := 0.012332/(1 + 4.2e-6/ACh);
  beta := 0.01*exp(0.0133*(V_acetyl_choline_activated_potassium_channel_u_gate + 40));
  i_j := g_j*(V_membrane - V_B);

  // Rate rules:
  V_membrane' = -(i_s + i_K + i_K_ACh + i_j)/Cm;
  w' = lambda_w*cosh((V_potassium_channel_w_gate - V_3)/(2*V_4))*(1/2*(1 + tanh((V_potassium_channel_w_gate - V_3)/V_4)) - w);
  u' = alpha*(1 - u) - beta*u;

  // Unit definitions:
  unit per_second = 1 / second;
  unit millivolt = 1e-3 volt;
  unit per_millivolt = 1 / (1e-3 volt);
  unit picoS = 1e-12 siemens;
  unit picoF = 1e-12 farad;
  unit femtoA = 1e-15 ampere;
  unit molar = mole / litre;
end
