// SBML level 2 version 3

model Egli2004_ProlactinRhythmicSecretion()
  // This a model from the article:
  // Rhythmic secretion of prolactin in rats: action of oxytocin coordinated by vasoactive intestinal polypeptide of suprachiasmatic nucleus origin.
  // Egli M, Bertram R, Sellix MT, Freeman ME. Endocrinology 2004 Jul;145(7):3386-94 15033917 ,
  // Abstract:
  // Prolactin (PRL) is secreted from lactotrophs of the anterior pituitary gland of rats in a unique pattern in response to uterine cervical stimulation (CS) during mating. Surges of PRL secretion occur in response to relief from hypothalamic dopaminergic inhibition and stimulation by hypothalamic releasing neurohormones. In this study, we characterized the role of oxytocin (OT) in this system and the involvement of vasoactive intestinal polypeptide (VIP) from the suprachiasmatic nucleus (SCN) in controlling OT and PRL secretion of CS rats. The effect of OT on PRL secretion was demonstrated in cultured lactotrophs showing simultaneous enhanced secretion rate and increased intracellular Ca(2+). Neurosecretory OT cells of the hypothalamic paraventricular nucleus that express VIP receptors were identified by using immunocytochemical techniques in combination with the retrogradely transported neuronal tracer Fluoro-Gold (iv injected). OT measurements of serial blood samples obtained from ovariectomized (OVX) CS rats displayed a prominent increase at the time of the afternoon PRL peak. The injection of VIP antisense oligonucleotides into the SCN abolished the afternoon increase of OT and PRL in CS-OVX animals. These findings suggest that VIP from the SCN contributes to the regulation of OT and PRL secretion in CS rats. We propose that in CS rats the regulatory mechanism(s) for PRL secretion comprise coordinated action of neuroendocrine dopaminergic and OT cells, both governed by the daily rhythm of VIP-ergic output from the SCN. This hypothesis is illustrated with a mathematical model.
  // This model was taken from the CellML repository and automatically converted to SBML.
  // The original model was: Egli M, Bertram R, Sellix MT, Freeman ME. (2004) - version02
  // The original CellML model was created by:
  // Lloyd, Catherine, May
  // c.lloyd@aukland.ac.nz
  // The University of Auckland
  // The Bioengineering Institute
  // This model originates from BioModels Database: A Database of Annotated Published Models (http://www.ebi.ac.uk/biomodels/). It is copyright (c) 2005-2011 The BioModels.net Team.
  // To the extent possible under law, all copyright and related or neighbouring rights to this encoded model have been dedicated to the public domain worldwide. Please refer to CC0 Public Domain Dedication for more information.
  // In summary, you are entitled to use this encoded model in absolutely any manner you deem suitable, verbatim, or with modification, alone or embedded it in a larger context, redistribute it, commercially or not, in a restricted way or not..
  // To cite BioModels Database, please use: Li C, Donizelli M, Rodriguez N, Dharuri H, Endler L, Chelliah V, Li L, He E, Henry A, Stefan MI, Snoep JL, Hucka M, Le Novère N, Laibe C (2010) BioModels Database: An enhanced, curated and annotated resource for published quantitative kinetic models. BMC Syst Biol., 4:92.
  // biomodels.db:MODEL0912452142
  // isDescribedBy pubmed:15033917
  // biomodels.db:MODEL0912452142
  // isDescribedBy pubmed:15033917
  // biomodels.db:MODEL0912452142
  // biomodels.db:MODEL0912452142

  // Compartments:
  compartment Compartment = 1 litre;

  // Parameters:
  PRL = 20 nanog_ml;
  kD = 300 nanog_ml;
  kO = 9 picog_ml;
  rP = 300000 nanog_ml_hr;
  qP = 0.5 first_order_rate_constant;
  DA = 20000 nanog_ml;
  vD has nanog_ml_hr;
  vDbar = 10000 nanog_ml_hr;
  DA_infinity = 20000 nanog_ml;
  qD = 0.2 first_order_rate_constant;
  OT = 25 picog_ml;
  kx = 50 picog_ml;
  vO has picog_ml_hr;
  vObar = 500 picog_ml_hr;
  rO = 1100 picog_ml_hr;
  qO = 1 first_order_rate_constant;
  x has picog_ml;

  // Assignment rules:
  vD := piecewise(vDbar, (time >= 2) && (time <= 4), 0);
  vO := piecewise(vObar, (time >= 2) && (time <= 4), 0);
  x := piecewise(51, (time >= 2) && (time <= 4), 51, (time >= 16) && (time <= 18), 1);

  // Rate rules:
  PRL' = rP*(1/(kD + DA))*(OT/(kO + OT))^2 - qP*PRL;
  DA' = qD*(DA_infinity - DA) - vD;
  OT' = rO*(x/(kx + x)) - (qO*OT + vO);

  // Unit definitions:
  unit hour = 3600 second;
  unit first_order_rate_constant = 1 / (3600 second);
  unit nanog_ml = 1e-9 gram / (1e-3 litre);
  unit picog_ml = 1e-12 gram / (1e-3 litre);
  unit nanog_ml_hr = 1e-9 gram / (1e-3 litre * 3600 second);
  unit picog_ml_hr = 1e-12 gram / (1e-3 litre * 3600 second);
  unit time = 3600 second;
end
