// SBML level 2 version 3

model Dokos1996_SinoatrialNode()
  // This a model from the article:
  // Ion currents underlying sinoatrial node pacemaker activity: a new single cell mathematical model.
  // Dokos S, Celler B, Lovell N. J Theor Biol 1996 Aug 7;181(3):245-72 8869126 ,
  // Abstract:
  // The ionic currents underlying autorhythmicity of the mammalian sinoatrial node and their wider contribution to each phase of the action potential have been investigated in this study using a new single cell mathematical model. The new model provides a review and update of existing formulations of sinoatrial node membrane currents, derived from a wide range of electrophysiological data available in the literature. Simulations of spontaneous activity suggest that the dominant mechanism underlying pacemaker depolarisation is the inward background Na+ current, ib,Na. In contrast to previous models, the decay of the delayed rectifying K+ current, iK, was insignificant during this phase. Despite the presence of a pseudo-outward background current throughout the pacemaker range of potentials (Na-K pump+leak currents), the hyperpolarisation-activated current i(f) was not essential to pacemaker activity. A closer inspection of the current-voltage characteristics of the model revealed that the "instantaneous" time-independent current was inward for holding potentials in the pacemaker range, which rapidly became outward within 2 ms due to the inactivation of the L-type Ca2+ current, iCa,L. This suggests that reports in the literature in which the net background current is outward throughout the pacemaker range of potentials may be exaggerated. The magnitudes of the action potential overshoot and the maximum diastolic potential were determined largely by the reversal potentials of iCa,L and iK respectively. The action potential was sustained by the incomplete deactivation of iCa,L and the Na-Ca exchanger, iNaCa. Despite the incorporation of "square-root" activation by [K]o of all K+ currents, the model was unable to correctly simulate the response to elevated [K]o.
  // This model was taken from the CellML repository and automatically converted to SBML.
  // The original model was: Dokos S, Celler B, Lovell N. (1996) - version06
  // The original CellML model was created by:
  // Lloyd, Catherine, May
  // c.lloyd@aukland.ac.nz
  // The University of Auckland
  // The Bioengineering Institute
  // This model originates from BioModels Database: A Database of Annotated Published Models (http://www.ebi.ac.uk/biomodels/). It is copyright (c) 2005-2011 The BioModels.net Team.
  // To the extent possible under law, all copyright and related or neighbouring rights to this encoded model have been dedicated to the public domain worldwide. Please refer to CC0 Public Domain Dedication for more information.
  // In summary, you are entitled to use this encoded model in absolutely any manner you deem suitable, verbatim, or with modification, alone or embedded it in a larger context, redistribute it, commercially or not, in a restricted way or not..
  // To cite BioModels Database, please use: Li C, Donizelli M, Rodriguez N, Dharuri H, Endler L, Chelliah V, Li L, He E, Henry A, Stefan MI, Snoep JL, Hucka M, Le Novère N, Laibe C (2010) BioModels Database: An enhanced, curated and annotated resource for published quantitative kinetic models. BMC Syst Biol., 4:92.
  // biomodels.db:MODEL0912503622
  // isDescribedBy pubmed:8869126
  // biomodels.db:MODEL0912503622
  // isDescribedBy pubmed:8869126
  // biomodels.db:MODEL0912503622
  // biomodels.db:MODEL0912503622

  // Compartments:
  compartment Compartment = 1 litre;

  // Parameters:
  R = 8314.472 joule_per_kilomole_kelvin;
  T = 310 kelvin;
  F = 9.64853415e4 coulomb_per_mole;
  E_membrane = -64.9 millivolt;
  C = 3.2e-5 nanoF;
  i_tot has picoA;
  E_Ca has millivolt;
  E_Na has millivolt;
  E_K has millivolt;
  i_CaL has picoA;
  g_CaL = 0.4 nanoS;
  dL = 0.0001 dimensionless;
  dL_infinity has dimensionless;
  tau_dL = 0.002 second;
  E_L_type_calcium_current_d_gate has millivolt;
  time_L_type_calcium_current_d_gate has second;
  fL = 0.1505 dimensionless;
  fL_infinity has dimensionless;
  tau_fL has second;
  E_L_type_calcium_current_f_gate has millivolt;
  time_L_type_calcium_current_f_gate has second;
  fL2 = 0.219 dimensionless;
  alpha_fL2 = 3 per_second;
  beta_fL2 = 40000 per_millimolar_second;
  E_L_type_calcium_current_f2_gate has millivolt;
  Cai_L_type_calcium_current_f2_gate has millimolar;
  time_L_type_calcium_current_f2_gate has second;
  i_CaT has picoA;
  g_CaT = 0.085 nanoS;
  dT = 0.001 dimensionless;
  dT_infinity has dimensionless;
  tau_dT has second;
  E_T_type_calcium_current_d_gate has millivolt;
  time_T_type_calcium_current_d_gate has second;
  fT = 0.1328 dimensionless;
  fT_infinity has dimensionless;
  tau_fT has second;
  E_T_type_calcium_current_f_gate has millivolt;
  time_T_type_calcium_current_f_gate has second;
  i_Na has picoA;
  g_Na = 0.25 nanoS;
  m = 0.0139 dimensionless;
  alpha_m has per_second;
  beta_m has per_second;
  E_fast_sodium_current_m_gate has millivolt;
  time_fast_sodium_current_m_gate has second;
  h = 0.0087 dimensionless;
  alpha_h has per_second;
  beta_h has per_second;
  E_fast_sodium_current_h_gate has millivolt;
  time_fast_sodium_current_h_gate has second;
  i_K has picoA;
  i_KK has picoA;
  i_KNa has picoA;
  Kk = 0.00026 picoA_per_millimolar;
  P_KNa = 0.035 dimensionless;
  x = 0.5682 dimensionless;
  x_infinity has dimensionless;
  tau_x has second;
  E_delayed_rectifying_potassium_current_x_gate has millivolt;
  time_delayed_rectifying_potassium_current_x_gate has second;
  i_f has picoA;
  i_fNa has picoA;
  i_fK has picoA;
  Kmf = 10.3 millimolar;
  g_fNa = 0.0081 nanoS;
  g_fK = 0.0135 nanoS;
  y = 0.0287 dimensionless;
  alpha_y has per_second;
  beta_y has per_second;
  E_hyperpolarising_activated_current_y_gate has millivolt;
  time_hyperpolarising_activated_current_y_gate has second;
  i_p has picoA;
  KmNa = 40 millimolar;
  KmK = 1 millimolar;
  i_pmax = 0.226 picoA;
  i_NaCa has picoA;
  kNaCa = 4 picoA;
  x1 has dimensionless;
  x2 has dimensionless;
  x3 has dimensionless;
  x4 has dimensionless;
  k41 has dimensionless;
  k34 has dimensionless;
  k23 has dimensionless;
  k21 has dimensionless;
  k32 has dimensionless;
  k43 has dimensionless;
  k12 has dimensionless;
  k14 has dimensionless;
  Qci = 0.1369 dimensionless;
  Qn = 0.4315 dimensionless;
  Qco = 0 dimensionless;
  K3ni = 26.44 millimolar;
  Kci = 0.0207 millimolar;
  K1ni = 395.3 millimolar;
  K2ni = 2.289 millimolar;
  Kcni = 26.44 millimolar;
  K3no = 4.663 millimolar;
  K1no = 1628 millimolar;
  K2no = 561.4 millimolar;
  Kco = 3.663 millimolar;
  do has dimensionless;
  di has dimensionless;
  i_bNa has picoA;
  g_Nab = 0.00024 nanoS;
  i_bK has picoA;
  KbK = 7e-5 picoA_per_millimolar;
  i_up has picoA;
  i_tr has picoA;
  i_rel has picoA;
  V_rel has microlitre;
  V_up has microlitre;
  i_up_max = 0.0212 picoA;
  KmCaup = 0.0005 millimolar;
  KmCarel = 0.001 millimolar;
  tau_rel = 0.005 second;
  tau_tr = 0.4 second;
  Cai_ion_concentrations = 3.4e-5 millimolar;
  Cao = 2.0004 millimolar;
  Caup = 0.5832 millimolar;
  Carel = 0.1101 millimolar;
  Nai = 7.4994 millimolar;
  Nao = 139.9929 millimolar;
  Ki = 140.0073 millimolar;
  Ko = 5.4243 millimolar;
  V_i = 2.5e-6 microlitre;
  V_e has microlitre;
  tau_b = 0.1 second;
  Nab = 140 millimolar;
  Cab = 2 millimolar;
  Kb = 5.4 millimolar;

  // Assignment rules:
  E_Ca := R*T/(2*F)*ln(Cao/Cai_ion_concentrations);
  E_Na := R*T/F*ln(Nao/Nai);
  E_K := R*T/F*ln(Ko/Ki);
  i_CaL := g_CaL*dL*fL*fL2*(E_membrane - E_Ca + 75);
  dL_infinity := 1/(1 + exp((E_L_type_calcium_current_d_gate + 6.6)/(-6.6)));
  fL_infinity := 1/(1 + exp((E_L_type_calcium_current_f_gate + 25)/6));
  tau_fL := 0.031 + 1/(1 + exp((E_L_type_calcium_current_f_gate + 37.6)/8.1));
  i_CaT := g_CaT*dT*fT*(E_membrane - E_Ca + 75);
  dT_infinity := 1/(1 + exp((E_T_type_calcium_current_d_gate + 23)/(-6.1)));
  tau_dT := 0.0006 + 0.0054/(1 + exp(0.03*(E_T_type_calcium_current_d_gate + 100)));
  fT_infinity := 1/(1 + exp((E_T_type_calcium_current_f_gate + 75)/6.6));
  tau_fT := 0.001 + 0.04/(1 + exp(0.08*(E_T_type_calcium_current_f_gate + 65)));
  i_Na := g_Na*m^3*h*(E_membrane - E_Na);
  alpha_m := 200*(E_fast_sodium_current_m_gate + 34.3)/(1 - exp(-0.09*(E_fast_sodium_current_m_gate + 34.3)));
  beta_m := 8000*exp(-0.15*(E_fast_sodium_current_m_gate + 56.2));
  alpha_h := 32.4*exp(-0.14*(E_fast_sodium_current_h_gate + 93.4));
  beta_h := 709/(1 + 4.2*exp(-0.06*(E_fast_sodium_current_h_gate + 45.4)));
  i_KK := x*Kk*(Ko/1)^0.59*(Ki - Ko*exp(-E_membrane*F/(R*T)));
  i_KNa := x*Kk*P_KNa*(Ko/1)^0.59*(Nai - Nao*exp(-E_membrane*F/(R*T)));
  i_K := i_KK + i_KNa;
  x_infinity := 1/(1 + exp((E_delayed_rectifying_potassium_current_x_gate + 25.1)/(-7.4)));
  tau_x := 1/(17*exp(0.0398*E_delayed_rectifying_potassium_current_x_gate) + 0.211*exp(-0.051*E_delayed_rectifying_potassium_current_x_gate));
  i_fNa := y*Ko^1.83/(Ko^1.83 + Kmf^1.83)*g_fNa*(E_membrane - E_Na);
  i_fK := y*Ko^1.83/(Ko^1.83 + Kmf^1.83)*g_fK*(E_membrane - E_K);
  i_f := i_fK + i_fNa;
  alpha_y := 0.36*(E_hyperpolarising_activated_current_y_gate + 137.8)/(exp(0.066*(E_hyperpolarising_activated_current_y_gate + 137.8)) - 1);
  beta_y := 0.1*(E_hyperpolarising_activated_current_y_gate + 76.3)/(1 - exp(-0.21*(E_hyperpolarising_activated_current_y_gate + 76.3)));
  i_p := i_pmax*Nai/(Nai + KmNa)*Ko/(Ko + KmK)*(1 - ((E_membrane - 40)/211)^2);
  do := 1 + Cao/Kco + Cao/Kco*exp(Qco*E_membrane*F/(R*T)) + Nao/K1no + Nao^2/(K1no*K2no) + Nao^3/(K1no*K2no*K3no);
  k32 := exp(Qn*E_membrane*F/(2*R*T));
  k23 := (Nao^2/(K1no*K2no) + Nao^3/(K1no*K2no*K3no))*exp(-Qn*E_membrane*F/(2*R*T))/do;
  k21 := Cao/Kco*exp(-Qco*E_membrane*F/(R*T))/do;
  k34 := Nao/(K3no + Nao);
  di := 1 + Cai_ion_concentrations/Kci + Cai_ion_concentrations/Kci*exp(-Qci*E_membrane*F/(R*T)) + Cai_ion_concentrations*Nai/(Kci*Kcni) + Nai/K1ni + Nai^2/(K1ni*K2ni) + Nai^3/(K1ni*K2ni*K3ni);
  k41 := exp(-Qn*E_membrane*F/(2*R*T));
  k14 := (Nai^2/(K1ni*K2ni) + Nai^3/(K1ni*K2ni*K3ni))*exp(Qn*E_membrane*F/(2*R*T))/di;
  k12 := Cai_ion_concentrations/Kci*exp(-Qci*E_membrane*F/(R*T))/di;
  k43 := Nai/(K3ni + Nai);
  x1 := k41*k34*(k23 + k21) + k21*k32*(k43 + k41);
  x2 := k32*k43*(k14 + k12) + k41*k12*(k34 + k32);
  x3 := k14*k43*(k23 + k21) + k12*k23*(k43 + k41);
  x4 := k23*k34*(k14 + k12) + k14*k21*(k34 + k32);
  i_NaCa := kNaCa*(x2*k21 - x1*k12)/(x1 + x2 + x3 + x4);
  i_bNa := g_Nab*(E_membrane - E_Na);
  i_bK := KbK*(Ko/1)^0.41*(Ki - Ko*exp(-E_membrane*F/(R*T)));
  V_rel := 0.006*V_i;
  V_up := 0.014*V_i;
  i_up := i_up_max*Cai_ion_concentrations^2/(Cai_ion_concentrations^2 + KmCaup^2);
  i_tr := 2*1*V_rel*F/(1*tau_tr)*Caup;
  i_rel := 2*1*V_rel*F/(1*tau_rel)*Carel*Cai_ion_concentrations^2/(Cai_ion_concentrations^2 + KmCarel^2);
  V_e := 0.2*V_i;
  i_tot := i_CaL + i_CaT + i_Na + i_K + i_f + i_p + i_NaCa + i_bNa + i_bK;

  // Rate rules:
  E_membrane' = -i_tot/C;
  dL' = (dL_infinity - dL)/tau_dL;
  fL' = (fL_infinity - fL)/tau_fL;
  fL2' = alpha_fL2*(1 - fL2) - beta_fL2*Cai_L_type_calcium_current_f2_gate*fL2;
  dT' = (dT_infinity - dT)/tau_dT;
  fT' = (fT_infinity - fT)/tau_fT;
  m' = alpha_m*(1 - m) - beta_m*m;
  h' = alpha_h*(1 - h) - beta_h*h;
  x' = (x_infinity - x)/tau_x;
  y' = alpha_y*(1 - y) - beta_y*y;
  Nai' = -1*(i_bNa + i_fNa + i_Na + 3*i_p + 3*i_NaCa + i_KNa)/(F*1*V_i);
  Nao' = 1*(i_bNa + i_fNa + i_Na + 3*i_p + 3*i_NaCa + i_KNa)/(F*1*V_e) + (Nab - Nao)/tau_b;
  Ki' = -1*(i_KK + i_fK - 2*i_p + i_bK)/(F*1*V_i);
  Ko' = 1*(i_KK + i_fK - 2*i_p + i_bK)/(F*1*V_e) + (Kb - Ko)/tau_b;
  Cai_ion_concentrations' = -1*(i_CaL + i_CaT - 2*i_NaCa + i_up + (-i_rel))/(2*F*1*V_i);
  Cao' = 1*(i_CaL + i_CaT - 2*i_NaCa)/(2*F*1*V_e) + (Cab - Cao)/tau_b;
  Caup' = 1*(i_up - i_tr)/(2*1*V_up*F);
  Carel' = 1*(i_tr - i_rel)/(2*1*V_rel*F);

  // Unit definitions:
  unit per_second = 1 / second;
  unit per_millimolar_second = litre / (second * 1e-3 mole);
  unit millivolt = 1e-3 volt;
  unit per_millivolt = 1 / (1e-3 volt);
  unit per_millivolt_second = 1 / (1e-3 volt * second);
  unit nanoS = 1e-9 siemens;
  unit nanoF = 1e-9 farad;
  unit picoA_per_millimolar = 1e-12 ampere * litre / (1e-3 mole);
  unit picoA = 1e-12 ampere;
  unit millimolar = 1e-3 mole / litre;
  unit joule_per_kilomole_kelvin = joule / (1000 mole * kelvin);
  unit coulomb_per_mole = coulomb / mole;
  unit microlitre = 1e-6 litre;
end
