// SBML level 2 version 3

model DiFrancesco1985_CardiacElectricalActivity()
  // This a model from the article:
  // A model of cardiac electrical activity incorporating ionic pumps and concentration changes.
  // DiFrancesco D, Noble D. Philos Trans R Soc Lond B Biol Sci 1985 Jan 10;307(1133):353-98 2578676 ,
  // Abstract:
  // No abstract available
  // This model was taken from the CellML repository and automatically converted to SBML.
  // The original model was: DiFrancesco D, Noble D. (1985) - version06
  // The original CellML model was created by:
  // Noble, Penny, J
  // penny.noble@dpag.ox.ac.uk
  // Oxford University
  // Department of Physiology, Anatomy & Genetics
  // This model originates from BioModels Database: A Database of Annotated Published Models (http://www.ebi.ac.uk/biomodels/). It is copyright (c) 2005-2011 The BioModels.net Team.
  // To the extent possible under law, all copyright and related or neighbouring rights to this encoded model have been dedicated to the public domain worldwide. Please refer to CC0 Public Domain Dedication for more information.
  // In summary, you are entitled to use this encoded model in absolutely any manner you deem suitable, verbatim, or with modification, alone or embedded it in a larger context, redistribute it, commercially or not, in a restricted way or not..
  // To cite BioModels Database, please use: Li C, Donizelli M, Rodriguez N, Dharuri H, Endler L, Chelliah V, Li L, He E, Henry A, Stefan MI, Snoep JL, Hucka M, Le Novère N, Laibe C (2010) BioModels Database: An enhanced, curated and annotated resource for published quantitative kinetic models. BMC Syst Biol., 4:92.
  // biomodels.db:MODEL0912768548
  // isDescribedBy pubmed:2578676
  // biomodels.db:MODEL0912768548
  // isDescribedBy pubmed:2578676
  // biomodels.db:MODEL0912768548
  // biomodels.db:MODEL0912768548

  // Compartments:
  compartment Compartment = 1 litre;

  // Parameters:
  V_membrane = -87 millivolt;
  R = 8314.472 joule_per_kilomole_kelvin;
  T = 310 kelvin;
  F = 9.64853415e4 coulomb_per_mole;
  RTONF has millivolt;
  C = 0.075 microF;
  i_pulse = 0 nanoA;
  i_f has nanoA;
  i_fNa has nanoA;
  E_Na has millivolt;
  E_K has millivolt;
  i_fK has nanoA;
  g_f_Na = 3 microS;
  g_f_K = 3 microS;
  Km_f = 45 millimolar;
  y = 0.2 dimensionless;
  alpha_y has per_second;
  beta_y has per_second;
  V_hyperpolarising_activated_current_y_gate has millivolt;
  time_hyperpolarising_activated_current_y_gate has second;
  delta_y = 1e-5 millivolt;
  E0_y has millivolt;
  i_K has nanoA;
  I_K has nanoA;
  i_K_max = 180 nanoA;
  x = 0.01 dimensionless;
  alpha_x has per_second;
  beta_x has per_second;
  time_time_dependent_potassium_current_x_gate has second;
  V_time_dependent_potassium_current_x_gate has millivolt;
  i_K1 has nanoA;
  g_K1 = 920 microS;
  Km_K1 = 210 millimolar;
  i_to has nanoA;
  Km_to = 10 millimolar;
  Km_Ca = 0.0005 millimolar;
  g_to = 0.28 microS_per_millimolar;
  s = 1 dimensionless;
  alpha_s has per_second;
  beta_s has per_second;
  V_transient_outward_current_s_gate has millivolt;
  time_transient_outward_current_s_gate has second;
  i_Na_b has nanoA;
  g_Nab = 0.18 microS;
  i_Ca_b has nanoA;
  E_Ca has millivolt;
  g_Cab = 0.02 microS;
  i_p has nanoA;
  I_p = 125 nanoA;
  K_mK = 1 millimolar;
  K_mNa = 40 millimolar;
  i_NaCa has nanoA;
  n_NaCa = 3 dimensionless;
  K_NaCa = 0.02 nanoA;
  d_NaCa = 0.001 dimensionless;
  gamma = 0.5 dimensionless;
  i_Na has nanoA;
  g_Na = 750 microS;
  E_mh has millivolt;
  m = 0.01 dimensionless;
  alpha_m has per_second;
  beta_m has per_second;
  V_fast_sodium_current_m_gate has millivolt;
  time_fast_sodium_current_m_gate has second;
  delta_m = 1e-5 millivolt;
  E0_m has millivolt;
  h = 0.8 dimensionless;
  alpha_h has per_second;
  beta_h has per_second;
  V_fast_sodium_current_h_gate has millivolt;
  time_fast_sodium_current_h_gate has second;
  i_si has nanoA;
  i_siCa has nanoA;
  i_siK has nanoA;
  i_siNa has nanoA;
  P_si = 15 nanoA_per_millimolar;
  d = 0.005 dimensionless;
  alpha_d has per_second;
  beta_d has per_second;
  V_second_inward_current_d_gate has millivolt;
  time_second_inward_current_d_gate has second;
  delta_d = 0.0001 millivolt;
  E0_d has millivolt;
  f = 1 dimensionless;
  alpha_f has per_second;
  beta_f has per_second;
  V_second_inward_current_f_gate has millivolt;
  time_second_inward_current_f_gate has second;
  delta_f = 0.0001 millivolt;
  E0_f has millivolt;
  f2 = 1 dimensionless;
  alpha_f2 = 5 per_second;
  beta_f2 has per_second;
  K_mf2 = 0.001 millimolar;
  V_second_inward_current_f2_gate has millivolt;
  time_second_inward_current_f2_gate has second;
  Cai_second_inward_current_f2_gate has millimolar;
  Nao = 140 millimolar;
  Nai = 8 millimolar;
  radius = 0.05 micrometre;
  length = 2 micrometre;
  V_e_ratio = 0.1 dimensionless;
  V_Cell has micrometre3;
  Vi has micrometre3;
  Cao = 2 millimolar;
  Cai_intracellular_calcium_concentration = 5e-5 millimolar;
  V_up has micrometre3;
  V_rel has micrometre3;
  i_up has nanoA;
  i_tr has nanoA;
  i_rel has nanoA;
  Ca_up = 2 millimolar;
  Ca_rel = 1 millimolar;
  Ca_up_max = 5 millimolar;
  K_mCa = 0.001 millimolar;
  p = 1 dimensionless;
  alpha_p has per_second;
  beta_p has per_second;
  tau_up = 0.025 second;
  tau_rep = 2 second;
  tau_rel = 0.05 second;
  rCa = 2 dimensionless;
  Kc = 4 millimolar;
  Ve = 0.00157 micrometre3;
  Kb = 4 millimolar;
  i_mK has nanoA;
  pf = 0.7 per_second;
  Ki = 140 millimolar;

  // Assignment rules:
  RTONF := R*T/F;
  E_Na := RTONF*ln(Nao/Nai);
  E_K := RTONF*ln(Kc/Ki);
  i_fNa := y*Kc/(Kc + Km_f)*g_f_Na*(V_membrane - E_Na);
  i_fK := y*Kc/(Kc + Km_f)*g_f_K*(V_membrane - E_K);
  i_f := i_fNa + i_fK;
  alpha_y := 0.05*exp(-0.067*(V_hyperpolarising_activated_current_y_gate + 52 - 10));
  E0_y := V_hyperpolarising_activated_current_y_gate + 52 - 10;
  beta_y := piecewise(2.5, abs(E0_y) < delta_y, 1*E0_y/(1 - exp(-0.2*E0_y)));
  I_K := i_K_max*(Ki - Kc*exp(-V_membrane/RTONF))/140;
  i_K := x*I_K;
  alpha_x := 0.5*exp(0.0826*(V_time_dependent_potassium_current_x_gate + 50))/(1 + exp(0.057*(V_time_dependent_potassium_current_x_gate + 50)));
  beta_x := 1.3*exp(-0.06*(V_time_dependent_potassium_current_x_gate + 20))/(1 + exp(-0.04*(V_time_dependent_potassium_current_x_gate + 20)));
  i_K1 := g_K1*Kc/(Kc + Km_K1)*(V_membrane - E_K)/(1 + exp((V_membrane + 10 - E_K)*2/RTONF));
  i_to := s*g_to*(0.2 + Kc/(Km_to + Kc))*Cai_intracellular_calcium_concentration/(Km_Ca + Cai_intracellular_calcium_concentration)*(V_membrane + 10)/(1 - exp(-0.2*(V_membrane + 10)))*(Ki*exp(0.5*V_membrane/RTONF) - Kc*exp(-0.5*V_membrane/RTONF));
  alpha_s := 0.033*exp(-V_transient_outward_current_s_gate/17);
  beta_s := 33/(1 + exp(-(V_transient_outward_current_s_gate + 10)/8));
  i_Na_b := g_Nab*(V_membrane - E_Na);
  E_Ca := 0.5*RTONF*ln(Cao/Cai_intracellular_calcium_concentration);
  i_Ca_b := g_Cab*(V_membrane - E_Ca);
  i_p := I_p*Kc/(K_mK + Kc)*Nai/(K_mNa + Nai);
  i_NaCa := K_NaCa*(exp(gamma*(n_NaCa - 2)*V_membrane/RTONF)*Nai^n_NaCa*Cao - exp((gamma - 1)*(n_NaCa - 2)*V_membrane/RTONF)*Nao^n_NaCa*Cai_intracellular_calcium_concentration)/((1 + d_NaCa*(Cai_intracellular_calcium_concentration*Nao^n_NaCa + Cao*Nai^n_NaCa))*(1 + Cai_intracellular_calcium_concentration/0.0069));
  E_mh := RTONF*ln((Nao + 0.12*Kc)/(Nai + 0.12*Ki));
  i_Na := g_Na*m^3*h*(V_membrane - E_mh);
  E0_m := V_fast_sodium_current_m_gate + 41;
  alpha_m := piecewise(2000, abs(E0_m) < delta_m, 200*E0_m/(1 - exp(-0.1*E0_m)));
  beta_m := 8000*exp(-0.056*(V_fast_sodium_current_m_gate + 66));
  alpha_h := 20*exp(-0.125*(V_fast_sodium_current_h_gate + 75));
  beta_h := 2000/(320*exp(-0.1*(V_fast_sodium_current_h_gate + 75)) + 1);
  i_siCa := 4*P_si*(V_membrane - 50)/(RTONF*(1 - exp(-1*(V_membrane - 50)*2/RTONF)))*(Cai_intracellular_calcium_concentration*exp(100/RTONF) - Cao*exp(-2*(V_membrane - 50)/RTONF))*d*f*f2;
  i_siK := 0.01*P_si*(V_membrane - 50)/(RTONF*(1 - exp(-1*(V_membrane - 50)/RTONF)))*(Ki*exp(50/RTONF) - Kc*exp(-1*(V_membrane - 50)/RTONF))*d*f*f2;
  i_siNa := 0.01*P_si*(V_membrane - 50)/(RTONF*(1 - exp(-1*(V_membrane - 50)/RTONF)))*(Nai*exp(50/RTONF) - Nao*exp(-1*(V_membrane - 50)/RTONF))*d*f*f2;
  i_si := i_siCa + i_siK + i_siNa;
  E0_d := V_second_inward_current_d_gate + 24 - 5;
  alpha_d := piecewise(120, abs(E0_d) < delta_d, 30*E0_d/(1 - exp(-1*E0_d/4)));
  beta_d := piecewise(120, abs(E0_d) < delta_d, 12*E0_d/(exp(E0_d/10) - 1));
  E0_f := V_second_inward_current_f_gate + 34;
  alpha_f := piecewise(25, abs(E0_f) < delta_f, 6.25*E0_f/(exp(E0_f/4) - 1));
  beta_f := 50/(1 + exp(-1*(V_second_inward_current_f_gate + 34)/4));
  beta_f2 := Cai_second_inward_current_f2_gate*alpha_f2/K_mf2;
  V_Cell := 3.141593*radius^2*length;
  Vi := V_Cell*(1 - V_e_ratio);
  i_up := 2*1*Vi*F/(1*tau_up*Ca_up_max)*Cai_intracellular_calcium_concentration*(Ca_up_max - Ca_up);
  i_tr := 2*1*V_rel*F/(1*tau_rep)*p*(Ca_up - Ca_rel);
  alpha_p := 0.625*(V_membrane + 34)/(exp((V_membrane + 34)/4) - 1);
  beta_p := 5/(1 + exp(-1*(V_membrane + 34)/4));
  i_rel := 2*1*V_rel*F/(1*tau_rel)*Ca_rel*Cai_intracellular_calcium_concentration^rCa/(Cai_intracellular_calcium_concentration^rCa + K_mCa^rCa);
  V_up := Vi*0.05;
  V_rel := Vi*0.02;
  i_mK := i_K1 + i_K + i_fK + i_siK + i_to - 2*i_p;

  // Rate rules:
  V_membrane' = -(i_f + i_K + i_K1 + i_to + i_Na_b + i_Ca_b + i_p + i_NaCa + i_Na + i_si + i_pulse)/C;
  y' = alpha_y*(1 - y) - beta_y*y;
  x' = alpha_x*(1 - x) - beta_x*x;
  s' = alpha_s*(1 - s) - beta_s*s;
  m' = alpha_m*(1 - m) - beta_m*m;
  h' = alpha_h*(1 - h) - beta_h*h;
  d' = alpha_d*(1 - d) - beta_d*d;
  f' = alpha_f*(1 - f) - beta_f*f;
  f2' = alpha_f2 - f2*(alpha_f2 + beta_f2);
  Nai' = -1*(i_Na + i_Na_b + i_fNa + i_siNa + i_p*3 + i_NaCa*n_NaCa/(n_NaCa - 2))/(1*Vi*F);
  p' = alpha_p*(1 - p) - beta_p*p;
  Ca_up' = 1*(i_up - i_tr)/(2*1*V_up*F);
  Ca_rel' = 1*(i_tr - i_rel)/(2*1*V_rel*F);
  Cai_intracellular_calcium_concentration' = -1*(i_siCa + i_Ca_b - 2*i_NaCa/(n_NaCa - 2) - i_rel + i_up)/(2*1*Vi*F);
  Kc' = -pf*(Kc - Kb) + 1*i_mK/(1*Ve*F);
  Ki' = -1*i_mK/(1*Vi*F);

  // Unit definitions:
  unit per_second = 1 / second;
  unit millivolt = 1e-3 volt;
  unit per_millivolt = 1 / (1e-3 volt);
  unit per_millivolt_second = 1 / (1e-3 volt * second);
  unit millivolt_second = 1e-3 volt * second;
  unit microS = 1e-6 siemens;
  unit microF = 1e-6 farad;
  unit nanoA = 1e-9 ampere;
  unit millimolar = 1e-3 mole / litre;
  unit millimolar4 = (1e-3 mole)^4 / litre^4;
  unit nanoA_per_millimolar = 1e-9 ampere * litre / (1e-3 mole);
  unit microS_per_millimolar = 1e-6 siemens * litre / (1e-3 mole);
  unit joule_per_kilomole_kelvin = joule / (1000 mole * kelvin);
  unit coulomb_per_mole = coulomb / mole;
  unit micrometre = 1e-6 metre;
  unit micrometre3 = (1e-6 metre)^3;
  unit litre_micrometre3 = litre / (1e-6 metre)^3;
end
