// SBML level 2 version 3

model Dempsher1984_ACTH_CortisolSecretion()
  // This a model from the article:
  // A mechanistic model of ACTH-stimulated cortisol secretion.
  // Dempsher DP, Gann DS, Phair RD. Am J Physiol 1984 Apr;246(4 Pt 2):R587-96 6326602 ,
  // Abstract:
  // Adrenal secretory rates of cortisol and arterial concentrations of adrenocorticotropin (ACTH) were measured in conscious trained dogs subjected to intravenous infusion of ACTH. To investigate the causal relation of ACTH to the secretion of cortisol, a mechanistic mathematical model based on current hypotheses of adrenocortical function was constructed and tested. It is widely believed that ACTH stimulates cortisol secretion through adenosine 3',5'-cyclic monophosphate (cAMP), which provides substrate cholesterol by activating cholesterol ester hydrolase and facilitating transport of cholesterol to the side-chain cleavage enzyme. In addition, cholesterol modulates its own synthesis by inhibiting beta-hydroxy-beta-methylglutaryl (HMG)-CoA reductase in the adrenocortical cell. These and other steps in the biosynthetic reaction sequence were described using differential equations subject to the additional constraints imposed by available measurements of intracellular quantities. The resulting model is consistent with many of the known characteristics of the canine adrenal response to ACTH. In this model, steady-state nonlinearities arise from cooperative binding of cAMP to its receptor protein and saturation of mitochondrial pregnenolone transport. The transient response is dominated by a depletable pool of intracellular free cholesterol. Other inferences based on the model are presented, and a quantifiable cellular basis for increased adrenal sensitivity to ACTH is proposed.
  // This model was taken from the CellML repository and automatically converted to SBML.
  // The original model was: Dempsher DP, Gann DS, Phair RD. (1984) - version03
  // The original CellML model was created by:
  // Lloyd, Catherine, May
  // c.lloyd@aukland.ac.nz
  // The University of Auckland
  // The Bioengineering Institute
  // This model originates from BioModels Database: A Database of Annotated Published Models (http://www.ebi.ac.uk/biomodels/). It is copyright (c) 2005-2011 The BioModels.net Team.
  // To the extent possible under law, all copyright and related or neighbouring rights to this encoded model have been dedicated to the public domain worldwide. Please refer to CC0 Public Domain Dedication for more information.
  // In summary, you are entitled to use this encoded model in absolutely any manner you deem suitable, verbatim, or with modification, alone or embedded it in a larger context, redistribute it, commercially or not, in a restricted way or not..
  // To cite BioModels Database, please use: Li C, Donizelli M, Rodriguez N, Dharuri H, Endler L, Chelliah V, Li L, He E, Henry A, Stefan MI, Snoep JL, Hucka M, Le Novère N, Laibe C (2010) BioModels Database: An enhanced, curated and annotated resource for published quantitative kinetic models. BMC Syst Biol., 4:92.
  // biomodels.db:MODEL0912835813
  // isDescribedBy pubmed:6326602
  // biomodels.db:MODEL0912835813
  // isDescribedBy pubmed:6326602
  // biomodels.db:MODEL0912835813
  // biomodels.db:MODEL0912835813

  // Compartments:
  compartment Compartment = 1 litre;

  // Parameters:
  cAMP = 0.95 nmol_g;
  Ko = 0.013 dimensionless;
  Ka = 0.01 per_nanomolar;
  Kb = 1000 per_nanomolar;
  Kdsm = 10 nmol_g;
  Vmsm = 6 flux;
  Vdsm = 10 flux;
  ACTH has picomolar;
  IS has nmol_g;
  Crpt = 3 nmol_g;
  K = 80 dimensionless;
  Kd = 2.11 nmol_g;
  n = 4 dimensionless;
  V = 11.3 flux;
  P = 0.052 minute_2;
  Q = 0.042 first_order_rate_constant;
  W = 10 flux;
  T = 8 nmol2_min2_g2;
  U = 0.0015 first_order_rate_constant;
  CHOC = 532 nmol_g;
  CHOM = 11.3 nmol_g;
  CHOL = 3000 nmol_g;
  Kmtr = 0.446 first_order_rate_constant;
  C = 6.25 g_nmol_min2;
  D = 125 first_order_rate_constant;
  Kfor = 0.37 first_order_rate_constant;
  R = 3 g_nmol_min2;
  S = 76 first_order_rate_constant;
  CHON = 3.03 nmol_g;
  PREG = 6.56 nmol_g;
  PRO = 0.64 nmol_g;
  HA = 0.5 dimensionless;
  HYPR = 0.64 nmol_g;
  CORT = 5.2 nmol_g;
  LH = 0.724 first_order_rate_constant;
  LH_CORT has flux;
  Lmtr = 1.65 first_order_rate_constant;
  Kbac = 10 first_order_rate_constant;
  Kcb = 0.01 first_order_rate_constant;
  Kcf = 0.00033 first_order_rate_constant;
  Vm = 1890 flux;
  Km = 270 nmol_g;
  Vmptr = 500 flux;
  Kmptr = 150 nmol_g;
  AH = 16.4 first_order_rate_constant;
  HY = 16.4 first_order_rate_constant;

  // Assignment rules:
  ACTH := piecewise(12, (time >= 0) && (time < 10), 16, (time >= 10) && (time < 20), 12, (time >= 20) && (time < 35), 16, (time >= 35) && (time < 45), 12);
  IS := K*Crpt*cAMP^n/(Kd^n + cAMP^n);
  LH_CORT := LH*CORT;

  // Rate rules:
  cAMP' = Vmsm*Ko*(1 + Kb*ACTH)/(1 + Ka*ACTH + Ko*(1 + Kb*ACTH)) - Vdsm*cAMP/(Kdsm + cAMP);
  V' = P*IS - Q*V;
  W' = T/CHOC - 1*W*U;
  CHOC' = V + W + Lmtr*CHOM - Kmtr*CHOC;
  CHOM' = Kmtr*CHOC + Kbac*CHON + Kcf*CHOL - (Lmtr*CHOM + Kcb*CHOM + Kfor*CHOM);
  CHOL' = Kcb*CHOM - Kcf*CHOL;
  Kmtr' = C*IS - D*Kmtr;
  Kfor' = R*IS - S*Kfor;
  CHON' = Kfor*CHOM - (Kbac*CHON + Vm*(CHON/(Km + CHON)));
  PREG' = Vm*CHON/(Km + CHON) - Vmptr*PREG/(Kmptr + PREG);
  PRO' = HA*Vmptr*(PREG/(Kmptr + PREG)) - AH*PRO;
  HYPR' = AH*PRO - HY*HYPR;
  CORT' = HY*HYPR - LH*CORT;

  // Unit definitions:
  unit nanomole = 1e-9 mole;
  unit nanomolar = 1e-9 mole / litre;
  unit per_nanomolar = litre / (1e-9 mole);
  unit picomolar = 1e-12 mole / litre;
  unit minute = 60 second;
  unit hour = 3600 second;
  unit nmol_g = 1e-9 mole / gram;
  unit flux = 1e-9 mole / (60 second * gram);
  unit first_order_rate_constant = 1 / (60 second);
  unit minute_2 = 1 / (60 second)^2;
  unit nmol2_min2_g2 = (1e-9 mole)^2 / ((60 second)^2 * gram^2);
  unit g_nmol_min2 = gram / (1e-9 mole * (60 second)^2);
  unit time = 60 second;
end
