// SBML level 2 version 3

model Demir1994_SinoatrialNode()
  // This a model from the article:
  // A mathematical model of a rabbit sinoatrial node cell.
  // Demir SS, Clark JW, Murphey CR, Giles WR. Am J Physiol 1994 Mar;266(3 Pt 1):C832-52 8166247 ,
  // Abstract:
  // A mathematical model for the electrophysiological responses of a rabbit sinoatrial node cell that is based on whole cell recordings from enzymatically isolated single pacemaker cells at 37 degrees C has been developed. The ion channels, Na(+)-K+ and Ca2+ pumps, and Na(+)-Ca2+ exchanger in the surface membrane (sarcolemma) are described using equations for these known currents in mammalian pacemaker cells. The extracellular environment is treated as a diffusion-limited space, and the myoplasm contains Ca(2+)-binding proteins (calmodulin and troponin). Original features of this model include 1) new equations for the hyperpolarization-activated inward current, 2) assessment of the role of the transient-type Ca2+ current during pacemaker depolarization, 3) inclusion of an Na+ current based on recent experimental data, and 4) demonstration of the possible influence of pump and exchanger currents and background currents on the pacemaker rate. This model provides acceptable fits to voltage-clamp and action potential data and can be used to seek biophysically based explanations of the electrophysiological activity in the rabbit sinoatrial node cell.
  // This model was taken from the CellML repository and automatically converted to SBML.
  // The original model was: Demir SS, Clark JW, Murphey CR, Giles WR. (1994) - version01
  // The original CellML model was created by:
  // Lloyd, Catherine, May
  // c.lloyd@aukland.ac.nz
  // The University of Auckland
  // The Bioengineering Institute
  // This model originates from BioModels Database: A Database of Annotated Published Models (http://www.ebi.ac.uk/biomodels/). It is copyright (c) 2005-2011 The BioModels.net Team.
  // To the extent possible under law, all copyright and related or neighbouring rights to this encoded model have been dedicated to the public domain worldwide. Please refer to CC0 Public Domain Dedication for more information.
  // In summary, you are entitled to use this encoded model in absolutely any manner you deem suitable, verbatim, or with modification, alone or embedded it in a larger context, redistribute it, commercially or not, in a restricted way or not..
  // To cite BioModels Database, please use: Li C, Donizelli M, Rodriguez N, Dharuri H, Endler L, Chelliah V, Li L, He E, Henry A, Stefan MI, Snoep JL, Hucka M, Le Novère N, Laibe C (2010) BioModels Database: An enhanced, curated and annotated resource for published quantitative kinetic models. BMC Syst Biol., 4:92.
  // biomodels.db:MODEL0912887467
  // isDescribedBy pubmed:8166247
  // biomodels.db:MODEL0912887467
  // isDescribedBy pubmed:8166247
  // biomodels.db:MODEL0912887467
  // biomodels.db:MODEL0912887467

  // Compartments:
  compartment Compartment = 1 litre;

  // Parameters:
  V_membrane = -49.54105 millivolt;
  R = 8314.472 joule_per_kilomole_kelvin;
  T = 310 kelvin;
  F = 9.64853415e4 coulomb_per_mole;
  Cm = 5.5e-5 microF;
  i_Na has picoA;
  P_Na = 0.00344 ml_per_second;
  m = 0.250113 dimensionless;
  m_infinity has dimensionless;
  tau_m has second;
  alpha_m has per_second;
  beta_m has per_second;
  V_sodium_current_m_gate has millivolt;
  time_sodium_current_m_gate has second;
  h1 = 0.001386897 dimensionless;
  h2 = 0.002065463 dimensionless;
  h1_infinity has dimensionless;
  h2_infinity has dimensionless;
  tau_h1 has second;
  tau_h2 has second;
  alpha_h1 has per_second;
  beta_h1 has per_second;
  V_sodium_current_h_gate has millivolt;
  time_sodium_current_h_gate has second;
  i_Ca_L has picoA;
  g_Ca_L = 0.02115 microS;
  E_Ca_L = 46.4 millivolt;
  d_L = 0.002572773 dimensionless;
  d_L_infinity has dimensionless;
  alpha_d_L has per_second;
  beta_d_L has per_second;
  tau_d_L has second;
  V_L_type_Ca_channel_d_gate has millivolt;
  time_L_type_Ca_channel_d_gate has second;
  f_L = 0.98651 dimensionless;
  alpha_f_L has per_second;
  beta_f_L has per_second;
  f_L_infinity has dimensionless;
  tau_f_L has second;
  V_L_type_Ca_channel_f_gate has millivolt;
  time_L_type_Ca_channel_f_gate has second;
  i_Ca_T has picoA;
  g_Ca_T = 0.02521 microS;
  E_Ca_T = 45 millivolt;
  d_T = 0.02012114 dimensionless;
  alpha_d_T has per_second;
  beta_d_T has per_second;
  d_T_infinity has dimensionless;
  tau_d_T has second;
  V_T_type_Ca_channel_d_gate has millivolt;
  time_T_type_Ca_channel_d_gate has second;
  f_T = 0.1945111 dimensionless;
  alpha_f_T has per_second;
  beta_f_T has per_second;
  f_T_infinity has dimensionless;
  tau_f_T has second;
  V_T_type_Ca_channel_f_gate has millivolt;
  time_T_type_Ca_channel_f_gate has second;
  i_K has picoA;
  g_K has microS;
  P_a = 0.02302278 dimensionless;
  tau_P_a has second;
  P_a_infinity has dimensionless;
  V_delayed_rectifying_potassium_current_P_a_gate has millivolt;
  time_delayed_rectifying_potassium_current_P_a_gate has second;
  P_i = 0.3777728 dimensionless;
  alpha_P_i has per_second;
  beta_P_i has per_second;
  V_delayed_rectifying_potassium_current_P_i_gate has millivolt;
  time_delayed_rectifying_potassium_current_P_i_gate has second;
  i_B has picoA;
  i_B_Na has picoA;
  i_B_Ca has picoA;
  i_B_K has picoA;
  g_B_Na = 0.00016 microS;
  g_B_Ca = 3.64e-5 microS;
  g_B_K = 6.94e-5 microS;
  i_f has picoA;
  i_f_Na has picoA;
  i_f_K has picoA;
  g_f_Na = 0.0067478 microS;
  g_f_K = 0.0128821 microS;
  y = 0.09227776 dimensionless;
  y_infinity has dimensionless;
  tau_y has second;
  V_hyperpolarisation_activated_current_y_gate has millivolt;
  time_hyperpolarisation_activated_current_y_gate has second;
  i_NaK has picoA;
  K_m_Na = 5.46 millimolar;
  K_m_K = 0.621 millimolar;
  i_NaK_max = 0.2192 nanoA;
  i_Ca_P has picoA;
  i_Ca_P_max = 0.02869 nanoA;
  i_NaCa has picoA;
  K_NaCa = 1.248e-5 nanoA_per_nanomolar_4;
  d_NaCa = 0.0001 millimolar_4;
  gamma = 0.5 dimensionless;
  Na_i = 9.701621 millimolar;
  Ca_i = 0.0003787018 millimolar;
  K_i = 140.7347 millimolar;
  Ca_Calmod = 0.1411678 millimolar;
  Ca_Trop = 0.07331396 millimolar;
  Ca_Mg_Trop = 0.7618549 millimolar;
  Mg_Mg_Trop = 0.2097049 millimolar;
  phi_C has dimensionless;
  phi_TC has dimensionless;
  phi_TMgC has dimensionless;
  phi_TMgM has dimensionless;
  phi_B has dimensionless;
  Mg_i = 2.5 millimolar;
  F_C has dimensionless;
  F_TC has dimensionless;
  F_TMgC has dimensionless;
  V_i has mm_cubed;
  Na_c = 139.9988 millimolar;
  Ca_c = 2.00474 millimolar;
  K_c = 5.389014 millimolar;
  K_b = 5.4 millimolar;
  Na_b = 140 millimolar;
  Ca_b = 2 millimolar;
  Vol = 3.497e-6 mm_cubed;
  V_c has mm_cubed;
  tau_p = 0.01 second;
  i_rel has picoA;
  i_up has picoA;
  Ca_up = 16.95311 millimolar;
  alpha_up = 0.08 nanoA;
  beta_up = 0.072 nanoA;
  Ca_rel = 16.85024 millimolar;
  alpha_rel = 0.5 nanoA_per_millimolar;
  i_tr has picoA;
  K1 has millimolar;
  K2 has millimolar;
  k_cyca = 5e-5 millimolar;
  k_xcs = 0.9 millimolar;
  k_SRCa = 22 millimolar;
  k_rel = 0.004 millimolar;
  r_act has per_second;
  r_inact has per_second;
  Ca_Calse = 0.9528726 millimolar;
  phi_Calse has millimolar;
  F1 = 0.1133251 dimensionless;
  F2 = 0.0007594214 dimensionless;
  F3 = 0.8859153 dimensionless;
  V_up has mm_cubed;
  V_rel has mm_cubed;
  E_Na has millivolt;
  E_K has millivolt;
  E_Ca has millivolt;

  // Assignment rules:
  i_Na := P_Na*m^3*h1*h2*Na_c*V_membrane*F^2/(R*T)*(exp((V_membrane - E_Na)*F/(R*T)) - 1)/(exp(V_membrane*F/(R*T)) - 1);
  alpha_m := -824*(V_sodium_current_m_gate + 51.9)/(exp((V_sodium_current_m_gate + 51.9)/(-8.9)) - 1);
  beta_m := 32960*exp((V_sodium_current_m_gate + 51.9)/(-8.9));
  m_infinity := alpha_m/(alpha_m + beta_m);
  tau_m := 1/(alpha_m + beta_m) + 1.5e-5;
  alpha_h1 := 165*exp((V_sodium_current_h_gate + 101.3)/(-12.6));
  beta_h1 := 12360/(320*exp((V_sodium_current_h_gate + 101.3)/(-12.6)) + 1);
  h1_infinity := alpha_h1/(alpha_h1 + beta_h1);
  tau_h1 := 1/(alpha_h1 + beta_h1);
  h2_infinity := h1_infinity;
  tau_h2 := 20*tau_h1;
  i_Ca_L := g_Ca_L*(f_L*d_L + 0.095*d_L_infinity)*(V_membrane - E_Ca_L);
  alpha_d_L := -28.39*(V_L_type_Ca_channel_d_gate + 35)/(exp((V_L_type_Ca_channel_d_gate + 35)/(-2.5)) - 1) + (-84.9*V_L_type_Ca_channel_d_gate/(exp(-0.208*V_L_type_Ca_channel_d_gate) - 1));
  beta_d_L := 11.43*(V_L_type_Ca_channel_d_gate - 5)/(exp(0.4*(V_L_type_Ca_channel_d_gate - 5)) - 1);
  tau_d_L := 1/(alpha_d_L + beta_d_L);
  d_L_infinity := 1/(1 + exp((V_L_type_Ca_channel_d_gate + 14.1)/(-6)));
  alpha_f_L := 3.75*(V_L_type_Ca_channel_f_gate + 28)/(exp((V_L_type_Ca_channel_f_gate + 28)/4) - 1);
  beta_f_L := 30/(1 + exp((V_L_type_Ca_channel_f_gate + 28)/(-4)));
  tau_f_L := 1/(alpha_f_L + beta_f_L);
  f_L_infinity := 1/(1 + exp((V_L_type_Ca_channel_f_gate + 30)/5));
  i_Ca_T := g_Ca_T*d_T*f_T*(V_membrane - E_Ca_T);
  alpha_d_T := 1068*exp((V_T_type_Ca_channel_d_gate + 26.3)/30);
  beta_d_T := 1068*exp((V_T_type_Ca_channel_d_gate + 26.3)/(-30));
  tau_d_T := 1/(alpha_d_T + beta_d_T);
  d_T_infinity := 1/(1 + exp((V_T_type_Ca_channel_d_gate + 26.3)/(-6)));
  alpha_f_T := 15.3*exp((V_T_type_Ca_channel_f_gate + 61.7)/(-83.3));
  beta_f_T := 15*exp((V_T_type_Ca_channel_f_gate + 61.7)/15.38);
  tau_f_T := 1/(alpha_f_T + beta_f_T);
  f_T_infinity := 1/(1 + exp((V_T_type_Ca_channel_f_gate + 61.7)/5.6));
  g_K := 0.00693*(K_b/1)^0.59;
  i_K := g_K*P_a*P_i*(V_membrane - E_K);
  P_a_infinity := 1/(1 + exp((V_delayed_rectifying_potassium_current_P_a_gate + 5.1)/(-7.4)));
  tau_P_a := 1/(17*exp(0.0398*V_delayed_rectifying_potassium_current_P_a_gate) + 2.11*exp(-0.051*V_delayed_rectifying_potassium_current_P_a_gate));
  alpha_P_i := 100*exp(-0.0183*V_delayed_rectifying_potassium_current_P_i_gate);
  beta_P_i := 656*exp(0.00942*V_delayed_rectifying_potassium_current_P_i_gate);
  i_B_Na := g_B_Na*(V_membrane - E_Na);
  i_B_Ca := g_B_Ca*(V_membrane - E_Ca);
  i_B_K := g_B_K*(V_membrane - E_K);
  i_B := i_B_Na + i_B_Ca + i_B_K;
  i_f_Na := g_f_Na*y^2*(V_membrane - 75);
  i_f_K := g_f_K*y^2*(V_membrane + 85);
  i_f := i_f_Na + i_f_K;
  y_infinity := 1/(1 + exp((V_hyperpolarisation_activated_current_y_gate + 72.2)/9));
  tau_y := 1/(1.6483*exp((V_hyperpolarisation_activated_current_y_gate + 54.06)/(-24.33)) + 14.01055/(0.7 + exp((V_hyperpolarisation_activated_current_y_gate + 60)/(-5.5))));
  i_NaK := i_NaK_max*(Na_i/(K_m_Na + Na_i))^3*(K_c/(K_m_K + K_c))^2*1.6/(1.5 + exp((V_membrane + 60)/(-40)));
  i_Ca_P := i_Ca_P_max*Ca_i/(Ca_i + 0.0004);
  i_NaCa := K_NaCa*(Na_i^3*Ca_c*exp(0.03743*V_membrane*gamma) - Na_c^3*Ca_i*exp(0.03743*V_membrane*(gamma - 1)))/(1 + d_NaCa*(Ca_i*Na_c^3 + Ca_c*Na_i^3));
  V_i := 0.465*Vol;
  phi_C := 129000*Ca_i*(1 - 1*Ca_Calmod) - 307*Ca_Calmod;
  phi_TC := 50500*Ca_i*(1 - Ca_Trop*1) - 252*Ca_Trop;
  phi_TMgC := 129000*Ca_i*(1 - 1*(Ca_Mg_Trop + Mg_Mg_Trop)) - 4.25*Ca_Mg_Trop;
  phi_TMgM := 1290*Mg_i*(1 - 1*(Ca_Mg_Trop + Mg_Mg_Trop)) - 429*Mg_Mg_Trop;
  F_C := 0.09*phi_C;
  F_TC := 0.031*phi_TC;
  F_TMgC := 0.062*phi_TMgC;
  phi_B := F_C + F_TC + F_TMgC;
  V_c := 0.136*Vol;
  V_up := 0.01166*V_i;
  V_rel := 0.001296*V_i;
  K1 := k_cyca*k_xcs/k_SRCa;
  K2 := Ca_i + Ca_up*K1/1 + k_cyca*k_xcs/1 + k_cyca;
  r_act := 240*exp((V_membrane - 40)*0.08) + 240*(Ca_i/(Ca_i + k_rel))^4;
  r_inact := 40 + 240*(Ca_i/(Ca_i + k_rel))^4;
  phi_Calse := 770*Ca_rel*(1 - Ca_Calse) - 641*Ca_Calse;
  i_rel := alpha_rel*(F2/(F2 + 0.25))^2*Ca_rel;
  i_tr := (Ca_up - Ca_rel)*2*F*V_up/0.06418;
  i_up := (alpha_up*Ca_i - beta_up*Ca_up*K1/1)/K2;
  E_Na := R*T/F*ln(Na_c/Na_i);
  E_K := R*T/F*ln(K_c/K_i);
  E_Ca := 0.5*R*T/F*ln(Ca_c/Ca_i);

  // Rate rules:
  V_membrane' = -(i_Na + i_Ca_T + i_Ca_L + i_K + i_f + i_B + i_NaK + i_NaCa + i_Ca_P)/Cm;
  m' = (m_infinity - m)/tau_m;
  h1' = (h1_infinity - h1)/tau_h1;
  h2' = (h2_infinity - h2)/tau_h2;
  d_L' = (d_L_infinity - d_L)/tau_d_L;
  f_L' = (f_L_infinity - f_L)/tau_f_L;
  d_T' = (d_T_infinity - d_T)/tau_d_T;
  f_T' = (f_T_infinity - f_T)/tau_f_T;
  P_a' = (P_a_infinity - P_a)/tau_P_a;
  P_i' = alpha_P_i*(1 - P_i) - beta_P_i*P_i;
  y' = (y_infinity - y)/tau_y;
  Ca_Calmod' = 1*phi_C;
  Ca_Trop' = 1*phi_TC;
  Ca_Mg_Trop' = 1*phi_TMgC;
  Mg_Mg_Trop' = 1*phi_TMgM;
  Na_i' = -(3*i_NaK + 3*i_NaCa + i_B_Na + i_f_Na + i_Na)/(F*V_i);
  K_i' = (2*i_NaK - (i_K + i_f_K + i_B_K))/(F*V_i);
  Ca_i' = (2*i_NaCa + i_rel - (i_Ca_L + i_Ca_T + i_Ca_P + i_B_Ca + i_up))/(2*V_i*F) - phi_B*1;
  Na_c' = (Na_b - Na_c)/tau_p + (i_Na + 3*i_NaCa + 3*i_NaK + i_B_Na + i_f_Na)/(F*V_c);
  K_c' = (K_b - K_c)/tau_p + (i_K + i_B_K + i_f_K - 2*i_NaK)/(F*V_c);
  Ca_c' = (Ca_b - Ca_c)/tau_p + (-2*i_NaCa + i_Ca_L + i_Ca_T + i_Ca_P + i_B_Ca)/(2*F*V_c);
  Ca_Calse' = 1*phi_Calse;
  F1' = 0.96*F3 - r_act*F1;
  F2' = r_act*F1 - r_inact*F2;
  F3' = r_inact*F2 - 0.96*F3;
  Ca_up' = (i_up - i_tr)/(2*V_up*F);
  Ca_rel' = (i_tr - i_rel)/(2*V_rel*F) - 11.48*phi_Calse;

  // Unit definitions:
  unit millisecond = 1e-3 second;
  unit per_second = 1 / second;
  unit millivolt = 1e-3 volt;
  unit per_millivolt = 1 / (1e-3 volt);
  unit per_millivolt_second = 1 / (1e-3 volt * second);
  unit microS = 1e-6 siemens;
  unit picoS = 1e-12 siemens;
  unit microF = 1e-12 farad;
  unit nanoA = 1e-9 ampere;
  unit picoA = 1e-12 ampere;
  unit millimolar = 1e-3 mole / litre;
  unit per_millimolar = litre / (1e-3 mole);
  unit millimolar_per_second = 1e-3 mole / (litre * second);
  unit nanomolar = 1e-9 mole / litre;
  unit microS_per_millimolar = 1e-6 siemens * litre / (1e-3 mole);
  unit nanoA_per_millimolar = 1e-12 ampere * litre / (1e-3 mole);
  unit nanoA_per_nanomolar_4 = 1e-12 ampere * litre^4 / (1e-9 mole)^4;
  unit millimolar_4 = litre^4 / (1e-3 mole)^4;
  unit joule_per_kilomole_kelvin = joule / (1000 mole * kelvin);
  unit coulomb_per_mole = coulomb / mole;
  unit ml_per_second = 1e-3 litre / second;
  unit mm_cubed = 1e-6 litre;
end
