// SBML level 2 version 3

model Demir1999_SinoatrialNodeActivity_Heart()
  // This a model from the article:
  // Parasympathetic modulation of sinoatrial node pacemaker activity in rabbit heart: a unifying model.
  // Demir SS, Clark JW, Giles WR. Am J Physiol 1999 Jun;276(6 Pt 2):H2221-44 10362707 ,
  // Abstract:
  // We have extended our compartmental model [Am. J. Physiol. 266 (Cell Physiol. 35): C832-C852, 1994] of the single rabbit sinoatrial node (SAN) cell so that it can simulate cellular responses to bath applications of ACh and isoprenaline as well as the effects of neuronally released ACh. The model employs three different types of muscarinic receptors to explain the variety of responses observed in mammalian cardiac pacemaking cells subjected to vagal stimulation. The response of greatest interest is the ACh-sensitive change in cycle length that is not accompanied by a change in action potential duration or repolarization or hyperpolarization of the maximum diastolic potential. In this case, an ACh-sensitive K+ current is not involved. Membrane hyperpolarization occurs in response to much higher levels of vagal stimulation, and this response is also mimicked by the model. Here, an ACh-sensitive K+ current is involved. The well-known phase-resetting response of the SAN cell to single and periodically applied vagal bursts of impulses is also simulated in the presence and absence of the beta-agonist isoprenaline. Finally, the responses of the SAN cell to longer continuous trains of periodic vagal stimulation are simulated, and this can result in the complete cessation of pacemaking. Therefore, this model is 1) applicable over the full range of intensity and pattern of vagal input and 2) can offer biophysically based explanations for many of the phenomena associated with the autonomic control of cardiac pacemaking.
  // This model was taken from the CellML repository and automatically converted to SBML.
  // The original model was: Demir SS, Clark JW, Giles WR. (1999) - version03
  // The original CellML model was created by:
  // Lloyd, Catherine, May
  // c.lloyd@aukland.ac.nz
  // The University of Auckland
  // The Bioengineering Institute
  // This model originates from BioModels Database: A Database of Annotated Published Models (http://www.ebi.ac.uk/biomodels/). It is copyright (c) 2005-2011 The BioModels.net Team.
  // To the extent possible under law, all copyright and related or neighbouring rights to this encoded model have been dedicated to the public domain worldwide. Please refer to CC0 Public Domain Dedication for more information.
  // In summary, you are entitled to use this encoded model in absolutely any manner you deem suitable, verbatim, or with modification, alone or embedded it in a larger context, redistribute it, commercially or not, in a restricted way or not..
  // To cite BioModels Database, please use: Li C, Donizelli M, Rodriguez N, Dharuri H, Endler L, Chelliah V, Li L, He E, Henry A, Stefan MI, Snoep JL, Hucka M, Le Novère N, Laibe C (2010) BioModels Database: An enhanced, curated and annotated resource for published quantitative kinetic models. BMC Syst Biol., 4:92.
  // biomodels.db:MODEL0912940495
  // isDescribedBy pubmed:10362707
  // biomodels.db:MODEL0912940495
  // isDescribedBy pubmed:10362707
  // biomodels.db:MODEL0912940495
  // biomodels.db:MODEL0912940495

  // Compartments:
  compartment Compartment = 1 litre;

  // Parameters:
  V_membrane = -49.54105 millivolt;
  R = 8314.472 joule_per_kilomole_kelvin;
  T = 310 kelvin;
  F = 9.64853415e4 coulomb_per_mole;
  Cm = 5.5e-5 microF;
  i_Na has picoA;
  P_Na = 0.00344 ml_per_second;
  F_ACh_Na has dimensionless;
  m = 0.250113 dimensionless;
  m_infinity has dimensionless;
  tau_m has second;
  alpha_m has per_second;
  beta_m has per_second;
  h1 = 0.001386897 dimensionless;
  h2 = 0.002065463 dimensionless;
  h1_infinity has dimensionless;
  h2_infinity has dimensionless;
  tau_h1 has second;
  tau_h2 has second;
  alpha_h1 has per_second;
  beta_h1 has per_second;
  i_Ca_L has picoA;
  g_Ca_L has microS;
  g_Ca_L_cont = 0.02115 microS;
  F_cAMP_CaL has dimensionless;
  E_Ca_L = 46.4 millivolt;
  d_L = 0.002572773 dimensionless;
  d_L_infinity has dimensionless;
  alpha_d_L has per_second;
  beta_d_L has per_second;
  tau_d_L has second;
  f_L = 0.98651 dimensionless;
  alpha_f_L has per_second;
  beta_f_L has per_second;
  f_L_infinity has dimensionless;
  tau_f_L has second;
  i_Ca_T has picoA;
  g_Ca_T = 0.02521 microS;
  E_Ca_T = 45 millivolt;
  d_T = 0.02012114 dimensionless;
  alpha_d_T has per_second;
  beta_d_T has per_second;
  d_T_infinity has dimensionless;
  tau_d_T has second;
  f_T = 0.1945111 dimensionless;
  alpha_f_T has per_second;
  beta_f_T has per_second;
  f_T_infinity has dimensionless;
  tau_f_T has second;
  i_K has picoA;
  g_K has microS;
  F_cAMP_K has dimensionless;
  P_a = 0.02302278 dimensionless;
  tau_P_a has second;
  P_a_infinity has dimensionless;
  P_i = 0.3777728 dimensionless;
  alpha_P_i has per_second;
  beta_P_i has per_second;
  i_B has picoA;
  i_B_Na has picoA;
  i_B_Ca has picoA;
  i_B_K has picoA;
  g_B_Na = 0.00016 microS;
  g_B_Ca = 3.64e-5 microS;
  g_B_K = 6.94e-5 microS;
  F_ACh_bNa has dimensionless;
  i_f has picoA;
  i_f_Na has picoA;
  i_f_K has picoA;
  g_f_Na = 0.0067478 microS;
  g_f_K = 0.0128821 microS;
  y = 0.09227776 dimensionless;
  y_infinity has dimensionless;
  V_half has millivolt;
  tau_y has second;
  i_NaK has picoA;
  K_m_Na = 5.46 millimolar;
  K_m_K = 0.621 millimolar;
  i_NaK_max = 0.2192 nanoA;
  F_cAMP_NaK has dimensionless;
  i_Ca_P has picoA;
  i_Ca_P_max = 0.02869 nanoA;
  i_NaCa has picoA;
  K_NaCa = 1.248e-5 nanoA_per_nanomolar_4;
  d_NaCa = 0.0001 millimolar_4;
  gamma = 0.5 dimensionless;
  i_K_ACh has picoA;
  I_K_ACh has picoA;
  g_K_ACh has microS;
  g_K_ACh_base = 0.007833 microS;
  P_M2_KACh has dimensionless;
  a = 0 dimensionless;
  alpha_a has per_second;
  beta_a has per_second;
  Na_i = 9.701621 millimolar;
  Ca_i = 0.0003787018 millimolar;
  K_i = 140.7347 millimolar;
  Ca_Calmod = 0.1411678 millimolar;
  Ca_Trop = 0.07331396 millimolar;
  Ca_Mg_Trop = 0.7618549 millimolar;
  Mg_Mg_Trop = 0.2097049 millimolar;
  phi_C has mM_s;
  phi_TC has mM_s;
  phi_TMgC has mM_s;
  phi_TMgM has mM_s;
  phi_B has mM_s;
  Mg_i = 2.5 millimolar;
  F_C has mM_s;
  F_TC has mM_s;
  F_TMgC has mM_s;
  V_i has mm_cubed;
  Na_c = 139.9988 millimolar;
  Ca_c = 2.00474 millimolar;
  K_c = 5.389014 millimolar;
  K_b = 5.4 millimolar;
  Na_b = 140 millimolar;
  Ca_b = 2 millimolar;
  Vol = 3.497e-6 mm_cubed;
  V_c has mm_cubed;
  tau_p = 0.01 second;
  i_rel has picoA;
  i_up has picoA;
  Ca_up = 16.95311 millimolar;
  alpha_up = 0.08 nanoA;
  beta_up = 0.072 nanoA;
  Ca_rel = 16.85024 millimolar;
  alpha_rel = 0.5 nanoA_per_millimolar;
  i_tr has picoA;
  K1 has dimensionless;
  K2 has millimolar;
  k_cyca = 5e-5 millimolar;
  k_xcs = 0.9 dimensionless;
  k_SRCa = 22 millimolar;
  k_rel = 0.004 millimolar;
  r_act has per_second;
  r_inact has per_second;
  Ca_Calse = 0.9528726 millimolar;
  phi_Calse has mM_s;
  F1 = 0.1133251 dimensionless;
  F2 = 0.0007594214 dimensionless;
  F3 = 0.8859153 dimensionless;
  V_up has mm_cubed;
  V_rel has mm_cubed;
  E_Na has millivolt;
  E_K has millivolt;
  E_Ca has millivolt;
  cAMP = 0.003 millimolar;
  cGMP = 0.002 millimolar;
  Iso = 0 millimolar;
  ACh = 0 millimolar;
  Km_Iso = 0.00014 millimolar;
  Km_ACh = 0.00014 millimolar;
  K_PDE = 6 dimensionless;
  K_ADC = 0.008 millimolar_per_second;
  V_PDE = 20 millimolar_per_second;
  P_M2_ADC = 0.02 dimensionless;
  f_Vagal = 200 per_second;

  // Assignment rules:
  F_ACh_Na := 1 - ACh/(ACh + 0.001);
  i_Na := F_ACh_Na*P_Na*m^3*h1*h2*Na_c*V_membrane*F^2/(R*T)*(exp((V_membrane - E_Na)*F/(R*T)) - 1)/(exp(V_membrane*F/(R*T)) - 1);
  alpha_m := -824*(V_membrane + 51.9)/(exp((V_membrane + 51.9)/(-8.9)) - 1);
  beta_m := 32960*exp((V_membrane + 51.9)/(-8.9));
  m_infinity := alpha_m/(alpha_m + beta_m);
  tau_m := 1/(alpha_m + beta_m) + 1.5e-5;
  alpha_h1 := 165*exp((V_membrane + 101.3)/(-12.6));
  beta_h1 := 12360/(320*exp((V_membrane + 101.3)/(-12.6)) + 1);
  h1_infinity := alpha_h1/(alpha_h1 + beta_h1);
  tau_h1 := 1/(alpha_h1 + beta_h1);
  h2_infinity := h1_infinity;
  tau_h2 := 20*tau_h1;
  F_cAMP_CaL := 0.4*(1 + 4.5*cAMP/(cAMP + 0.0065)) + 0.03157;
  g_Ca_L := g_Ca_L_cont*F_cAMP_CaL;
  i_Ca_L := g_Ca_L*(f_L*d_L + 0.095*d_L_infinity)*(V_membrane - E_Ca_L);
  alpha_d_L := -28.39*(V_membrane + 35)/(exp((V_membrane + 35)/(-2.5)) - 1) + (-84.9*V_membrane/(exp(-0.208*V_membrane) - 1));
  beta_d_L := 11.43*(V_membrane - 5)/(exp(0.4*(V_membrane - 5)) - 1);
  tau_d_L := 1/(alpha_d_L + beta_d_L);
  d_L_infinity := 1/(1 + exp((V_membrane + 14.1)/(-6)));
  alpha_f_L := 3.75*(V_membrane + 28)/(exp((V_membrane + 28)/4) - 1);
  beta_f_L := 30/(1 + exp((V_membrane + 28)/(-4)));
  tau_f_L := 1/(alpha_f_L + beta_f_L);
  f_L_infinity := 1/(1 + exp((V_membrane + 30)/5));
  i_Ca_T := g_Ca_T*d_T*f_T*(V_membrane - E_Ca_T);
  alpha_d_T := 1068*exp((V_membrane + 26.3)/30);
  beta_d_T := 1068*exp((V_membrane + 26.3)/(-30));
  tau_d_T := 1/(alpha_d_T + beta_d_T);
  d_T_infinity := 1/(1 + exp((V_membrane + 26.3)/(-6)));
  alpha_f_T := 15.3*exp((V_membrane + 61.7)/(-83.3));
  beta_f_T := 15*exp((V_membrane + 61.7)/15.38);
  tau_f_T := 1/(alpha_f_T + beta_f_T);
  f_T_infinity := 1/(1 + exp((V_membrane + 61.7)/5.6));
  F_cAMP_K := 0.62*(1 + 2.6129*cAMP/(cAMP + 0.009)) - 0.025;
  g_K := F_cAMP_K*0.00693*K_b^0.59;
  i_K := g_K*P_a*P_i*(V_membrane - E_K);
  P_a_infinity := 1/(1 + exp((V_membrane + 5.1)/(-7.4)));
  tau_P_a := 1/(17*exp(0.0398*V_membrane) + 2.11*exp(-0.051*V_membrane));
  alpha_P_i := 100*exp(-0.0183*V_membrane);
  beta_P_i := 656*exp(0.00942*V_membrane);
  F_ACh_bNa := 1 - ACh/(ACh + 0.5);
  i_B_Na := F_ACh_bNa*g_B_Na*(V_membrane - E_Na);
  i_B_Ca := g_B_Ca*(V_membrane - E_Ca);
  i_B_K := g_B_K*(V_membrane - E_K);
  i_B := i_B_Na + i_B_Ca + i_B_K;
  i_f_Na := g_f_Na*y^2*(V_membrane - 75);
  i_f_K := g_f_K*y^2*(V_membrane + 85);
  i_f := i_f_Na + i_f_K;
  V_half := 20.5/(1 + exp((cAMP - 0.0034)/(-0.0005))) - 78.56;
  y_infinity := 1/(1 + exp((V_membrane - V_half)/9));
  tau_y := 1/(1.6483*exp((V_membrane + 54.06)/(-24.33)) + 14.01055/(0.7 + exp((V_membrane + 60)/(-5.5))));
  F_cAMP_NaK := 1.6/(1 + exp((cAMP - 0.00375)/(-0.00015))) + 0.99;
  i_NaK := piecewise((2 - F_cAMP_NaK)*i_NaK_max*(Na_i/(K_m_Na + Na_i))^3*(K_c/(K_m_K + K_c))^2*1.6/(1.5 + exp((V_membrane + 60)/(-40))), Ca_i < 0.00015, F_cAMP_NaK*i_NaK_max*(Na_i/(K_m_Na + Na_i))^3*(K_c/(K_m_K + K_c))^2*1.6/(1.5 + exp((V_membrane + 60)/(-40))));
  i_Ca_P := i_Ca_P_max*Ca_i/(Ca_i + 0.0004);
  i_NaCa := K_NaCa*(Na_i^3*Ca_c*exp(0.03743*V_membrane*gamma) - Na_c^3*Ca_i*exp(0.03743*V_membrane*(gamma - 1)))/(1 + d_NaCa*(Ca_i*Na_c^3 + Ca_c*Na_i^3));
  i_K_ACh := a*I_K_ACh;
  beta_a := 12.32/(1 + 0.0042/ACh);
  alpha_a := 17*exp(0.0133*(V_membrane + 40));
  I_K_ACh := g_K_ACh*(V_membrane - E_K);
  g_K_ACh := P_M2_KACh*g_K_ACh_base;
  P_M2_KACh := piecewise(1.026/(1 + exp((f_Vagal + 11.05)/(-7.5095))) - 0.99, (f_Vagal < 100) && (f_Vagal > 25), 0.0006);
  V_i := 0.465*Vol;
  phi_C := 129000*Ca_i*(1 - Ca_Calmod) - 307*Ca_Calmod;
  phi_TC := 50500*Ca_i*(1 - Ca_Trop) - 252*Ca_Trop;
  phi_TMgC := 129000*Ca_i*(1 - (Ca_Mg_Trop + Mg_Mg_Trop)) - 4.25*Ca_Mg_Trop;
  phi_TMgM := 1290*Mg_i*(1 - (Ca_Mg_Trop + Mg_Mg_Trop)) - 429*Mg_Mg_Trop;
  F_C := 0.09*phi_C;
  F_TC := 0.031*phi_TC;
  F_TMgC := 0.062*phi_TMgC;
  phi_B := F_C + F_TC + F_TMgC;
  V_c := 0.136*Vol;
  V_up := 0.01166*V_i;
  V_rel := 0.001296*V_i;
  K1 := k_cyca*k_xcs/k_SRCa;
  K2 := Ca_i + Ca_up*K1 + k_cyca*k_xcs + k_cyca;
  r_act := 240*exp((V_membrane - 40)*0.08) + 240*(Ca_i/(Ca_i + k_rel))^4;
  r_inact := 40 + 240*(Ca_i/(Ca_i + k_rel))^4;
  phi_Calse := 770*Ca_rel*(1 - Ca_Calse) - 641*Ca_Calse;
  i_rel := alpha_rel*(F2/(F2 + 0.25))^2*Ca_rel;
  i_tr := (Ca_up - Ca_rel)*2*F*V_up/0.06418;
  i_up := (alpha_up*Ca_i - beta_up*Ca_up*K1)/K2;
  E_Na := R*T/F*ln(Na_c/Na_i);
  E_K := R*T/F*ln(K_c/K_i);
  E_Ca := 0.5*R*T/F*ln(Ca_c/Ca_i);

  // Rate rules:
  V_membrane' = -(i_Na + i_Ca_T + i_Ca_L + i_K + i_f + i_B + i_NaK + i_NaCa + i_Ca_P + i_K_ACh)/Cm;
  m' = (m_infinity - m)/tau_m;
  h1' = (h1_infinity - h1)/tau_h1;
  h2' = (h2_infinity - h2)/tau_h2;
  d_L' = (d_L_infinity - d_L)/tau_d_L;
  f_L' = (f_L_infinity - f_L)/tau_f_L;
  d_T' = (d_T_infinity - d_T)/tau_d_T;
  f_T' = (f_T_infinity - f_T)/tau_f_T;
  P_a' = (P_a_infinity - P_a)/tau_P_a;
  P_i' = alpha_P_i*(1 - P_i) - beta_P_i*P_i;
  y' = (y_infinity - y)/tau_y;
  a' = beta_a*(1 - a) - alpha_a*a;
  Ca_Calmod' = phi_C;
  Ca_Trop' = phi_TC;
  Ca_Mg_Trop' = phi_TMgC;
  Mg_Mg_Trop' = phi_TMgM;
  Na_i' = -(3*i_NaK + 3*i_NaCa + i_B_Na + i_f_Na + i_Na)/(F*V_i);
  K_i' = (2*i_NaK - (i_K + i_f_K + i_B_K))/(F*V_i);
  Ca_i' = (2*i_NaCa + i_rel - (i_Ca_L + i_Ca_T + i_Ca_P + i_B_Ca + i_up))/(2*V_i*F) - phi_B;
  Na_c' = (Na_b - Na_c)/tau_p + (i_Na + 3*i_NaCa + 3*i_NaK + i_B_Na + i_f_Na)/(F*V_c);
  K_c' = (K_b - K_c)/tau_p + (i_K + i_B_K + i_f_K - 2*i_NaK)/(F*V_c);
  Ca_c' = (Ca_b - Ca_c)/tau_p + (-2*i_NaCa + i_Ca_L + i_Ca_T + i_Ca_P + i_B_Ca)/(2*F*V_c);
  Ca_Calse' = phi_Calse;
  F1' = 0.96*F3 - r_act*F1;
  F2' = r_act*F1 - r_inact*F2;
  F3' = r_inact*F2 - 0.96*F3;
  Ca_up' = (i_up - i_tr)/(2*V_up*F);
  Ca_rel' = (i_tr - i_rel)/(2*V_rel*F) - 11.48*phi_Calse;
  cAMP' = 1*(K_ADC*(1 + Iso/(Iso + Km_Iso) - P_M2_ADC*ACh/(P_M2_ADC*ACh + Km_ACh)) - V_PDE*cGMP*cAMP/(cAMP + K_PDE*cGMP));

  // Unit definitions:
  unit millisecond = 1e-3 second;
  unit per_second = 1 / second;
  unit millivolt = 1e-3 volt;
  unit per_millivolt = 1 / (1e-3 volt);
  unit per_millivolt_second = 1 / (1e-3 volt * second);
  unit microS = 1e-6 siemens;
  unit picoS = 1e-12 siemens;
  unit microF = 1e-6 farad;
  unit nanoA = 1e-9 ampere;
  unit picoA = 1e-12 ampere;
  unit millimolar = 1e-3 mole / litre;
  unit mM_s = 1e-3 mole / (litre * second); mM_s is "mM_per_second";
  unit nanomolar = 1e-9 mole / litre;
  unit microS_per_millimolar = 1e-6 siemens * litre / (1e-3 mole);
  unit nanoA_per_millimolar = 1e-9 ampere * litre / (1e-3 mole);
  unit nanoA_per_nanomolar_4 = 1e-9 ampere * litre^4 / (1e-9 mole)^4;
  unit millimolar_4 = litre^4 / (1e-3 mole)^4;
  unit joule_per_kilomole_kelvin = joule / (1000 mole * kelvin);
  unit coulomb_per_mole = coulomb / mole;
  unit ml_per_second = 1e-3 litre / second;
  unit mm_cubed = 1e-6 litre;
  unit millimolar_per_second = 1e-3 mole / (litre * second);
  unit cm2_per_second = (0.01 metre)^2 / second;
  unit cm = 0.01 metre;
end
