// SBML level 2 version 3

model Cui2006_CalciumHomeostasis()
  // This a model from the article:
  // Mathematical modeling of calcium homeostasis in yeast cells.
  // Cui J, Kaandorp JA. Cell Calcium 2006 Apr;39(4):337-48 16445978 ,
  // Abstract:
  // In this study, based on currently available experimental observations on protein level, we constructed a mathematical model to describe calcium homeostasis in normally growing yeast cells (Saccharomyces cerevisiae). Simulation results show that tightly controlled low cytosolic calcium ion level can be a natural result under the general mechanism of gene expression feedback control. The calmodulin (a sensor protein) behavior in our model cell agrees well with relevant observations in real cells. Moreover, our model can qualitatively reproduce the experimentally observed response curve of real yeast cell responding to step-like disturbance in extracellular calcium ion concentration. Further investigations show that the feedback control mechanism in our model is as robust as it is in real cells.
  // This model was taken from the CellML repository and automatically converted to SBML.
  // The original model was: Cui J, Kaandorp JA. (2006) - version03
  // The original CellML model was created by:
  // Lloyd, Catherine, May
  // c.lloyd@aukland.ac.nz
  // The University of Auckland
  // The Bioengineering Institute
  // This model originates from BioModels Database: A Database of Annotated Published Models (http://www.ebi.ac.uk/biomodels/). It is copyright (c) 2005-2011 The BioModels.net Team.
  // To the extent possible under law, all copyright and related or neighbouring rights to this encoded model have been dedicated to the public domain worldwide. Please refer to CC0 Public Domain Dedication for more information.
  // In summary, you are entitled to use this encoded model in absolutely any manner you deem suitable, verbatim, or with modification, alone or embedded it in a larger context, redistribute it, commercially or not, in a restricted way or not..
  // To cite BioModels Database, please use: Li C, Donizelli M, Rodriguez N, Dharuri H, Endler L, Chelliah V, Li L, He E, Henry A, Stefan MI, Snoep JL, Hucka M, Le Novère N, Laibe C (2010) BioModels Database: An enhanced, curated and annotated resource for published quantitative kinetic models. BMC Syst Biol., 4:92.
  // biomodels.db:MODEL0913003363
  // isDescribedBy pubmed:16445978
  // biomodels.db:MODEL0913003363
  // isDescribedBy pubmed:16445978
  // biomodels.db:MODEL0913003363
  // biomodels.db:MODEL0913003363

  // Compartments:
  compartment Compartment = 1 litre;

  // Parameters:
  m = 0 micromolar;
  kM_plus = 500 fourth_order_rate_constant;
  kM_minus = 100 first_order_rate_constant;
  CaMtotal = 25 micromolar;
  dmdt has flux;
  z = 1e-8 micromolar;
  kN_plus = 5 second_order_rate_constant;
  kN_minus = 5 first_order_rate_constant;
  CaNtotal = 25 micromolar;
  dzdt has flux;
  h = 0 dimensionless;
  d = 0.4 first_order_rate_constant;
  f = 0.1 first_order_rate_constant;
  phi has dimensionless;
  psi has dimensionless;
  x = 0 micromolar;
  Vx = 1000 flux;
  Kx = 500 micromolar;
  V1 = 30000 flux;
  K1 = 4.3 micromolar;
  V2 = 100 flux;
  K2 = 0.1 micromolar;
  V3 = 10000 flux;
  K3 = 100 micromolar;
  kc = 10 dimensionless;
  alpha = 0.006 first_order_rate_constant;
  Caex = 1 micromolar;
  dxdt has flux;
  L0 has dimensionless;
  N = 13 dimensionless;
  lamda = 5 dimensionless;
  y has dimensionless;

  // Assignment rules:
  dmdt := 1*kM_plus*(CaMtotal - m)*x^3 - kM_minus*m;
  dzdt := kN_plus*(CaNtotal - z)*m - kN_minus*z;
  phi := 1/(1 + L0*((lamda*y)^(N + 1) - 1)/((lamda*y - 1)*((y - 1)/(y^(N + 1) - 1))));
  psi := (1 + L0)/((y^(N + 1) - 1)/(y - 1) + L0*(((lamda*y)^(N + 1) - 1)/(lamda*y - 1)));
  dxdt := Vx*Caex/(Kx + Caex) - (h*psi*(1/z)*(V1*x/(K1 + x)) + h*psi*(1/z)*(V2*x/(K2 + x)) + 1/(1 + kc*z)*(V3*x/(K3 + x)) + alpha*x);
  L0 := 10^(-(N/2));
  y := 1/z;

  // Rate rules:
  m' = 1*kM_plus*(CaMtotal - m)*x^3 - kM_minus*m;
  z' = kN_plus*(CaNtotal - z)*m - kN_minus*z;
  h' = d*phi*(1/z)*(1 - h) - f*(1 - phi*(1/z))*h;
  x' = Vx*Caex/(Kx + Caex) - (h*psi*(1/z)*(V1*x/(K1 + x)) + h*psi*(1/z)*(V2*x/(K2 + x)) + 1/(1 + kc*z)*(V3*x/(K3 + x)) + alpha*x);

  // Unit definitions:
  unit micromolar = 1e-6 mole / litre;
  unit minute = 60 second;
  unit flux = 1e-6 mole / (litre * 60 second);
  unit first_order_rate_constant = 1 / (60 second);
  unit second_order_rate_constant = litre / (1e-6 mole * 60 second);
  unit fourth_order_rate_constant = litre^3 / ((1e-6 mole)^3 * 60 second);
  unit time = 60 second;
end
