// SBML level 2 version 3

model Courtemanche1998_AtrialActionPotential()
  // This a model from the article:
  // Ionic mechanisms underlying human atrial action potential properties: insights from a mathematical model.
  // Courtemanche M, Ramirez RJ, Nattel S. Am J Physiol 1998 Jul;275(1 Pt 2):H301-21 9688927 ,
  // Abstract:
  // The mechanisms underlying many important properties of the human atrial action potential (AP) are poorly understood. Using specific formulations of the K+, Na+, and Ca2+ currents based on data recorded from human atrial myocytes, along with representations of pump, exchange, and background currents, we developed a mathematical model of the AP. The model AP resembles APs recorded from human atrial samples and responds to rate changes, L-type Ca2+ current blockade, Na+/Ca2+ exchanger inhibition, and variations in transient outward current amplitude in a fashion similar to experimental recordings. Rate-dependent adaptation of AP duration, an important determinant of susceptibility to atrial fibrillation, was attributable to incomplete L-type Ca2+ current recovery from inactivation and incomplete delayed rectifier current deactivation at rapid rates. Experimental observations of variable AP morphology could be accounted for by changes in transient outward current density, as suggested experimentally. We conclude that this mathematical model of the human atrial AP reproduces a variety of observed AP behaviors and provides insights into the mechanisms of clinically important AP properties.
  // This model was taken from the CellML repository and automatically converted to SBML.
  // The original model was: Courtemanche M, Ramirez RJ, Nattel S. (1998) - version03
  // The original CellML model was created by:
  // Noble, Penny, J
  // penny.noble@dpag.ox.ac.uk
  // Oxford University
  // Department of Physiology, Anatomy & Genetics
  // This model originates from BioModels Database: A Database of Annotated Published Models (http://www.ebi.ac.uk/biomodels/). It is copyright (c) 2005-2011 The BioModels.net Team.
  // To the extent possible under law, all copyright and related or neighbouring rights to this encoded model have been dedicated to the public domain worldwide. Please refer to CC0 Public Domain Dedication for more information.
  // In summary, you are entitled to use this encoded model in absolutely any manner you deem suitable, verbatim, or with modification, alone or embedded it in a larger context, redistribute it, commercially or not, in a restricted way or not..
  // To cite BioModels Database, please use: Li C, Donizelli M, Rodriguez N, Dharuri H, Endler L, Chelliah V, Li L, He E, Henry A, Stefan MI, Snoep JL, Hucka M, Le Novère N, Laibe C (2010) BioModels Database: An enhanced, curated and annotated resource for published quantitative kinetic models. BMC Syst Biol., 4:92.
  // biomodels.db:MODEL0913049417
  // isDescribedBy pubmed:9688927
  // biomodels.db:MODEL0913049417
  // isDescribedBy pubmed:9688927
  // biomodels.db:MODEL0913049417
  // biomodels.db:MODEL0913049417

  // Compartments:
  compartment Compartment = 1 litre;

  // Parameters:
  V_membrane = -81.18 millivolt;
  R = 8.3143 joule_per_mole_kelvin;
  T = 310 kelvin;
  F = 96.4867 coulomb_per_millimole;
  Cm = 100 picoF;
  i_st has picoA;
  stim_start = 50 millisecond;
  stim_end = 50000 millisecond;
  stim_period = 1000 millisecond;
  stim_duration = 2 millisecond;
  stim_amplitude = -2000 picoA;
  i_Na has picoA;
  E_Na has millivolt;
  g_Na = 7.8 nanoS_per_picoF;
  m = 0.002908 dimensionless;
  alpha_m has per_millisecond;
  beta_m has per_millisecond;
  m_inf has dimensionless;
  tau_m has millisecond;
  h = 0.9649 dimensionless;
  alpha_h has per_millisecond;
  beta_h has per_millisecond;
  h_inf has dimensionless;
  tau_h has millisecond;
  j = 0.9775 dimensionless;
  alpha_j has per_millisecond;
  beta_j has per_millisecond;
  j_inf has dimensionless;
  tau_j has millisecond;
  i_K1 has picoA;
  E_K has millivolt;
  g_K1 = 0.09 nanoS_per_picoF;
  i_to has picoA;
  K_Q10 = 3 dimensionless;
  g_to = 0.1652 nanoS_per_picoF;
  oa = 0.03043 dimensionless;
  alpha_oa has per_millisecond;
  beta_oa has per_millisecond;
  tau_oa has millisecond;
  oa_infinity has dimensionless;
  oi = 0.9992 dimensionless;
  alpha_oi has per_millisecond;
  beta_oi has per_millisecond;
  tau_oi has millisecond;
  oi_infinity has dimensionless;
  i_Kur has picoA;
  g_Kur has nanoS_per_picoF;
  ua = 0.004966 dimensionless;
  alpha_ua has per_millisecond;
  beta_ua has per_millisecond;
  tau_ua has millisecond;
  ua_infinity has dimensionless;
  ui = 0.9986 dimensionless;
  alpha_ui has per_millisecond;
  beta_ui has per_millisecond;
  tau_ui has millisecond;
  ui_infinity has dimensionless;
  K_Q10_ultrarapid_delayed_rectifier_K_current_ui_gate has dimensionless;
  i_Kr has picoA;
  g_Kr = 0.029411765 nanoS_per_picoF;
  xr = 3.296e-5 dimensionless;
  alpha_xr has per_millisecond;
  beta_xr has per_millisecond;
  tau_xr has millisecond;
  xr_infinity has dimensionless;
  i_Ks has picoA;
  g_Ks = 0.12941176 nanoS_per_picoF;
  xs = 0.01869 dimensionless;
  alpha_xs has per_millisecond;
  beta_xs has per_millisecond;
  tau_xs has millisecond;
  xs_infinity has dimensionless;
  i_Ca_L has picoA;
  g_Ca_L = 0.12375 nanoS_per_picoF;
  d = 0.0001367 dimensionless;
  d_infinity has dimensionless;
  tau_d has millisecond;
  f = 0.9996 dimensionless;
  f_infinity has dimensionless;
  tau_f has millisecond;
  f_Ca = 0.7755 dimensionless;
  f_Ca_infinity has dimensionless;
  tau_f_Ca has millisecond;
  i_NaK has picoA;
  Km_Na_i = 10 millimolar;
  Km_K_o = 1.5 millimolar;
  i_NaK_max = 0.59933874 picoA_per_picoF;
  f_NaK has dimensionless;
  sigma has dimensionless;
  i_B_Na has picoA;
  i_B_Ca has picoA;
  i_B_K has picoA;
  g_B_Na = 0.0006744375 nanoS_per_picoF;
  g_B_Ca = 0.001131 nanoS_per_picoF;
  g_B_K = 0 nanoS_per_picoF;
  E_Ca has millivolt;
  i_NaCa has picoA;
  I_NaCa_max = 1600 picoA_per_picoF;
  K_mNa = 87.5 millimolar;
  K_mCa = 1.38 millimolar;
  K_sat = 0.1 dimensionless;
  gamma = 0.35 dimensionless;
  i_CaP has picoA;
  i_CaP_max = 0.275 picoA_per_picoF;
  i_rel has millimolar_per_millisecond;
  Fn has dimensionless;
  K_rel = 30 per_millisecond;
  u = 2.35e-112 dimensionless;
  tau_u has millisecond;
  u_infinity has dimensionless;
  v = 1 dimensionless;
  tau_v has millisecond;
  v_infinity has dimensionless;
  w = 0.9992 dimensionless;
  tau_w has millisecond;
  w_infinity has dimensionless;
  i_tr has millimolar_per_millisecond;
  tau_tr = 180 millisecond;
  I_up_max = 0.005 millimolar_per_millisecond;
  i_up has millimolar_per_millisecond;
  K_up = 0.00092 millimolar;
  i_up_leak has millimolar_per_millisecond;
  Ca_up_max = 15 millimolar;
  CMDN_max = 0.05 millimolar;
  TRPN_max = 0.07 millimolar;
  CSQN_max = 10 millimolar;
  Km_CMDN = 0.00238 millimolar;
  Km_TRPN = 0.0005 millimolar;
  Km_CSQN = 0.8 millimolar;
  Ca_CMDN has millimolar;
  Ca_TRPN has millimolar;
  Ca_CSQN has millimolar;
  Na_i = 11.17 millimolar;
  Ca_i = 0.0001013 millimolar;
  K_i = 139 millimolar;
  Ca_rel = 1.488 millimolar;
  Ca_up = 1.488 millimolar;
  V_cell = 20100 micrometre_3;
  V_i has micrometre_3;
  V_rel has micrometre_3;
  V_up has micrometre_3;
  B1 has millimolar_per_millisecond;
  B2 has dimensionless;
  Na_o = 140 millimolar;
  Ca_o = 1.8 millimolar;
  K_o = 5.4 millimolar;

  // Assignment rules:
  i_st := piecewise(stim_amplitude, (time >= stim_start) && (time <= stim_end) && (time - stim_start - floor((time - stim_start)/stim_period)*stim_period <= stim_duration), 0);
  i_Na := Cm*g_Na*m^3*h*j*(V_membrane - E_Na);
  E_Na := R*T/F*ln(Na_o/Na_i);
  alpha_m := piecewise(3.2, 47.13 + V_membrane == 0, 0.32*(V_membrane + 47.13)/(1 - exp(-0.1*(V_membrane + 47.13))));
  beta_m := 0.08*exp(-V_membrane/11);
  m_inf := alpha_m/(alpha_m + beta_m);
  tau_m := 1/(alpha_m + beta_m);
  alpha_h := piecewise(0.135*exp((V_membrane + 80)/(-6.8)), 40 + V_membrane < 0, 0);
  beta_h := piecewise(3.56*exp(0.079*V_membrane) + 310000*exp(0.35*V_membrane), 40 + V_membrane < 0, 1/(0.13*(1 + exp((V_membrane + 10.66)/(-11.1)))));
  h_inf := alpha_h/(alpha_h + beta_h);
  tau_h := 1/(alpha_h + beta_h);
  alpha_j := piecewise((-127140*exp(0.2444*V_membrane) - 3.474e-5*exp(-0.04391*V_membrane))*(V_membrane + 37.78)/(1 + exp(0.311*(V_membrane + 79.23))), 40 + V_membrane < 0, 0);
  beta_j := piecewise(0.1212*exp(-0.01052*V_membrane)/(1 + exp(-0.1378*(V_membrane + 40.14))), 40 + V_membrane < 0, 0.3*exp(-2.535e-7*V_membrane)/(1 + exp(-0.1*(V_membrane + 32))));
  j_inf := alpha_j/(alpha_j + beta_j);
  tau_j := 1/(alpha_j + beta_j);
  E_K := R*T/F*ln(K_o/K_i);
  i_K1 := Cm*g_K1*(V_membrane - E_K)/(1 + exp(0.07*(V_membrane + 80)));
  i_to := Cm*g_to*oa^3*oi*(V_membrane - E_K);
  alpha_oa := 0.65*(exp((V_membrane + 10)/(-8.5)) + exp((V_membrane - 10 - 40)/(-59)))^(-1);
  beta_oa := 0.65*(2.5 + exp((V_membrane + 10 + 72)/17))^(-1);
  tau_oa := 1/((alpha_oa + beta_oa)*K_Q10);
  oa_infinity := (1 + exp((V_membrane + 10 + 10.47)/(-17.54)))^(-1);
  alpha_oi := (18.53 + 1*exp((V_membrane + 10 + 103.7)/10.95))^(-1);
  beta_oi := (35.56 + 1*exp((V_membrane + 10 - 8.74)/(-7.44)))^(-1);
  tau_oi := 1/((alpha_oi + beta_oi)*K_Q10);
  oi_infinity := (1 + exp((V_membrane + 10 + 33.1)/5.3))^(-1);
  g_Kur := 0.005 + 0.05/(1 + exp((V_membrane - 15)/(-13)));
  i_Kur := Cm*g_Kur*ua^3*ui*(V_membrane - E_K);
  alpha_ua := 0.65*(exp((V_membrane - 10)/(-8.5)) + exp((V_membrane + 10 - 40)/(-59)))^(-1);
  beta_ua := 0.65*(2.5 + exp((V_membrane + 10 + 72)/17))^(-1);
  tau_ua := 1/((alpha_ua + beta_ua)*K_Q10);
  ua_infinity := (1 + exp((V_membrane + 10 + 20.3)/(-9.6)))^(-1);
  alpha_ui := (21 + 1*exp((V_membrane + 10 - 195)/(-28)))^(-1);
  beta_ui := 1/exp((V_membrane + 10 - 168)/(-16));
  tau_ui := 1/((alpha_ui + beta_ui)*K_Q10);
  ui_infinity := (1 + exp((V_membrane + 10 - 109.45)/27.48))^(-1);
  i_Kr := Cm*g_Kr*xr*(V_membrane - E_K)/(1 + exp((V_membrane + 15)/22.4));
  alpha_xr := piecewise(0.0015, abs(V_membrane + 14.1) < 1e-10, 0.0003*(V_membrane + 14.1)/(1 - exp((V_membrane + 14.1)/(-5))));
  beta_xr := piecewise(0.00037836118, abs(V_membrane - 3.3328) < 1e-10, 7.3898e-5*(V_membrane - 3.3328)/(exp((V_membrane - 3.3328)/5.1237) - 1));
  tau_xr := 1/(alpha_xr + beta_xr);
  xr_infinity := (1 + exp((V_membrane + 14.1)/(-6.5)))^(-1);
  i_Ks := Cm*g_Ks*xs^2*(V_membrane - E_K);
  alpha_xs := piecewise(0.00068, abs(V_membrane - 19.9) < 1e-10, 4e-5*(V_membrane - 19.9)/(1 - exp((V_membrane - 19.9)/(-17))));
  beta_xs := piecewise(0.000315, abs(V_membrane - 19.9) < 1e-10, 3.5e-5*(V_membrane - 19.9)/(exp((V_membrane - 19.9)/9) - 1));
  tau_xs := 0.5*(alpha_xs + beta_xs)^(-1);
  xs_infinity := (1 + exp((V_membrane - 19.9)/(-12.7)))^(-0.5);
  i_Ca_L := Cm*g_Ca_L*d*f*f_Ca*(V_membrane - 65);
  d_infinity := (1 + exp((V_membrane + 10)/(-8)))^(-1);
  tau_d := piecewise(4.579/(1 + exp((V_membrane + 10)/(-6.24))), abs(V_membrane + 10) < 1e-10, (1 - exp((V_membrane + 10)/(-6.24)))/(0.035*(V_membrane + 10)*(1 + exp((V_membrane + 10)/(-6.24)))));
  f_infinity := exp(-(V_membrane + 28)/6.9)/(1 + exp(-(V_membrane + 28)/6.9));
  tau_f := 9*(0.0197*exp(-0.0337^2*(V_membrane + 10)^2) + 0.02)^(-1);
  f_Ca_infinity := (1 + Ca_i/0.00035)^(-1);
  tau_f_Ca := 2;
  sigma := 1/7*(exp(Na_o/67.3) - 1);
  f_NaK := (1 + 0.1245*exp(-0.1*F*V_membrane/(R*T)) + 0.0365*sigma*exp(-F*V_membrane/(R*T)))^(-1);
  i_NaK := Cm*i_NaK_max*f_NaK*1/(1 + (Km_Na_i/Na_i)^1.5)*K_o/(K_o + Km_K_o);
  E_Ca := R*T/(2*F)*ln(Ca_o/Ca_i);
  i_B_Na := Cm*g_B_Na*(V_membrane - E_Na);
  i_B_Ca := Cm*g_B_Ca*(V_membrane - E_Ca);
  i_B_K := Cm*g_B_K*(V_membrane - E_K);
  i_NaCa := Cm*I_NaCa_max*(exp(gamma*F*V_membrane/(R*T))*Na_i^3*Ca_o - exp((gamma - 1)*F*V_membrane/(R*T))*Na_o^3*Ca_i)/((K_mNa^3 + Na_o^3)*(K_mCa + Ca_o)*(1 + K_sat*exp((gamma - 1)*V_membrane*F/(R*T))));
  i_CaP := Cm*i_CaP_max*Ca_i/(0.0005 + Ca_i);
  Fn := 1000*(1e-15*V_rel*i_rel - 1e-15/(2*F)*(0.5*i_Ca_L - 0.2*i_NaCa));
  i_rel := K_rel*u^2*v*w*(Ca_rel - Ca_i);
  tau_u := 8;
  u_infinity := (1 + exp(-(Fn - 3.4175e-13)/1.367e-15))^(-1);
  tau_v := 1.91 + 2.09*(1 + exp(-(Fn - 3.4175e-13)/1.367e-15))^(-1);
  v_infinity := 1 - (1 + exp(-(Fn - 6.835e-14)/1.367e-15))^(-1);
  tau_w := piecewise(6*0.2/1.3, abs(V_membrane - 7.9) < 1e-10, 6*(1 - exp(-(V_membrane - 7.9)/5))/((1 + 0.3*exp(-(V_membrane - 7.9)/5))*1*(V_membrane - 7.9)));
  w_infinity := 1 - (1 + exp(-(V_membrane - 40)/17))^(-1);
  i_tr := (Ca_up - Ca_rel)/tau_tr;
  i_up := I_up_max/(1 + K_up/Ca_i);
  i_up_leak := I_up_max*Ca_up/Ca_up_max;
  Ca_CMDN := CMDN_max*Ca_i/(Ca_i + Km_CMDN);
  Ca_TRPN := TRPN_max*Ca_i/(Ca_i + Km_TRPN);
  Ca_CSQN := CSQN_max*Ca_rel/(Ca_rel + Km_CSQN);
  V_i := V_cell*0.68;
  V_rel := 0.0048*V_cell;
  V_up := 0.0552*V_cell;
  B1 := (2*i_NaCa - (i_CaP + i_Ca_L + i_B_Ca))/(2*V_i*F) + (V_up*(i_up_leak - i_up) + i_rel*V_rel)/V_i;
  B2 := 1 + TRPN_max*Km_TRPN/(Ca_i + Km_TRPN)^2 + CMDN_max*Km_CMDN/(Ca_i + Km_CMDN)^2;

  // Rate rules:
  V_membrane' = -(i_Na + i_K1 + i_to + i_Kur + i_Kr + i_Ks + i_B_Na + i_B_Ca + i_NaK + i_CaP + i_NaCa + i_Ca_L + i_st)/Cm;
  m' = (m_inf - m)/tau_m;
  h' = (h_inf - h)/tau_h;
  j' = (j_inf - j)/tau_j;
  oa' = (oa_infinity - oa)/tau_oa;
  oi' = (oi_infinity - oi)/tau_oi;
  ua' = (ua_infinity - ua)/tau_ua;
  ui' = (ui_infinity - ui)/tau_ui;
  xr' = (xr_infinity - xr)/tau_xr;
  xs' = (xs_infinity - xs)/tau_xs;
  d' = (d_infinity - d)/tau_d;
  f' = (f_infinity - f)/tau_f;
  f_Ca' = (f_Ca_infinity - f_Ca)/tau_f_Ca;
  u' = (u_infinity - u)/tau_u;
  v' = (v_infinity - v)/tau_v;
  w' = (w_infinity - w)/tau_w;
  Na_i' = (-3*i_NaK - (3*i_NaCa + i_B_Na + i_Na))/(V_i*F);
  K_i' = (2*i_NaK - (i_K1 + i_to + i_Kur + i_Kr + i_Ks + i_B_K))/(V_i*F);
  Ca_i' = B1/B2;
  Ca_up' = i_up - (i_up_leak + i_tr*V_rel/V_up);
  Ca_rel' = (i_tr - i_rel)*(1 + CSQN_max*Km_CSQN/(Ca_rel + Km_CSQN)^2)^(-1);

  // Unit definitions:
  unit millisecond = 1e-3 second;
  unit per_millisecond = 1 / (1e-3 second);
  unit millivolt = 1e-3 volt;
  unit per_millivolt = 1 / (1e-3 volt);
  unit per_millivolt_millisecond = 1 / (1e-3 volt * 1e-3 second);
  unit millimolar = 1e-3 mole / litre;
  unit millimolar_per_millisecond = 1e-3 mole / (litre * 1e-3 second);
  unit millisecond_per_millimolar = 1e-3 second * litre / (1e-3 mole);
  unit picoA = 1e-12 ampere;
  unit picoA_per_picoF = 1e-12 ampere / (1e-12 farad);
  unit nanoS_per_picoF = 1e-9 siemens / (1e-12 farad);
  unit picoF = 1e-12 farad;
  unit micrometre_3 = (1e-6 metre)^3;
  unit per_micrometre_3 = 1 / (1e-6 metre)^3;
  unit mm2 = (1e-3 metre)^2;
  unit joule_per_mole_kelvin = joule / (mole * kelvin);
  unit coulomb_per_millimole = coulomb / (1e-3 mole);
  unit time = 1e-3 second;
end
