// SBML level 2 version 3

model Corrias2008_GastricSlowWaveActivity()
  // This a model from the article:
  // Quantitative cellular description of gastric slow wave activity.
  // Corrias A, Buist ML. Am J Physiol Gastrointest Liver Physiol 2008 Apr;294(4):G989-95 18276830 ,
  // Abstract:
  // Interstitial cells of Cajal (ICC) are responsible for the spontaneous and omnipresent electrical activity in the stomach. A quantitative description of the intracellular processes whose coordinated activity is believed to generate electrical slow waves has been developed and is presented here. In line with recent experimental evidence, the model describes how the interplay between the mitochondria and the endoplasmic reticulum in cycling intracellular Ca(2+) provides the primary regulatory signal for the initiation of the slow wave. The major ion channels that have been identified as influencing slow wave activity have been modeled according to data obtained from isolated ICC. The model has been validated by comparing the simulated profile of the slow waves with experimental recordings and shows good correspondence in terms of frequency, amplitude, and shape in both control and pharmacologically altered conditions.
  // This model was taken from the CellML repository and automatically converted to SBML.
  // The original model was: Corrias A, Buist ML. (2008) - version02
  // The original CellML model was created by:
  // Corrias, Alberto,
  // albertocorrias@nus.edu.sg
  // National University of Singapore
  // Division of BioEngineering
  // This model originates from BioModels Database: A Database of Annotated Published Models (http://www.ebi.ac.uk/biomodels/). It is copyright (c) 2005-2011 The BioModels.net Team.
  // To the extent possible under law, all copyright and related or neighbouring rights to this encoded model have been dedicated to the public domain worldwide. Please refer to CC0 Public Domain Dedication for more information.
  // In summary, you are entitled to use this encoded model in absolutely any manner you deem suitable, verbatim, or with modification, alone or embedded it in a larger context, redistribute it, commercially or not, in a restricted way or not..
  // To cite BioModels Database, please use: Li C, Donizelli M, Rodriguez N, Dharuri H, Endler L, Chelliah V, Li L, He E, Henry A, Stefan MI, Snoep JL, Hucka M, Le Novère N, Laibe C (2010) BioModels Database: An enhanced, curated and annotated resource for published quantitative kinetic models. BMC Syst Biol., 4:92.
  // biomodels.db:MODEL0913095435
  // isDescribedBy pubmed:18276830
  // biomodels.db:MODEL0913095435
  // isDescribedBy pubmed:18276830
  // biomodels.db:MODEL0913095435
  // biomodels.db:MODEL0913095435

  // Compartments:
  compartment Compartment = 1 litre;

  // Parameters:
  time_Time has time_units;
  T = 310 Temperature_units;
  T_exp = 297 Temperature_units;
  F = 96.4846 F_units;
  R = 8.3144 R_units;
  Q10Ca = 2.1 dimensionless;
  Q10K = 1.5 dimensionless;
  Q10Na = 2.45 dimensionless;
  Ca_o = 2.5 millimolar;
  Na_o = 137 millimolar;
  K_o = 7 millimolar;
  Cl_o = 134 millimolar;
  T_correction_Na has dimensionless;
  T_correction_K has dimensionless;
  T_correction_Ca has dimensionless;
  T_correction_BK has conductance_units;
  FoRT has Inverse_Voltage_units;
  RToF has voltage_units;
  Cm = 0.025 capacitance_units;
  Vol = 1e-12 volume_units;
  P_cyto = 0.7 dimensionless;
  V_cyto has volume_units;
  fc = 0.01 dimensionless;
  Vm = -67 voltage_units;
  Ca_i = 9.93087e-6 millimolar;
  Na_i = 30 millimolar;
  K_i = 120 millimolar;
  Cl_i = 88 millimolar;
  d_inf_Ltype has dimensionless;
  tau_d_Ltype has time_units;
  d_Ltype = 0 dimensionless;
  f_inf_Ltype has dimensionless;
  tau_f_Ltype has time_units;
  f_Ltype = 1 dimensionless;
  f_ca_inf_Ltype has dimensionless;
  tau_f_ca_Ltype has time_units;
  f_ca_Ltype = 1 dimensionless;
  I_Ltype has current_units;
  E_Ca_I_Ltype has voltage_units;
  G_max_Ltype = 2 conductance_units;
  J_PMCA has millimolar_per_second;
  J_max_PMCA = 0.088464 millimolar_per_second;
  d_inf_VDDR has dimensionless;
  tau_d_VDDR has time_units;
  d_VDDR = 0 dimensionless;
  f_inf_VDDR has dimensionless;
  tau_f_VDDR has time_units;
  f_VDDR = 1 dimensionless;
  I_VDDR has current_units;
  E_Ca_I_VDDR has voltage_units;
  G_max_VDDR = 3 conductance_units;
  d_inf_CaCl has dimensionless;
  tau_d_CaCl = 0.03 time_units;
  d_CaCl = 0 dimensionless;
  I_CaCl has current_units;
  E_Cl has voltage_units;
  G_max_CaCl = 10.1 conductance_units;
  d_BK has dimensionless;
  I_BK has current_units;
  E_K_I_BK has voltage_units;
  G_max_BK = 23 conductance_units;
  I_bk has current_units;
  E_K_I_bk has voltage_units;
  G_max_bk = 0.15 conductance_units;
  d_inf_ERG has dimensionless;
  tau_d_ERG has time_units;
  d_ERG = 0 dimensionless;
  I_ERG has current_units;
  E_K_I_ERG has voltage_units;
  G_max_ERG = 2.5 conductance_units;
  d_inf_kv11 has dimensionless;
  tau_d_kv11 has time_units;
  d_kv11 = 0 dimensionless;
  f_inf_kv11 has dimensionless;
  tau_f_kv11 has time_units;
  f_kv11 = 1 dimensionless;
  I_kv11 has current_units;
  E_K_I_kv11 has voltage_units;
  G_max_kv11 = 6.3 conductance_units;
  d_inf_Na has dimensionless;
  tau_d_Na has time_units;
  d_Na = 0 dimensionless;
  f_inf_Na has dimensionless;
  tau_f_Na has time_units;
  f_Na = 1 dimensionless;
  I_Na has current_units;
  E_Na has voltage_units;
  G_max_Na = 20 conductance_units;
  d_inf_NSCC has dimensionless;
  tau_d_NSCC = 0.35 time_units;
  d_NSCC = 0 dimensionless;
  I_NSCC has current_units;
  E_NSCC has voltage_units;
  G_max_NSCC = 12.15 conductance_units;
  NaPerm_o_Kperm = 1.056075 dimensionless;
  P_PU = 0.001 dimensionless;
  P_mito = 0.12871 dimensionless;
  P_ER = 0.1 dimensionless;
  V_MITO has volume_units;
  V_ER has volume_units;
  V_PU has volume_units;
  fe = 0.01 dimensionless;
  fm = 0.0003 dimensionless;
  Ca_PU = 9.02e-5 millimolar;
  Ca_m = 0.000136 millimolar;
  Ca_ER = 0.007299 millimolar;
  ADP_m = 2.60093454 millimolar;
  ADP_i = 0.0077282 millimolar;
  NADH_m = 0.101476 millimolar;
  h = 0.9397 dimensionless;
  IP3 = 0.0006 millimolar;
  deltaPsi = 164.000044 voltage_units;
  deltapH = -0.4 dimensionless;
  Cmito = 0.006995 millifarads;
  K_res = 1.35e18 dimensionless;
  r1 = 2.077e-18 dimensionless;
  r2 = 1.728e-9 dimensionless;
  r3 = 1.059e-26 dimensionless;
  ra = 6.394e-10 rate_constants_units;
  rb = 1.762e-13 rate_constants_units;
  rc1 = 2.656e-19 rate_constants_units;
  rc2 = 8.632e-27 rate_constants_units;
  deltaPsi_B = 50 voltage_units;
  g = 0.85 dimensionless;
  K_F1 = 1710000000 millimolar;
  Pi_m = 20 millimolar;
  p1 = 1.346e-8 dimensionless;
  p2 = 7.739e-7 dimensionless;
  p3 = 6.65e-15 dimensionless;
  pa = 1.656e-5 rate_constants_units;
  pb = 3.373e-7 rate_constants_units;
  pc1 = 9.651e-14 rate_constants_units;
  pc2 = 4.845e-19 rate_constants_units;
  frac = 0.5 dimensionless;
  K_act = 0.00038 millimolar;
  na = 2.8 dimensionless;
  deltaPsi_star = 91 voltage_units;
  K_Na = 9.4 millimolar;
  K_Ca = 0.003 millimolar;
  K_trans = 0.006 millimolar;
  L = 50 dimensionless;
  b = 0.5 dimensionless;
  beta_max = 2.055 rate_constants_units;
  beta1 = 1.66 per_millimolar;
  beta2 = 0.0249 per_millimolar;
  beta3 = 4 per_millimolar;
  beta4 = 2.83 per_millimolar;
  beta5 = 1.3 per_millimolar;
  beta6 = 2.66 per_millimolar;
  beta7 = 0.16 per_millimolar;
  KCa_PDH = 5e-5 millimolar;
  u1 = 15 dimensionless;
  u2 = 1.1 dimensionless;
  n = 2 dimensionless;
  K_Glc = 8.7 millimolar;
  nhyd = 2.7 dimensionless;
  K_hyd = 0.05125 rate_constants_units;
  J_ERleak = 1.666667 rate_constants_units;
  Jmax_IP3 = 50000 rate_constants_units;
  d_IP3 = 0.00025 millimolar;
  d_ACT = 0.001 millimolar;
  d_INH = 0.0014 millimolar;
  tauh = 4 time_units;
  Jmax_serca = 1.8333 millimolar_per_second;
  k_serca = 0.00042 millimolar;
  conc = 0.001 millimolar;
  Jmax_uni = 5000 rate_constants_units;
  Jmax_NaCa = 0.05 millimolar_per_second;
  J_max_leak = 0.01 rate_constants_units;
  rho_res = 0.4 millimolar;
  rho_F1 = 0.7 millimolar;
  g_H = 0.0033333 millimolar_per_second_per_millivolt;
  J_red_basal = 0.3333 millimolar_per_second;
  Jmax_ANT = 15 millimolar_per_second;
  J_hyd_max = 0.037625 millimolar_per_second;
  Glc = 1 millimolar;
  total_NAD_m = 8 millimolar;
  total_ANP_m = 12 millimolar;
  total_ANP_i = 2 millimolar;
  NAD_m has millimolar;
  ATP_m has millimolar;
  ADP_mfree has millimolar;
  ADP3_m has millimolar;
  ATP4_m has millimolar;
  ATP_i has millimolar;
  ADP_ifree has millimolar;
  ADP3_i has millimolar;
  MgADP_i has millimolar;
  ATP4_i has millimolar;
  J_ERout has millimolar_per_second;
  J_SERCA has millimolar_per_second;
  MWC has millimolar;
  J_uni has millimolar_per_second;
  J_NaCa has millimolar_per_second;
  J_leak has millimolar_per_second;
  J_red has millimolar_per_second;
  J_pTCA has millimolar_per_second;
  A_F1 has voltage_units;
  J_pF1 has millimolar_per_second;
  J_HF1 has millimolar_per_second;
  A_res has voltage_units;
  J_o has millimolar_per_second;
  J_glyTotal has millimolar_per_second;
  f_PDHa has dimensionless;
  J_Hres has millimolar_per_second;
  J_ANT has millimolar_per_second;
  PMF has voltage_units;
  J_Hleak has millimolar_per_second;
  J_pGly has millimolar_per_second;
  J_hydSS has millimolar_per_second;
  J_hyd has millimolar_per_second;

  // Assignment rules:
  FoRT := F/(R*T);
  RToF := R*T/F;
  T_correction_Ca := Q10Ca^((T - T_exp)/10);
  T_correction_K := Q10K^((T - T_exp)/10);
  T_correction_Na := Q10Na^((T - T_exp)/10);
  T_correction_BK := 1.1*(T - T_exp);
  V_cyto := Vol*P_cyto;
  d_inf_Ltype := 1/(1 + exp((Vm + 17)/(-4.3)));
  tau_d_Ltype := T_correction_Ca*0.001;
  f_inf_Ltype := 1/(1 + exp((Vm + 43)/8.9));
  tau_f_Ltype := T_correction_Ca*0.086;
  f_ca_inf_Ltype := 1 - 1/(1 + exp((Ca_i - 0.0001 - 0.000214)/(-1.31e-5)));
  tau_f_ca_Ltype := T_correction_Ca*0.002;
  E_Ca_I_Ltype := 0.5*RToF*ln(Ca_o/Ca_i);
  I_Ltype := G_max_Ltype*f_Ltype*d_Ltype*f_ca_Ltype*(Vm - E_Ca_I_Ltype);
  J_PMCA := J_max_PMCA*1/(1 + 0.000298/Ca_i);
  d_inf_VDDR := 1/(1 + exp((Vm + 26)/(-6)));
  tau_d_VDDR := T_correction_Ca*0.006;
  f_inf_VDDR := 1/(1 + exp((Vm + 66)/6));
  tau_f_VDDR := T_correction_Ca*0.04;
  E_Ca_I_VDDR := 0.5*RToF*ln(Ca_o/Ca_i);
  I_VDDR := G_max_VDDR*f_VDDR*d_VDDR*(Vm - E_Ca_I_VDDR);
  d_inf_CaCl := 1/(1 + (0.00014/Ca_i)^3);
  E_Cl := RToF*ln(Cl_i/Cl_o);
  I_CaCl := G_max_CaCl*d_CaCl*(Vm - E_Cl);
  d_BK := 1/(1 + exp(Vm/(-17) - 2*ln(Ca_i/0.001)));
  E_K_I_BK := RToF*ln(K_o/K_i);
  I_BK := (G_max_BK + T_correction_BK)*d_BK*(Vm - E_K_I_BK);
  E_K_I_bk := RToF*ln(K_o/K_i);
  I_bk := G_max_bk*(Vm - E_K_I_bk);
  d_inf_ERG := 0.2 + 0.8/(1 + exp((Vm + 20)/(-1.8)));
  tau_d_ERG := T_correction_K*0.003;
  E_K_I_ERG := RToF*ln(K_o/K_i);
  I_ERG := G_max_ERG*d_ERG*(Vm - E_K_I_ERG);
  d_inf_kv11 := 1/(1 + exp((Vm + 25)/(-7.7)));
  tau_d_kv11 := T_correction_K*0.005;
  f_inf_kv11 := 0.5 + 0.5/(1 + exp((Vm + 44.8)/4.4));
  tau_f_kv11 := T_correction_K*0.005;
  E_K_I_kv11 := RToF*ln(K_o/K_i);
  I_kv11 := G_max_kv11*f_kv11*d_kv11*(Vm - E_K_I_kv11);
  d_inf_Na := 1/(1 + exp((Vm + 47)/(-4.8)));
  tau_d_Na := T_correction_Na*0.003;
  f_inf_Na := 1/(1 + exp((Vm + 78)/7));
  tau_f_Na := T_correction_Na*0.0016;
  E_Na := RToF*ln(Na_o/Na_i);
  I_Na := G_max_Na*f_Na*d_Na*(Vm - E_Na);
  d_inf_NSCC := 1/(1 + (7.45e-5/Ca_PU)^(-85));
  E_NSCC := RToF*ln((K_o + Na_o*NaPerm_o_Kperm)/(K_i + Na_i*NaPerm_o_Kperm));
  I_NSCC := G_max_NSCC*d_NSCC*(Vm - E_NSCC);
  V_MITO := Vol*P_mito;
  V_PU := Vol*P_PU;
  V_ER := Vol*P_ER;
  J_ERout := (Jmax_IP3*(IP3/(IP3 + d_IP3))^3*(Ca_PU/(Ca_PU + d_ACT))^3*h^3 + J_ERleak)*(Ca_ER - Ca_PU);
  J_SERCA := Jmax_serca*Ca_PU^2/(k_serca^2 + Ca_PU^2);
  MWC := conc*Ca_PU/K_trans*(1 + Ca_PU/K_trans)^3/((1 + Ca_PU/K_trans)^4 + L/(1 + Ca_PU/K_act)^na);
  J_uni := Jmax_uni*(MWC - Ca_m*exp(-2*FoRT*(deltaPsi - deltaPsi_star)))*2*FoRT*(deltaPsi - deltaPsi_star)/(1 - exp(-2*FoRT*(deltaPsi - deltaPsi_star)));
  J_NaCa := Jmax_NaCa*exp(b*FoRT*(deltaPsi - deltaPsi_star))/((1 + (K_Na/Na_i)^n)*(1 + K_Ca/Ca_m));
  J_leak := J_max_leak*(Ca_PU - Ca_i);
  A_res := RToF*ln(K_res*sqrt(NADH_m)/sqrt(NAD_m));
  J_o := rho_res*0.5*((ra*10^(6*deltapH) + rc1*exp(6*deltaPsi_B*FoRT))*exp(A_res*FoRT) + (-1*ra*exp(g*6*FoRT*deltaPsi)) + rc2*exp(FoRT*A_res)*exp(FoRT*deltaPsi*6*g))/((1 + r1*exp(FoRT*A_res))*exp(FoRT*deltaPsi_B*6) + (r2 + r3*exp(FoRT*A_res))*exp(FoRT*deltaPsi*g*6));
  J_Hres := rho_res*3.966*(ra*10^(6*deltapH)*exp(FoRT*A_res) + rb*10^(6*deltapH) + (-1*(ra + rb)*exp(g*FoRT*deltaPsi*6)))/((1 + r1*exp(FoRT*A_res))*exp(6*FoRT*deltaPsi_B) + (r2 + r3*exp(FoRT*A_res))*exp(g*6*FoRT*deltaPsi));
  J_glyTotal := beta_max*(1 + beta1*Glc)*beta2*Glc*ATP_i/(1 + beta3*ATP_i + (1 + beta4*ATP_i)*beta5*Glc + (1 + beta6*ATP_i)*beta7*Glc);
  f_PDHa := 1/(1 + u2*(1 + u1/(1 + Ca_m/KCa_PDH)^2));
  J_red := J_red_basal + 6.3944*f_PDHa*J_glyTotal;
  J_pTCA := J_red_basal/3 + 0.84*f_PDHa*J_glyTotal;
  A_F1 := RToF*ln(K_F1*ATP_m/(ADP_mfree*Pi_m));
  J_pF1 := rho_F1*(-1)*((pa*10^(3*deltapH) + pc1*exp(3*FoRT*deltaPsi_B))*exp(FoRT*A_F1) + (-1*pa*exp(3*FoRT*deltaPsi)) + pc2*exp(FoRT*A_F1)*exp(3*FoRT*deltaPsi))/((1 + p1*exp(FoRT*A_F1))*exp(3*FoRT*deltaPsi_B) + (p2 + p3*exp(FoRT*A_F1))*exp(3*FoRT*deltaPsi));
  J_HF1 := -1*rho_F1*3*(pa*10^(3*deltapH)*exp(FoRT*A_F1) + pb*10^(3*deltapH) + (-1*(pa + pb)*exp(3*FoRT*deltaPsi)))/((1 + p1*exp(FoRT*A_F1))*exp(3*FoRT*deltaPsi_B) + (p2 + p3*exp(FoRT*A_F1))*exp(3*FoRT*deltaPsi));
  J_ANT := Jmax_ANT*(1 - ATP4_i*ADP3_m/(ADP3_i*ATP4_m)*exp(-1*FoRT*deltaPsi))/((1 + ATP4_i/ADP3_i*exp(-1*frac*FoRT*deltaPsi))*(1 + ADP3_m/ATP4_m));
  PMF := deltaPsi - 2.303*RToF*deltapH;
  J_Hleak := g_H*PMF;
  J_pGly := 0.15*J_glyTotal;
  J_hydSS := J_hyd_max/(1 + (K_Glc/Glc)^nhyd);
  J_hyd := K_hyd*ATP_i + J_hydSS;
  NAD_m := total_NAD_m - NADH_m;
  ATP_m := total_ANP_m - ADP_m;
  ADP_mfree := 0.8*ADP_m;
  ADP3_m := 0.45*ADP_mfree;
  ATP4_m := 0.05*ATP_m;
  ATP_i := total_ANP_i - ADP_i;
  ADP_ifree := 0.3*ADP_i;
  ADP3_i := 0.45*ADP_ifree;
  MgADP_i := 0.55*ADP_ifree;
  ATP4_i := 0.05*ATP_i;

  // Rate rules:
  Vm' = -1*1/Cm*(I_Na + I_Ltype + I_VDDR + I_kv11 + I_ERG + I_BK + I_CaCl + I_NSCC + I_bk + J_PMCA*2*1000000*1000000*F*V_cyto);
  Ca_i' = fc*((-1*I_Ltype + (-1*I_VDDR))/(2*1000000*1000000*F*V_cyto) + J_leak + (-1*J_PMCA));
  d_Ltype' = (d_inf_Ltype - d_Ltype)/tau_d_Ltype;
  f_Ltype' = (f_inf_Ltype - f_Ltype)/tau_f_Ltype;
  f_ca_Ltype' = (f_ca_inf_Ltype - f_ca_Ltype)/tau_f_ca_Ltype;
  d_VDDR' = (d_inf_VDDR - d_VDDR)/tau_d_VDDR;
  f_VDDR' = (f_inf_VDDR - f_VDDR)/tau_f_VDDR;
  d_CaCl' = (d_inf_CaCl - d_CaCl)/tau_d_CaCl;
  d_ERG' = (d_inf_ERG - d_ERG)/tau_d_ERG;
  d_kv11' = (d_inf_kv11 - d_kv11)/tau_d_kv11;
  f_kv11' = (f_inf_kv11 - f_kv11)/tau_f_kv11;
  d_Na' = (d_inf_Na - d_Na)/tau_d_Na;
  f_Na' = (f_inf_Na - f_Na)/tau_f_Na;
  d_NSCC' = (d_inf_NSCC - d_NSCC)/tau_d_NSCC;
  NADH_m' = J_red - J_o;
  ADP_m' = J_ANT + (-1*J_pTCA) + (-1*J_pF1);
  ADP_i' = -1*J_ANT*V_MITO/V_cyto + J_hyd + (-1*J_pGly);
  Ca_PU' = fc*((J_NaCa - J_uni)*V_MITO/V_PU + (J_ERout - J_SERCA)*V_ER/V_PU + (-1*J_leak*V_cyto/V_PU));
  Ca_m' = fm*(J_uni - J_NaCa);
  Ca_ER' = fe*(J_SERCA - J_ERout);
  deltaPsi' = -1*F*V_MITO*1000000*1/Cmito*(J_Hleak + (-1*J_Hres) + J_ANT + J_HF1 + 2*J_uni);
  h' = 1*(d_INH - h*(Ca_PU + d_INH))/tauh;

  // Unit definitions:
  unit conductance_units = 1e-9 siemens;
  unit millifarads = 1e-3 farad;
  unit voltage_units = 1e-3 volt;
  unit volume_units = litre;
  unit Inverse_Voltage_units = 1 / (1e-3 volt);
  unit Inverse_Voltage_Units_per_time_units = 1 / (1e-3 volt * second);
  unit time_units = second;
  unit current_units = 1e-3 volt * 1e-9 siemens;
  unit rate_constants_units = 1 / second;
  unit capacitance_units = 1e-9 farad;
  unit Temperature_units = kelvin;
  unit Inverse_Temperature_units_times_conductance = 1e-9 siemens / kelvin;
  unit F_units = 1e-6 coulomb / (1e-9 mole);
  unit R_units = 1e-9 joule / (1e-9 mole * kelvin);
  unit millimolar = 1e-3 mole / litre;
  unit per_millimolar = litre / (1e-3 mole);
  unit millimolar_per_second = 1e-3 mole / (litre * second);
  unit millimolar_per_second_per_millivolt = 1e-3 mole / (litre * second * 1e-3 volt);
  unit time = second;
end
