// SBML level 2 version 3

model Corrias2007_GastricSMCellularActivation()
  // This a model from the article:
  // A quantitative model of gastric smooth muscle cellular activation.
  // Corrias A, Buist ML. Ann Biomed Eng 2007 Sep;35(9):1595-607 17486452 ,
  // Abstract:
  // A physiologically realistic quantitative description of the electrical behavior of a gastric smooth muscle (SM) cell is presented. The model describes the response of a SM cell when activated by an electrical stimulus coming from the network of interstitial cells of Cajal (ICC) and is mediated by the activation of different ion channels species in the plasma membrane. The conductances (predominantly Ca2+ and K+) that are believed to substantially contribute to the membrane potential fluctuations during slow wave activity have been included in the model. A phenomenological description of intracellular Ca2+ dynamics has also been included because of its primary importance in regulating a number of cellular processes. In terms of shape, duration, and amplitude, the resulting simulated smooth muscle depolarizations (SMDs) are in good agreement with experimentally recordings from mammalian gastric SM in control and altered conditions. This model has also been designed to be suitable for incorporation into large scale multicellular simulations.
  // This model was taken from the CellML repository and automatically converted to SBML.
  // The original model was: Corrias A, Buist ML. (2007) - version02
  // The original CellML model was created by:
  // Corrias, Alberto,
  // albertocorrias@nus.edu.sg
  // National University of Singapore
  // Division BioEngineering
  // This model originates from BioModels Database: A Database of Annotated Published Models (http://www.ebi.ac.uk/biomodels/). It is copyright (c) 2005-2011 The BioModels.net Team.
  // To the extent possible under law, all copyright and related or neighbouring rights to this encoded model have been dedicated to the public domain worldwide. Please refer to CC0 Public Domain Dedication for more information.
  // In summary, you are entitled to use this encoded model in absolutely any manner you deem suitable, verbatim, or with modification, alone or embedded it in a larger context, redistribute it, commercially or not, in a restricted way or not..
  // To cite BioModels Database, please use: Li C, Donizelli M, Rodriguez N, Dharuri H, Endler L, Chelliah V, Li L, He E, Henry A, Stefan MI, Snoep JL, Hucka M, Le Novère N, Laibe C (2010) BioModels Database: An enhanced, curated and annotated resource for published quantitative kinetic models. BMC Syst Biol., 4:92.
  // biomodels.db:MODEL0913145131
  // isDescribedBy pubmed:17486452
  // biomodels.db:MODEL0913145131
  // isDescribedBy pubmed:17486452
  // biomodels.db:MODEL0913145131
  // biomodels.db:MODEL0913145131

  // Compartments:
  compartment Compartment = 1 litre;

  // Parameters:
  time_Time has time_units;
  Ach = 1e-5 millimolar;
  Gcouple = 1.3 conductance_units;
  T = 310 Temperature_units;
  T_exp = 297 Temperature_units;
  F = 96486 F_units;
  R = 8314.4 R_units;
  Q10Ca = 2.1 dimensionless;
  Q10K = 1.365 dimensionless;
  Q10Na = 2.45 dimensionless;
  Ca_o = 2.5 millimolar;
  Na_o = 137 millimolar;
  K_o = 5.9 millimolar;
  Cl_o = 134 millimolar;
  T_correction_Na has dimensionless;
  T_correction_K has dimensionless;
  T_correction_Ca has dimensionless;
  T_correction_BK has conductance_units;
  FoRT has Inverse_Voltage_units;
  RToF has voltage_units;
  Cm_SM = 77 capacitance_units;
  Vol_SM = 3500 volume_units;
  Vm_SM = -69.75 voltage_units;
  Ca_i = 8e-5 millimolar;
  Na_i = 10 millimolar;
  K_i = 164 millimolar;
  local_time has time_units;
  period = 20000 time_units;
  stim_start has time_units;
  delta_VICC = 59 voltage_units;
  t_ICCpeak = 98 time_units;
  t_ICCplateau = 7582 time_units;
  t_ICC_stimulus = 10000 time_units;
  V_decay = 37.25 voltage_units;
  I_stim has current_units;
  d_inf_Ltype_SM has dimensionless;
  tau_d_Ltype_SM has time_units;
  d_Ltype_SM = 0 dimensionless;
  f_inf_Ltype_SM has dimensionless;
  tau_f_Ltype_SM has time_units;
  f_Ltype_SM = 0.95 dimensionless;
  f_ca_inf_Ltype_SM has dimensionless;
  tau_f_ca_Ltype_SM has time_units;
  f_ca_Ltype_SM = 1 dimensionless;
  I_Ltype_SM has current_units;
  E_Ca_I_Ltype_SM has voltage_units;
  G_max_Ltype = 65 conductance_units;
  J_CaSR_SM has millimolar_per_millisecond;
  J_max_CaSR = 0.31705 millimolar_per_millisecond;
  d_inf_LVA_SM has dimensionless;
  tau_d_LVA_SM has time_units;
  d_LVA_SM = 0.02 dimensionless;
  f_inf_LVA_SM has dimensionless;
  tau_f_LVA_SM has time_units;
  f_LVA_SM = 0.99 dimensionless;
  I_LVA_SM has current_units;
  E_Ca_I_LVA_SM has voltage_units;
  G_max_LVA = 0.18 conductance_units;
  d_BK_SM has dimensionless;
  I_BK_SM has current_units;
  E_K_I_BK_SM has voltage_units;
  G_max_BK = 45.7 conductance_units;
  I_bk_SM has current_units;
  E_K_I_bk_SM has voltage_units;
  G_max_bk = 0.0144 conductance_units;
  xr1_inf_SM has dimensionless;
  tau_xr1_SM has time_units;
  xr1_SM = 0 dimensionless;
  xr2_inf_SM has dimensionless;
  tau_xr2_SM has time_units;
  xr2_SM = 0.82 dimensionless;
  I_kr_SM has current_units;
  E_K_I_kr_SM has voltage_units;
  G_max_kr_SM = 35 conductance_units;
  m_inf_Na has dimensionless;
  tau_m_Na has time_units;
  m_Na_SM = 0.005 dimensionless;
  h_inf_Na has dimensionless;
  tau_h_Na has time_units;
  h_Na_SM = 0.05787 dimensionless;
  I_Na_SM has current_units;
  E_Na has voltage_units;
  G_max_Na_SM = 3 conductance_units;
  xa1_inf_SM has dimensionless;
  tau_xa1_SM has time_units;
  xa1_SM = 0.00414 dimensionless;
  xa2_inf_SM has dimensionless;
  tau_xa2_SM has time_units;
  xa2_SM = 0.72 dimensionless;
  I_ka_SM has current_units;
  E_K_I_ka_SM has voltage_units;
  G_max_ka_SM = 9 conductance_units;
  m_inf_NSCC_SM has dimensionless;
  tau_m_NSCC_SM has time_units;
  m_NSCC_SM = 0 dimensionless;
  I_NSCC_SM has current_units;
  E_NSCC = -28 voltage_units;
  G_max_NSCC_SM = 50 conductance_units;
  f_ca_NSCC_SM has dimensionless;
  rach_NSCC_SM has dimensionless;

  // Assignment rules:
  FoRT := F/(R*T);
  RToF := R*T/F;
  T_correction_Ca := Q10Ca^((T - T_exp)/10);
  T_correction_K := Q10K^((T - T_exp)/10);
  T_correction_Na := Q10Na^((T - T_exp)/10);
  T_correction_BK := 1.1*(T - T_exp);
  stim_start := piecewise(period*1, (time_Time > period*1) && (time_Time <= period*2), period*2, (time_Time > period*2) && (time_Time <= period*3), period*3, (time_Time > period*3) && (time_Time <= period*4), period*4, (time_Time > period*4) && (time_Time <= period*5), 0);
  local_time := time_Time - (stim_start + t_ICCpeak);
  I_stim := piecewise(Gcouple*delta_VICC, local_time < t_ICCpeak, Gcouple*delta_VICC*(1/(1 + exp((local_time - 8000)/1000))), (local_time >= t_ICCpeak) && (local_time <= t_ICCplateau), Gcouple*V_decay*(1/(1 + exp((local_time - 8000)/150))), (local_time > t_ICCplateau) && (local_time < t_ICC_stimulus), 0);
  d_inf_Ltype_SM := 1/(1 + exp((Vm_SM + 17)/(-4.3)));
  tau_d_Ltype_SM := T_correction_Ca*0.47;
  f_inf_Ltype_SM := 1/(1 + exp((Vm_SM + 43)/8.9));
  tau_f_Ltype_SM := T_correction_Ca*86;
  f_ca_inf_Ltype_SM := 1 - 1/(1 + exp((Ca_i - 8.999e-5 - 0.000214)/(-1.31e-5)));
  tau_f_ca_Ltype_SM := T_correction_Ca*2;
  E_Ca_I_Ltype_SM := 0.5*RToF*ln(Ca_o/Ca_i);
  I_Ltype_SM := G_max_Ltype*f_Ltype_SM*d_Ltype_SM*f_ca_Ltype_SM*(Vm_SM - E_Ca_I_Ltype_SM);
  J_CaSR_SM := J_max_CaSR*(Ca_i*1)^1.34;
  d_inf_LVA_SM := 1/(1 + exp((Vm_SM + 27.5)/(-10.9)));
  tau_d_LVA_SM := T_correction_Ca*3;
  f_inf_LVA_SM := 1/(1 + exp((Vm_SM + 15.8)/7));
  tau_f_LVA_SM := T_correction_Ca*7.58*exp(Vm_SM*0.00817);
  E_Ca_I_LVA_SM := 0.5*RToF*ln(Ca_o/Ca_i);
  I_LVA_SM := G_max_LVA*f_LVA_SM*d_LVA_SM*(Vm_SM - E_Ca_I_LVA_SM);
  d_BK_SM := 1/(1 + exp(Vm_SM/(-17) - 2*ln(Ca_i/0.001)));
  E_K_I_BK_SM := RToF*ln(K_o/K_i);
  I_BK_SM := (G_max_BK + T_correction_BK)*d_BK_SM*(Vm_SM - E_K_I_BK_SM);
  E_K_I_bk_SM := RToF*ln(K_o/K_i);
  I_bk_SM := G_max_bk*(Vm_SM - E_K_I_bk_SM);
  xr1_inf_SM := 1/(1 + exp((Vm_SM + 27)/(-5)));
  tau_xr1_SM := T_correction_K*80;
  xr2_inf_SM := 0.2 + 0.8/(1 + exp((Vm_SM + 58)/10));
  tau_xr2_SM := T_correction_K*(-707 + 1481*exp((Vm_SM + 36)/95));
  E_K_I_kr_SM := RToF*ln(K_o/K_i);
  I_kr_SM := G_max_kr_SM*xr1_SM*xr2_SM*(Vm_SM - E_K_I_kr_SM);
  m_inf_Na := 1/(1 + exp((Vm_SM + 47)/(-4.8)));
  tau_m_Na := T_correction_Na*(Vm_SM*(-0.017)*1 + 0.44);
  h_inf_Na := 1/(1 + exp((Vm_SM + 78)/3));
  tau_h_Na := T_correction_Na*(Vm_SM*(-0.25)*1 + 5.5);
  E_Na := RToF*ln(Na_o/Na_i);
  I_Na_SM := G_max_Na_SM*h_Na_SM*m_Na_SM*(Vm_SM - E_Na);
  xa1_inf_SM := 1/(1 + exp((Vm_SM + 26.5)/(-7.9)));
  tau_xa1_SM := T_correction_K*(31.8 + 175*exp(-0.5*((Vm_SM + 44.4)/22.3)^2));
  xa2_inf_SM := 0.1 + 0.9/(1 + exp((Vm_SM + 65)/6.2));
  tau_xa2_SM := T_correction_K*90;
  E_K_I_ka_SM := RToF*ln(K_o/K_i);
  I_ka_SM := G_max_ka_SM*xa1_SM*xa2_SM*(Vm_SM - E_K_I_ka_SM);
  m_inf_NSCC_SM := 1/(1 + exp((Vm_SM + 25)/(-20)));
  tau_m_NSCC_SM := 1/(1 + exp((Vm_SM + 66)/(-26)))*150;
  f_ca_NSCC_SM := 1/(1 + (Ca_i/0.0002)^(-4));
  rach_NSCC_SM := 1/(1 + 0.01/Ach);
  I_NSCC_SM := G_max_NSCC_SM*m_NSCC_SM*f_ca_NSCC_SM*rach_NSCC_SM*(Vm_SM - E_NSCC);

  // Rate rules:
  Vm_SM' = -1*(1/Cm_SM)*(I_Na_SM + I_Ltype_SM + I_LVA_SM + I_kr_SM + I_ka_SM + I_BK_SM + I_NSCC_SM + I_bk_SM + (-1*I_stim));
  Ca_i' = (-1*I_Ltype_SM + (-1*I_LVA_SM))/(2*0.001*F*Vol_SM) + (-1*J_CaSR_SM);
  d_Ltype_SM' = (d_inf_Ltype_SM - d_Ltype_SM)/tau_d_Ltype_SM;
  f_Ltype_SM' = (f_inf_Ltype_SM - f_Ltype_SM)/tau_f_Ltype_SM;
  f_ca_Ltype_SM' = (f_ca_inf_Ltype_SM - f_ca_Ltype_SM)/tau_f_ca_Ltype_SM;
  d_LVA_SM' = (d_inf_LVA_SM - d_LVA_SM)/tau_d_LVA_SM;
  f_LVA_SM' = (f_inf_LVA_SM - f_LVA_SM)/tau_f_LVA_SM;
  xr1_SM' = (xr1_inf_SM - xr1_SM)/tau_xr1_SM;
  xr2_SM' = (xr2_inf_SM - xr2_SM)/tau_xr2_SM;
  m_Na_SM' = (m_inf_Na - m_Na_SM)/tau_m_Na;
  h_Na_SM' = (h_inf_Na - h_Na_SM)/tau_h_Na;
  xa1_SM' = (xa1_inf_SM - xa1_SM)/tau_xa1_SM;
  xa2_SM' = (xa2_inf_SM - xa2_SM)/tau_xa2_SM;
  m_NSCC_SM' = (m_inf_NSCC_SM - m_NSCC_SM)/tau_m_NSCC_SM;

  // Unit definitions:
  unit conductance_units = 1e-9 siemens;
  unit millifarads = 1e-3 farad;
  unit voltage_units = 1e-3 volt;
  unit volume_units = (1e-6 metre)^3;
  unit Inverse_Voltage_units = 1 / (1e-3 volt);
  unit Inverse_Voltage_Units_per_time_units = 1 / (1e-3 volt * 1e-3 second);
  unit time_units = 1e-3 second;
  unit current_units = 1e-3 volt * 1e-9 siemens;
  unit rate_constants_units = 1 / (1e-3 second);
  unit capacitance_units = 1e-12 farad;
  unit Temperature_units = kelvin;
  unit Inverse_Temperature_units_times_conductance = 1e-9 siemens / kelvin;
  unit F_units = coulomb / mole;
  unit R_units = 1e-3 joule / (mole * kelvin);
  unit millimolar = 1e-3 mole / litre;
  unit per_millimolar = litre / (1e-3 mole);
  unit millimolar_per_millisecond = 1e-3 mole / (litre * 1e-3 second);
  unit millimolar_per_millisecond_per_millivolt = 1e-3 mole / (litre * second * 1e-3 volt);
  unit time = 1e-3 second;
end
