// SBML level 2 version 3

model Ciliberto2003_CyclinECdk2Timer()
  // This a model from the article:
  // A kinetic model of the cyclin E/Cdk2 developmental timer in Xenopus laevis embryos.
  // Ciliberto A, Petrus MJ, Tyson JJ, Sible JC. Biophys Chem 2003 Jul 1;104(3):573-89 12914904 ,
  // Abstract:
  // Early cell cycles of Xenopus laevis embryos are characterized by rapid oscillations in the activity of two cyclin-dependent kinases. Cdk1 activity peaks at mitosis, driven by periodic degradation of cyclins A and B. In contrast, Cdk2 activity oscillates twice per cell cycle, despite a constant level of its partner, cyclin E. Cyclin E degrades at a fixed time after fertilization, normally corresponding to the midblastula transition. Based on published data and new experiments, we constructed a mathematical model in which: (1) oscillations in Cdk2 activity depend upon changes in phosphorylation, (2) Cdk2 participates in a negative feedback loop with the inhibitory kinase Wee1; (3) cyclin E is cooperatively removed from the oscillatory system; and (4) removed cyclin E is degraded by a pathway activated by cyclin E/Cdk2 itself. The model's predictions about embryos injected with Xic1, a stoichiometric inhibitor of cyclin E/Cdk2, were experimentally validated.
  // This model was taken from the CellML repository and automatically converted to SBML.
  // The original model was: Ciliberto A, Petrus MJ, Tyson JJ, Sible JC. (2003) - version03
  // The original CellML model was created by:
  // Lloyd, Catherine, May
  // c.lloyd@aukland.ac.nz
  // The University of Auckland
  // The Bioengineering Institute
  // This model originates from BioModels Database: A Database of Annotated Published Models (http://www.ebi.ac.uk/biomodels/). It is copyright (c) 2005-2011 The BioModels.net Team.
  // To the extent possible under law, all copyright and related or neighbouring rights to this encoded model have been dedicated to the public domain worldwide. Please refer to CC0 Public Domain Dedication for more information.
  // In summary, you are entitled to use this encoded model in absolutely any manner you deem suitable, verbatim, or with modification, alone or embedded it in a larger context, redistribute it, commercially or not, in a restricted way or not..
  // To cite BioModels Database, please use: Li C, Donizelli M, Rodriguez N, Dharuri H, Endler L, Chelliah V, Li L, He E, Henry A, Stefan MI, Snoep JL, Hucka M, Le Novère N, Laibe C (2010) BioModels Database: An enhanced, curated and annotated resource for published quantitative kinetic models. BMC Syst Biol., 4:92.
  // biomodels.db:MODEL0913242281
  // isDescribedBy pubmed:12914904
  // biomodels.db:MODEL0913242281
  // isDescribedBy pubmed:12914904
  // biomodels.db:MODEL0913242281
  // biomodels.db:MODEL0913242281

  // Compartments:
  compartment Compartment = 1 litre;

  // Parameters:
  Cdk2_CycE = 0.06 dimensionless;
  PCdk2_CycE = 0.94 dimensionless;
  Wee1_a = 1.02 dimensionless;
  Jwact = 0.01 dimensionless;
  Jwinact = 0.01 dimensionless;
  Wee1_total = 8 dimensionless;
  kwact = 0.75 first_order_rate_constant;
  kwinact = 1.5 first_order_rate_constant;
  Kin_a = 0.6 dimensionless;
  Jiact = 0.01 dimensionless;
  Jiinact = 0.01 dimensionless;
  kiact = 0.15 first_order_rate_constant;
  kiinact = 0.6 first_order_rate_constant;
  Cdk2_CycErem = 0 dimensionless;
  PCdk2_CycErem = 0 dimensionless;
  Deg_a = 0 dimensionless;
  Heav has dimensionless;
  kdact = 0.023 first_order_rate_constant;
  theta = 0.3 dimensionless;
  x has dimensionless;
  Xic = 3 dimensionless;
  Xic_Cdk2_CycE = 0 dimensionless;
  Xic_PCdk2_CycE = 0 dimensionless;
  Xic_Cdk2_CycErem = 0 dimensionless;
  Xic_PCdk2_CycErem = 0 dimensionless;
  Xicrem = 0 dimensionless;
  Cyc_total has dimensionless;
  Xic_total has dimensionless;
  kwee = 1.5 first_order_rate_constant;
  k25A = 0.1 first_order_rate_constant;
  kon = 0.02 first_order_rate_constant;
  koff = 0.0001 first_order_rate_constant;
  kassoc = 0.1 first_order_rate_constant;
  kdissoc = 0.001 first_order_rate_constant;
  kedeg = 0.017 first_order_rate_constant;
  kxdeg = 0.01 first_order_rate_constant;
  phi has dimensionless;
  Deg = 0 dimensionless;
  epsilon = 0.001;
  pool has dimensionless;
  n = 4 dimensionless;
  L = 0.4 dimensionless;

  // Assignment rules:
  x := Cdk2_CycErem - theta;
  Heav := piecewise(0, x < 0, 1);
  Cyc_total := Xic_PCdk2_CycE + Xic_Cdk2_CycE + Xic_PCdk2_CycErem + Xic_Cdk2_CycErem + PCdk2_CycErem + Cdk2_CycErem + Cdk2_CycE + PCdk2_CycE;
  Xic_total := (Xic + Xic_PCdk2_CycE + Xic_Cdk2_CycE + Xic_PCdk2_CycErem + Xic_Cdk2_CycErem + Xicrem)/3;
  phi := (epsilon + pool^n)/(L^n + pool^n);
  pool := Cdk2_CycErem + PCdk2_CycErem + Xic_Cdk2_CycErem + Xic_PCdk2_CycErem;

  // Rate rules:
  Cdk2_CycE' = k25A*PCdk2_CycE + koff*Cdk2_CycErem + kdissoc*Xic_Cdk2_CycE - (kwee*Wee1_a*Cdk2_CycE + kon*phi*Cdk2_CycE + kassoc*Xic*Cdk2_CycE);
  PCdk2_CycE' = kwee*Wee1_a*Cdk2_CycE + koff*PCdk2_CycErem + kdissoc*Xic_PCdk2_CycE - (k25A*PCdk2_CycE + kon*phi*PCdk2_CycE + kassoc*Xic*PCdk2_CycE);
  Wee1_a' = kwact*(Wee1_total - Wee1_a)/(Jwact + Wee1_total - Wee1_a) - kwinact*Kin_a*Wee1_a/(Jwinact + Wee1_a);
  Kin_a' = kiact*(1 - Kin_a)/(Jiact + 1 - Kin_a) - kiinact*Cdk2_CycE*Kin_a/(Jiinact + Kin_a);
  Cdk2_CycErem' = kon*phi*Cdk2_CycE + kxdeg*Xic_Cdk2_CycErem + kdissoc*Xic_Cdk2_CycErem - (koff*Cdk2_CycErem + kedeg*Deg_a*Cdk2_CycErem + kassoc*Xic*Cdk2_CycErem);
  PCdk2_CycErem' = kon*phi*PCdk2_CycE + kxdeg*Xic_PCdk2_CycErem + kdissoc*Xic_PCdk2_CycErem - (koff*PCdk2_CycErem + kedeg*Deg_a*PCdk2_CycErem + kassoc*Xic*PCdk2_CycErem);
  Deg_a' = kdact*Heav;
  Xic' = kdissoc*(Xic_Cdk2_CycE + Xic_PCdk2_CycE + Xic_Cdk2_CycErem + Xic_PCdk2_CycErem) - kassoc*Xic*(Cdk2_CycE + PCdk2_CycE + Cdk2_CycErem + PCdk2_CycErem);
  Xic_Cdk2_CycE' = kassoc*Xic*Cdk2_CycE + koff*Xic_Cdk2_CycErem + k25A*Xic_PCdk2_CycE - (kdissoc*Xic_Cdk2_CycE + kon*phi*Xic_Cdk2_CycE + kwee*Wee1_a*Xic_Cdk2_CycE);
  Xic_PCdk2_CycE' = kassoc*Xic*PCdk2_CycE + koff*Xic_PCdk2_CycErem + kwee*Wee1_a*Xic_Cdk2_CycE - (kdissoc*Xic_PCdk2_CycE + kon*phi*Xic_PCdk2_CycE + k25A*Xic_PCdk2_CycE);
  Xic_Cdk2_CycErem' = kassoc*Xic*Cdk2_CycErem + kon*phi*Xic_Cdk2_CycE - (kdissoc*Xic_Cdk2_CycErem + koff*Xic_Cdk2_CycErem + kedeg*Deg_a*Xic_Cdk2_CycErem + kxdeg*Xic_Cdk2_CycErem);
  Xic_PCdk2_CycErem' = kassoc*Xic*PCdk2_CycErem + kon*phi*Xic_PCdk2_CycE - (kdissoc*Xic_PCdk2_CycErem + koff*Xic_PCdk2_CycErem + kedeg*Deg*Xic_PCdk2_CycErem + kxdeg*Xic_PCdk2_CycErem);
  Xicrem' = kedeg*Deg_a*Xic_Cdk2_CycErem + kedeg*Deg_a*Xic_PCdk2_CycErem - kxdeg*Xicrem;

  // Unit definitions:
  unit minute = 60 second;
  unit first_order_rate_constant = 1 / (60 second);
  unit time = 60 second;
end
