// SBML level 2 version 3

model Ciliberto2003_Swe1Network()
  // This a model from the article:
  // Mathematical model of the morphogenesis checkpoint in budding yeast.
  // Ciliberto A, Novak B, Tyson JJ. J Cell Biol 2003 Dec 22;163(6):1243-54 14691135 ,
  // Abstract:
  // The morphogenesis checkpoint in budding yeast delays progression through the cell cycle in response to stimuli that prevent bud formation. Central to the checkpoint mechanism is Swe1 kinase: normally inactive, its activation halts cell cycle progression in G2. We propose a molecular network for Swe1 control, based on published observations of budding yeast and analogous control signals in fission yeast. The proposed Swe1 network is merged with a model of cyclin-dependent kinase regulation, converted into a set of differential equations and studied by numerical simulation. The simulations accurately reproduce the phenotypes of a dozen checkpoint mutants. Among other predictions, the model attributes a new role to Hsl1, a kinase known to play a role in Swe1 degradation: Hsl1 must also be indirectly responsible for potent inhibition of Swe1 activity. The model supports the idea that the morphogenesis checkpoint, like other checkpoints, raises the cell size threshold for progression from one phase of the cell cycle to the next.
  // This model was taken from the CellML repository and automatically converted to SBML.
  // The original model was: Ciliberto A, Novak B, Tyson JJ. (2003) - version03
  // The original CellML model was created by:
  // Lloyd, Catherine, May
  // c.lloyd@aukland.ac.nz
  // The University of Auckland
  // The Bioengineering Institute
  // This model originates from BioModels Database: A Database of Annotated Published Models (http://www.ebi.ac.uk/biomodels/). It is copyright (c) 2005-2011 The BioModels.net Team.
  // To the extent possible under law, all copyright and related or neighbouring rights to this encoded model have been dedicated to the public domain worldwide. Please refer to CC0 Public Domain Dedication for more information.
  // In summary, you are entitled to use this encoded model in absolutely any manner you deem suitable, verbatim, or with modification, alone or embedded it in a larger context, redistribute it, commercially or not, in a restricted way or not..
  // To cite BioModels Database, please use: Li C, Donizelli M, Rodriguez N, Dharuri H, Endler L, Chelliah V, Li L, He E, Henry A, Stefan MI, Snoep JL, Hucka M, Le Novère N, Laibe C (2010) BioModels Database: An enhanced, curated and annotated resource for published quantitative kinetic models. BMC Syst Biol., 4:92.
  // biomodels.db:MODEL0913285268
  // isDescribedBy pubmed:14691135
  // biomodels.db:MODEL0913285268
  // isDescribedBy pubmed:14691135
  // biomodels.db:MODEL0913285268
  // biomodels.db:MODEL0913285268

  // Compartments:
  compartment Compartment = 1 litre;

  // Parameters:
  Clb2 = 0.184 dimensionless;
  epsilon = 0.5 dimensionless;
  Jm = 10 dimensionless;
  ks_clb = 0.015 first_order_rate_constant;
  PClb2 = 0 dimensionless;
  Trim = 0.084 dimensionless;
  PTrim = 0 dimensionless;
  Mcm_a = 0.933 dimensionless;
  Ji_mcm = 0.1 dimensionless;
  Ja_mcm = 0.1 dimensionless;
  ki_mcm = 0.15 first_order_rate_constant;
  ka_mcm = 1 first_order_rate_constant;
  Sic1 = 0.003 dimensionless;
  ks_sic = 0.1 first_order_rate_constant;
  Mih1_a = 0.808 dimensionless;
  Ji_mih = 0.1 dimensionless;
  Ja_mih = 0.1 dimensionless;
  Vi_mih = 0.3 first_order_rate_constant;
  Va_mih = 1 first_order_rate_constant;
  IE_a = 0.522 dimensionless;
  Ji_ie = 0.01 dimensionless;
  Ja_ie = 0.01 dimensionless;
  ki_ie = 0.04 first_order_rate_constant;
  ka_ie = 0.1 first_order_rate_constant;
  Cdc20_a = 1.438 dimensionless;
  Cdc20 = 1.172 dimensionless;
  ks_cdc20_1 = 0.005 first_order_rate_constant;
  ks_cdc20_2 = 0.3 first_order_rate_constant;
  Js_cdc20 = 0.3 dimensionless;
  Cdh1_a = 0.993 dimensionless;
  Ji_cdh = 0.01 dimensionless;
  Ja_cdh = 0.01 dimensionless;
  ki_cdh = 35 first_order_rate_constant;
  ka_cdh_1 = 1 first_order_rate_constant;
  ki_cdh_1 = 2 first_order_rate_constant;
  ka_cdh_2 = 10 first_order_rate_constant;
  Cln = 0.054 dimensionless;
  ks_cln = 0.1 first_order_rate_constant;
  kd_cln = 0.1 first_order_rate_constant;
  SBF_a = 0.124 dimensionless;
  Ji_sbf = 0.01 dimensionless;
  Ja_sbf = 0.01 dimensionless;
  ki_sbf_1 = 1 first_order_rate_constant;
  ka_sbf_1 = 1 first_order_rate_constant;
  ki_sbf_2 = 2 first_order_rate_constant;
  ka_sbf_2 = 0 first_order_rate_constant;
  Swe1 = 0 dimensionless;
  ks_swe = 0.0025 first_order_rate_constant;
  ks_sweC = 0 first_order_rate_constant;
  PSwe1 = 0 dimensionless;
  Swe1M = 0.018 dimensionless;
  PSwe1M = 0.013 dimensionless;
  kd_swe_2 = 0.05 first_order_rate_constant;
  BE = 0 dimensionless;
  ks_bud = 0.1 first_order_rate_constant;
  kd_bud = 0.1 first_order_rate_constant;
  M = 0.802 dimensionless;
  mu = 0.005 first_order_rate_constant;
  IE has dimensionless;
  IE_total = 1 dimensionless;
  Cdh1 has dimensionless;
  Cdh1_total = 1 dimensionless;
  Mih1 has dimensionless;
  Mih1_total = 1 dimensionless;
  Mcm has dimensionless;
  Mcm_total = 1 dimensionless;
  SBF has dimensionless;
  SBF_total = 1 dimensionless;
  Swe1_total has dimensionless;
  BUD has dimensionless;
  Ji_cdc20 = 0.001 dimensionless;
  Ja_cdc20 = 0.001 dimensionless;
  ki_cdc20 = 0.25 first_order_rate_constant;
  kd_cdc20 = 0.1 first_order_rate_constant;
  ka_cdc20 = 1 first_order_rate_constant;
  khsl1 = 1 first_order_rate_constant;
  khsl1r = 0.01 first_order_rate_constant;
  kd_swe_1 = 0.007 first_order_rate_constant;
  Ji_wee = 0.05 dimensionless;
  Ja_wee = 0.05 dimensionless;
  Vi_wee = 1 first_order_rate_constant;
  Va_wee = 0.3 first_order_rate_constant;
  kd_clb_1 = 0.015 first_order_rate_constant;
  kd_clb_2 = 1 first_order_rate_constant;
  kd_clb_3 = 0.1 first_order_rate_constant;
  kswe has first_order_rate_constant;
  kmih has first_order_rate_constant;
  kass = 300 first_order_rate_constant;
  kdiss = 0.1 first_order_rate_constant;
  kd_sic = 0.01 first_order_rate_constant;
  kd_sic_1 = 1 first_order_rate_constant;
  kd_sic_2 = 3 first_order_rate_constant;
  kswe_1 = 2 first_order_rate_constant;
  kswe_2 = 0.01 first_order_rate_constant;
  kswe_3 = 0.2 first_order_rate_constant;
  kmih_1 = 5 first_order_rate_constant;
  kmih_2 = 0.5 first_order_rate_constant;

  // Assignment rules:
  IE := IE_total - IE_a;
  Cdh1 := Cdh1_total - Cdh1_a;
  Mih1 := Mih1_total - Mih1_a;
  Mcm := Mcm_total - Mcm_a;
  SBF := SBF_total - SBF_a;
  Swe1_total := Swe1 + PSwe1 + Swe1M + PSwe1M;
  BUD := piecewise(0, (BE <= 0.6) && (Clb2 < 0.2), 1);
  kmih := kmih_1*Mih1_a + kmih_2*Mih1;
  kswe := kswe_1*Swe1 + kswe_2*Swe1M + kswe_3*PSwe1;

  // Rate rules:
  Clb2' = ks_clb*(epsilon + Mcm_a)*M/(1 + M/Jm) + kmih*PClb2 + kdiss*Trim + (kd_sic + kd_sic_1*Cln + kd_sic_2*Clb2)*Trim - ((kd_clb_1 + kd_clb_2*Cdh1_a + kd_clb_3*Cdc20_a)*Clb2 + kswe*Clb2 + kass*Sic1*Clb2);
  PClb2' = kswe*Clb2 + kdiss*PTrim + (kd_sic + kd_sic_1*Cln + kd_sic_2*Clb2)*PTrim - ((kd_clb_1 + kd_clb_2*Cdh1_a + kd_clb_3*Cdc20_a)*PClb2 + kmih*PClb2 + kass*Sic1*PClb2);
  Trim' = kass*Sic1*Clb2 + kmih*PTrim - (kdiss*Trim + (kd_sic + kd_sic_1*Cln + kd_sic_2*Clb2)*Trim + (kd_clb_1 + kd_clb_2*Cdh1_a + kd_clb_3*Cdc20_a)*Trim + kswe*Trim);
  PTrim' = kswe*Trim + kass*Sic1*PClb2 - (kdiss*PTrim + (kd_sic + kd_sic_1*Cln + kd_sic_2*Clb2)*PTrim + (kd_clb_1 + kd_clb_2*Cdh1_a + kd_clb_3*Cdc20_a)*PTrim + kmih*PTrim);
  Mcm_a' = -ki_mcm*Mcm_a/(Ji_mcm + Mcm_a) + ka_mcm*Mcm*Clb2/(Ja_mcm + Mcm);
  Sic1' = ks_sic + kdiss*(PTrim + Trim) + (kd_clb_1 + kd_clb_2*Cdh1_a + kd_clb_3*Cdc20_a)*(PTrim + Trim) - ((kd_sic + kd_sic_1*Cln + kd_sic_2*Clb2)*Sic1 + kass*Sic1*(Clb2 + PClb2));
  Mih1_a' = -Vi_mih*Mih1_a/(Ji_mih + Mih1_a) + Va_mih*Clb2*Mih1/(Ja_mih + Mih1);
  IE_a' = -ki_ie*IE_a/(Ji_ie + IE_a) + ka_ie*Clb2*IE/(Ja_ie + IE);
  Cdc20_a' = ka_cdc20*IE_a*Cdc20/(Ja_cdc20 + Cdc20) - (ki_cdc20*Cdc20_a/(Ji_cdc20 + Cdc20_a) + kd_cdc20*Cdc20_a);
  Cdc20' = ks_cdc20_1 + ks_cdc20_2*Clb2^4/(Js_cdc20^4 + Clb2^4) + ki_cdc20*Cdc20_a/(Ji_cdc20 + Cdc20_a) - (ka_cdc20*IE_a*Cdc20/(Ja_cdc20 + Cdc20) + kd_cdc20*Cdc20);
  Cdh1_a' = -(ki_cdh*Clb2 + ki_cdh_1*Cln)*Cdh1_a/(Ji_cdh + Cdh1_a) + (ka_cdh_1 + ka_cdh_2*Cdc20_a)*Cdh1/(Ja_cdh + Cdh1);
  Cln' = ks_cln*SBF_a - kd_cln*Cln;
  SBF_a' = -(ki_sbf_1 + ki_sbf_2*Clb2)*SBF_a/(Ji_sbf + SBF_a) + (ka_sbf_1*M + ka_sbf_2*Cln)*SBF/(Ja_sbf + SBF);
  Swe1' = ks_swe*SBF_a + ks_sweC + khsl1r*Swe1M + Va_wee*PSwe1/(Ja_wee + PSwe1) - (khsl1*BUD*Swe1 + Vi_wee*Clb2*Swe1/(Ji_wee + Swe1) + kd_swe_1*Swe1);
  PSwe1' = khsl1r*PSwe1M + Vi_wee*Swe1*Clb2/(Ji_wee + Swe1) - (khsl1*BUD*PSwe1 + Va_wee*PSwe1/(Ja_wee + PSwe1) + kd_swe_1*PSwe1);
  Swe1M' = khsl1*BUD*Swe1 + Va_wee*PSwe1M/(Ja_wee + PSwe1M) - (khsl1r*Swe1M + Vi_wee*Clb2*Swe1M/(Ji_wee + Swe1M) + kd_swe_1*Swe1M);
  PSwe1M' = khsl1*BUD*PSwe1 + Vi_wee*Clb2*Swe1M/(Ji_wee + Swe1M) - (khsl1r*PSwe1M + Va_wee*PSwe1M/(Ja_wee + PSwe1M) + kd_swe_2*PSwe1M);
  BE' = ks_bud*Cln - kd_bud*BE;
  M' = mu*M;

  // Unit definitions:
  unit minute = 60 second;
  unit first_order_rate_constant = 1 / (60 second);
  unit time = 60 second;
end
