// SBML level 2 version 1

model Rodriguez2005_denovo_pyrimidine_biosynthesis()
  // This model originates from BioModels Database: A Database of Annotated Published Models. It is copyright (c) 2005-2011 The BioModels.net Team.
  // To the extent possible under law, all copyright and related or neighbouring rights to this encoded model have been dedicated to the public domain worldwide. Please refer to CC0 Public Domain Dedication for more information.
  // In summary, you are entitled to use this encoded model in absolutely any manner you deem suitable, verbatim, or with modification, alone or embedded it in a larger context, redistribute it, commercially or not, in a restricted way or not..
  // To cite BioModels Database, please use: Li C, Donizelli M, Rodriguez N, Dharuri H, Endler L, Chelliah V, Li L, He E, Henry A, Stefan MI, Snoep JL, Hucka M, Le Novère N, Laibe C (2010) BioModels Database: An enhanced, curated and annotated resource for published quantitative kinetic models. BMC Syst Biol., 4:92.
  // biomodels.db:MODEL0995500644
  // isDescribedBy pubmed:15784266
  // biomodels.db:MODEL0995500644
  // isDescribedBy pubmed:15784266
  // biomodels.db:MODEL0995500644
  // biomodels.db:MODEL0995500644

  // Compartments:
  compartment compartment = 1;

  // Species:
  species cp in compartment = 10;
  species ca in compartment = 10;
  species dho in compartment = 10;
  species oro in compartment = 10;
  species omp in compartment = 10;
  species ump in compartment = 6;
  species utp in compartment = 6;
  species ctp in compartment = 2.2;
  species ura in compartment = 5;
  species E1 in compartment = 7.5;
  species E2 in compartment = 700;
  species $atp in compartment = 6;

  // Reactions:
  r1: => cp; compartment*(vmax1*E1*bc*glu/(1 + ump/K_iump))*(K_ibc*K_q + K_q*bc + K_bc*glu + bc*glu);  // modifiers: E1, ump
    vmax1 = 0.38; bc = 8; glu = 4; K_iump = 980; K_ibc = 750; K_q = 22; K_bc = 36;
  r2: cp => ca; compartment*((vmax2*E2 + 2*cp*asp^nH2/K_i2^nH2)/(1/1 + atp/K_atp)*(1 + ctp/K_ctp + ctp*utp/K_utp) + K_m2^nH1/cp*asp^nH1 + cp*asp^nH2/K_i2^nH2);  // modifiers: E2, ctp, utp, atp
    vmax2 = 24; asp = 4; nH2 = 2; K_i2 = 2; K_atp = 4.8; K_ctp = 4.1; K_utp = 4.9; K_m2 = 19.8; nH1 = 2.3;
  r3: ca => dho; compartment*(vmax3*ca/K_m3 + ca);
    vmax3 = 24.7; K_m3 = 0.7;
  r4: dho => oro; compartment*(vmax4*dho/K_m4 + dho);
    vmax4 = 6.4; K_m4 = 0.24;
  r5: oro => omp; compartment*(vmax5*oro*r5_prpp/K_m5 + oro*r5_prpp);
    vmax5 = 0.6; K_m5 = 9.9; r5_prpp = 0.18;
  r6: omp => ump; compartment*(vmax6*omp/K_m6 + omp);
    vmax6 = 0.8; K_m6 = 32;
  r7: ump => utp; compartment*(vmax7*ump/K_m7 + ump);
    vmax7 = 1.18; K_m7 = 19.8;
  utp_degradation: utp => ; compartment*(utp_degradation_g_pyr*utp/utp_degradation_K_Mp + utp);
    utp_degradation_g_pyr = 0.4; utp_degradation_K_Mp = 5.8;
  r8: utp => ctp; compartment*(vmax8*utp/K_m8 + utp);
    vmax8 = 0.28; K_m8 = 8.4;
  ctp_degradation: ctp => ; compartment*(ctp_degradation_g_pyr*ctp/ctp_degradation_K_Mp + ctp);
    ctp_degradation_g_pyr = 0.4; ctp_degradation_K_Mp = 5.8;
  r9: ura => ump; compartment*(vmax9*ura*r9_prpp/K_m9 + ura*r9_prpp);
    vmax9 = 2.8; r9_prpp = 0.18; K_m9 = 0.08;
  E1_Synthesis: => E1; compartment*(E1_Synthesis_K_e1/(E1_Synthesis_K_e1 + ump) - K_deg1*E1);  // modifiers: ump
    E1_Synthesis_K_e1 = 36; K_deg1 = 0.12;
  E2_synthesis: => E2; compartment*(E2_synthesis_K_e1*60/(K_e2 + ctp + ura) - K_deg2*E2);  // modifiers: ura, ctp
    K_e2 = 120; K_deg2 = 0.072; E2_synthesis_K_e1 = 36;
end
