// SBML level 2 version 4
// Originally created by MathSBML 2.9.0 using Mathematica Version 7.0 for Mac OS X PowerPC (32-bit) (February 18, 2009)

model Pepke2010_Ca2_CaM_mCaMKII()
  // Pepke2010_Full_Ca2/CaM_mCaMKII
  // This the full model from the article:
  // A dynamic model of interactions of Ca2+, calmodulin, and catalytic subunits of Ca2+/calmodulin-dependent protein kinase II.
  // Pepke S, Kinzer-Ursem T, Mihalas S, Kennedy MB. PLoS Comput Biol 2010 Feb 12;6(2):e1000675. PMID: 20168991 , doi: 10.1371/journal.pcbi.1000675 ;
  // Abstract:
  // During the acquisition of memories, influx of Ca2+ into the postsynaptic spine through the pores of activated N-methyl-D-aspartate-type glutamate receptors triggers processes that change the strength of excitatory synapses. The pattern of Ca2+influx during the first few seconds of activity is interpreted within the Ca2+-dependent signaling network such that synaptic strength is eventually either potentiated or depressed. Many of the critical signaling enzymes that control synaptic plasticity,including Ca2+/calmodulin-dependent protein kinase II (CaMKII), are regulated by calmodulin, a small protein that can bindup to 4 Ca2+ ions. As a first step toward clarifying how the Ca2+-signaling network decides between potentiation or depression, we have created a kinetic model of the interactions of Ca2+, calmodulin, and CaMKII that represents our best understanding of the dynamics of these interactions under conditions that resemble those in a postsynaptic spine. We constrained parameters of the model from data in the literature, or from our own measurements, and then predicted time courses of activation and autophosphorylation of CaMKII under a variety of conditions. Simulations showed that species of calmodulin with fewer than four bound Ca2+ play a significant role in activation of CaMKII in the physiological regime,supporting the notion that processing of Ca2+ signals in a spine involves competition among target enzymes for binding to unsaturated species of CaM in an environment in which the concentration of Ca2+ is fluctuating rapidly. Indeed, we showed that dependence of activation on the frequency of Ca2+ transients arises from the kinetics of interaction of fluctuating Ca2+with calmodulin/CaMKII complexes. We used parameter sensitivity analysis to identify which parameters will be most beneficial to measure more carefully to improve the accuracy of predictions. This model provides a quantitative base from which to build more complex dynamic models of postsynaptic signal transduction during learning.
  // The nomenclature of the different Calmodulin forms in th emodel differs from the description in the article. The C and N terminal Ca 2+ binding sites are described by the numbers at each species name, with the first entry indicating the number of Ca 2+ ions bound to the C and the second the ones bound on the N terminal sites. In complexes with two CaM, the four numbers at the end indicate _C_N_C_N.
  // For example: CaM1N2C in the article is CaM_2_1 in the model, CaM4 is CaM_2_2 and KCaMcomplex_0_1_1_2 stands for CaMKII bound to CaM1C and CaM2N1C .
  // This is a Systems Biology Markup Language (SBML) file, originally generated by MathSBML 2.9.0 [8-Oct-2008] 15-Jan-2010 13:13:32 (GMT-07:60). SBML is a form of XML, and most XML files will not display properly in an internet browser. To view the contents of an XML file use the "Page Source" or equivalent button on you browser.
  // This model originates from BioModels Database: A Database of Annotated Published Models (http://www.ebi.ac.uk/biomodels/). It is copyright (c) 2005-2011 The BioModels.net Team.
  // To the extent possible under law, all copyright and related or neighbouring rights to this encoded model have been dedicated to the public domain worldwide. Please refer to CC0 Public Domain Dedication for more information.
  // In summary, you are entitled to use this encoded model in absolutely any manner you deem suitable, verbatim, or with modification, alone or embedded it in a larger context, redistribute it, commercially or not, in a restricted way or not..
  // To cite BioModels Database, please use: Li C, Donizelli M, Rodriguez N, Dharuri H, Endler L, Chelliah V, Li L, He E, Henry A, Stefan MI, Snoep JL, Hucka M, Le Novère N, Laibe C (2010) BioModels Database: An enhanced, curated and annotated resource for published quantitative kinetic models. BMC Syst Biol., 4:92.
  // biomodels.db:MODEL1001150000
  // isDescribedBy pubmed:20168991
  // biomodels.db:MODEL1001150000
  // isDescribedBy pubmed:20168991
  // biomodels.db:MODEL1001150000
  // biomodels.db:MODEL1001150000

  // Compartments:
  compartment Neuron = 1 volume;

  // Species:
  species CaM_0_1 in Neuron = 0;
  species CaM_0_2 in Neuron = 0;
  species CaM_1_0 in Neuron = 0;
  species CaM_1_1 in Neuron = 0;
  species CaM_1_2 in Neuron = 0;
  species CaM_2_0 in Neuron = 0;
  species CaM_2_1 in Neuron = 0;
  species CaM_2_2 in Neuron = 0;
  species KCaM_0_0 in Neuron = 0;
  species KCaM_0_1 in Neuron = 0;
  species KCaM_0_2 in Neuron = 0;
  species KCaM_1_0 in Neuron = 0;
  species KCaM_1_1 in Neuron = 0;
  species KCaM_1_2 in Neuron = 0;
  species KCaM_2_0 in Neuron = 0;
  species KCaM_2_1 in Neuron = 0;
  species KCaM_2_2 in Neuron = 0;
  species KCaMcomplex_0_0_0_1 in Neuron = 0;
  species KCaMcomplex_0_0_0_2 in Neuron = 0;
  species KCaMcomplex_0_0_1_0 in Neuron = 0;
  species KCaMcomplex_0_0_1_1 in Neuron = 0;
  species KCaMcomplex_0_0_1_2 in Neuron = 0;
  species KCaMcomplex_0_0_2_0 in Neuron = 0;
  species KCaMcomplex_0_0_2_1 in Neuron = 0;
  species KCaMcomplex_0_0_2_2 in Neuron = 0;
  species KCaMcomplex_0_1_0_2 in Neuron = 0;
  species KCaMcomplex_0_1_1_0 in Neuron = 0;
  species KCaMcomplex_0_1_1_1 in Neuron = 0;
  species KCaMcomplex_0_1_1_2 in Neuron = 0;
  species KCaMcomplex_0_1_2_0 in Neuron = 0;
  species KCaMcomplex_0_1_2_1 in Neuron = 0;
  species KCaMcomplex_0_1_2_2 in Neuron = 0;
  species KCaMcomplex_0_2_1_0 in Neuron = 0;
  species KCaMcomplex_0_2_1_1 in Neuron = 0;
  species KCaMcomplex_0_2_1_2 in Neuron = 0;
  species KCaMcomplex_0_2_2_0 in Neuron = 0;
  species KCaMcomplex_0_2_2_1 in Neuron = 0;
  species KCaMcomplex_0_2_2_2 in Neuron = 0;
  species KCaMcomplex_1_0_1_1 in Neuron = 0;
  species KCaMcomplex_1_0_1_2 in Neuron = 0;
  species KCaMcomplex_1_0_2_0 in Neuron = 0;
  species KCaMcomplex_1_0_2_1 in Neuron = 0;
  species KCaMcomplex_1_0_2_2 in Neuron = 0;
  species KCaMcomplex_1_1_1_2 in Neuron = 0;
  species KCaMcomplex_1_1_2_0 in Neuron = 0;
  species KCaMcomplex_1_1_2_1 in Neuron = 0;
  species KCaMcomplex_1_1_2_2 in Neuron = 0;
  species KCaMcomplex_1_2_2_0 in Neuron = 0;
  species KCaMcomplex_1_2_2_1 in Neuron = 0;
  species KCaMcomplex_1_2_2_2 in Neuron = 0;
  species KCaMcomplex_2_0_2_1 in Neuron = 0;
  species KCaMcomplex_2_0_2_2 in Neuron = 0;
  species KCaMcomplex_2_1_2_2 in Neuron = 0;
  species KCaMcomplex_0_0_0_0 in Neuron = 0;
  species KCaMcomplex_0_1_0_1 in Neuron = 0;
  species KCaMcomplex_0_2_0_2 in Neuron = 0;
  species KCaMcomplex_1_0_1_0 in Neuron = 0;
  species KCaMcomplex_1_1_1_1 in Neuron = 0;
  species KCaMcomplex_1_2_1_2 in Neuron = 0;
  species KCaMcomplex_2_0_2_0 in Neuron = 0;
  species KCaMcomplex_2_1_2_1 in Neuron = 0;
  species KCaMcomplex_2_2_2_2 in Neuron = 0;
  species pKCaM_0_0 in Neuron = 0;
  species pKCaM_0_1 in Neuron = 0;
  species pKCaM_0_2 in Neuron = 0;
  species pKCaM_1_0 in Neuron = 0;
  species pKCaM_1_1 in Neuron = 0;
  species pKCaM_1_2 in Neuron = 0;
  species pKCaM_2_0 in Neuron = 0;
  species pKCaM_2_1 in Neuron = 0;
  species pKCaM_2_2 in Neuron = 0;
  species pKCaMcomplex_0_0_0_0 in Neuron = 0;
  species pKCaMcomplex_0_0_0_1 in Neuron = 0;
  species pKCaMcomplex_0_0_0_2 in Neuron = 0;
  species pKCaMcomplex_0_0_1_0 in Neuron = 0;
  species pKCaMcomplex_0_0_1_1 in Neuron = 0;
  species pKCaMcomplex_0_0_1_2 in Neuron = 0;
  species pKCaMcomplex_0_0_2_0 in Neuron = 0;
  species pKCaMcomplex_0_0_2_1 in Neuron = 0;
  species pKCaMcomplex_0_0_2_2 in Neuron = 0;
  species pKCaMcomplex_0_1_0_0 in Neuron = 0;
  species pKCaMcomplex_0_1_0_1 in Neuron = 0;
  species pKCaMcomplex_0_1_0_2 in Neuron = 0;
  species pKCaMcomplex_0_1_1_0 in Neuron = 0;
  species pKCaMcomplex_0_1_1_1 in Neuron = 0;
  species pKCaMcomplex_0_1_1_2 in Neuron = 0;
  species pKCaMcomplex_0_1_2_0 in Neuron = 0;
  species pKCaMcomplex_0_1_2_1 in Neuron = 0;
  species pKCaMcomplex_0_1_2_2 in Neuron = 0;
  species pKCaMcomplex_0_2_0_0 in Neuron = 0;
  species pKCaMcomplex_0_2_0_1 in Neuron = 0;
  species pKCaMcomplex_0_2_0_2 in Neuron = 0;
  species pKCaMcomplex_0_2_1_0 in Neuron = 0;
  species pKCaMcomplex_0_2_1_1 in Neuron = 0;
  species pKCaMcomplex_0_2_1_2 in Neuron = 0;
  species pKCaMcomplex_0_2_2_0 in Neuron = 0;
  species pKCaMcomplex_0_2_2_1 in Neuron = 0;
  species pKCaMcomplex_0_2_2_2 in Neuron = 0;
  species pKCaMcomplex_1_0_0_0 in Neuron = 0;
  species pKCaMcomplex_1_0_0_1 in Neuron = 0;
  species pKCaMcomplex_1_0_0_2 in Neuron = 0;
  species pKCaMcomplex_1_0_1_0 in Neuron = 0;
  species pKCaMcomplex_1_0_1_1 in Neuron = 0;
  species pKCaMcomplex_1_0_1_2 in Neuron = 0;
  species pKCaMcomplex_1_0_2_0 in Neuron = 0;
  species pKCaMcomplex_1_0_2_1 in Neuron = 0;
  species pKCaMcomplex_1_0_2_2 in Neuron = 0;
  species pKCaMcomplex_1_1_0_0 in Neuron = 0;
  species pKCaMcomplex_1_1_0_1 in Neuron = 0;
  species pKCaMcomplex_1_1_0_2 in Neuron = 0;
  species pKCaMcomplex_1_1_1_0 in Neuron = 0;
  species pKCaMcomplex_1_1_1_1 in Neuron = 0;
  species pKCaMcomplex_1_1_1_2 in Neuron = 0;
  species pKCaMcomplex_1_1_2_0 in Neuron = 0;
  species pKCaMcomplex_1_1_2_1 in Neuron = 0;
  species pKCaMcomplex_1_1_2_2 in Neuron = 0;
  species pKCaMcomplex_1_2_0_0 in Neuron = 0;
  species pKCaMcomplex_1_2_0_1 in Neuron = 0;
  species pKCaMcomplex_1_2_0_2 in Neuron = 0;
  species pKCaMcomplex_1_2_1_0 in Neuron = 0;
  species pKCaMcomplex_1_2_1_1 in Neuron = 0;
  species pKCaMcomplex_1_2_1_2 in Neuron = 0;
  species pKCaMcomplex_1_2_2_0 in Neuron = 0;
  species pKCaMcomplex_1_2_2_1 in Neuron = 0;
  species pKCaMcomplex_1_2_2_2 in Neuron = 0;
  species pKCaMcomplex_2_0_0_0 in Neuron = 0;
  species pKCaMcomplex_2_0_0_1 in Neuron = 0;
  species pKCaMcomplex_2_0_0_2 in Neuron = 0;
  species pKCaMcomplex_2_0_1_0 in Neuron = 0;
  species pKCaMcomplex_2_0_1_1 in Neuron = 0;
  species pKCaMcomplex_2_0_1_2 in Neuron = 0;
  species pKCaMcomplex_2_0_2_0 in Neuron = 0;
  species pKCaMcomplex_2_0_2_1 in Neuron = 0;
  species pKCaMcomplex_2_0_2_2 in Neuron = 0;
  species pKCaMcomplex_2_1_0_0 in Neuron = 0;
  species pKCaMcomplex_2_1_0_1 in Neuron = 0;
  species pKCaMcomplex_2_1_0_2 in Neuron = 0;
  species pKCaMcomplex_2_1_1_0 in Neuron = 0;
  species pKCaMcomplex_2_1_1_1 in Neuron = 0;
  species pKCaMcomplex_2_1_1_2 in Neuron = 0;
  species pKCaMcomplex_2_1_2_0 in Neuron = 0;
  species pKCaMcomplex_2_1_2_1 in Neuron = 0;
  species pKCaMcomplex_2_1_2_2 in Neuron = 0;
  species pKCaMcomplex_2_2_0_0 in Neuron = 0;
  species pKCaMcomplex_2_2_0_1 in Neuron = 0;
  species pKCaMcomplex_2_2_0_2 in Neuron = 0;
  species pKCaMcomplex_2_2_1_0 in Neuron = 0;
  species pKCaMcomplex_2_2_1_1 in Neuron = 0;
  species pKCaMcomplex_2_2_1_2 in Neuron = 0;
  species pKCaMcomplex_2_2_2_0 in Neuron = 0;
  species pKCaMcomplex_2_2_2_1 in Neuron = 0;
  species pKCaMcomplex_2_2_2_2 in Neuron = 0;
  species CaM_0_0 in Neuron = 30;
  species KaMe in Neuron = 80;
  species Ca in Neuron = 100;
  species $KCaM2C_tot in Neuron;

  // Parameters:
  k1Con = 4;
  k1Coff = 40;
  k2Con = 10;
  k2Coff = 9.25;
  k1Non = 100;
  k1Noff = 2500;
  k2Non = 150;
  k2Noff = 750;
  kK1Con = 44;
  kK1Coff = 33;
  kK2Con = 44;
  kK2Coff = 2.7;
  kK1Non = 75;
  kK1Noff = 300;
  kK2Non = 76;
  kK2Noff = 33;
  kCaM0on = 0.0038;
  kCaM0off = 5.5;
  kCaM1Con = 0.059;
  kCaM1Coff = 6.8;
  kCaM2Con = 0.92;
  kCaM2Coff = 6.8;
  kCaM2C1Non = 5.2;
  kCaM2C1Noff = 3.8;
  kCaM1C1Non = 3.3;
  kCaM1C1Noff = 3.4;
  kCaM4on = 30;
  kCaM4off = 1.7;
  kCaM1Non = 0.022;
  kCaM1Noff = 3.1;
  kCaM1C2Non = 1.9;
  kCaM1C2Noff = 1.9;
  kCaM2Non = 0.1;
  kCaM2Noff = 1.7;
  k2CaMKon = 50;
  k2CaMKoff = 60;
  kpCaM0 = 0;
  kpCaM1C = 0.032;
  kpCaM2C = 0.064;
  kpCaM2C1N = 0.124;
  kpCaM1C1N = 0.094;
  kpCaM4 = 0.96;
  kpCaM1N = 0.06;
  kpCaM1C2N = 0.154;
  kpCaM2N = 0.12;
  caminit = 30;
  ckinit = 80;
  cainit = 100;

  // Assignment rules:
  KCaM2C_tot := KCaM_2_0 + KCaMcomplex_0_0_2_0 + KCaMcomplex_2_0_2_2 + KCaMcomplex_2_0_2_1 + KCaMcomplex_0_1_2_0 + KCaMcomplex_0_2_2_0 + KCaMcomplex_1_0_2_0 + KCaMcomplex_1_1_2_0 + KCaMcomplex_1_2_2_0 + 2*KCaMcomplex_2_0_2_0;

  // Reactions:
  reaction1: Ca + CaM_0_0 => CaM_1_0; Ca*CaM_0_0*k1Con;
  reaction2: CaM_1_0 => Ca + CaM_0_0; Neuron*CaM_1_0*k1Coff;
  reaction3: Ca + CaM_0_1 => CaM_1_1; Neuron*Ca*CaM_0_1*k1Con;
  reaction4: CaM_1_1 => Ca + CaM_0_1; Neuron*CaM_1_1*k1Coff;
  reaction5: Ca + CaM_0_2 => CaM_1_2; Neuron*Ca*CaM_0_2*k1Con;
  reaction6: CaM_1_2 => Ca + CaM_0_2; Neuron*CaM_1_2*k1Coff;
  reaction7: Ca + CaM_1_0 => CaM_2_0; Neuron*Ca*CaM_1_0*k2Con;
  reaction8: CaM_2_0 => Ca + CaM_1_0; Neuron*CaM_2_0*k2Coff;
  reaction9: Ca + CaM_1_1 => CaM_2_1; Neuron*Ca*CaM_1_1*k2Con;
  reaction10: CaM_2_1 => Ca + CaM_1_1; Neuron*CaM_2_1*k2Coff;
  reaction11: Ca + CaM_1_2 => CaM_2_2; Neuron*Ca*CaM_1_2*k2Con;
  reaction12: CaM_2_2 => Ca + CaM_1_2; Neuron*CaM_2_2*k2Coff;
  reaction13: Ca + CaM_0_0 => CaM_0_1; Neuron*Ca*CaM_0_0*k1Non;
  reaction14: CaM_0_1 => Ca + CaM_0_0; Neuron*CaM_0_1*k1Noff;
  reaction15: Ca + CaM_0_1 => CaM_0_2; Neuron*Ca*CaM_0_1*k2Non;
  reaction16: CaM_0_2 => Ca + CaM_0_1; Neuron*CaM_0_2*k2Noff;
  reaction17: Ca + CaM_1_0 => CaM_1_1; Neuron*Ca*CaM_1_0*k1Non;
  reaction18: CaM_1_1 => Ca + CaM_1_0; Neuron*CaM_1_1*k1Noff;
  reaction19: Ca + CaM_1_1 => CaM_1_2; Neuron*Ca*CaM_1_1*k2Non;
  reaction20: CaM_1_2 => Ca + CaM_1_1; Neuron*CaM_1_2*k2Noff;
  reaction21: Ca + CaM_2_0 => CaM_2_1; Neuron*Ca*CaM_2_0*k1Non;
  reaction22: CaM_2_1 => Ca + CaM_2_0; Neuron*CaM_2_1*k1Noff;
  reaction23: Ca + CaM_2_1 => CaM_2_2; Neuron*Ca*CaM_2_1*k2Non;
  reaction24: CaM_2_2 => Ca + CaM_2_1; Neuron*CaM_2_2*k2Noff;
  reaction25: Ca + KCaM_0_0 => KCaM_1_0; Neuron*Ca*KCaM_0_0*kK1Con;
  reaction26: KCaM_1_0 => Ca + KCaM_0_0; Neuron*KCaM_1_0*kK1Coff;
  reaction27: Ca + KCaM_0_1 => KCaM_1_1; Neuron*Ca*KCaM_0_1*kK1Con;
  reaction28: KCaM_1_1 => Ca + KCaM_0_1; Neuron*KCaM_1_1*kK1Coff;
  reaction29: Ca + KCaM_0_2 => KCaM_1_2; Neuron*Ca*KCaM_0_2*kK1Con;
  reaction30: KCaM_1_2 => Ca + KCaM_0_2; Neuron*KCaM_1_2*kK1Coff;
  reaction31: Ca + KCaM_1_0 => KCaM_2_0; Neuron*Ca*KCaM_1_0*kK2Con;
  reaction32: KCaM_2_0 => Ca + KCaM_1_0; Neuron*KCaM_2_0*kK2Coff;
  reaction33: Ca + KCaM_1_1 => KCaM_2_1; Neuron*Ca*KCaM_1_1*kK2Con;
  reaction34: KCaM_2_1 => Ca + KCaM_1_1; Neuron*KCaM_2_1*kK2Coff;
  reaction35: Ca + KCaM_1_2 => KCaM_2_2; Neuron*Ca*KCaM_1_2*kK2Con;
  reaction36: KCaM_2_2 => Ca + KCaM_1_2; Neuron*KCaM_2_2*kK2Coff;
  reaction37: Ca + KCaM_0_0 => KCaM_0_1; Neuron*Ca*KCaM_0_0*kK1Non;
  reaction38: KCaM_0_1 => Ca + KCaM_0_0; Neuron*KCaM_0_1*kK1Noff;
  reaction39: Ca + KCaM_0_1 => KCaM_0_2; Neuron*Ca*KCaM_0_1*kK2Non;
  reaction40: KCaM_0_2 => Ca + KCaM_0_1; Neuron*KCaM_0_2*kK2Noff;
  reaction41: Ca + KCaM_1_0 => KCaM_1_1; Neuron*Ca*KCaM_1_0*kK1Non;
  reaction42: KCaM_1_1 => Ca + KCaM_1_0; Neuron*KCaM_1_1*kK1Noff;
  reaction43: Ca + KCaM_1_1 => KCaM_1_2; Neuron*Ca*KCaM_1_1*kK2Non;
  reaction44: KCaM_1_2 => Ca + KCaM_1_1; Neuron*KCaM_1_2*kK2Noff;
  reaction45: Ca + KCaM_2_0 => KCaM_2_1; Neuron*Ca*KCaM_2_0*kK1Non;
  reaction46: KCaM_2_1 => Ca + KCaM_2_0; Neuron*KCaM_2_1*kK1Noff;
  reaction47: Ca + KCaM_2_1 => KCaM_2_2; Neuron*Ca*KCaM_2_1*kK2Non;
  reaction48: KCaM_2_2 => Ca + KCaM_2_1; Neuron*KCaM_2_2*kK2Noff;
  reaction49: CaM_0_0 + KaMe => KCaM_0_0; Neuron*CaM_0_0*KaMe*kCaM0on;
  reaction50: KCaM_0_0 => CaM_0_0 + KaMe; Neuron*kCaM0off*KCaM_0_0;
  reaction51: CaM_0_1 + KaMe => KCaM_0_1; Neuron*CaM_0_1*KaMe*kCaM1Non;
  reaction52: KCaM_0_1 => CaM_0_1 + KaMe; Neuron*kCaM1Noff*KCaM_0_1;
  reaction53: CaM_0_2 + KaMe => KCaM_0_2; Neuron*CaM_0_2*KaMe*kCaM2Non;
  reaction54: KCaM_0_2 => CaM_0_2 + KaMe; Neuron*kCaM2Noff*KCaM_0_2;
  reaction55: CaM_1_0 + KaMe => KCaM_1_0; Neuron*CaM_1_0*KaMe*kCaM1Con;
  reaction56: KCaM_1_0 => CaM_1_0 + KaMe; Neuron*kCaM1Coff*KCaM_1_0;
  reaction57: CaM_1_1 + KaMe => KCaM_1_1; Neuron*CaM_1_1*KaMe*kCaM1C1Non;
  reaction58: KCaM_1_1 => CaM_1_1 + KaMe; Neuron*kCaM1C1Noff*KCaM_1_1;
  reaction59: CaM_1_2 + KaMe => KCaM_1_2; Neuron*CaM_1_2*KaMe*kCaM1C2Non;
  reaction60: KCaM_1_2 => CaM_1_2 + KaMe; Neuron*kCaM1C2Noff*KCaM_1_2;
  reaction61: CaM_2_0 + KaMe => KCaM_2_0; Neuron*CaM_2_0*KaMe*kCaM2Con;
  reaction62: KCaM_2_0 => CaM_2_0 + KaMe; Neuron*kCaM2Coff*KCaM_2_0;
  reaction63: CaM_2_1 + KaMe => KCaM_2_1; Neuron*CaM_2_1*KaMe*kCaM2C1Non;
  reaction64: KCaM_2_1 => CaM_2_1 + KaMe; Neuron*kCaM2C1Noff*KCaM_2_1;
  reaction65: CaM_2_2 + KaMe => KCaM_2_2; Neuron*CaM_2_2*KaMe*kCaM4on;
  reaction66: KCaM_2_2 => CaM_2_2 + KaMe; Neuron*kCaM4off*KCaM_2_2;
  reaction67: KCaM_0_0 + KCaM_0_1 => KCaMcomplex_0_0_0_1; Neuron*k2CaMKon*KCaM_0_0*KCaM_0_1;
  reaction68: KCaMcomplex_0_0_0_1 => KCaM_0_0 + KCaM_0_1; Neuron*k2CaMKoff*KCaMcomplex_0_0_0_1;
  reaction69: KCaM_0_0 + KCaM_0_2 => KCaMcomplex_0_0_0_2; Neuron*k2CaMKon*KCaM_0_0*KCaM_0_2;
  reaction70: KCaMcomplex_0_0_0_2 => KCaM_0_0 + KCaM_0_2; Neuron*k2CaMKoff*KCaMcomplex_0_0_0_2;
  reaction71: KCaM_0_0 + KCaM_1_0 => KCaMcomplex_0_0_1_0; Neuron*k2CaMKon*KCaM_0_0*KCaM_1_0;
  reaction72: KCaMcomplex_0_0_1_0 => KCaM_0_0 + KCaM_1_0; Neuron*k2CaMKoff*KCaMcomplex_0_0_1_0;
  reaction73: KCaM_0_0 + KCaM_1_1 => KCaMcomplex_0_0_1_1; Neuron*k2CaMKon*KCaM_0_0*KCaM_1_1;
  reaction74: KCaMcomplex_0_0_1_1 => KCaM_0_0 + KCaM_1_1; Neuron*k2CaMKoff*KCaMcomplex_0_0_1_1;
  reaction75: KCaM_0_0 + KCaM_1_2 => KCaMcomplex_0_0_1_2; Neuron*k2CaMKon*KCaM_0_0*KCaM_1_2;
  reaction76: KCaMcomplex_0_0_1_2 => KCaM_0_0 + KCaM_1_2; Neuron*k2CaMKoff*KCaMcomplex_0_0_1_2;
  reaction77: KCaM_0_0 + KCaM_2_0 => KCaMcomplex_0_0_2_0; Neuron*k2CaMKon*KCaM_0_0*KCaM_2_0;
  reaction78: KCaMcomplex_0_0_2_0 => KCaM_0_0 + KCaM_2_0; Neuron*k2CaMKoff*KCaMcomplex_0_0_2_0;
  reaction79: KCaM_0_0 + KCaM_2_1 => KCaMcomplex_0_0_2_1; Neuron*k2CaMKon*KCaM_0_0*KCaM_2_1;
  reaction80: KCaMcomplex_0_0_2_1 => KCaM_0_0 + KCaM_2_1; Neuron*k2CaMKoff*KCaMcomplex_0_0_2_1;
  reaction81: KCaM_0_0 + KCaM_2_2 => KCaMcomplex_0_0_2_2; Neuron*k2CaMKon*KCaM_0_0*KCaM_2_2;
  reaction82: KCaMcomplex_0_0_2_2 => KCaM_0_0 + KCaM_2_2; Neuron*k2CaMKoff*KCaMcomplex_0_0_2_2;
  reaction83: KCaM_0_1 + KCaM_0_2 => KCaMcomplex_0_1_0_2; Neuron*k2CaMKon*KCaM_0_1*KCaM_0_2;
  reaction84: KCaMcomplex_0_1_0_2 => KCaM_0_1 + KCaM_0_2; Neuron*k2CaMKoff*KCaMcomplex_0_1_0_2;
  reaction85: KCaM_0_1 + KCaM_1_0 => KCaMcomplex_0_1_1_0; Neuron*k2CaMKon*KCaM_0_1*KCaM_1_0;
  reaction86: KCaMcomplex_0_1_1_0 => KCaM_0_1 + KCaM_1_0; Neuron*k2CaMKoff*KCaMcomplex_0_1_1_0;
  reaction87: KCaM_0_1 + KCaM_1_1 => KCaMcomplex_0_1_1_1; Neuron*k2CaMKon*KCaM_0_1*KCaM_1_1;
  reaction88: KCaMcomplex_0_1_1_1 => KCaM_0_1 + KCaM_1_1; Neuron*k2CaMKoff*KCaMcomplex_0_1_1_1;
  reaction89: KCaM_0_1 + KCaM_1_2 => KCaMcomplex_0_1_1_2; Neuron*k2CaMKon*KCaM_0_1*KCaM_1_2;
  reaction90: KCaMcomplex_0_1_1_2 => KCaM_0_1 + KCaM_1_2; Neuron*k2CaMKoff*KCaMcomplex_0_1_1_2;
  reaction91: KCaM_0_1 + KCaM_2_0 => KCaMcomplex_0_1_2_0; Neuron*k2CaMKon*KCaM_0_1*KCaM_2_0;
  reaction92: KCaMcomplex_0_1_2_0 => KCaM_0_1 + KCaM_2_0; Neuron*k2CaMKoff*KCaMcomplex_0_1_2_0;
  reaction93: KCaM_0_1 + KCaM_2_1 => KCaMcomplex_0_1_2_1; Neuron*k2CaMKon*KCaM_0_1*KCaM_2_1;
  reaction94: KCaMcomplex_0_1_2_1 => KCaM_0_1 + KCaM_2_1; Neuron*k2CaMKoff*KCaMcomplex_0_1_2_1;
  reaction95: KCaM_0_1 + KCaM_2_2 => KCaMcomplex_0_1_2_2; Neuron*k2CaMKon*KCaM_0_1*KCaM_2_2;
  reaction96: KCaMcomplex_0_1_2_2 => KCaM_0_1 + KCaM_2_2; Neuron*k2CaMKoff*KCaMcomplex_0_1_2_2;
  reaction97: KCaM_0_2 + KCaM_1_0 => KCaMcomplex_0_2_1_0; Neuron*k2CaMKon*KCaM_0_2*KCaM_1_0;
  reaction98: KCaMcomplex_0_2_1_0 => KCaM_0_2 + KCaM_1_0; Neuron*k2CaMKoff*KCaMcomplex_0_2_1_0;
  reaction99: KCaM_0_2 + KCaM_1_1 => KCaMcomplex_0_2_1_1; Neuron*k2CaMKon*KCaM_0_2*KCaM_1_1;
  reaction100: KCaMcomplex_0_2_1_1 => KCaM_0_2 + KCaM_1_1; Neuron*k2CaMKoff*KCaMcomplex_0_2_1_1;
  reaction101: KCaM_0_2 + KCaM_1_2 => KCaMcomplex_0_2_1_2; Neuron*k2CaMKon*KCaM_0_2*KCaM_1_2;
  reaction102: KCaMcomplex_0_2_1_2 => KCaM_0_2 + KCaM_1_2; Neuron*k2CaMKoff*KCaMcomplex_0_2_1_2;
  reaction103: KCaM_0_2 + KCaM_2_0 => KCaMcomplex_0_2_2_0; Neuron*k2CaMKon*KCaM_0_2*KCaM_2_0;
  reaction104: KCaMcomplex_0_2_2_0 => KCaM_0_2 + KCaM_2_0; Neuron*k2CaMKoff*KCaMcomplex_0_2_2_0;
  reaction105: KCaM_0_2 + KCaM_2_1 => KCaMcomplex_0_2_2_1; Neuron*k2CaMKon*KCaM_0_2*KCaM_2_1;
  reaction106: KCaMcomplex_0_2_2_1 => KCaM_0_2 + KCaM_2_1; Neuron*k2CaMKoff*KCaMcomplex_0_2_2_1;
  reaction107: KCaM_0_2 + KCaM_2_2 => KCaMcomplex_0_2_2_2; Neuron*k2CaMKon*KCaM_0_2*KCaM_2_2;
  reaction108: KCaMcomplex_0_2_2_2 => KCaM_0_2 + KCaM_2_2; Neuron*k2CaMKoff*KCaMcomplex_0_2_2_2;
  reaction109: KCaM_1_0 + KCaM_1_1 => KCaMcomplex_1_0_1_1; Neuron*k2CaMKon*KCaM_1_0*KCaM_1_1;
  reaction110: KCaMcomplex_1_0_1_1 => KCaM_1_0 + KCaM_1_1; Neuron*k2CaMKoff*KCaMcomplex_1_0_1_1;
  reaction111: KCaM_1_0 + KCaM_1_2 => KCaMcomplex_1_0_1_2; Neuron*k2CaMKon*KCaM_1_0*KCaM_1_2;
  reaction112: KCaMcomplex_1_0_1_2 => KCaM_1_0 + KCaM_1_2; Neuron*k2CaMKoff*KCaMcomplex_1_0_1_2;
  reaction113: KCaM_1_0 + KCaM_2_0 => KCaMcomplex_1_0_2_0; Neuron*k2CaMKon*KCaM_1_0*KCaM_2_0;
  reaction114: KCaMcomplex_1_0_2_0 => KCaM_1_0 + KCaM_2_0; Neuron*k2CaMKoff*KCaMcomplex_1_0_2_0;
  reaction115: KCaM_1_0 + KCaM_2_1 => KCaMcomplex_1_0_2_1; Neuron*k2CaMKon*KCaM_1_0*KCaM_2_1;
  reaction116: KCaMcomplex_1_0_2_1 => KCaM_1_0 + KCaM_2_1; Neuron*k2CaMKoff*KCaMcomplex_1_0_2_1;
  reaction117: KCaM_1_0 + KCaM_2_2 => KCaMcomplex_1_0_2_2; Neuron*k2CaMKon*KCaM_1_0*KCaM_2_2;
  reaction118: KCaMcomplex_1_0_2_2 => KCaM_1_0 + KCaM_2_2; Neuron*k2CaMKoff*KCaMcomplex_1_0_2_2;
  reaction119: KCaM_1_1 + KCaM_1_2 => KCaMcomplex_1_1_1_2; Neuron*k2CaMKon*KCaM_1_1*KCaM_1_2;
  reaction120: KCaMcomplex_1_1_1_2 => KCaM_1_1 + KCaM_1_2; Neuron*k2CaMKoff*KCaMcomplex_1_1_1_2;
  reaction121: KCaM_1_1 + KCaM_2_0 => KCaMcomplex_1_1_2_0; Neuron*k2CaMKon*KCaM_1_1*KCaM_2_0;
  reaction122: KCaMcomplex_1_1_2_0 => KCaM_1_1 + KCaM_2_0; Neuron*k2CaMKoff*KCaMcomplex_1_1_2_0;
  reaction123: KCaM_1_1 + KCaM_2_1 => KCaMcomplex_1_1_2_1; Neuron*k2CaMKon*KCaM_1_1*KCaM_2_1;
  reaction124: KCaMcomplex_1_1_2_1 => KCaM_1_1 + KCaM_2_1; Neuron*k2CaMKoff*KCaMcomplex_1_1_2_1;
  reaction125: KCaM_1_1 + KCaM_2_2 => KCaMcomplex_1_1_2_2; Neuron*k2CaMKon*KCaM_1_1*KCaM_2_2;
  reaction126: KCaMcomplex_1_1_2_2 => KCaM_1_1 + KCaM_2_2; Neuron*k2CaMKoff*KCaMcomplex_1_1_2_2;
  reaction127: KCaM_1_2 + KCaM_2_0 => KCaMcomplex_1_2_2_0; Neuron*k2CaMKon*KCaM_1_2*KCaM_2_0;
  reaction128: KCaMcomplex_1_2_2_0 => KCaM_1_2 + KCaM_2_0; Neuron*k2CaMKoff*KCaMcomplex_1_2_2_0;
  reaction129: KCaM_1_2 + KCaM_2_1 => KCaMcomplex_1_2_2_1; Neuron*k2CaMKon*KCaM_1_2*KCaM_2_1;
  reaction130: KCaMcomplex_1_2_2_1 => KCaM_1_2 + KCaM_2_1; Neuron*k2CaMKoff*KCaMcomplex_1_2_2_1;
  reaction131: KCaM_1_2 + KCaM_2_2 => KCaMcomplex_1_2_2_2; Neuron*k2CaMKon*KCaM_1_2*KCaM_2_2;
  reaction132: KCaMcomplex_1_2_2_2 => KCaM_1_2 + KCaM_2_2; Neuron*k2CaMKoff*KCaMcomplex_1_2_2_2;
  reaction133: KCaM_2_0 + KCaM_2_1 => KCaMcomplex_2_0_2_1; Neuron*k2CaMKon*KCaM_2_0*KCaM_2_1;
  reaction134: KCaMcomplex_2_0_2_1 => KCaM_2_0 + KCaM_2_1; Neuron*k2CaMKoff*KCaMcomplex_2_0_2_1;
  reaction135: KCaM_2_0 + KCaM_2_2 => KCaMcomplex_2_0_2_2; Neuron*k2CaMKon*KCaM_2_0*KCaM_2_2;
  reaction136: KCaMcomplex_2_0_2_2 => KCaM_2_0 + KCaM_2_2; Neuron*k2CaMKoff*KCaMcomplex_2_0_2_2;
  reaction137: KCaM_2_1 + KCaM_2_2 => KCaMcomplex_2_1_2_2; Neuron*k2CaMKon*KCaM_2_1*KCaM_2_2;
  reaction138: KCaMcomplex_2_1_2_2 => KCaM_2_1 + KCaM_2_2; Neuron*k2CaMKoff*KCaMcomplex_2_1_2_2;
  reaction139: 2 KCaM_0_0 => KCaMcomplex_0_0_0_0; Neuron*k2CaMKon*KCaM_0_0^2;
  reaction140: KCaMcomplex_0_0_0_0 => 2 KCaM_0_0; Neuron*k2CaMKoff*KCaMcomplex_0_0_0_0;
  reaction141: 2 KCaM_0_1 => KCaMcomplex_0_1_0_1; Neuron*k2CaMKon*KCaM_0_1^2;
  reaction142: KCaMcomplex_0_1_0_1 => 2 KCaM_0_1; Neuron*k2CaMKoff*KCaMcomplex_0_1_0_1;
  reaction143: 2 KCaM_0_2 => KCaMcomplex_0_2_0_2; Neuron*k2CaMKon*KCaM_0_2^2;
  reaction144: KCaMcomplex_0_2_0_2 => 2 KCaM_0_2; Neuron*k2CaMKoff*KCaMcomplex_0_2_0_2;
  reaction145: 2 KCaM_1_0 => KCaMcomplex_1_0_1_0; Neuron*k2CaMKon*KCaM_1_0^2;
  reaction146: KCaMcomplex_1_0_1_0 => 2 KCaM_1_0; Neuron*k2CaMKoff*KCaMcomplex_1_0_1_0;
  reaction147: 2 KCaM_1_1 => KCaMcomplex_1_1_1_1; Neuron*k2CaMKon*KCaM_1_1^2;
  reaction148: KCaMcomplex_1_1_1_1 => 2 KCaM_1_1; Neuron*k2CaMKoff*KCaMcomplex_1_1_1_1;
  reaction149: 2 KCaM_1_2 => KCaMcomplex_1_2_1_2; Neuron*k2CaMKon*KCaM_1_2^2;
  reaction150: KCaMcomplex_1_2_1_2 => 2 KCaM_1_2; Neuron*k2CaMKoff*KCaMcomplex_1_2_1_2;
  reaction151: 2 KCaM_2_0 => KCaMcomplex_2_0_2_0; Neuron*k2CaMKon*KCaM_2_0^2;
  reaction152: KCaMcomplex_2_0_2_0 => 2 KCaM_2_0; Neuron*k2CaMKoff*KCaMcomplex_2_0_2_0;
  reaction153: 2 KCaM_2_1 => KCaMcomplex_2_1_2_1; Neuron*k2CaMKon*KCaM_2_1^2;
  reaction154: KCaMcomplex_2_1_2_1 => 2 KCaM_2_1; Neuron*k2CaMKoff*KCaMcomplex_2_1_2_1;
  reaction155: 2 KCaM_2_2 => KCaMcomplex_2_2_2_2; Neuron*k2CaMKon*KCaM_2_2^2;
  reaction156: KCaMcomplex_2_2_2_2 => 2 KCaM_2_2; Neuron*k2CaMKoff*KCaMcomplex_2_2_2_2;
  reaction157: KCaMcomplex_0_0_0_1 => KCaM_0_1 + pKCaM_0_0; Neuron*KCaMcomplex_0_0_0_1*kpCaM0;
  reaction158: KCaMcomplex_0_0_0_1 => KCaM_0_0 + pKCaM_0_1; Neuron*KCaMcomplex_0_0_0_1*kpCaM1N;
  reaction159: KCaMcomplex_0_0_0_2 => KCaM_0_2 + pKCaM_0_0; Neuron*KCaMcomplex_0_0_0_2*kpCaM0;
  reaction160: KCaMcomplex_0_0_0_2 => KCaM_0_0 + pKCaM_0_2; Neuron*KCaMcomplex_0_0_0_2*kpCaM2N;
  reaction161: KCaMcomplex_0_0_1_0 => KCaM_1_0 + pKCaM_0_0; Neuron*KCaMcomplex_0_0_1_0*kpCaM0;
  reaction162: KCaMcomplex_0_0_1_0 => KCaM_0_0 + pKCaM_1_0; Neuron*KCaMcomplex_0_0_1_0*kpCaM1C;
  reaction163: KCaMcomplex_0_0_1_1 => KCaM_1_1 + pKCaM_0_0; Neuron*KCaMcomplex_0_0_1_1*kpCaM0;
  reaction164: KCaMcomplex_0_0_1_1 => KCaM_0_0 + pKCaM_1_1; Neuron*KCaMcomplex_0_0_1_1*kpCaM1C1N;
  reaction165: KCaMcomplex_0_0_1_2 => KCaM_1_2 + pKCaM_0_0; Neuron*KCaMcomplex_0_0_1_2*kpCaM0;
  reaction166: KCaMcomplex_0_0_1_2 => KCaM_0_0 + pKCaM_1_2; Neuron*KCaMcomplex_0_0_1_2*kpCaM1C2N;
  reaction167: KCaMcomplex_0_0_2_0 => KCaM_2_0 + pKCaM_0_0; Neuron*KCaMcomplex_0_0_2_0*kpCaM0;
  reaction168: KCaMcomplex_0_0_2_0 => KCaM_0_0 + pKCaM_2_0; Neuron*KCaMcomplex_0_0_2_0*kpCaM2C;
  reaction169: KCaMcomplex_0_0_2_1 => KCaM_2_1 + pKCaM_0_0; Neuron*KCaMcomplex_0_0_2_1*kpCaM0;
  reaction170: KCaMcomplex_0_0_2_1 => KCaM_0_0 + pKCaM_2_1; Neuron*KCaMcomplex_0_0_2_1*kpCaM2C1N;
  reaction171: KCaMcomplex_0_0_2_2 => KCaM_2_2 + pKCaM_0_0; Neuron*KCaMcomplex_0_0_2_2*kpCaM0;
  reaction172: KCaMcomplex_0_0_2_2 => KCaM_0_0 + pKCaM_2_2; Neuron*KCaMcomplex_0_0_2_2*kpCaM4;
  reaction173: KCaMcomplex_0_1_0_2 => KCaM_0_2 + pKCaM_0_1; Neuron*KCaMcomplex_0_1_0_2*kpCaM1N;
  reaction174: KCaMcomplex_0_1_0_2 => KCaM_0_1 + pKCaM_0_2; Neuron*KCaMcomplex_0_1_0_2*kpCaM2N;
  reaction175: KCaMcomplex_0_1_1_0 => KCaM_1_0 + pKCaM_0_1; Neuron*KCaMcomplex_0_1_1_0*kpCaM1N;
  reaction176: KCaMcomplex_0_1_1_0 => KCaM_0_1 + pKCaM_1_0; Neuron*KCaMcomplex_0_1_1_0*kpCaM1C;
  reaction177: KCaMcomplex_0_1_1_1 => KCaM_1_1 + pKCaM_0_1; Neuron*KCaMcomplex_0_1_1_1*kpCaM1N;
  reaction178: KCaMcomplex_0_1_1_1 => KCaM_0_1 + pKCaM_1_1; Neuron*KCaMcomplex_0_1_1_1*kpCaM1C1N;
  reaction179: KCaMcomplex_0_1_1_2 => KCaM_1_2 + pKCaM_0_1; Neuron*KCaMcomplex_0_1_1_2*kpCaM1N;
  reaction180: KCaMcomplex_0_1_1_2 => KCaM_0_1 + pKCaM_1_2; Neuron*KCaMcomplex_0_1_1_2*kpCaM1C2N;
  reaction181: KCaMcomplex_0_1_2_0 => KCaM_2_0 + pKCaM_0_1; Neuron*KCaMcomplex_0_1_2_0*kpCaM1N;
  reaction182: KCaMcomplex_0_1_2_0 => KCaM_0_1 + pKCaM_2_0; Neuron*KCaMcomplex_0_1_2_0*kpCaM2C;
  reaction183: KCaMcomplex_0_1_2_1 => KCaM_2_1 + pKCaM_0_1; Neuron*KCaMcomplex_0_1_2_1*kpCaM1N;
  reaction184: KCaMcomplex_0_1_2_1 => KCaM_0_1 + pKCaM_2_1; Neuron*KCaMcomplex_0_1_2_1*kpCaM2C1N;
  reaction185: KCaMcomplex_0_1_2_2 => KCaM_2_2 + pKCaM_0_1; Neuron*KCaMcomplex_0_1_2_2*kpCaM1N;
  reaction186: KCaMcomplex_0_1_2_2 => KCaM_0_1 + pKCaM_2_2; Neuron*KCaMcomplex_0_1_2_2*kpCaM4;
  reaction187: KCaMcomplex_0_2_1_0 => KCaM_1_0 + pKCaM_0_2; Neuron*KCaMcomplex_0_2_1_0*kpCaM2N;
  reaction188: KCaMcomplex_0_2_1_0 => KCaM_0_2 + pKCaM_1_0; Neuron*KCaMcomplex_0_2_1_0*kpCaM1C;
  reaction189: KCaMcomplex_0_2_1_1 => KCaM_1_1 + pKCaM_0_2; Neuron*KCaMcomplex_0_2_1_1*kpCaM2N;
  reaction190: KCaMcomplex_0_2_1_1 => KCaM_0_2 + pKCaM_1_1; Neuron*KCaMcomplex_0_2_1_1*kpCaM1C1N;
  reaction191: KCaMcomplex_0_2_1_2 => KCaM_1_2 + pKCaM_0_2; Neuron*KCaMcomplex_0_2_1_2*kpCaM2N;
  reaction192: KCaMcomplex_0_2_1_2 => KCaM_0_2 + pKCaM_1_2; Neuron*KCaMcomplex_0_2_1_2*kpCaM1C2N;
  reaction193: KCaMcomplex_0_2_2_0 => KCaM_2_0 + pKCaM_0_2; Neuron*KCaMcomplex_0_2_2_0*kpCaM2N;
  reaction194: KCaMcomplex_0_2_2_0 => KCaM_0_2 + pKCaM_2_0; Neuron*KCaMcomplex_0_2_2_0*kpCaM2C;
  reaction195: KCaMcomplex_0_2_2_1 => KCaM_2_1 + pKCaM_0_2; Neuron*KCaMcomplex_0_2_2_1*kpCaM2N;
  reaction196: KCaMcomplex_0_2_2_1 => KCaM_0_2 + pKCaM_2_1; Neuron*KCaMcomplex_0_2_2_1*kpCaM2C1N;
  reaction197: KCaMcomplex_0_2_2_2 => KCaM_2_2 + pKCaM_0_2; Neuron*KCaMcomplex_0_2_2_2*kpCaM2N;
  reaction198: KCaMcomplex_0_2_2_2 => KCaM_0_2 + pKCaM_2_2; Neuron*KCaMcomplex_0_2_2_2*kpCaM4;
  reaction199: KCaMcomplex_1_0_1_1 => KCaM_1_1 + pKCaM_1_0; Neuron*KCaMcomplex_1_0_1_1*kpCaM1C;
  reaction200: KCaMcomplex_1_0_1_1 => KCaM_1_0 + pKCaM_1_1; Neuron*KCaMcomplex_1_0_1_1*kpCaM1C1N;
  reaction201: KCaMcomplex_1_0_1_2 => KCaM_1_2 + pKCaM_1_0; Neuron*KCaMcomplex_1_0_1_2*kpCaM1C;
  reaction202: KCaMcomplex_1_0_1_2 => KCaM_1_0 + pKCaM_1_2; Neuron*KCaMcomplex_1_0_1_2*kpCaM1C2N;
  reaction203: KCaMcomplex_1_0_2_0 => KCaM_2_0 + pKCaM_1_0; Neuron*KCaMcomplex_1_0_2_0*kpCaM1C;
  reaction204: KCaMcomplex_1_0_2_0 => KCaM_1_0 + pKCaM_2_0; Neuron*KCaMcomplex_1_0_2_0*kpCaM2C;
  reaction205: KCaMcomplex_1_0_2_1 => KCaM_2_1 + pKCaM_1_0; Neuron*KCaMcomplex_1_0_2_1*kpCaM1C;
  reaction206: KCaMcomplex_1_0_2_1 => KCaM_1_0 + pKCaM_2_1; Neuron*KCaMcomplex_1_0_2_1*kpCaM2C1N;
  reaction207: KCaMcomplex_1_0_2_2 => KCaM_2_2 + pKCaM_1_0; Neuron*KCaMcomplex_1_0_2_2*kpCaM1C;
  reaction208: KCaMcomplex_1_0_2_2 => KCaM_1_0 + pKCaM_2_2; Neuron*KCaMcomplex_1_0_2_2*kpCaM4;
  reaction209: KCaMcomplex_1_1_1_2 => KCaM_1_2 + pKCaM_1_1; Neuron*KCaMcomplex_1_1_1_2*kpCaM1C1N;
  reaction210: KCaMcomplex_1_1_1_2 => KCaM_1_1 + pKCaM_1_2; Neuron*KCaMcomplex_1_1_1_2*kpCaM1C2N;
  reaction211: KCaMcomplex_1_1_2_0 => KCaM_2_0 + pKCaM_1_1; Neuron*KCaMcomplex_1_1_2_0*kpCaM1C1N;
  reaction212: KCaMcomplex_1_1_2_0 => KCaM_1_1 + pKCaM_2_0; Neuron*KCaMcomplex_1_1_2_0*kpCaM2C;
  reaction213: KCaMcomplex_1_1_2_1 => KCaM_2_1 + pKCaM_1_1; Neuron*KCaMcomplex_1_1_2_1*kpCaM1C1N;
  reaction214: KCaMcomplex_1_1_2_1 => KCaM_1_1 + pKCaM_2_1; Neuron*KCaMcomplex_1_1_2_1*kpCaM2C1N;
  reaction215: KCaMcomplex_1_1_2_2 => KCaM_2_2 + pKCaM_1_1; Neuron*KCaMcomplex_1_1_2_2*kpCaM1C1N;
  reaction216: KCaMcomplex_1_1_2_2 => KCaM_1_1 + pKCaM_2_2; Neuron*KCaMcomplex_1_1_2_2*kpCaM4;
  reaction217: KCaMcomplex_1_2_2_0 => KCaM_2_0 + pKCaM_1_2; Neuron*KCaMcomplex_1_2_2_0*kpCaM1C2N;
  reaction218: KCaMcomplex_1_2_2_0 => KCaM_1_2 + pKCaM_2_0; Neuron*KCaMcomplex_1_2_2_0*kpCaM2C;
  reaction219: KCaMcomplex_1_2_2_1 => KCaM_2_1 + pKCaM_1_2; Neuron*KCaMcomplex_1_2_2_1*kpCaM1C2N;
  reaction220: KCaMcomplex_1_2_2_1 => KCaM_1_2 + pKCaM_2_1; Neuron*KCaMcomplex_1_2_2_1*kpCaM2C1N;
  reaction221: KCaMcomplex_1_2_2_2 => KCaM_2_2 + pKCaM_1_2; Neuron*KCaMcomplex_1_2_2_2*kpCaM1C2N;
  reaction222: KCaMcomplex_1_2_2_2 => KCaM_1_2 + pKCaM_2_2; Neuron*KCaMcomplex_1_2_2_2*kpCaM4;
  reaction223: KCaMcomplex_2_0_2_1 => KCaM_2_1 + pKCaM_2_0; Neuron*KCaMcomplex_2_0_2_1*kpCaM2C;
  reaction224: KCaMcomplex_2_0_2_1 => KCaM_2_0 + pKCaM_2_1; Neuron*KCaMcomplex_2_0_2_1*kpCaM2C1N;
  reaction225: KCaMcomplex_2_0_2_2 => KCaM_2_2 + pKCaM_2_0; Neuron*KCaMcomplex_2_0_2_2*kpCaM2C;
  reaction226: KCaMcomplex_2_0_2_2 => KCaM_2_0 + pKCaM_2_2; Neuron*KCaMcomplex_2_0_2_2*kpCaM4;
  reaction227: KCaMcomplex_2_1_2_2 => KCaM_2_2 + pKCaM_2_1; Neuron*KCaMcomplex_2_1_2_2*kpCaM2C1N;
  reaction228: KCaMcomplex_2_1_2_2 => KCaM_2_1 + pKCaM_2_2; Neuron*KCaMcomplex_2_1_2_2*kpCaM4;
  reaction229: KCaMcomplex_0_0_0_0 => KCaM_0_0 + pKCaM_0_0; Neuron*KCaMcomplex_0_0_0_0*kpCaM0;
  reaction230: KCaMcomplex_0_1_0_1 => KCaM_0_1 + pKCaM_0_1; Neuron*KCaMcomplex_0_1_0_1*kpCaM1N;
  reaction231: KCaMcomplex_0_2_0_2 => KCaM_0_2 + pKCaM_0_2; Neuron*KCaMcomplex_0_2_0_2*kpCaM2N;
  reaction232: KCaMcomplex_1_0_1_0 => KCaM_1_0 + pKCaM_1_0; Neuron*KCaMcomplex_1_0_1_0*kpCaM1C;
  reaction233: KCaMcomplex_1_1_1_1 => KCaM_1_1 + pKCaM_1_1; Neuron*KCaMcomplex_1_1_1_1*kpCaM1C1N;
  reaction234: KCaMcomplex_1_2_1_2 => KCaM_1_2 + pKCaM_1_2; Neuron*KCaMcomplex_1_2_1_2*kpCaM1C2N;
  reaction235: KCaMcomplex_2_0_2_0 => KCaM_2_0 + pKCaM_2_0; Neuron*KCaMcomplex_2_0_2_0*kpCaM2C;
  reaction236: KCaMcomplex_2_1_2_1 => KCaM_2_1 + pKCaM_2_1; Neuron*KCaMcomplex_2_1_2_1*kpCaM2C1N;
  reaction237: KCaMcomplex_2_2_2_2 => KCaM_2_2 + pKCaM_2_2; Neuron*KCaMcomplex_2_2_2_2*kpCaM4;
  reaction238: KCaM_0_0 + pKCaM_0_0 => pKCaMcomplex_0_0_0_0; Neuron*k2CaMKon*KCaM_0_0*pKCaM_0_0;
  reaction239: pKCaMcomplex_0_0_0_0 => KCaM_0_0 + pKCaM_0_0; Neuron*k2CaMKoff*pKCaMcomplex_0_0_0_0;
  reaction240: KCaM_0_1 + pKCaM_0_0 => pKCaMcomplex_0_0_0_1; Neuron*k2CaMKon*KCaM_0_1*pKCaM_0_0;
  reaction241: pKCaMcomplex_0_0_0_1 => KCaM_0_1 + pKCaM_0_0; Neuron*k2CaMKoff*pKCaMcomplex_0_0_0_1;
  reaction242: KCaM_0_2 + pKCaM_0_0 => pKCaMcomplex_0_0_0_2; Neuron*k2CaMKon*KCaM_0_2*pKCaM_0_0;
  reaction243: pKCaMcomplex_0_0_0_2 => KCaM_0_2 + pKCaM_0_0; Neuron*k2CaMKoff*pKCaMcomplex_0_0_0_2;
  reaction244: KCaM_1_0 + pKCaM_0_0 => pKCaMcomplex_0_0_1_0; Neuron*k2CaMKon*KCaM_1_0*pKCaM_0_0;
  reaction245: pKCaMcomplex_0_0_1_0 => KCaM_1_0 + pKCaM_0_0; Neuron*k2CaMKoff*pKCaMcomplex_0_0_1_0;
  reaction246: KCaM_1_1 + pKCaM_0_0 => pKCaMcomplex_0_0_1_1; Neuron*k2CaMKon*KCaM_1_1*pKCaM_0_0;
  reaction247: pKCaMcomplex_0_0_1_1 => KCaM_1_1 + pKCaM_0_0; Neuron*k2CaMKoff*pKCaMcomplex_0_0_1_1;
  reaction248: KCaM_1_2 + pKCaM_0_0 => pKCaMcomplex_0_0_1_2; Neuron*k2CaMKon*KCaM_1_2*pKCaM_0_0;
  reaction249: pKCaMcomplex_0_0_1_2 => KCaM_1_2 + pKCaM_0_0; Neuron*k2CaMKoff*pKCaMcomplex_0_0_1_2;
  reaction250: KCaM_2_0 + pKCaM_0_0 => pKCaMcomplex_0_0_2_0; Neuron*k2CaMKon*KCaM_2_0*pKCaM_0_0;
  reaction251: pKCaMcomplex_0_0_2_0 => KCaM_2_0 + pKCaM_0_0; Neuron*k2CaMKoff*pKCaMcomplex_0_0_2_0;
  reaction252: KCaM_2_1 + pKCaM_0_0 => pKCaMcomplex_0_0_2_1; Neuron*k2CaMKon*KCaM_2_1*pKCaM_0_0;
  reaction253: pKCaMcomplex_0_0_2_1 => KCaM_2_1 + pKCaM_0_0; Neuron*k2CaMKoff*pKCaMcomplex_0_0_2_1;
  reaction254: KCaM_2_2 + pKCaM_0_0 => pKCaMcomplex_0_0_2_2; Neuron*k2CaMKon*KCaM_2_2*pKCaM_0_0;
  reaction255: pKCaMcomplex_0_0_2_2 => KCaM_2_2 + pKCaM_0_0; Neuron*k2CaMKoff*pKCaMcomplex_0_0_2_2;
  reaction256: KCaM_0_0 + pKCaM_0_1 => pKCaMcomplex_0_1_0_0; Neuron*k2CaMKon*KCaM_0_0*pKCaM_0_1;
  reaction257: pKCaMcomplex_0_1_0_0 => KCaM_0_0 + pKCaM_0_1; Neuron*k2CaMKoff*pKCaMcomplex_0_1_0_0;
  reaction258: KCaM_0_1 + pKCaM_0_1 => pKCaMcomplex_0_1_0_1; Neuron*k2CaMKon*KCaM_0_1*pKCaM_0_1;
  reaction259: pKCaMcomplex_0_1_0_1 => KCaM_0_1 + pKCaM_0_1; Neuron*k2CaMKoff*pKCaMcomplex_0_1_0_1;
  reaction260: KCaM_0_2 + pKCaM_0_1 => pKCaMcomplex_0_1_0_2; Neuron*k2CaMKon*KCaM_0_2*pKCaM_0_1;
  reaction261: pKCaMcomplex_0_1_0_2 => KCaM_0_2 + pKCaM_0_1; Neuron*k2CaMKoff*pKCaMcomplex_0_1_0_2;
  reaction262: KCaM_1_0 + pKCaM_0_1 => pKCaMcomplex_0_1_1_0; Neuron*k2CaMKon*KCaM_1_0*pKCaM_0_1;
  reaction263: pKCaMcomplex_0_1_1_0 => KCaM_1_0 + pKCaM_0_1; Neuron*k2CaMKoff*pKCaMcomplex_0_1_1_0;
  reaction264: KCaM_1_1 + pKCaM_0_1 => pKCaMcomplex_0_1_1_1; Neuron*k2CaMKon*KCaM_1_1*pKCaM_0_1;
  reaction265: pKCaMcomplex_0_1_1_1 => KCaM_1_1 + pKCaM_0_1; Neuron*k2CaMKoff*pKCaMcomplex_0_1_1_1;
  reaction266: KCaM_1_2 + pKCaM_0_1 => pKCaMcomplex_0_1_1_2; Neuron*k2CaMKon*KCaM_1_2*pKCaM_0_1;
  reaction267: pKCaMcomplex_0_1_1_2 => KCaM_1_2 + pKCaM_0_1; Neuron*k2CaMKoff*pKCaMcomplex_0_1_1_2;
  reaction268: KCaM_2_0 + pKCaM_0_1 => pKCaMcomplex_0_1_2_0; Neuron*k2CaMKon*KCaM_2_0*pKCaM_0_1;
  reaction269: pKCaMcomplex_0_1_2_0 => KCaM_2_0 + pKCaM_0_1; Neuron*k2CaMKoff*pKCaMcomplex_0_1_2_0;
  reaction270: KCaM_2_1 + pKCaM_0_1 => pKCaMcomplex_0_1_2_1; Neuron*k2CaMKon*KCaM_2_1*pKCaM_0_1;
  reaction271: pKCaMcomplex_0_1_2_1 => KCaM_2_1 + pKCaM_0_1; Neuron*k2CaMKoff*pKCaMcomplex_0_1_2_1;
  reaction272: KCaM_2_2 + pKCaM_0_1 => pKCaMcomplex_0_1_2_2; Neuron*k2CaMKon*KCaM_2_2*pKCaM_0_1;
  reaction273: pKCaMcomplex_0_1_2_2 => KCaM_2_2 + pKCaM_0_1; Neuron*k2CaMKoff*pKCaMcomplex_0_1_2_2;
  reaction274: KCaM_0_0 + pKCaM_0_2 => pKCaMcomplex_0_2_0_0; Neuron*k2CaMKon*KCaM_0_0*pKCaM_0_2;
  reaction275: pKCaMcomplex_0_2_0_0 => KCaM_0_0 + pKCaM_0_2; Neuron*k2CaMKoff*pKCaMcomplex_0_2_0_0;
  reaction276: KCaM_0_1 + pKCaM_0_2 => pKCaMcomplex_0_2_0_1; Neuron*k2CaMKon*KCaM_0_1*pKCaM_0_2;
  reaction277: pKCaMcomplex_0_2_0_1 => KCaM_0_1 + pKCaM_0_2; Neuron*k2CaMKoff*pKCaMcomplex_0_2_0_1;
  reaction278: KCaM_0_2 + pKCaM_0_2 => pKCaMcomplex_0_2_0_2; Neuron*k2CaMKon*KCaM_0_2*pKCaM_0_2;
  reaction279: pKCaMcomplex_0_2_0_2 => KCaM_0_2 + pKCaM_0_2; Neuron*k2CaMKoff*pKCaMcomplex_0_2_0_2;
  reaction280: KCaM_1_0 + pKCaM_0_2 => pKCaMcomplex_0_2_1_0; Neuron*k2CaMKon*KCaM_1_0*pKCaM_0_2;
  reaction281: pKCaMcomplex_0_2_1_0 => KCaM_1_0 + pKCaM_0_2; Neuron*k2CaMKoff*pKCaMcomplex_0_2_1_0;
  reaction282: KCaM_1_1 + pKCaM_0_2 => pKCaMcomplex_0_2_1_1; Neuron*k2CaMKon*KCaM_1_1*pKCaM_0_2;
  reaction283: pKCaMcomplex_0_2_1_1 => KCaM_1_1 + pKCaM_0_2; Neuron*k2CaMKoff*pKCaMcomplex_0_2_1_1;
  reaction284: KCaM_1_2 + pKCaM_0_2 => pKCaMcomplex_0_2_1_2; Neuron*k2CaMKon*KCaM_1_2*pKCaM_0_2;
  reaction285: pKCaMcomplex_0_2_1_2 => KCaM_1_2 + pKCaM_0_2; Neuron*k2CaMKoff*pKCaMcomplex_0_2_1_2;
  reaction286: KCaM_2_0 + pKCaM_0_2 => pKCaMcomplex_0_2_2_0; Neuron*k2CaMKon*KCaM_2_0*pKCaM_0_2;
  reaction287: pKCaMcomplex_0_2_2_0 => KCaM_2_0 + pKCaM_0_2; Neuron*k2CaMKoff*pKCaMcomplex_0_2_2_0;
  reaction288: KCaM_2_1 + pKCaM_0_2 => pKCaMcomplex_0_2_2_1; Neuron*k2CaMKon*KCaM_2_1*pKCaM_0_2;
  reaction289: pKCaMcomplex_0_2_2_1 => KCaM_2_1 + pKCaM_0_2; Neuron*k2CaMKoff*pKCaMcomplex_0_2_2_1;
  reaction290: KCaM_2_2 + pKCaM_0_2 => pKCaMcomplex_0_2_2_2; Neuron*k2CaMKon*KCaM_2_2*pKCaM_0_2;
  reaction291: pKCaMcomplex_0_2_2_2 => KCaM_2_2 + pKCaM_0_2; Neuron*k2CaMKoff*pKCaMcomplex_0_2_2_2;
  reaction292: KCaM_0_0 + pKCaM_1_0 => pKCaMcomplex_1_0_0_0; Neuron*k2CaMKon*KCaM_0_0*pKCaM_1_0;
  reaction293: pKCaMcomplex_1_0_0_0 => KCaM_0_0 + pKCaM_1_0; Neuron*k2CaMKoff*pKCaMcomplex_1_0_0_0;
  reaction294: KCaM_0_1 + pKCaM_1_0 => pKCaMcomplex_1_0_0_1; Neuron*k2CaMKon*KCaM_0_1*pKCaM_1_0;
  reaction295: pKCaMcomplex_1_0_0_1 => KCaM_0_1 + pKCaM_1_0; Neuron*k2CaMKoff*pKCaMcomplex_1_0_0_1;
  reaction296: KCaM_0_2 + pKCaM_1_0 => pKCaMcomplex_1_0_0_2; Neuron*k2CaMKon*KCaM_0_2*pKCaM_1_0;
  reaction297: pKCaMcomplex_1_0_0_2 => KCaM_0_2 + pKCaM_1_0; Neuron*k2CaMKoff*pKCaMcomplex_1_0_0_2;
  reaction298: KCaM_1_0 + pKCaM_1_0 => pKCaMcomplex_1_0_1_0; Neuron*k2CaMKon*KCaM_1_0*pKCaM_1_0;
  reaction299: pKCaMcomplex_1_0_1_0 => KCaM_1_0 + pKCaM_1_0; Neuron*k2CaMKoff*pKCaMcomplex_1_0_1_0;
  reaction300: KCaM_1_1 + pKCaM_1_0 => pKCaMcomplex_1_0_1_1; Neuron*k2CaMKon*KCaM_1_1*pKCaM_1_0;
  reaction301: pKCaMcomplex_1_0_1_1 => KCaM_1_1 + pKCaM_1_0; Neuron*k2CaMKoff*pKCaMcomplex_1_0_1_1;
  reaction302: KCaM_1_2 + pKCaM_1_0 => pKCaMcomplex_1_0_1_2; Neuron*k2CaMKon*KCaM_1_2*pKCaM_1_0;
  reaction303: pKCaMcomplex_1_0_1_2 => KCaM_1_2 + pKCaM_1_0; Neuron*k2CaMKoff*pKCaMcomplex_1_0_1_2;
  reaction304: KCaM_2_0 + pKCaM_1_0 => pKCaMcomplex_1_0_2_0; Neuron*k2CaMKon*KCaM_2_0*pKCaM_1_0;
  reaction305: pKCaMcomplex_1_0_2_0 => KCaM_2_0 + pKCaM_1_0; Neuron*k2CaMKoff*pKCaMcomplex_1_0_2_0;
  reaction306: KCaM_2_1 + pKCaM_1_0 => pKCaMcomplex_1_0_2_1; Neuron*k2CaMKon*KCaM_2_1*pKCaM_1_0;
  reaction307: pKCaMcomplex_1_0_2_1 => KCaM_2_1 + pKCaM_1_0; Neuron*k2CaMKoff*pKCaMcomplex_1_0_2_1;
  reaction308: KCaM_2_2 + pKCaM_1_0 => pKCaMcomplex_1_0_2_2; Neuron*k2CaMKon*KCaM_2_2*pKCaM_1_0;
  reaction309: pKCaMcomplex_1_0_2_2 => KCaM_2_2 + pKCaM_1_0; Neuron*k2CaMKoff*pKCaMcomplex_1_0_2_2;
  reaction310: KCaM_0_0 + pKCaM_1_1 => pKCaMcomplex_1_1_0_0; Neuron*k2CaMKon*KCaM_0_0*pKCaM_1_1;
  reaction311: pKCaMcomplex_1_1_0_0 => KCaM_0_0 + pKCaM_1_1; Neuron*k2CaMKoff*pKCaMcomplex_1_1_0_0;
  reaction312: KCaM_0_1 + pKCaM_1_1 => pKCaMcomplex_1_1_0_1; Neuron*k2CaMKon*KCaM_0_1*pKCaM_1_1;
  reaction313: pKCaMcomplex_1_1_0_1 => KCaM_0_1 + pKCaM_1_1; Neuron*k2CaMKoff*pKCaMcomplex_1_1_0_1;
  reaction314: KCaM_0_2 + pKCaM_1_1 => pKCaMcomplex_1_1_0_2; Neuron*k2CaMKon*KCaM_0_2*pKCaM_1_1;
  reaction315: pKCaMcomplex_1_1_0_2 => KCaM_0_2 + pKCaM_1_1; Neuron*k2CaMKoff*pKCaMcomplex_1_1_0_2;
  reaction316: KCaM_1_0 + pKCaM_1_1 => pKCaMcomplex_1_1_1_0; Neuron*k2CaMKon*KCaM_1_0*pKCaM_1_1;
  reaction317: pKCaMcomplex_1_1_1_0 => KCaM_1_0 + pKCaM_1_1; Neuron*k2CaMKoff*pKCaMcomplex_1_1_1_0;
  reaction318: KCaM_1_1 + pKCaM_1_1 => pKCaMcomplex_1_1_1_1; Neuron*k2CaMKon*KCaM_1_1*pKCaM_1_1;
  reaction319: pKCaMcomplex_1_1_1_1 => KCaM_1_1 + pKCaM_1_1; Neuron*k2CaMKoff*pKCaMcomplex_1_1_1_1;
  reaction320: KCaM_1_2 + pKCaM_1_1 => pKCaMcomplex_1_1_1_2; Neuron*k2CaMKon*KCaM_1_2*pKCaM_1_1;
  reaction321: pKCaMcomplex_1_1_1_2 => KCaM_1_2 + pKCaM_1_1; Neuron*k2CaMKoff*pKCaMcomplex_1_1_1_2;
  reaction322: KCaM_2_0 + pKCaM_1_1 => pKCaMcomplex_1_1_2_0; Neuron*k2CaMKon*KCaM_2_0*pKCaM_1_1;
  reaction323: pKCaMcomplex_1_1_2_0 => KCaM_2_0 + pKCaM_1_1; Neuron*k2CaMKoff*pKCaMcomplex_1_1_2_0;
  reaction324: KCaM_2_1 + pKCaM_1_1 => pKCaMcomplex_1_1_2_1; Neuron*k2CaMKon*KCaM_2_1*pKCaM_1_1;
  reaction325: pKCaMcomplex_1_1_2_1 => KCaM_2_1 + pKCaM_1_1; Neuron*k2CaMKoff*pKCaMcomplex_1_1_2_1;
  reaction326: KCaM_2_2 + pKCaM_1_1 => pKCaMcomplex_1_1_2_2; Neuron*k2CaMKon*KCaM_2_2*pKCaM_1_1;
  reaction327: pKCaMcomplex_1_1_2_2 => KCaM_2_2 + pKCaM_1_1; Neuron*k2CaMKoff*pKCaMcomplex_1_1_2_2;
  reaction328: KCaM_0_0 + pKCaM_1_2 => pKCaMcomplex_1_2_0_0; Neuron*k2CaMKon*KCaM_0_0*pKCaM_1_2;
  reaction329: pKCaMcomplex_1_2_0_0 => KCaM_0_0 + pKCaM_1_2; Neuron*k2CaMKoff*pKCaMcomplex_1_2_0_0;
  reaction330: KCaM_0_1 + pKCaM_1_2 => pKCaMcomplex_1_2_0_1; Neuron*k2CaMKon*KCaM_0_1*pKCaM_1_2;
  reaction331: pKCaMcomplex_1_2_0_1 => KCaM_0_1 + pKCaM_1_2; Neuron*k2CaMKoff*pKCaMcomplex_1_2_0_1;
  reaction332: KCaM_0_2 + pKCaM_1_2 => pKCaMcomplex_1_2_0_2; Neuron*k2CaMKon*KCaM_0_2*pKCaM_1_2;
  reaction333: pKCaMcomplex_1_2_0_2 => KCaM_0_2 + pKCaM_1_2; Neuron*k2CaMKoff*pKCaMcomplex_1_2_0_2;
  reaction334: KCaM_1_0 + pKCaM_1_2 => pKCaMcomplex_1_2_1_0; Neuron*k2CaMKon*KCaM_1_0*pKCaM_1_2;
  reaction335: pKCaMcomplex_1_2_1_0 => KCaM_1_0 + pKCaM_1_2; Neuron*k2CaMKoff*pKCaMcomplex_1_2_1_0;
  reaction336: KCaM_1_1 + pKCaM_1_2 => pKCaMcomplex_1_2_1_1; Neuron*k2CaMKon*KCaM_1_1*pKCaM_1_2;
  reaction337: pKCaMcomplex_1_2_1_1 => KCaM_1_1 + pKCaM_1_2; Neuron*k2CaMKoff*pKCaMcomplex_1_2_1_1;
  reaction338: KCaM_1_2 + pKCaM_1_2 => pKCaMcomplex_1_2_1_2; Neuron*k2CaMKon*KCaM_1_2*pKCaM_1_2;
  reaction339: pKCaMcomplex_1_2_1_2 => KCaM_1_2 + pKCaM_1_2; Neuron*k2CaMKoff*pKCaMcomplex_1_2_1_2;
  reaction340: KCaM_2_0 + pKCaM_1_2 => pKCaMcomplex_1_2_2_0; Neuron*k2CaMKon*KCaM_2_0*pKCaM_1_2;
  reaction341: pKCaMcomplex_1_2_2_0 => KCaM_2_0 + pKCaM_1_2; Neuron*k2CaMKoff*pKCaMcomplex_1_2_2_0;
  reaction342: KCaM_2_1 + pKCaM_1_2 => pKCaMcomplex_1_2_2_1; Neuron*k2CaMKon*KCaM_2_1*pKCaM_1_2;
  reaction343: pKCaMcomplex_1_2_2_1 => KCaM_2_1 + pKCaM_1_2; Neuron*k2CaMKoff*pKCaMcomplex_1_2_2_1;
  reaction344: KCaM_2_2 + pKCaM_1_2 => pKCaMcomplex_1_2_2_2; Neuron*k2CaMKon*KCaM_2_2*pKCaM_1_2;
  reaction345: pKCaMcomplex_1_2_2_2 => KCaM_2_2 + pKCaM_1_2; Neuron*k2CaMKoff*pKCaMcomplex_1_2_2_2;
  reaction346: KCaM_0_0 + pKCaM_2_0 => pKCaMcomplex_2_0_0_0; Neuron*k2CaMKon*KCaM_0_0*pKCaM_2_0;
  reaction347: pKCaMcomplex_2_0_0_0 => KCaM_0_0 + pKCaM_2_0; Neuron*k2CaMKoff*pKCaMcomplex_2_0_0_0;
  reaction348: KCaM_0_1 + pKCaM_2_0 => pKCaMcomplex_2_0_0_1; Neuron*k2CaMKon*KCaM_0_1*pKCaM_2_0;
  reaction349: pKCaMcomplex_2_0_0_1 => KCaM_0_1 + pKCaM_2_0; Neuron*k2CaMKoff*pKCaMcomplex_2_0_0_1;
  reaction350: KCaM_0_2 + pKCaM_2_0 => pKCaMcomplex_2_0_0_2; Neuron*k2CaMKon*KCaM_0_2*pKCaM_2_0;
  reaction351: pKCaMcomplex_2_0_0_2 => KCaM_0_2 + pKCaM_2_0; Neuron*k2CaMKoff*pKCaMcomplex_2_0_0_2;
  reaction352: KCaM_1_0 + pKCaM_2_0 => pKCaMcomplex_2_0_1_0; Neuron*k2CaMKon*KCaM_1_0*pKCaM_2_0;
  reaction353: pKCaMcomplex_2_0_1_0 => KCaM_1_0 + pKCaM_2_0; Neuron*k2CaMKoff*pKCaMcomplex_2_0_1_0;
  reaction354: KCaM_1_1 + pKCaM_2_0 => pKCaMcomplex_2_0_1_1; Neuron*k2CaMKon*KCaM_1_1*pKCaM_2_0;
  reaction355: pKCaMcomplex_2_0_1_1 => KCaM_1_1 + pKCaM_2_0; Neuron*k2CaMKoff*pKCaMcomplex_2_0_1_1;
  reaction356: KCaM_1_2 + pKCaM_2_0 => pKCaMcomplex_2_0_1_2; Neuron*k2CaMKon*KCaM_1_2*pKCaM_2_0;
  reaction357: pKCaMcomplex_2_0_1_2 => KCaM_1_2 + pKCaM_2_0; Neuron*k2CaMKoff*pKCaMcomplex_2_0_1_2;
  reaction358: KCaM_2_0 + pKCaM_2_0 => pKCaMcomplex_2_0_2_0; Neuron*k2CaMKon*KCaM_2_0*pKCaM_2_0;
  reaction359: pKCaMcomplex_2_0_2_0 => KCaM_2_0 + pKCaM_2_0; Neuron*k2CaMKoff*pKCaMcomplex_2_0_2_0;
  reaction360: KCaM_2_1 + pKCaM_2_0 => pKCaMcomplex_2_0_2_1; Neuron*k2CaMKon*KCaM_2_1*pKCaM_2_0;
  reaction361: pKCaMcomplex_2_0_2_1 => KCaM_2_1 + pKCaM_2_0; Neuron*k2CaMKoff*pKCaMcomplex_2_0_2_1;
  reaction362: KCaM_2_2 + pKCaM_2_0 => pKCaMcomplex_2_0_2_2; Neuron*k2CaMKon*KCaM_2_2*pKCaM_2_0;
  reaction363: pKCaMcomplex_2_0_2_2 => KCaM_2_2 + pKCaM_2_0; Neuron*k2CaMKoff*pKCaMcomplex_2_0_2_2;
  reaction364: KCaM_0_0 + pKCaM_2_1 => pKCaMcomplex_2_1_0_0; Neuron*k2CaMKon*KCaM_0_0*pKCaM_2_1;
  reaction365: pKCaMcomplex_2_1_0_0 => KCaM_0_0 + pKCaM_2_1; Neuron*k2CaMKoff*pKCaMcomplex_2_1_0_0;
  reaction366: KCaM_0_1 + pKCaM_2_1 => pKCaMcomplex_2_1_0_1; Neuron*k2CaMKon*KCaM_0_1*pKCaM_2_1;
  reaction367: pKCaMcomplex_2_1_0_1 => KCaM_0_1 + pKCaM_2_1; Neuron*k2CaMKoff*pKCaMcomplex_2_1_0_1;
  reaction368: KCaM_0_2 + pKCaM_2_1 => pKCaMcomplex_2_1_0_2; Neuron*k2CaMKon*KCaM_0_2*pKCaM_2_1;
  reaction369: pKCaMcomplex_2_1_0_2 => KCaM_0_2 + pKCaM_2_1; Neuron*k2CaMKoff*pKCaMcomplex_2_1_0_2;
  reaction370: KCaM_1_0 + pKCaM_2_1 => pKCaMcomplex_2_1_1_0; Neuron*k2CaMKon*KCaM_1_0*pKCaM_2_1;
  reaction371: pKCaMcomplex_2_1_1_0 => KCaM_1_0 + pKCaM_2_1; Neuron*k2CaMKoff*pKCaMcomplex_2_1_1_0;
  reaction372: KCaM_1_1 + pKCaM_2_1 => pKCaMcomplex_2_1_1_1; Neuron*k2CaMKon*KCaM_1_1*pKCaM_2_1;
  reaction373: pKCaMcomplex_2_1_1_1 => KCaM_1_1 + pKCaM_2_1; Neuron*k2CaMKoff*pKCaMcomplex_2_1_1_1;
  reaction374: KCaM_1_2 + pKCaM_2_1 => pKCaMcomplex_2_1_1_2; Neuron*k2CaMKon*KCaM_1_2*pKCaM_2_1;
  reaction375: pKCaMcomplex_2_1_1_2 => KCaM_1_2 + pKCaM_2_1; Neuron*k2CaMKoff*pKCaMcomplex_2_1_1_2;
  reaction376: KCaM_2_0 + pKCaM_2_1 => pKCaMcomplex_2_1_2_0; Neuron*k2CaMKon*KCaM_2_0*pKCaM_2_1;
  reaction377: pKCaMcomplex_2_1_2_0 => KCaM_2_0 + pKCaM_2_1; Neuron*k2CaMKoff*pKCaMcomplex_2_1_2_0;
  reaction378: KCaM_2_1 + pKCaM_2_1 => pKCaMcomplex_2_1_2_1; Neuron*k2CaMKon*KCaM_2_1*pKCaM_2_1;
  reaction379: pKCaMcomplex_2_1_2_1 => KCaM_2_1 + pKCaM_2_1; Neuron*k2CaMKoff*pKCaMcomplex_2_1_2_1;
  reaction380: KCaM_2_2 + pKCaM_2_1 => pKCaMcomplex_2_1_2_2; Neuron*k2CaMKon*KCaM_2_2*pKCaM_2_1;
  reaction381: pKCaMcomplex_2_1_2_2 => KCaM_2_2 + pKCaM_2_1; Neuron*k2CaMKoff*pKCaMcomplex_2_1_2_2;
  reaction382: KCaM_0_0 + pKCaM_2_2 => pKCaMcomplex_2_2_0_0; Neuron*k2CaMKon*KCaM_0_0*pKCaM_2_2;
  reaction383: pKCaMcomplex_2_2_0_0 => KCaM_0_0 + pKCaM_2_2; Neuron*k2CaMKoff*pKCaMcomplex_2_2_0_0;
  reaction384: KCaM_0_1 + pKCaM_2_2 => pKCaMcomplex_2_2_0_1; Neuron*k2CaMKon*KCaM_0_1*pKCaM_2_2;
  reaction385: pKCaMcomplex_2_2_0_1 => KCaM_0_1 + pKCaM_2_2; Neuron*k2CaMKoff*pKCaMcomplex_2_2_0_1;
  reaction386: KCaM_0_2 + pKCaM_2_2 => pKCaMcomplex_2_2_0_2; Neuron*k2CaMKon*KCaM_0_2*pKCaM_2_2;
  reaction387: pKCaMcomplex_2_2_0_2 => KCaM_0_2 + pKCaM_2_2; Neuron*k2CaMKoff*pKCaMcomplex_2_2_0_2;
  reaction388: KCaM_1_0 + pKCaM_2_2 => pKCaMcomplex_2_2_1_0; Neuron*k2CaMKon*KCaM_1_0*pKCaM_2_2;
  reaction389: pKCaMcomplex_2_2_1_0 => KCaM_1_0 + pKCaM_2_2; Neuron*k2CaMKoff*pKCaMcomplex_2_2_1_0;
  reaction390: KCaM_1_1 + pKCaM_2_2 => pKCaMcomplex_2_2_1_1; Neuron*k2CaMKon*KCaM_1_1*pKCaM_2_2;
  reaction391: pKCaMcomplex_2_2_1_1 => KCaM_1_1 + pKCaM_2_2; Neuron*k2CaMKoff*pKCaMcomplex_2_2_1_1;
  reaction392: KCaM_1_2 + pKCaM_2_2 => pKCaMcomplex_2_2_1_2; Neuron*k2CaMKon*KCaM_1_2*pKCaM_2_2;
  reaction393: pKCaMcomplex_2_2_1_2 => KCaM_1_2 + pKCaM_2_2; Neuron*k2CaMKoff*pKCaMcomplex_2_2_1_2;
  reaction394: KCaM_2_0 + pKCaM_2_2 => pKCaMcomplex_2_2_2_0; Neuron*k2CaMKon*KCaM_2_0*pKCaM_2_2;
  reaction395: pKCaMcomplex_2_2_2_0 => KCaM_2_0 + pKCaM_2_2; Neuron*k2CaMKoff*pKCaMcomplex_2_2_2_0;
  reaction396: KCaM_2_1 + pKCaM_2_2 => pKCaMcomplex_2_2_2_1; Neuron*k2CaMKon*KCaM_2_1*pKCaM_2_2;
  reaction397: pKCaMcomplex_2_2_2_1 => KCaM_2_1 + pKCaM_2_2; Neuron*k2CaMKoff*pKCaMcomplex_2_2_2_1;
  reaction398: KCaM_2_2 + pKCaM_2_2 => pKCaMcomplex_2_2_2_2; Neuron*k2CaMKon*KCaM_2_2*pKCaM_2_2;
  reaction399: pKCaMcomplex_2_2_2_2 => KCaM_2_2 + pKCaM_2_2; Neuron*k2CaMKoff*pKCaMcomplex_2_2_2_2;
  reaction400: pKCaMcomplex_0_0_0_0 => 2 pKCaM_0_0; Neuron*kpCaM0*pKCaMcomplex_0_0_0_0;
  reaction401: pKCaMcomplex_0_0_0_1 => pKCaM_0_0 + pKCaM_0_1; Neuron*kpCaM1N*pKCaMcomplex_0_0_0_1;
  reaction402: pKCaMcomplex_0_0_0_2 => pKCaM_0_0 + pKCaM_0_2; Neuron*kpCaM2N*pKCaMcomplex_0_0_0_2;
  reaction403: pKCaMcomplex_0_0_1_0 => pKCaM_0_0 + pKCaM_1_0; Neuron*kpCaM1C*pKCaMcomplex_0_0_1_0;
  reaction404: pKCaMcomplex_0_0_1_1 => pKCaM_0_0 + pKCaM_1_1; Neuron*kpCaM1C1N*pKCaMcomplex_0_0_1_1;
  reaction405: pKCaMcomplex_0_0_1_2 => pKCaM_0_0 + pKCaM_1_2; Neuron*kpCaM1C2N*pKCaMcomplex_0_0_1_2;
  reaction406: pKCaMcomplex_0_0_2_0 => pKCaM_0_0 + pKCaM_2_0; Neuron*kpCaM2C*pKCaMcomplex_0_0_2_0;
  reaction407: pKCaMcomplex_0_0_2_1 => pKCaM_0_0 + pKCaM_2_1; Neuron*kpCaM2C1N*pKCaMcomplex_0_0_2_1;
  reaction408: pKCaMcomplex_0_0_2_2 => pKCaM_0_0 + pKCaM_2_2; Neuron*kpCaM4*pKCaMcomplex_0_0_2_2;
  reaction409: pKCaMcomplex_0_1_0_0 => pKCaM_0_0 + pKCaM_0_1; Neuron*kpCaM0*pKCaMcomplex_0_1_0_0;
  reaction410: pKCaMcomplex_0_1_0_1 => 2 pKCaM_0_1; Neuron*kpCaM1N*pKCaMcomplex_0_1_0_1;
  reaction411: pKCaMcomplex_0_1_0_2 => pKCaM_0_1 + pKCaM_0_2; Neuron*kpCaM2N*pKCaMcomplex_0_1_0_2;
  reaction412: pKCaMcomplex_0_1_1_0 => pKCaM_0_1 + pKCaM_1_0; Neuron*kpCaM1C*pKCaMcomplex_0_1_1_0;
  reaction413: pKCaMcomplex_0_1_1_1 => pKCaM_0_1 + pKCaM_1_1; Neuron*kpCaM1C1N*pKCaMcomplex_0_1_1_1;
  reaction414: pKCaMcomplex_0_1_1_2 => pKCaM_0_1 + pKCaM_1_2; Neuron*kpCaM1C2N*pKCaMcomplex_0_1_1_2;
  reaction415: pKCaMcomplex_0_1_2_0 => pKCaM_0_1 + pKCaM_2_0; Neuron*kpCaM2C*pKCaMcomplex_0_1_2_0;
  reaction416: pKCaMcomplex_0_1_2_1 => pKCaM_0_1 + pKCaM_2_1; Neuron*kpCaM2C1N*pKCaMcomplex_0_1_2_1;
  reaction417: pKCaMcomplex_0_1_2_2 => pKCaM_0_1 + pKCaM_2_2; Neuron*kpCaM4*pKCaMcomplex_0_1_2_2;
  reaction418: pKCaMcomplex_0_2_0_0 => pKCaM_0_0 + pKCaM_0_2; Neuron*kpCaM0*pKCaMcomplex_0_2_0_0;
  reaction419: pKCaMcomplex_0_2_0_1 => pKCaM_0_1 + pKCaM_0_2; Neuron*kpCaM1N*pKCaMcomplex_0_2_0_1;
  reaction420: pKCaMcomplex_0_2_0_2 => 2 pKCaM_0_2; Neuron*kpCaM2N*pKCaMcomplex_0_2_0_2;
  reaction421: pKCaMcomplex_0_2_1_0 => pKCaM_0_2 + pKCaM_1_0; Neuron*kpCaM1C*pKCaMcomplex_0_2_1_0;
  reaction422: pKCaMcomplex_0_2_1_1 => pKCaM_0_2 + pKCaM_1_1; Neuron*kpCaM1C1N*pKCaMcomplex_0_2_1_1;
  reaction423: pKCaMcomplex_0_2_1_2 => pKCaM_0_2 + pKCaM_1_2; Neuron*kpCaM1C2N*pKCaMcomplex_0_2_1_2;
  reaction424: pKCaMcomplex_0_2_2_0 => pKCaM_0_2 + pKCaM_2_0; Neuron*kpCaM2C*pKCaMcomplex_0_2_2_0;
  reaction425: pKCaMcomplex_0_2_2_1 => pKCaM_0_2 + pKCaM_2_1; Neuron*kpCaM2C1N*pKCaMcomplex_0_2_2_1;
  reaction426: pKCaMcomplex_0_2_2_2 => pKCaM_0_2 + pKCaM_2_2; Neuron*kpCaM4*pKCaMcomplex_0_2_2_2;
  reaction427: pKCaMcomplex_1_0_0_0 => pKCaM_0_0 + pKCaM_1_0; Neuron*kpCaM0*pKCaMcomplex_1_0_0_0;
  reaction428: pKCaMcomplex_1_0_0_1 => pKCaM_0_1 + pKCaM_1_0; Neuron*kpCaM1N*pKCaMcomplex_1_0_0_1;
  reaction429: pKCaMcomplex_1_0_0_2 => pKCaM_0_2 + pKCaM_1_0; Neuron*kpCaM2N*pKCaMcomplex_1_0_0_2;
  reaction430: pKCaMcomplex_1_0_1_0 => 2 pKCaM_1_0; Neuron*kpCaM1C*pKCaMcomplex_1_0_1_0;
  reaction431: pKCaMcomplex_1_0_1_1 => pKCaM_1_0 + pKCaM_1_1; Neuron*kpCaM1C1N*pKCaMcomplex_1_0_1_1;
  reaction432: pKCaMcomplex_1_0_1_2 => pKCaM_1_0 + pKCaM_1_2; Neuron*kpCaM1C2N*pKCaMcomplex_1_0_1_2;
  reaction433: pKCaMcomplex_1_0_2_0 => pKCaM_1_0 + pKCaM_2_0; Neuron*kpCaM2C*pKCaMcomplex_1_0_2_0;
  reaction434: pKCaMcomplex_1_0_2_1 => pKCaM_1_0 + pKCaM_2_1; Neuron*kpCaM2C1N*pKCaMcomplex_1_0_2_1;
  reaction435: pKCaMcomplex_1_0_2_2 => pKCaM_1_0 + pKCaM_2_2; Neuron*kpCaM4*pKCaMcomplex_1_0_2_2;
  reaction436: pKCaMcomplex_1_1_0_0 => pKCaM_0_0 + pKCaM_1_1; Neuron*kpCaM0*pKCaMcomplex_1_1_0_0;
  reaction437: pKCaMcomplex_1_1_0_1 => pKCaM_0_1 + pKCaM_1_1; Neuron*kpCaM1N*pKCaMcomplex_1_1_0_1;
  reaction438: pKCaMcomplex_1_1_0_2 => pKCaM_0_2 + pKCaM_1_1; Neuron*kpCaM2N*pKCaMcomplex_1_1_0_2;
  reaction439: pKCaMcomplex_1_1_1_0 => pKCaM_1_0 + pKCaM_1_1; Neuron*kpCaM1C*pKCaMcomplex_1_1_1_0;
  reaction440: pKCaMcomplex_1_1_1_1 => 2 pKCaM_1_1; Neuron*kpCaM1C1N*pKCaMcomplex_1_1_1_1;
  reaction441: pKCaMcomplex_1_1_1_2 => pKCaM_1_1 + pKCaM_1_2; Neuron*kpCaM1C2N*pKCaMcomplex_1_1_1_2;
  reaction442: pKCaMcomplex_1_1_2_0 => pKCaM_1_1 + pKCaM_2_0; Neuron*kpCaM2C*pKCaMcomplex_1_1_2_0;
  reaction443: pKCaMcomplex_1_1_2_1 => pKCaM_1_1 + pKCaM_2_1; Neuron*kpCaM2C1N*pKCaMcomplex_1_1_2_1;
  reaction444: pKCaMcomplex_1_1_2_2 => pKCaM_1_1 + pKCaM_2_2; Neuron*kpCaM4*pKCaMcomplex_1_1_2_2;
  reaction445: pKCaMcomplex_1_2_0_0 => pKCaM_0_0 + pKCaM_1_2; Neuron*kpCaM0*pKCaMcomplex_1_2_0_0;
  reaction446: pKCaMcomplex_1_2_0_1 => pKCaM_0_1 + pKCaM_1_2; Neuron*kpCaM1N*pKCaMcomplex_1_2_0_1;
  reaction447: pKCaMcomplex_1_2_0_2 => pKCaM_0_2 + pKCaM_1_2; Neuron*kpCaM2N*pKCaMcomplex_1_2_0_2;
  reaction448: pKCaMcomplex_1_2_1_0 => pKCaM_1_0 + pKCaM_1_2; Neuron*kpCaM1C*pKCaMcomplex_1_2_1_0;
  reaction449: pKCaMcomplex_1_2_1_1 => pKCaM_1_1 + pKCaM_1_2; Neuron*kpCaM1C1N*pKCaMcomplex_1_2_1_1;
  reaction450: pKCaMcomplex_1_2_1_2 => 2 pKCaM_1_2; Neuron*kpCaM1C2N*pKCaMcomplex_1_2_1_2;
  reaction451: pKCaMcomplex_1_2_2_0 => pKCaM_1_2 + pKCaM_2_0; Neuron*kpCaM2C*pKCaMcomplex_1_2_2_0;
  reaction452: pKCaMcomplex_1_2_2_1 => pKCaM_1_2 + pKCaM_2_1; Neuron*kpCaM2C1N*pKCaMcomplex_1_2_2_1;
  reaction453: pKCaMcomplex_1_2_2_2 => pKCaM_1_2 + pKCaM_2_2; Neuron*kpCaM4*pKCaMcomplex_1_2_2_2;
  reaction454: pKCaMcomplex_2_0_0_0 => pKCaM_0_0 + pKCaM_2_0; Neuron*kpCaM0*pKCaMcomplex_2_0_0_0;
  reaction455: pKCaMcomplex_2_0_0_1 => pKCaM_0_1 + pKCaM_2_0; Neuron*kpCaM1N*pKCaMcomplex_2_0_0_1;
  reaction456: pKCaMcomplex_2_0_0_2 => pKCaM_0_2 + pKCaM_2_0; Neuron*kpCaM2N*pKCaMcomplex_2_0_0_2;
  reaction457: pKCaMcomplex_2_0_1_0 => pKCaM_1_0 + pKCaM_2_0; Neuron*kpCaM1C*pKCaMcomplex_2_0_1_0;
  reaction458: pKCaMcomplex_2_0_1_1 => pKCaM_1_1 + pKCaM_2_0; Neuron*kpCaM1C1N*pKCaMcomplex_2_0_1_1;
  reaction459: pKCaMcomplex_2_0_1_2 => pKCaM_1_2 + pKCaM_2_0; Neuron*kpCaM1C2N*pKCaMcomplex_2_0_1_2;
  reaction460: pKCaMcomplex_2_0_2_0 => 2 pKCaM_2_0; Neuron*kpCaM2C*pKCaMcomplex_2_0_2_0;
  reaction461: pKCaMcomplex_2_0_2_1 => pKCaM_2_0 + pKCaM_2_1; Neuron*kpCaM2C1N*pKCaMcomplex_2_0_2_1;
  reaction462: pKCaMcomplex_2_0_2_2 => pKCaM_2_0 + pKCaM_2_2; Neuron*kpCaM4*pKCaMcomplex_2_0_2_2;
  reaction463: pKCaMcomplex_2_1_0_0 => pKCaM_0_0 + pKCaM_2_1; Neuron*kpCaM0*pKCaMcomplex_2_1_0_0;
  reaction464: pKCaMcomplex_2_1_0_1 => pKCaM_0_1 + pKCaM_2_1; Neuron*kpCaM1N*pKCaMcomplex_2_1_0_1;
  reaction465: pKCaMcomplex_2_1_0_2 => pKCaM_0_2 + pKCaM_2_1; Neuron*kpCaM2N*pKCaMcomplex_2_1_0_2;
  reaction466: pKCaMcomplex_2_1_1_0 => pKCaM_1_0 + pKCaM_2_1; Neuron*kpCaM1C*pKCaMcomplex_2_1_1_0;
  reaction467: pKCaMcomplex_2_1_1_1 => pKCaM_1_1 + pKCaM_2_1; Neuron*kpCaM1C1N*pKCaMcomplex_2_1_1_1;
  reaction468: pKCaMcomplex_2_1_1_2 => pKCaM_1_2 + pKCaM_2_1; Neuron*kpCaM1C2N*pKCaMcomplex_2_1_1_2;
  reaction469: pKCaMcomplex_2_1_2_0 => pKCaM_2_0 + pKCaM_2_1; Neuron*kpCaM2C*pKCaMcomplex_2_1_2_0;
  reaction470: pKCaMcomplex_2_1_2_1 => 2 pKCaM_2_1; Neuron*kpCaM2C1N*pKCaMcomplex_2_1_2_1;
  reaction471: pKCaMcomplex_2_1_2_2 => pKCaM_2_1 + pKCaM_2_2; Neuron*kpCaM4*pKCaMcomplex_2_1_2_2;
  reaction472: pKCaMcomplex_2_2_0_0 => pKCaM_0_0 + pKCaM_2_2; Neuron*kpCaM0*pKCaMcomplex_2_2_0_0;
  reaction473: pKCaMcomplex_2_2_0_1 => pKCaM_0_1 + pKCaM_2_2; Neuron*kpCaM1N*pKCaMcomplex_2_2_0_1;
  reaction474: pKCaMcomplex_2_2_0_2 => pKCaM_0_2 + pKCaM_2_2; Neuron*kpCaM2N*pKCaMcomplex_2_2_0_2;
  reaction475: pKCaMcomplex_2_2_1_0 => pKCaM_1_0 + pKCaM_2_2; Neuron*kpCaM1C*pKCaMcomplex_2_2_1_0;
  reaction476: pKCaMcomplex_2_2_1_1 => pKCaM_1_1 + pKCaM_2_2; Neuron*kpCaM1C1N*pKCaMcomplex_2_2_1_1;
  reaction477: pKCaMcomplex_2_2_1_2 => pKCaM_1_2 + pKCaM_2_2; Neuron*kpCaM1C2N*pKCaMcomplex_2_2_1_2;
  reaction478: pKCaMcomplex_2_2_2_0 => pKCaM_2_0 + pKCaM_2_2; Neuron*kpCaM2C*pKCaMcomplex_2_2_2_0;
  reaction479: pKCaMcomplex_2_2_2_1 => pKCaM_2_1 + pKCaM_2_2; Neuron*kpCaM2C1N*pKCaMcomplex_2_2_2_1;
  reaction480: pKCaMcomplex_2_2_2_2 => 2 pKCaM_2_2; Neuron*kpCaM4*pKCaMcomplex_2_2_2_2;
end
