// SBML level 2 version 4

function SIGMOID_NON_VAR_noINH(Kconstant, stim_a, stim_b, stim_c, arg_stim)
  Kconstant*(stim_a + (1 - stim_a)/(1 + exp(-4*stim_b/stim_c/(1 - stim_a)*(arg_stim - stim_c))));
end

function OUTFLUX(Kout, VAR)
  Kout*VAR;
end

function INFLUX(Kin, VAR)
  Kin*VAR;
end

function SIGMOID_2_VAR(Kconstant, stim_a, stim_b, stim_c, arg_stim, inh_a, inh_b, inh_c, arg_inh, VAR1, VAR2)
  Kconstant*(stim_a + (1 - stim_a)/(1 + exp(-4*stim_b/stim_c/(1 - stim_a)*(arg_stim - stim_c))))*(1 - inh_a - (1 - inh_a)/(1 + exp(-4*inh_b/inh_c/(1 - inh_a)*(arg_inh - inh_c))))*VAR1*VAR2;
end

function TWO_TO_ONE(Kconstant, VAR1, VAR2)
  Kconstant*VAR1*VAR2;
end

function DEGRADATION(Kdeg, VAR)
  Kdeg*VAR;
end

function TWO_TO_NOTHING(Kconstant, VAR1, VAR2)
  Kconstant*VAR1*VAR2;
end

function DEGRADATION_TO_ONE(Kconstant, VAR)
  Kconstant*VAR;
end

function SIGMOID_1_VAR(Kconstant, stim_a, stim_b, stim_c, arg_stim, inh_a, inh_b, inh_c, arg_inh, VAR)
  Kconstant*(stim_a + (1 - stim_a)/(1 + exp(-4*stim_b/stim_c/(1 - stim_a)*(arg_stim - stim_c))))*(1 - inh_a - (1 - inh_a)/(1 + exp(-4*inh_b/inh_c/(1 - inh_a)*(arg_inh - inh_c))))*VAR;
end

function SIGMOID_NONVAR(Kconstant, stim_a, stim_b, stim_c, arg_stim, inh_a, inh_b, inh_c, arg_inh)
  Kconstant*(stim_a + (1 - stim_a)/(1 + exp(-4*stim_b/stim_c/(1 - stim_a)*(arg_stim - stim_c))))*(1 - inh_a - (1 - inh_a)/(1 + exp(-4*inh_b/inh_c/(1 - inh_a)*(arg_inh - inh_c))));
end

model GomezCabrero2011_Atherogenesis()
  // Gomez-Cabrero2011_Atherogenesis
  // This model is from the article:
  // Workflow for generating competing hypothesis from models with parameter uncertainty.
  // David Gomez-Cabrero, Albert Compte and Jesper Tegner Interface Focus 6 June 2011 vol. 1 no. 3 438-449; doi: 10.1098/rsfs.2011.0015
  // Abstract:
  // Mathematical models are increasingly used in life sciences. However, contrary to other disciplines, biological models are typically over-parametrized and loosely constrained by scarce experimental data and prior knowledge. Recent efforts on analysis of complex models have focused on isolated aspects without considering an integrated approach-ranging from model building to derivation of predictive experiments and refutation or validation of robust model behaviours. Here, we develop such an integrative workflow, a sequence of actions expanding upon current efforts with the purpose of setting the stage for a methodology facilitating an extraction of core behaviours and competing mechanistic hypothesis residing within underdetermined models. To this end, we make use of optimization search algorithms, statistical (machine-learning) classification techniques and cluster-based analysis of the state variables' dynamics and their corresponding parameter sets. We apply the workflow to a mathematical model of fat accumulation in the arterial wall (atherogenesis), a complex phenomena with limited quantitative understanding, thus leading to a model plagued with inherent uncertainty. We find that the mathematical atherogenesis model can still be understood in terms of a few key behaviours despite the large number of parameters. This result enabled us to derive distinct mechanistic predictions from the model despite the lack of confidence in the model parameters. We conclude that building integrative workflows enable investigators to embrace modelling of complex biological processes despite uncertainty in parameters.
  // This model originates from BioModels Database: A Database of Annotated Published Models (http://www.ebi.ac.uk/biomodels/).
  // To the extent possible under law, all copyright and related or neighbouring rights to this encoded model have been dedicated to the public domain worldwide. Please refer to CC0 Public Domain Dedication for more information.
  // In summary, you are entitled to use this encoded model in absolutely any manner you deem suitable, verbatim, or with modification, alone or embedded it in a larger context, redistribute it, commercially or not, in a restricted way or not..
  // To cite BioModels Database, please use: Li C, Donizelli M, Rodriguez N, Dharuri H, Endler L, Chelliah V, Li L, He E, Henry A, Stefan MI, Snoep JL, Hucka M, Le Novère N, Laibe C (2010) BioModels Database: An enhanced, curated and annotated resource for published quantitative kinetic models. BMC Syst Biol., 4:92.
  // biomodels.db:MODEL1002160000
  // isDescribedBy doi:10.1098/rsfs.2011.0015
  // biomodels.db:MODEL1002160000
  // isDescribedBy doi:10.1098/rsfs.2011.0015
  // biomodels.db:MODEL1002160000
  // biomodels.db:MODEL1002160000

  // Compartments:
  compartment compartment_1 = 1;

  // Species:
  species LDL in compartment_1 = 0;
  species oxLDL in compartment_1 = 0;
  species HDL in compartment_1 = 0;
  species MP in compartment_1 = 0;
  species PLAQUE in compartment_1 = 0;
  species TINF in compartment_1 = 0;
  species TAINF in compartment_1 = 0;
  species Bcells in compartment_1 = 0;
  species $ACT_END in compartment_1;
  species $SUMoxidLDL in compartment_1;
  species $SUMForFoam in compartment_1;
  species $SUMRecTINF in compartment_1;
  species $SUMRecTAINF in compartment_1;
  species $SUMRecBcells in compartment_1;
  species $HDL_blood in compartment_1 = 1;
  species $LDL_blood in compartment_1;
  species $SUMACT_END in compartment_1;
  species $SIGMOID_ACTENDstim in compartment_1;
  species $SIGMOID_ACTENDinh in compartment_1;

  // Parameters:
  alfa1 = 1.55466;
  alfa2 = 4.37096;
  alfa3 = 0.679298;
  alfa4 = 0.969185;
  alfa5 = 1.83425;
  alfa6 = 1.14028;
  alfa7 = 2.8067;
  alfa8 = 1.90407;
  alfa9 = 2.36282;
  alfa10 = 2.67818;
  alfa11 = 0.313487;
  alfa12 = 4.19449;
  alfa13 = 0.719488;
  ActEndstim_a = 0;
  ActEndstim_b = 3.51949;
  ActEndstim_c = 1.98699;
  ActEndinh_a = 0;
  ActEndinh_b = 1.9416;
  ActEndinh_c = 16.8895;
  oxLDLstim_a = 0;
  oxLDLstim_b = 0.229015;
  oxLDLstim_c = 15.8416;
  oxLDLinh_a = 0;
  oxLDLinh_b = 0.393913;
  oxLDLinh_c = 4.47565;
  ForFoamstim_a = 0;
  ForFoamstim_b = 1.00266;
  ForFoamstim_c = 4.39941;
  ForFoaminh_a = 0;
  ForFoaminh_b = 1.84577;
  ForFoaminh_c = 20.0861;
  RecTINFstim_a = 0;
  RecTINFstim_b = 2.27905;
  RecTINFstim_c = 16.8985;
  RecTINFinh_a = 0;
  RecTINFinh_b = 0.24317;
  RecTINFinh_c = 14.4186;
  RecTAINFstim_a = 0;
  RecTAINFstim_b = 0.347323;
  RecTAINFstim_c = 11.7167;
  RecTAINFinh_a = 0;
  RecTAINFinh_b = 0.160629;
  RecTAINFinh_c = 14.549;
  RecBcellsstim_a = 0;
  RecBcellsstim_b = 2.78714;
  RecBcellsstim_c = 2.23629;
  Kdeg_Bcells = 0.555078;
  Kdeg_TINF = 0.0882042;
  Kdeg_TAINF = 0.191241;
  Kdeg_MP = 0.196692;
  KoutLDL = 0.55296;
  KoutHDL = 0.375371;
  KinLDL = 4.06157;
  KinHDL = 1.0614;
  MCblood = 1;
  ActEndConstant = 0.147264;
  oxLDLConstant = 0.28495;
  ForFoamConstant = 0.571007;
  RecTINFConstant = 2.04297;
  RecTAINFConstant = 3.20264;
  RecBcellsConstant = 1.14614;
  KBcleanoxLDL = 0.150145;
  KBcleanPLAQUE = 0.431588;
  KRCT = 0.302073;

  // Assignment rules:
  SIGMOID_ACTENDinh := ActEndinh_a + (1 - ActEndinh_a)/(1 + exp(-4*ActEndinh_b/ActEndinh_c/(1 - ActEndinh_a)*(TAINF - ActEndinh_c)));
  SUMACT_END := MP + alfa11*oxLDL + alfa12*TINF + alfa13*PLAQUE;
  SIGMOID_ACTENDstim := ActEndstim_a + (1 - ActEndstim_a)/(1 + exp(-4*ActEndstim_b/ActEndstim_c/(1 - ActEndstim_a)*(SUMACT_END - ActEndstim_c)));
  ACT_END := ActEndConstant*SIGMOID_ACTENDstim*(1 - SIGMOID_ACTENDinh);
  LDL_blood := HDL_blood*2.5*(1 + PLAQUE/5);
  SUMRecBcells := MP + alfa8*TAINF + alfa9*ACT_END + alfa10*PLAQUE;
  SUMRecTAINF := TAINF + alfa7*MP;
  SUMRecTINF := MP + alfa4*TINF + alfa5*ACT_END + alfa6*oxLDL;
  SUMForFoam := MP + alfa2*TINF + alfa3*ACT_END;
  SUMoxidLDL := MP + alfa1*ACT_END;

  // Reactions:
  oxidLDL: LDL => oxLDL; compartment_1*SIGMOID_1_VAR(oxLDLConstant, oxLDLstim_a, oxLDLstim_b, oxLDLstim_c, SUMoxidLDL, oxLDLinh_a, oxLDLinh_b, oxLDLinh_c, HDL, LDL);  // modifiers: SUMoxidLDL, HDL
  Bcell_deg: Bcells => ; compartment_1*DEGRADATION(Kdeg_Bcells, Bcells);
  TINF_deg: TINF => PLAQUE; compartment_1*DEGRADATION_TO_ONE(Kdeg_TINF, TINF);
  TAINF_deg: TAINF => ; compartment_1*DEGRADATION(Kdeg_TAINF, TAINF);
  MP_deg: MP => PLAQUE; compartment_1*DEGRADATION(Kdeg_MP, MP);
  InLDL: $LDL_blood => LDL; compartment_1*INFLUX(KinLDL, LDL_blood);
  InHDL: $HDL_blood => HDL; compartment_1*INFLUX(KinHDL, HDL_blood);
  OutLDL: LDL => ; compartment_1*OUTFLUX(KoutLDL, LDL);
  OutHDL: HDL => ; compartment_1*OUTFLUX(KoutHDL, HDL);
  B_clean_oxLDL: Bcells + oxLDL => ; compartment_1*TWO_TO_NOTHING(KBcleanoxLDL, Bcells, oxLDL);
  B_clean_PLAQUE: Bcells + PLAQUE => ; compartment_1*TWO_TO_NOTHING(KBcleanPLAQUE, Bcells, PLAQUE);
  RCT: HDL + PLAQUE => MP; compartment_1*TWO_TO_ONE(KRCT, HDL, PLAQUE);
  MP_Recruitment: => MP; compartment_1*SIGMOID_NONVAR(ActEndConstant, ActEndstim_a, ActEndstim_b, ActEndstim_c, SUMACT_END, ActEndinh_a, ActEndinh_b, ActEndinh_c, TAINF);  // modifiers: SUMACT_END, TAINF
  ForFoam: MP + oxLDL => PLAQUE; compartment_1*SIGMOID_2_VAR(ForFoamConstant, ForFoamstim_a, ForFoamstim_b, ForFoamstim_c, SUMForFoam, ForFoaminh_a, ForFoamstim_b, ForFoaminh_c, TAINF, MP, oxLDL);  // modifiers: SUMForFoam, TAINF
  Recrut_TINF: => TINF; compartment_1*SIGMOID_NONVAR(RecTINFConstant, RecTINFstim_a, RecTINFstim_b, RecTINFstim_c, SUMRecTINF, RecTINFinh_a, RecTINFinh_b, RecTINFinh_c, TAINF);  // modifiers: SUMRecTINF, TAINF
  Recrut_TAINF: => TAINF; compartment_1*SIGMOID_NONVAR(RecTAINFConstant, RecTAINFstim_a, RecTAINFstim_b, RecTAINFstim_c, SUMRecTAINF, RecTAINFinh_a, RecTAINFinh_b, RecTAINFinh_c, TINF);  // modifiers: SUMRecTAINF, TINF
  Recrut_Bcells: => Bcells; compartment_1*SIGMOID_NON_VAR_noINH(RecBcellsConstant, RecBcellsstim_a, RecBcellsstim_b, RecBcellsstim_c, SUMRecBcells);  // modifiers: SUMRecBcells

  // Unit definitions:
  unit volume = dimensionless;
  unit time = dimensionless;
  unit substance = dimensionless;
end
