// SBML level 2 version 4

model kuwahara2010()
  // Kuwahara2010_Fimbriation_Switch_42C
  // This the detailed model for 42°C from the article:
  // Temperature Control of Fimbriation Circuit Switch in Uropathogenic Escherichia coli : Quantitative Analysis via Automated Model Abstraction.
  // Hiroyuki Kuwahara, Chris J. Myers and Michael S. Samoilov PLoS Comput Biol. 2010 6(3): e1000723. doi: 10.1371/journal.pcbi.1000723 ,
  // Abstract:
  // Uropathogenic Escherichia coli (UPEC) represent the predominant cause of urinary tract infections (UTIs). A key UPEC molecular virulence mechanism is type 1 fimbriae, whose expression is controlled by the orientation of an invertible chromosomal DNA element—the fim switch. Temperature has been shown to act as a major regulator of fim switching behavior and is overall an important indicator as well as functional feature of many urologic diseases, including UPEC host-pathogen interaction dynamics. Given this panoptic physiological role of temperature during UTI progression and notable empirical challenges to its direct in vivo studies, in silico modeling of corresponding biochemical and biophysical mechanisms essential to UPEC pathogenicity may significantly aid our understanding of the underlying disease processes. However, rigorous computational analysis of biological systems, such as fim switch temperature control circuit, has hereto presented a notoriously demanding problem due to both the substantial complexity of the gene regulatory networks involved as well as their often characteristically discrete and stochastic dynamics. To address these issues, we have developed an approach that enables automated multiscale abstraction of biological system descriptions based on reaction kinetics. Implemented as a computational tool, this method has allowed us to efficiently analyze the modular organization and behavior of the E. coli fimbriation switch circuit at different temperature settings, thus facilitating new insights into this mode of UPEC molecular virulence regulation. In particular, our results suggest that, with respect to its role in shutting down fimbriae expression, the primary function of FimB recombinase may be to effect a controlled down-regulation (rather than increase) of the ON-to-OFF fim switching rate via temperature-dependent suppression of competing dynamics mediated by recombinase FimE. Our computational analysis further implies that this down-regulation mechanism could be particularly significant inside the host environment, thus potentially contributing further understanding toward the development of novel therapeutic approaches to UPEC-caused UTIs.
  // This model is parametrized for 42°C. Some parameters and initial conditions are temperature dependent and have to be changed to simulate other conditions as listed in table 4 (doi: 10.1371/journal.pcbi.1000723.t004 ), table 5(doi: 10.1371/journal.pcbi.1000723.t005 ) and 6(doi: 10.1371/journal.pcbi.1000723.t006 ) and supplement S1 (doi: 10.1371/journal.pcbi.1000723.s001 ) of the publication.
  // This model originates from BioModels Database: A Database of Annotated Published Models (http://www.ebi.ac.uk/biomodels/). It is copyright (c) 2005-2011 The BioModels.net Team.
  // To the extent possible under law, all copyright and related or neighbouring rights to this encoded model have been dedicated to the public domain worldwide. Please refer to CC0 Public Domain Dedication for more information.
  // In summary, you are entitled to use this encoded model in absolutely any manner you deem suitable, verbatim, or with modification, alone or embedded it in a larger context, redistribute it, commercially or not, in a restricted way or not..
  // To cite BioModels Database, please use: Li C, Donizelli M, Rodriguez N, Dharuri H, Endler L, Chelliah V, Li L, He E, Henry A, Stefan MI, Snoep JL, Hucka M, Le Novère N, Laibe C (2010) BioModels Database: An enhanced, curated and annotated resource for published quantitative kinetic models. BMC Syst Biol., 4:92.
  // biomodels.db:MODEL1004010002
  // isDescribedBy pubmed:20361050
  // biomodels.db:MODEL1004010002
  // isDescribedBy pubmed:20361050
  // biomodels.db:MODEL1004010002
  // biomodels.db:MODEL1004010002

  // Compartments:
  compartment default = 1;

  // Species:
  species FimE in default = 13;
  species FimB in default = 127;
  species Lrp in default = 20;
  species IHF in default = 10;
  species HNS in default = 20000;
  species RNAP in default = 30;
  species switch in default = 0;
  species PfimE in default = 1;
  species PfimB in default = 1;
  species s4 in default = 0;
  species PfimB_RNAP in default = 0;
  species PfimE_HNS in default = 0;
  species Prom in default = 1;
  species s6 in default = 0;
  species s25 in default = 0;
  species s22 in default = 0;
  species s21 in default = 0;
  species s23 in default = 0;
  species s19 in default = 0;
  species s8 in default = 0;
  species PfimE_RNAP in default = 0;
  species PfimB_HNS in default = 0;
  species s17 in default = 0;
  species s20 in default = 0;
  species s7 in default = 0;
  species s5 in default = 0;
  species s2 in default = 0;
  species s26 in default = 0;
  species s3 in default = 0;
  species s18 in default = 0;
  species s24 in default = 0;

  // Parameters:
  PfimE_total = 1;
  kf_r_PfimE_RNAP = 0.333333333;
  kr_r_PfimE_RNAP = 10;
  kf_r_PfimE_HNS = 0.014705882;
  kr_r_PfimE_HNS = 10;
  k_Prod_FimE = 0.666666667;
  k_Deg_FimE = 0.001625;
  PfimB_total = 1;
  k_Prod_FimB = 0.666666667;
  kf_r_PfimB_RNAP = 0.333333333;
  kr_r_PfimB_RNAP = 10;
  kf_r_PfimB_HNS = 0.000588235;
  kr_r_PfimB_HNS = 10;
  k_Deg_FimB = 0.001625;
  Prom_total = 1;
  k_prod3 = 6.53e-8;
  k_prod4 = 6.5e-7;
  k_prod5 = 0.0003;
  k_prod6 = 8e-5;
  k_prod7 = 3.7e-6;
  k_prod8 = 7.5e-7;
  kf_r2 = 1.01547;
  kf_r3 = 0.00860736;
  kf_r4 = 0.00860736;
  kf_r5 = 0.000365224;
  kf_r6 = 0.000121409;
  kf_r7 = 0.000365224;
  kf_r8 = 0.000121409;
  kf_r17 = 0.00847626;
  kf_r18 = 0.00847626;
  kf_r19 = 0.000359662;
  kf_r20 = 0.00011956;
  kf_r21 = 0.000359662;
  kf_r22 = 0.00011956;
  kf_r23 = 0.0424317;
  kf_r24 = 0.0141053;
  kf_r25 = 0.0430879;
  kf_r26 = 0.0143234;
  kr_r2 = 1;
  kr_r3 = 1;
  kr_r4 = 1;
  kr_r5 = 1;
  kr_r6 = 1;
  kr_r7 = 1;
  kr_r8 = 1;
  kr_r17 = 1;
  kr_r18 = 1;
  kr_r19 = 1;
  kr_r20 = 1;
  kr_r21 = 1;
  kr_r22 = 1;
  kr_r23 = 1;
  kr_r24 = 1;
  kr_r25 = 1;
  kr_r26 = 1;

  // Reactions:
  r19: FimE + 2 Lrp + Prom -> s19; kf_r19*Lrp^2*Prom*FimE - kr_r19*s19;
  r8: IHF + 3 Lrp + Prom + FimB -> s8; kf_r8*FimB*Lrp^3*IHF*Prom - kr_r8*s8;
  prod6: s6 => switch + s6; k_prod6*s6;
  r22: 3 Lrp + Prom + FimB -> s22; kf_r22*Lrp^3*Prom*FimB - kr_r22*s22;
  prod5: s5 => s5 + switch; k_prod5*s5;
  r26: IHF + 3 Lrp + Prom -> s26; kf_r26*Lrp^3*IHF*Prom - kr_r26*s26;
  r17: FimE + Prom -> s17; kf_r17*FimE*Prom - kr_r17*s17;
  r2: IHF + Prom -> s2; kf_r2*IHF*Prom - kr_r2*s2;
  r4: IHF + Prom + FimB -> s4; kf_r4*IHF*FimB*Prom - kr_r4*s4;
  r7: 2 Lrp + IHF + Prom + FimB -> s7; kf_r7*Prom*IHF*Lrp^2*FimB - kr_r7*s7;
  r23: 2 Lrp + Prom -> s23; kf_r23*Lrp^2*Prom - kr_r23*s23;
  prod4: s4 => s4 + switch; k_prod4*s4;
  r24: 3 Lrp + Prom -> s24; kf_r24*Lrp^3*Prom - kr_r24*s24;
  r3: FimE + IHF + Prom -> s3; kf_r3*FimE*IHF*Prom - kr_r3*s3;
  r25: IHF + 2 Lrp + Prom -> s25; kf_r25*Lrp^2*Prom*IHF - kr_r25*s25;
  r18: Prom + FimB -> s18; kf_r18*FimB*Prom - kr_r18*s18;
  prod3: s3 => switch + s3; k_prod3*s3;
  prod8: s8 => s8 + switch; k_prod8*s8;
  r5: FimE + 2 Lrp + IHF + Prom -> s5; kf_r5*IHF*FimE*Lrp^2*Prom - kr_r5*s5;
  prod7: s7 => s7 + switch; k_prod7*s7;
  r21: 2 Lrp + Prom + FimB -> s21; kf_r21*Lrp^2*FimB*Prom - kr_r21*s21;
  r20: FimE + 3 Lrp + Prom -> s20; kf_r20*FimE*Lrp^3*Prom - kr_r20*s20;
  r6: FimE + 3 Lrp + IHF + Prom -> s6; kf_r6*IHF*FimE*Prom*Lrp^3 - kr_r6*s6;
  Deg_FimB: FimB => ; k_Deg_FimB*FimB;
  r_PfimB_HNS: PfimB + HNS -> PfimB_HNS; kf_r_PfimB_HNS*PfimB*HNS - kr_r_PfimB_HNS*PfimB_HNS;
  Prod_FimB: PfimB_RNAP => FimB + PfimB_RNAP; k_Prod_FimB*PfimB_RNAP;
  r_PfimE_HNS: PfimE + HNS -> PfimE_HNS; kf_r_PfimE_HNS*PfimE*HNS - kr_r_PfimE_HNS*PfimE_HNS;
  r_PfimE_RNAP: RNAP + PfimE -> PfimE_RNAP; kf_r_PfimE_RNAP*PfimE*RNAP - kr_r_PfimE_RNAP*PfimE_RNAP;
  Deg_FimE: FimE => ; k_Deg_FimE*FimE;
  r_PfimB_RNAP: RNAP + PfimB -> PfimB_RNAP; kf_r_PfimB_RNAP*PfimB*RNAP - kr_r_PfimB_RNAP*PfimB_RNAP;
  Prod_FimE: PfimE_RNAP => FimE + PfimE_RNAP; k_Prod_FimE*PfimE_RNAP;
end
