// SBML level 2 version 4

model haut()
  // Haut1974_Pentose_Cycle_Rat
  // This is the Unlabelled model as described in:
  // Simulation of the Pentose Cycle in Lactating Rat Mammary Gland
  // Haut MJ , London JW , Garfinkel D Biochem J. 1974,138(3), 511-524. PMID: 4154746 ;PMCID: PMC1166237
  // Abstract:
  // A computer model representing the pentose cycle, the tricarboxylic acid cycle and glycolysis in slices of lactating rat mammary glands has been constructed. This model is based primarily on the studies, with radioactive chemicals, of Abraham and Chaikoff (1959) [although some of the discrepant data of Katz and Wals (1972) could be accommodated by changing one enzyme activity]. Data obtained by using [1-(14)C]-, [6-(14)C]- and [3,4-(14)C]-glucose were simulated, as well as data obtained by using unlabelled glucose (for which some new experimental data are presented). Much past work on the pentose cycle has been mainly concerned with the division of glucose flow between the pentose cycle and glycolysis, and has relied on the assumption that the system is in steady state (both labelled and unlabelled). This assumption may not apply to lactating rat mammary glands, since the model shows that the percentage flow through the shunt progressively decreased for the first 2h of a 3h experiment, and we were unable to construct a completely steady-state model. The model allows examination of many quantitative features of the system, especially the amount of material passing through key enzymes, some of which appear to be regulated by NADP(+) concentrations as proposed by McLean (1960). Supplementary information for this paper has been deposited as Supplementary Publication SUP 50023 at the British Museum (Lending Division) (formerly the National Lending Library for Science and Technology), Boston Spa, Yorks. LS23 7BQ, U.K., from whom copies can be obtained on the terms indicated in Biochem. J. (1973) 131, 5.
  // All reactions are modelled as mass action, reactions labelled 1-30 in the order they appear in Scheme 1. Note that the unit of substance is micromole per 0.5g wet weight of tissue. Simulation reproduces results in tables 5 and 6.
  // This model originates from BioModels Database: A Database of Annotated Published Models (http://www.ebi.ac.uk/biomodels/). It is copyright (c) 2005-2011 The BioModels.net Team.
  // To the extent possible under law, all copyright and related or neighbouring rights to this encoded model have been dedicated to the public domain worldwide. Please refer to CC0 Public Domain Dedication for more information.
  // In summary, you are entitled to use this encoded model in absolutely any manner you deem suitable, verbatim, or with modification, alone or embedded it in a larger context, redistribute it, commercially or not, in a restricted way or not. .
  // To cite BioModels Database, please use: Li C, Donizelli M, Rodriguez N, Dharuri H, Endler L, Chelliah V, Li L, He E, Henry A, Stefan MI, Snoep JL, Hucka M, Le Novère N, Laibe C (2010) BioModels Database: An enhanced, curated and annotated resource for published quantitative kinetic models. BMC Syst Biol., 4:92.
  // biomodels.db:MODEL1004070000
  // isDescribedBy pubmed:4154746
  // taxonomy:10114
  // biomodels.db:MODEL1004070000
  // isDescribedBy pubmed:4154746
  // biomodels.db:MODEL1004070000

  // Compartments:
  compartment intracellular = 1;  // GO:0005622
  compartment extracellular = 1;  // GO:0005576

  // Species:
  species glucose_inside_cell in intracellular = 1e-9; glucose_inside_cell is "glucose (inside cell)";  // CHEBI:17234
  species $glucose_outside_cell in extracellular = 50; glucose_outside_cell is "glucose (outside cell)";  // CHEBI:17234
  species lactose in intracellular = 1e-9;  // CHEBI:17716
  species glucose_hexokinase in intracellular = 1e-9; glucose_hexokinase is "glucose-hexokinase";  // hasPart CHEBI:15721 ec-code:2.7.1.1
  species hexokinase in intracellular = 0.001;  // ec-code:2.7.1.1
  species glucose_6_phosphate in intracellular = 0.058; glucose_6_phosphate is "glucose 6-phosphate";  // CHEBI:14314
  species hexokinase_inhibited in intracellular = 1e-9; hexokinase_inhibited is "hexokinase (inhibited)";  // hasPart CHEBI:14314 ec-code:2.7.1.1
  species fructose_6_phosphate in intracellular = 0.0312; fructose_6_phosphate is "fructose 6-phosphate";  // CHEBI:15946
  species fructose_16_diphosphate in intracellular = 0.0125; fructose_16_diphosphate is "fructose 1,6 diphosphate";  // CHEBI:16905
  species dihydroxyacetone_3_phosphate in intracellular = 0.0352; dihydroxyacetone_3_phosphate is "dihydroxyacetone 3-phosphate";  // CHEBI:16108
  species glyceraldehyde_3_phosphate in intracellular = 0.01; glyceraldehyde_3_phosphate is "glyceraldehyde 3-phosphate";  // CHEBI:17138
  species glycerol in intracellular = 0.437;  // CHEBI:17754
  species pyruvate in intracellular = 0.059;  // CHEBI:15361
  species _6_phosphogluconolactone in intracellular = 0.094; _6_phosphogluconolactone is "6-phosphogluconolactone";  // CHEBI:16938
  species NADP in intracellular = 0.019; NADP is "NADP+";  // CHEBI:18009
  species NADPH in intracellular = 3.8;  // CHEBI:16474
  species _6_phosphogluconate in intracellular = 0.094; _6_phosphogluconate is "6-phosphogluconate";  // CHEBI:16863
  species CO2A in intracellular = 1e-9;  // CHEBI:16526
  species ribulose_5_phosphate in intracellular = 0.5; ribulose_5_phosphate is "ribulose 5-phosphate";  // CHEBI:17363
  species ribose_5_phosphate in intracellular = 0.5; ribose_5_phosphate is "ribose 5-phosphate";  // CHEBI:17797
  species xylulose_5_phosphate in intracellular = 0.5; xylulose_5_phosphate is "xylulose 5-phosphate";  // CHEBI:16332
  species sedoheptulose_7_phosphate in intracellular = 0.06; sedoheptulose_7_phosphate is "sedoheptulose 7-phosphate";  // CHEBI:15721
  species erythrose_4_phosphate in intracellular = 0.004; erythrose_4_phosphate is "erythrose 4-phosphate";  // CHEBI:48153
  species lactate in intracellular = 6.4;  // CHEBI:24996
  species acetyl_CoA in intracellular = 0.1; acetyl_CoA is "acetyl-CoA";  // CHEBI:15351
  species CO2B in intracellular = 1e-9;  // CHEBI:16526
  species CIT0C in intracellular = 0.307; CIT0C is "CIT0C: all C4 compounds in the tricarboxylic acid cycle";
  species CO2C in intracellular = 1e-9;  // CHEBI:16526
  species CO2D in intracellular = 1e-9;  // CHEBI:16526
  species fatty_acids in intracellular = 6.67;  // CHEBI:35366
  species CIT2C in intracellular = 0.09; CIT2C is "CIT2C: all C6 compounds in the tricarboxylic acid cycle";
  species CIT1C in intracellular = 0.017; CIT1C is "CIT1C: alpha-oxoglutarate";  // CHEBI:16810

  // Reactions:
  reaction_1: $glucose_outside_cell -> glucose_inside_cell; intracellular*(reaction_1_k1*glucose_outside_cell - reaction_1_k2*glucose_inside_cell);
    reaction_1_k1 = 0.05; reaction_1_k2 = 0.886;
  reaction_2: glucose_inside_cell => lactose; intracellular*reaction_2_k1*glucose_inside_cell;
    reaction_2_k1 = 0.009;
  reaction_3: glucose_inside_cell + hexokinase -> glucose_hexokinase; intracellular*(reaction_3_k1*glucose_inside_cell*hexokinase - reaction_3_k2*glucose_hexokinase);
    reaction_3_k1 = 378; reaction_3_k2 = 37.8;
  reaction_4: glucose_hexokinase => glucose_6_phosphate + hexokinase; intracellular*reaction_4_k1*glucose_hexokinase;
    reaction_4_k1 = 1000;
  reaction_5: glucose_6_phosphate + hexokinase -> hexokinase_inhibited; intracellular*(reaction_5_k1*glucose_6_phosphate*hexokinase - reaction_5_k2*hexokinase_inhibited);
    reaction_5_k1 = 1.667; reaction_5_k2 = 0.1;
  Phosphoglucose_Isomerase: glucose_6_phosphate -> fructose_6_phosphate; intracellular*(Phosphoglucose_Isomerase_k1*glucose_6_phosphate - Phosphoglucose_Isomerase_k2*fructose_6_phosphate);
    Phosphoglucose_Isomerase_k1 = 0.36; Phosphoglucose_Isomerase_k2 = 0.01;
  Phosphofructosekinase: fructose_6_phosphate -> fructose_16_diphosphate; intracellular*(Phosphofructosekinase_k1*fructose_6_phosphate - Phosphofructosekinase_k2*fructose_16_diphosphate);
    Phosphofructosekinase_k1 = 2.5; Phosphofructosekinase_k2 = 0.3;
  Aldolase: fructose_16_diphosphate -> glyceraldehyde_3_phosphate + dihydroxyacetone_3_phosphate; intracellular*(Aldolase_k1*fructose_16_diphosphate - Aldolase_k2*glyceraldehyde_3_phosphate*dihydroxyacetone_3_phosphate);
    Aldolase_k1 = 10; Aldolase_k2 = 0.442;
  Triose_phosphate_isomerase: dihydroxyacetone_3_phosphate -> glyceraldehyde_3_phosphate; intracellular*(Triose_phosphate_isomerase_k1*dihydroxyacetone_3_phosphate - Triose_phosphate_isomerase_k2*glyceraldehyde_3_phosphate);
    Triose_phosphate_isomerase_k1 = 30; Triose_phosphate_isomerase_k2 = 75.6;
  reaction_10: dihydroxyacetone_3_phosphate -> glycerol; intracellular*(reaction_10_k1*dihydroxyacetone_3_phosphate - reaction_10_k2*glycerol);
    reaction_10_k1 = 225; reaction_10_k2 = 50;
  reaction_11: glyceraldehyde_3_phosphate => pyruvate; intracellular*reaction_11_k1*glyceraldehyde_3_phosphate;
    reaction_11_k1 = 7.5;
  reaction_12: glucose_6_phosphate + NADP -> _6_phosphogluconolactone + NADPH; intracellular*(reaction_12_k1*glucose_6_phosphate*NADP - reaction_12_k2*_6_phosphogluconolactone*NADPH); reaction_12 is "Glucose 6 Phosphate dehydrogenase";
    reaction_12_k1 = 35; reaction_12_k2 = 2.07;
  _6_Phosphogluconolactonase: _6_phosphogluconolactone -> _6_phosphogluconate; intracellular*(_6_Phosphogluconolactonase_k1*_6_phosphogluconolactone - _6_Phosphogluconolactonase_k2*_6_phosphogluconate); _6_Phosphogluconolactonase is "6-Phosphogluconolactonase";
    _6_Phosphogluconolactonase_k1 = 0.191; _6_Phosphogluconolactonase_k2 = 0.0191;
  _6_Phosphogluconate_dehydrogenase: _6_phosphogluconate + NADP -> ribulose_5_phosphate + CO2A + NADPH; intracellular*(_6_Phosphogluconate_dehydrogenase_k1*_6_phosphogluconate*NADP - _6_Phosphogluconate_dehydrogenase_k2*ribulose_5_phosphate*CO2A*NADPH); _6_Phosphogluconate_dehydrogenase is "6-Phosphogluconate dehydrogenase";
    _6_Phosphogluconate_dehydrogenase_k1 = 17.2; _6_Phosphogluconate_dehydrogenase_k2 = 1;
  Phosphoribose_isomerase: ribulose_5_phosphate -> ribose_5_phosphate; intracellular*(Phosphoribose_isomerase_k1*ribulose_5_phosphate - Phosphoribose_isomerase_k2*ribose_5_phosphate);
    Phosphoribose_isomerase_k1 = 0.05; Phosphoribose_isomerase_k2 = 0.0162;
  D_Ribose_5_phosphate_3_epimerase: ribulose_5_phosphate -> xylulose_5_phosphate; intracellular*(D_Ribose_5_phosphate_3_epimerase_k1*ribulose_5_phosphate - D_Ribose_5_phosphate_3_epimerase_k2*xylulose_5_phosphate); D_Ribose_5_phosphate_3_epimerase is "D-Ribose 5-phosphate 3-epimerase";
    D_Ribose_5_phosphate_3_epimerase_k1 = 0.102; D_Ribose_5_phosphate_3_epimerase_k2 = 0.069;
  Transketolase: ribose_5_phosphate + xylulose_5_phosphate -> sedoheptulose_7_phosphate + glyceraldehyde_3_phosphate; intracellular*(Transketolase_k1*ribose_5_phosphate*xylulose_5_phosphate - Transketolase_k2*sedoheptulose_7_phosphate*glyceraldehyde_3_phosphate);
    Transketolase_k1 = 0.72; Transketolase_k2 = 0.6;
  reaction_18: erythrose_4_phosphate + xylulose_5_phosphate -> fructose_6_phosphate + glyceraldehyde_3_phosphate; intracellular*(reaction_18_k1*erythrose_4_phosphate*xylulose_5_phosphate - reaction_18_k2*fructose_6_phosphate*glyceraldehyde_3_phosphate);
    reaction_18_k1 = 28.5; reaction_18_k2 = 2.75;
  Transaldolase: sedoheptulose_7_phosphate + glyceraldehyde_3_phosphate -> fructose_6_phosphate + erythrose_4_phosphate; intracellular*(Transaldolase_k1*sedoheptulose_7_phosphate*glyceraldehyde_3_phosphate - Transaldolase_k2*fructose_6_phosphate*erythrose_4_phosphate);
    Transaldolase_k1 = 20.5; Transaldolase_k2 = 19.5;
  Lactate_dehydrogenase: pyruvate -> lactate; intracellular*(Lactate_dehydrogenase_k1*pyruvate - Lactate_dehydrogenase_k2*lactate);
    Lactate_dehydrogenase_k1 = 0.03; Lactate_dehydrogenase_k2 = 0.0005;
  Pyruvate_dehydrogenase: pyruvate => acetyl_CoA + CO2B; intracellular*Pyruvate_dehydrogenase_k1*pyruvate;
    Pyruvate_dehydrogenase_k1 = 1;
  CO2_fixation_A: pyruvate + CO2A => CIT0C; intracellular*CO2_fixation_A_k1*pyruvate*CO2A;
    CO2_fixation_A_k1 = 0.05;
  CO2_fixation_B: pyruvate + CO2B => CIT0C; intracellular*CO2_fixation_B_k1*pyruvate*CO2B;
    CO2_fixation_B_k1 = 0.05;
  CO2_fixation_C: pyruvate + CO2C => CIT0C; intracellular*CO2_fixation_C_k1*pyruvate*CO2C;
    CO2_fixation_C_k1 = 0.05;
  CO2_fixation_D: pyruvate + CO2D => CIT0C; intracellular*CO2_fixation_D_k1*pyruvate*CO2D;
    CO2_fixation_D_k1 = 0.05;
  reaction_26: NADPH => NADP; intracellular*reaction_26_k1*NADPH;
    reaction_26_k1 = 0.015;
  reaction_27: acetyl_CoA + NADPH -> fatty_acids + NADP; intracellular*(reaction_27_k1*acetyl_CoA*NADPH - reaction_27_k2*fatty_acids*NADP);
    reaction_27_k1 = 0.78; reaction_27_k2 = 0.000112;
  TCA1: acetyl_CoA + CIT0C -> CIT2C; intracellular*(TCA1_k1*acetyl_CoA*CIT0C - TCA1_k2*CIT2C);
    TCA1_k1 = 1.7; TCA1_k2 = 0.5;
  TCA2: CIT2C => CIT1C + CO2C; intracellular*TCA2_k1*CIT2C;
    TCA2_k1 = 0.375;
  TCA3: CIT1C => CIT0C + CO2D; intracellular*TCA3_k1*CIT1C;
    TCA3_k1 = 0.375;

  // Unit definitions:
  unit substance = 1e-6 mole; substance is "micromole per 0.5g wet weight of tissue";
  unit time = 60 second; time is "minute";
end
