// SBML level 2 version 4

model vaseghi()
  // Vaseghi1999_Pentose_PP_yeast
  // Model as described in:
  // In vivo dynamics of the pentose phosphate pathway in Saccharomyces cerevisiae
  // Vaseghi S, Baumeister A, Rizzi M, Reuss M. Metab Eng. 1999 Apr;1(2):128-40. PMID: 10935926 , doi: 10.1006/mben.1998.0110 ;
  // Abstract:
  // The in vivo dynamics of the pentose phosphate pathway has been studied with transient experiments in continuous culture of Saccharomyces cerevisiae. Rapid sampling was performed with a special sampling device after disturbing the steady state with a pulse of glucose. The time span of observation was 120 s after the pulse. During this short time period the dynamic effect of protein biosynthesis can be neglected. The metabolites of interest (glucose 6-phosphate, NADP, NADPH, 6-phosphogluconate, and MgATP2-) we determined with enzymatic assays and HPLC. The experimental observations were then used for the identification of kinetic rate equations and parameters under in vivo conditions. In accordance with results from in vitro studies the in vivo diagnosis supports an ordered Bi-Bi mechanism with noncompetitive inhibition by MgATP2- for the enzyme glucose-6-phosphate dehydrogenase. In the case of 6-phosphogluconate dehydrogenase an ordered Bi-Ter mechanism with a competitive inhibition by MgATP2- has been found. Because the MgATP2- concentration decreases abruptly after the pulse of glucose the inhibitory effect vanishes and the flux through the pentose phosphate pathway increases. This regulation phenomenon guarantees the balance of fluxes through glycolysis and pentose phosphate pathway during the dynamic time period.
  // Typographical errors found and corrected from the original manuscript:
  // rMax given for 6GPDH and 6PGDH are reversed (by solving their defining equations)
  // Eq (52) should read C_NADPH(t) = 0.16 + ... (from Fig. 2)
  // While the model is identical to the one described in the article, it cannot reproduce all time courses displayed in the article. The time courses for S7P and X5P differ from fig 5 and some of the reaction rates show slightly different dynamics than in fig 7.
  // This model originates from BioModels Database: A Database of Annotated Published Models (http://www.ebi.ac.uk/biomodels/). It is copyright (c) 2005-2011 The BioModels.net Team.
  // To the extent possible under law, all copyright and related or neighbouring rights to this encoded model have been dedicated to the public domain worldwide. Please refer to CC0 Public Domain Dedication for more information.
  // In summary, you are entitled to use this encoded model in absolutely any manner you deem suitable, verbatim, or with modification, alone or embedded it in a larger context, redistribute it, commercially or not, in a restricted way or not. .
  // To cite BioModels Database, please use: Li C, Donizelli M, Rodriguez N, Dharuri H, Endler L, Chelliah V, Li L, He E, Henry A, Stefan MI, Snoep JL, Hucka M, Le Novère N, Laibe C (2010) BioModels Database: An enhanced, curated and annotated resource for published quantitative kinetic models. BMC Syst Biol., 4:92.
  // biomodels.db:MODEL1004070001
  // taxonomy:4932
  // isDescribedBy pubmed:10935926
  // biomodels.db:MODEL1004070001
  // isDescribedBy pubmed:10935926
  // biomodels.db:MODEL1004070001

  // Compartments:
  compartment CV = 1; CV is "intracellular";  // GO:0005576

  // Species:
  species $C_G6P in CV; C_G6P is "glucose 6-phosphate";  // CHEBI:14314
  species C_6PG in CV = 0.25; C_6PG is "6-phosphogluconate";  // CHEBI:16863
  species C_Ru5P in CV = 0.033; C_Ru5P is "ribulose 5-phosphate";  // CHEBI:17363
  species C_X5P in CV = 0.041; C_X5P is "xylulose 5-phosphate";  // CHEBI:16332
  species $C_F6P in CV = 0.17; C_F6P is "fructose 6-phosphate";  // CHEBI:15946
  species C_E4P in CV = 0.029; C_E4P is "erythrose 4-phosphate";  // CHEBI:48153
  species $C_GAP in CV = 0.064; C_GAP is "glyceraldehyde 3-phosphate";  // CHEBI:17138
  species C_R5P in CV = 0.118; C_R5P is "ribose 5-phosphate";  // CHEBI:17797
  species C_S7P in CV = 0.082; C_S7P is "sedoheptulose 7-phosphate";  // CHEBI:15721
  species $C_PRPP in CV = 0; C_PRPP is "phosphoribosylpyrophosphate";  // CHEBI:17111
  species $C_PHE in CV = 0; C_PHE is "phenylalanine";  // CHEBI:28044
  species $C_TYR in CV = 0; C_TYR is "tyrosine";  // CHEBI:18186
  species $C_TRP in CV = 0; C_TRP is "tryptophan";  // CHEBI:27897
  species $C_NADP in CV; C_NADP is "NADP+";  // CHEBI:18009
  species $C_NADPH in CV;  // CHEBI:16474
  species $C_MgATP in CV;  // CHEBI:30617

  // Parameters:
  mu = 2.77778e-5 per_sec; mu is "specific growth rate";

  // Assignment rules:
  C_NADPH := 0.16 + 0.516*time/(25.39 + 0.37*time + 0.5*time^2);
  C_NADP := 0.17 - 1.48*time/(9.71 + 16.1*time + 0.48*time^2);
  C_MgATP := 2.3 - 29.83*time/(29.77 + 13.42*time + 0.05*time^2);
  C_G6P := 0.9 + 44.1*time/(48 + time + 0.45*time^2);

  // Reactions:
  rG6PDH: $C_G6P + $C_NADP => C_6PG + $C_NADPH; CV*rMax_G6PDH*C_NADP/((C_NADP + K_NADP_1*(C_NADPH/Ki_NADPH_1 + 1))*(C_MgATP/Ki_MgATP_1 + 1));  // modifiers: C_MgATP
    rMax_G6PDH = 0.654 mM_per_sec; K_NADP_1 = 0.116 mM; Ki_MgATP_1 = 0.33 mM; Ki_NADPH_1 = 1.702 mM;
  r6PGDH: C_6PG + $C_NADP => $C_NADPH + C_Ru5P; CV*rMax_6PGDH*C_NADP/(C_NADP + K_NADP_2*(C_NADPH/Ki_NADPH_2 + 1)*(C_MgATP/Ki_MgATP_2 + 1));  // modifiers: C_MgATP
    rMax_6PGDH = 44.19 mM_per_sec; K_NADP_2 = 1.848 mM; Ki_MgATP_2 = 0.109 mM; Ki_NADPH_2 = 0.055 mM;
  rR5PI: C_Ru5P => C_R5P; CV*rMax_R5PI*C_Ru5P;
    rMax_R5PI = 0.57 mM_per_sec;
  rTKL1: C_R5P + C_X5P => $C_GAP + C_S7P; CV*rMax_TKL1*C_R5P*C_X5P;
    rMax_TKL1 = 3.24 mM_per_sec;
  rRU5PE: C_Ru5P => C_X5P; CV*rMax_RU5PE*C_Ru5P; rRU5PE is "Ru5PE";
    rMax_RU5PE = 0.85 mM_per_sec;
  rTKL2: C_E4P + C_X5P => $C_F6P + $C_GAP; CV*rMax_TKL2*C_E4P*C_X5P;
    rMax_TKL2 = 10.5 mM_per_sec;
  rPKDA: C_E4P => $C_PHE + $C_TRP + $C_TYR; CV*rMax_PKDA*C_E4P/(C_E4P + Km_PKDA); rPKDA is "PKDHA";
    Km_PKDA = 0.009 mM; rMax_PKDA = 0.004 mM_per_sec;
  rPPK: C_R5P => $C_PRPP; CV*rMax_PPK*C_R5P/(C_R5P + Km_PPK); rPPK is "RPPK";
    Km_PPK = 0.009 mM; rMax_PPK = 0.003 mM_per_sec;
  rTAL: $C_GAP + C_S7P => C_E4P + $C_F6P; CV*rMax_TAL*C_GAP*C_S7P;
    rMax_TAL = 3 mM_per_sec;
  u6PG: C_6PG => ; CV*mu*C_6PG;
  uRu5P: C_Ru5P => ; CV*mu*C_Ru5P;
  uR5P: C_R5P => ; CV*mu*C_R5P;
  uX5P: C_X5P => ; CV*mu*C_X5P;
  uS7P: C_S7P => ; CV*mu*C_S7P;
  uE4P: C_E4P => ; CV*mu*C_E4P;

  // Unit definitions:
  unit substance = 1e-3 mole; substance is "millimole";
  unit per_sec = 1 / second; per_sec is "per second";
  unit mM = 1e-3 mole / litre;
  unit mM_per_sec = 1e-3 mole / (litre * second); mM_per_sec is "mM per second";
end
