// SBML level 2 version 4

function lightFunction(t, lightOffset, lightAmplitude, phase, photoPeriod, cyclePeriod, twilightPeriod)
  lightOffset + 0.5*lightAmplitude*(1 + tanh(cyclePeriod*((t + phase)/cyclePeriod - floor(floor(t + phase)/cyclePeriod))/twilightPeriod)) - 0.5*lightAmplitude*(1 + tanh((cyclePeriod*((t + phase)/cyclePeriod - floor(floor(t + phase)/cyclePeriod)) - photoPeriod)/twilightPeriod)) + 0.5*lightAmplitude*(1 + tanh((cyclePeriod*((t + phase)/cyclePeriod - floor(floor(t + phase)/cyclePeriod)) - cyclePeriod)/twilightPeriod));
end

model Salazar2009_PhotoperiodicRegulation()
  // This a model from the article:
  // Prediction of photoperiodic regulators from quantitative gene circuit models.
  // Salazar JD, Saithong T, Brown PE, Foreman J, Locke JC, Halliday KJ, Carré IA, Rand DA, Millar AJ Cell 2009 Dec; 139(6): 1170-9 20005809 ,
  // Abstract:
  // Photoperiod sensors allow physiological adaptation to the changing seasons. The prevalent hypothesis is that day length perception is mediated through coupling of an endogenous rhythm with an external light signal. Sufficient molecular data are available to test this quantitatively in plants, though not yet in mammals. In Arabidopsis, the clock-regulated genes CONSTANS (CO) and FLAVIN, KELCH, F-BOX (FKF1) and their light-sensitive proteins are thought to form an external coincidence sensor. Here, we model the integration of light and timing information by CO, its target gene FLOWERING LOCUS T (FT), and the circadian clock. Among other predictions, our models show that FKF1 activates FT. We demonstrate experimentally that this effect is independent of the known activation of CO by FKF1, thus we locate a major, novel controller of photoperiodism. External coincidence is part of a complex photoperiod sensor: modeling makes this complexity explicit and may thus contribute to crop improvement.
  // There are four models described in the paper. This model corresponds to model 3 (which is a combination of model 1 and model 2). The SBML file is redeveloped from Kevin S
  // This model is same as BIOMD0000000055 , but with revised light function.
  // This model originates from BioModels Database: A Database of Annotated Published Models (http://www.ebi.ac.uk/biomodels/). It is copyright (c) 2005-2011 The BioModels.net Team.
  // To the extent possible under law, all copyright and related or neighbouring rights to this encoded model have been dedicated to the public domain worldwide. Please refer to CC0 Public Domain Dedication for more information.
  // In summary, you are entitled to use this encoded model in absolutely any manner you deem suitable, verbatim, or with modification, alone or embedded it in a larger context, redistribute it, commercially or not, in a restricted way or not..
  // To cite BioModels Database, please use: Li C, Donizelli M, Rodriguez N, Dharuri H, Endler L, Chelliah V, Li L, He E, Henry A, Stefan MI, Snoep JL, Hucka M, Le Novère N, Laibe C (2010) BioModels Database: An enhanced, curated and annotated resource for published quantitative kinetic models. BMC Syst Biol., 4:92.
  // biomodels.db:MODEL1005050000
  // isDescribedBy pubmed:20005809
  // biomodels.db:MODEL1005050000
  // isDescribedBy pubmed:20005809
  // biomodels.db:MODEL1005050000
  // biomodels.db:MODEL1005050000

  // Compartments:
  compartment compartment = 1;

  // Species:
  species cCOp in compartment = 0;
  species cFTm in compartment = 0;
  species cLc in compartment = 0.015;
  species cLm in compartment = 0.539;
  species cLn in compartment = 0.0855;
  species cPn in compartment = 0.835;
  species cTc in compartment = 8.7;
  species cTm in compartment = 0.456;
  species cTn in compartment = 0.4;
  species cXc in compartment = 1.34;
  species cXm in compartment = 0.08;
  species cXn in compartment = 0.4;
  species cYc in compartment = 0.004;
  species cYm in compartment = 0.037;
  species cYn in compartment = 0.013;

  // Parameters:
  q1 = 2.4514;
  n1 = 5.1694;
  a = 3.3064;
  g1 = 0.876738488;
  m1 = 1.5283;
  k1 = 1.817;
  p1 = 0.8295;
  r1 = 16.8363;
  r2 = 0.1687;
  m2 = 20.44;
  k2 = 1.5644;
  m3 = 3.6888;
  k3 = 1.2765;
  n2 = 3.0087;
  b = 1.0258;
  g2 = 0.036805783;
  g3 = 0.26593318;
  c = 1.0258;
  m4 = 3.8231;
  k4 = 2.5734;
  p2 = 4.324;
  r3 = 0.3166;
  r4 = 2.1509;
  m5 = 0.0013;
  m6 = 3.1741;
  k5 = 2.7454;
  m7 = 0.0492;
  m8 = 4.0424;
  k6 = 0.4033;
  n3 = 0.2431;
  d = 1.4422;
  g4 = 0.538811228;
  m9 = 10.1132;
  k7 = 6.5585;
  p3 = 2.147;
  r5 = 1.0352;
  r6 = 3.3017;
  m10 = 0.2179;
  k8 = 0.6632;
  m11 = 3.3442;
  k9 = 17.1111;
  q2 = 2.40178;
  n4 = 0.0857;
  n5 = 0.1649;
  g5 = 1.17803247;
  g6 = 0.064455137;
  f = 1.0237;
  e = 3.6064;
  m12 = 4.297;
  k10 = 1.7303;
  p4 = 0.2485;
  r7 = 2.2123;
  r8 = 0.2002;
  m13 = 0.1347;
  k11 = 1.8258;
  m14 = 0.6114;
  k12 = 1.8066;
  p5 = 0.5;
  k13 = 1.2;
  q3 = 1;
  m15 = 1.2;
  lightAmplitude = 1;
  lightOffset = 0;
  cyclePeriod = 24;
  photoPeriod = 8;
  phase = 0;
  twilightPeriod = 0.0416666667;
  two11_Fch_0 = 8;
  four12_Fch_0 = 8;
  vCOm = 1.1452;
  vCOp = 9.2242;
  kCOp = 2.0976;
  vCOFT = 0.6683;
  kCOFT = 7.3533;
  vFT = 1.8674;
  kFT = 5.3925;

  // Reactions:
  one11: => cLm; compartment*lightFunction(time, lightOffset, lightAmplitude, phase, photoPeriod, cyclePeriod, twilightPeriod)*q1*cPn;  // modifiers: cPn
  two11: => cLm; compartment*(n1*cXn^a/(g1^a + cXn^a));  // modifiers: cXn
  three11: cLm => ; compartment*(m1*cLm/(k1 + cLm));
  one12: => cLc; compartment*p1*cLm;  // modifiers: cLm
  three12: cLn => cLc; compartment*r2*cLn;
  four12: cLc => ; compartment*(m2*cLc/(k2 + cLc));
  one13: cLc => cLn; compartment*r1*cLc;
  three13: cLn => ; compartment*(m3*cLn/(k3 + cLn));
  one14: => cTm; compartment*(n2*cYn^b/(g2^b + cYn^b))*(g3^c/(g3^c + cLn^c));  // modifiers: cLn, cYn
  two14: cTm => ; compartment*(m4*cTm/(k4 + cTm));
  one15: => cTc; compartment*p2*cTm;  // modifiers: cTm
  three15: cTn => cTc; compartment*r4*cTn;
  four15: cTc => ; compartment*((1 - lightFunction(time, lightOffset, lightAmplitude, phase, photoPeriod, cyclePeriod, twilightPeriod))*m5 + m6)*(cTc/(k5 + cTc));
  one16: cTc => cTn; compartment*r3*cTc;
  three16: cTn => ; compartment*((1 - lightFunction(time, lightOffset, lightAmplitude, phase, photoPeriod, cyclePeriod, twilightPeriod))*m7 + m8)*(cTn/(k6 + cTn));
  one17: => cXm; compartment*(n3*cTn^d/(g4^d + cTn^d));  // modifiers: cTn
  two17: cXm => ; compartment*(m9*cXm/(k7 + cXm));
  one18: => cXc; compartment*p3*cXm;  // modifiers: cXm
  three18: cXn => cXc; compartment*r6*cXn;
  four18: cXc => ; compartment*(m10*cXc/(k8 + cXc));
  one19: cXc => cXn; compartment*r5*cXc;
  three19: cXn => ; compartment*(m11*cXn/(k9 + cXn));
  one20: => cYm; compartment*(lightFunction(time, lightOffset, lightAmplitude, phase, photoPeriod, cyclePeriod, twilightPeriod)*q2*cPn + (lightFunction(time, lightOffset, lightAmplitude, phase, photoPeriod, cyclePeriod, twilightPeriod)*n4 + n5)*g5^e/(g5^e + cTn^e))*(g6^f/(g6^f + cLn^f));  // modifiers: cLn, cPn, cTn
  two20: cYm => ; compartment*(m12*cYm/(k10 + cYm));
  one21: => cYc; compartment*p4*cYm;  // modifiers: cYm
  three21: cYn => cYc; compartment*r8*cYn;
  four21: cYc => ; compartment*(m13*cYc/(k11 + cYc));
  one22: cYc => cYn; compartment*r7*cYc;
  three22: cYn => ; compartment*(m14*cYn/(k12 + cYn));
  one23: => cPn; compartment*(1 - lightFunction(time, lightOffset, lightAmplitude, phase, photoPeriod, cyclePeriod, twilightPeriod))*p5;
  two23: cPn => ; compartment*(m15*cPn/(k13 + cPn));
  three23: cPn => ; compartment*q3*lightFunction(time, lightOffset, lightAmplitude, phase, photoPeriod, cyclePeriod, twilightPeriod)*cPn;
  COpistranslatedfromCOmthatisassumedtobeequaltocTn: => cCOp; compartment*vCOm*cTn;  // modifiers: cTn
  COpdegradation: cCOp => ; compartment*(1 - lightFunction(time, lightOffset, lightAmplitude, phase, photoPeriod, cyclePeriod, twilightPeriod))*(vCOp*cCOp/(kCOp + cCOp));
  FTinductionbyCOp: => cFTm; compartment*vCOFT*cCOp/(kCOFT + cCOp);  // modifiers: cCOp
  FTmdegradation: cFTm => ; compartment*vFT*cFTm/(kFT + cFTm);
end
