// SBML level 2 version 4

model Twycross2010_Auxin_Transport()
  // This is a model with 20 cells - 20 cytplasms and 21 apoplasts - as described in the article:
  // Stochastic and deterministic multiscale models for systems biology: an auxin-transport case study.
  // by Twycross J, Band LR, Bennett MJ, King JR, Krasnogor N. BMC Syst Biol. 2010 Mar 26;4:34. PubmedID: 20346112 ; DOI: 10.1186/1752-0509-4-34
  // Abstract:
  // Background:
  // Stochastic and asymptotic methods are powerful tools in developing multiscale systems biology models; however, little has been done in this context to compare the efficacy of these methods. The majority of current systems biology modelling research, including that of auxin transport, uses numerical simulations to study the behaviour of large systems of deterministic ordinary differential equations, with little consideration of alternative modelling frameworks.
  // Results:
  // In this case study, we solve an auxin-transport model using analytical methods, deterministic numerical simulations and stochastic numerical simulations. Although the three approaches in general predict the same behaviour, the approaches provide different information that we use to gain distinct insights into the modelled biological system. We show in particular that the analytical approach readily provides straightforward mathematical expressions for the concentrations and transport speeds, while the stochastic simulations naturally provide information on the variability of the system.
  // Conclusions:
  // Our study provides a constructive comparison which highlights the advantages and disadvantages of each of the considered modelling approaches. This will prove helpful to researchers when weighing up which modelling approach to select. In addition, the paper goes some way to bridging the gap between these approaches, which in the future we hope will lead to integrative hybrid models.
  // This model originates from BioModels Database: A Database of Annotated Published Models (http://www.ebi.ac.uk/biomodels/). It is copyright (c) 2005-2011 The BioModels.net Team.
  // To the extent possible under law, all copyright and related or neighbouring rights to this encoded model have been dedicated to the public domain worldwide. Please refer to CC0 Public Domain Dedication for more information.
  // In summary, you are entitled to use this encoded model in absolutely any manner you deem suitable, verbatim, or with modification, alone or embedded it in a larger context, redistribute it, commercially or not, in a restricted way or not..
  // To cite BioModels Database, please use: Li C, Donizelli M, Rodriguez N, Dharuri H, Endler L, Chelliah V, Li L, He E, Henry A, Stefan MI, Snoep JL, Hucka M, Le Novère N, Laibe C (2010) BioModels Database: An enhanced, curated and annotated resource for published quantitative kinetic models. BMC Syst Biol., 4:92.
  // biomodels.db:MODEL1005200000
  // isDescribedBy pubmed:20346112
  // biomodels.db:MODEL1005200000
  // isDescribedBy pubmed:20346112
  // biomodels.db:MODEL1005200000
  // biomodels.db:MODEL1005200000

  // Compartments:
  compartment compartment = 1;

  // Species:
  species $ext in compartment = 0;
  species S in compartment = 1;
  species a0 in compartment = 0;
  species c1 in compartment = 0;
  species a1 in compartment = 0;
  species c2 in compartment = 0;
  species a2 in compartment = 0;
  species c3 in compartment = 0;
  species a3 in compartment = 0;
  species c4 in compartment = 0;
  species a4 in compartment = 0;
  species c5 in compartment = 0;
  species a5 in compartment = 0;
  species c6 in compartment = 0;
  species a6 in compartment = 0;
  species c7 in compartment = 0;
  species a7 in compartment = 0;
  species c8 in compartment = 0;
  species a8 in compartment = 0;
  species c9 in compartment = 0;
  species a9 in compartment = 0;
  species c10 in compartment = 0;
  species a10 in compartment = 0;
  species c11 in compartment = 0;
  species a11 in compartment = 0;
  species c12 in compartment = 0;
  species a12 in compartment = 0;
  species c13 in compartment = 0;
  species a13 in compartment = 0;
  species c14 in compartment = 0;
  species a14 in compartment = 0;
  species c15 in compartment = 0;
  species a15 in compartment = 0;
  species c16 in compartment = 0;
  species a16 in compartment = 0;
  species c17 in compartment = 0;
  species a17 in compartment = 0;
  species c18 in compartment = 0;
  species a18 in compartment = 0;
  species c19 in compartment = 0;
  species a19 in compartment = 0;
  species c20 in compartment = 0;
  species a20 in compartment = 0;
  species Fvar in compartment = 0;
  species $Aprotc in compartment;
  species $Aprota in compartment;
  species $Aaniona in compartment;
  species $Aanionc in compartment;
  species $Bc in compartment;
  species $Ba in compartment;

  // Parameters:
  lcyt = 0.0001;
  w = 1e-5;
  L = 0.002;
  Ls = 0.002;
  lambda = 5e-7;
  Pdiff = 5.6e-7;
  PPin = 3.3e-6;
  Dvar = 6.7e-10;
  pHc = 7.2;
  pHa = 5.3;
  pK = 4.8;
  V = -0.12;
  T = 295.15;
  F = 9.64853399e4;
  R = 8.314472;

  // Assignment rules:
  Aprotc := 1/(1 + 10^(pHc - pK));
  Aprota := 1/(1 + 10^(pHa - pK));
  Aaniona := 1 - Aprota;
  Aanionc := 1 - Aprotc;
  subval := -F*V/(R*T);
  Bc := Aanionc*(-subval/(2.71828^(-subval) - 1));
  Ba := Aaniona*(subval/(2.71828^subval - 1));

  // Reactions:
  _1: $ext -> S; 2*Dvar*(a0 - S)/(Ls*(Ls + lambda)); _1 is "v1";  // modifiers: a0
  _2: $ext -> a0; 2*Dvar*(S - a0)/(lambda*(Ls + lambda)) + Pdiff/lambda*(Aprotc*c1 - Aprota*a0); _2 is "v2";  // modifiers: S, Aprotc, c1, Aprota
  _3: $ext -> c1; Pdiff*(Aprota*(a0 + a1) - 2*Aprotc*c1)/lcyt + PPin*(Ba*a1 - Bc*c1)/lcyt; _3 is "v3";  // modifiers: Aprota, a0, a1, Aprotc, Ba, Bc
  _4: $ext -> a1; PPin*(-(Ba*a1) + Bc*c1)/lambda + Pdiff*(-2*Aprota*a1 + Aprotc*(c1 + c2))/lambda; _4 is "v4";  // modifiers: Ba, Bc, c1, Aprota, Aprotc, c2
  _5: $ext -> c2; Pdiff*(Aprota*(a1 + a2) - 2*Aprotc*c2)/lcyt + PPin*(Ba*a2 - Bc*c2)/lcyt; _5 is "v5";  // modifiers: Aprota, a1, a2, Aprotc, Ba, Bc
  _6: $ext -> a2; PPin*(-(Ba*a2) + Bc*c2)/lambda + Pdiff*(-2*Aprota*a2 + Aprotc*(c2 + c3))/lambda; _6 is "v6";  // modifiers: Ba, Bc, c2, Aprota, Aprotc, c3
  _7: $ext -> c3; Pdiff*(Aprota*(a2 + a3) - 2*Aprotc*c3)/lcyt + PPin*(Ba*a3 - Bc*c3)/lcyt; _7 is "v7";  // modifiers: Aprota, a2, a3, Aprotc, Ba, Bc
  _8: $ext -> a3; PPin*(-(Ba*a3) + Bc*c3)/lambda + Pdiff*(-2*Aprota*a3 + Aprotc*(c3 + c4))/lambda; _8 is "v8";  // modifiers: Ba, Bc, c3, Aprota, Aprotc, c4
  _9: $ext -> c4; Pdiff*(Aprota*(a3 + a4) - 2*Aprotc*c4)/lcyt + PPin*(Ba*a4 - Bc*c4)/lcyt; _9 is "v9";  // modifiers: Aprota, a3, a4, Aprotc, Ba, Bc
  _10: $ext -> a4; PPin*(-(Ba*a4) + Bc*c4)/lambda + Pdiff*(-2*Aprota*a4 + Aprotc*(c4 + c5))/lambda; _10 is "v10";  // modifiers: Ba, Bc, c4, Aprota, Aprotc, c5
  _11: $ext -> c5; Pdiff*(Aprota*(a4 + a5) - 2*Aprotc*c5)/lcyt + PPin*(Ba*a5 - Bc*c5)/lcyt; _11 is "v11";  // modifiers: Aprota, a4, a5, Aprotc, Ba, Bc
  _12: $ext -> a5; PPin*(-(Ba*a5) + Bc*c5)/lambda + Pdiff*(-2*Aprota*a5 + Aprotc*(c5 + c6))/lambda; _12 is "v12";  // modifiers: Ba, Bc, c5, Aprota, Aprotc, c6
  _13: $ext -> c6; Pdiff*(Aprota*(a5 + a6) - 2*Aprotc*c6)/lcyt + PPin*(Ba*a6 - Bc*c6)/lcyt; _13 is "v13";  // modifiers: Aprota, a5, a6, Aprotc, Ba, Bc
  _14: $ext -> a6; PPin*(-(Ba*a6) + Bc*c6)/lambda + Pdiff*(-2*Aprota*a6 + Aprotc*(c6 + c7))/lambda; _14 is "v14";  // modifiers: Ba, Bc, c6, Aprota, Aprotc, c7
  _15: $ext -> c7; Pdiff*(Aprota*(a6 + a7) - 2*Aprotc*c7)/lcyt + PPin*(Ba*a7 - Bc*c7)/lcyt; _15 is "v15";  // modifiers: Aprota, a6, a7, Aprotc, Ba, Bc
  _16: $ext -> a7; PPin*(-(Ba*a7) + Bc*c7)/lambda + Pdiff*(-2*Aprota*a7 + Aprotc*(c7 + c8))/lambda; _16 is "v16";  // modifiers: Ba, Bc, c7, Aprota, Aprotc, c8
  _17: $ext -> c8; Pdiff*(Aprota*(a7 + a8) - 2*Aprotc*c8)/lcyt + PPin*(Ba*a8 - Bc*c8)/lcyt; _17 is "v17";  // modifiers: Aprota, a7, a8, Aprotc, Ba, Bc
  _18: $ext -> a8; PPin*(-(Ba*a8) + Bc*c8)/lambda + Pdiff*(-2*Aprota*a8 + Aprotc*(c8 + c9))/lambda; _18 is "v18";  // modifiers: Ba, Bc, c8, Aprota, Aprotc, c9
  _19: $ext -> c9; Pdiff*(Aprota*(a8 + a9) - 2*Aprotc*c9)/lcyt + PPin*(Ba*a9 - Bc*c9)/lcyt; _19 is "v19";  // modifiers: Aprota, a8, a9, Aprotc, Ba, Bc
  _20: $ext -> a9; PPin*(-(Ba*a9) + Bc*c9)/lambda + Pdiff*(-2*Aprota*a9 + Aprotc*(c10 + c9))/lambda; _20 is "v20";  // modifiers: Ba, Bc, c9, Aprota, Aprotc, c10
  _21: $ext -> c10; Pdiff*(Aprota*(a10 + a9) - 2*Aprotc*c10)/lcyt + PPin*(Ba*a10 - Bc*c10)/lcyt; _21 is "v21";  // modifiers: Aprota, a10, a9, Aprotc, Ba, Bc
  _22: $ext -> a10; PPin*(-(Ba*a10) + Bc*c10)/lambda + Pdiff*(-2*Aprota*a10 + Aprotc*(c10 + c11))/lambda; _22 is "v22";  // modifiers: Ba, Bc, c10, Aprota, Aprotc, c11
  _23: $ext -> c11; Pdiff*(Aprota*(a10 + a11) - 2*Aprotc*c11)/lcyt + PPin*(Ba*a11 - Bc*c11)/lcyt; _23 is "v23";  // modifiers: Aprota, a10, a11, Aprotc, Ba, Bc
  _24: $ext -> a11; PPin*(-(Ba*a11) + Bc*c11)/lambda + Pdiff*(-2*Aprota*a11 + Aprotc*(c11 + c12))/lambda; _24 is "v24";  // modifiers: Ba, Bc, c11, Aprota, Aprotc, c12
  _25: $ext -> c12; Pdiff*(Aprota*(a11 + a12) - 2*Aprotc*c12)/lcyt + PPin*(Ba*a12 - Bc*c12)/lcyt; _25 is "v25";  // modifiers: Aprota, a11, a12, Aprotc, Ba, Bc
  _26: $ext -> a12; PPin*(-(Ba*a12) + Bc*c12)/lambda + Pdiff*(-2*Aprota*a12 + Aprotc*(c12 + c13))/lambda; _26 is "v26";  // modifiers: Ba, Bc, c12, Aprota, Aprotc, c13
  _27: $ext -> c13; Pdiff*(Aprota*(a12 + a13) - 2*Aprotc*c13)/lcyt + PPin*(Ba*a13 - Bc*c13)/lcyt; _27 is "v27";  // modifiers: Aprota, a12, a13, Aprotc, Ba, Bc
  _28: $ext -> a13; PPin*(-(Ba*a13) + Bc*c13)/lambda + Pdiff*(-2*Aprota*a13 + Aprotc*(c13 + c14))/lambda; _28 is "v28";  // modifiers: Ba, Bc, c13, Aprota, Aprotc, c14
  _29: $ext -> c14; Pdiff*(Aprota*(a13 + a14) - 2*Aprotc*c14)/lcyt + PPin*(Ba*a14 - Bc*c14)/lcyt; _29 is "v29";  // modifiers: Aprota, a13, a14, Aprotc, Ba, Bc
  _30: $ext -> a14; PPin*(-(Ba*a14) + Bc*c14)/lambda + Pdiff*(-2*Aprota*a14 + Aprotc*(c14 + c15))/lambda; _30 is "v30";  // modifiers: Ba, Bc, c14, Aprota, Aprotc, c15
  _31: $ext -> c15; Pdiff*(Aprota*(a14 + a15) - 2*Aprotc*c15)/lcyt + PPin*(Ba*a15 - Bc*c15)/lcyt; _31 is "v31";  // modifiers: Aprota, a14, a15, Aprotc, Ba, Bc
  _32: $ext -> a15; PPin*(-(Ba*a15) + Bc*c15)/lambda + Pdiff*(-2*Aprota*a15 + Aprotc*(c15 + c16))/lambda; _32 is "v32";  // modifiers: Ba, Bc, c15, Aprota, Aprotc, c16
  _33: $ext -> c16; Pdiff*(Aprota*(a15 + a16) - 2*Aprotc*c16)/lcyt + PPin*(Ba*a16 - Bc*c16)/lcyt; _33 is "v33";  // modifiers: Aprota, a15, a16, Aprotc, Ba, Bc
  _34: $ext -> a16; PPin*(-(Ba*a16) + Bc*c16)/lambda + Pdiff*(-2*Aprota*a16 + Aprotc*(c16 + c17))/lambda; _34 is "v34";  // modifiers: Ba, Bc, c16, Aprota, Aprotc, c17
  _35: $ext -> c17; Pdiff*(Aprota*(a16 + a17) - 2*Aprotc*c17)/lcyt + PPin*(Ba*a17 - Bc*c17)/lcyt; _35 is "v35";  // modifiers: Aprota, a16, a17, Aprotc, Ba, Bc
  _36: $ext -> a17; PPin*(-(Ba*a17) + Bc*c17)/lambda + Pdiff*(-2*Aprota*a17 + Aprotc*(c17 + c18))/lambda; _36 is "v36";  // modifiers: Ba, Bc, c17, Aprota, Aprotc, c18
  _37: $ext -> c18; Pdiff*(Aprota*(a17 + a18) - 2*Aprotc*c18)/lcyt + PPin*(Ba*a18 - Bc*c18)/lcyt; _37 is "v37";  // modifiers: Aprota, a17, a18, Aprotc, Ba, Bc
  _38: $ext -> a18; PPin*(-(Ba*a18) + Bc*c18)/lambda + Pdiff*(-2*Aprota*a18 + Aprotc*(c18 + c19))/lambda; _38 is "v38";  // modifiers: Ba, Bc, c18, Aprota, Aprotc, c19
  _39: $ext -> c19; Pdiff*(Aprota*(a18 + a19) - 2*Aprotc*c19)/lcyt + PPin*(Ba*a19 - Bc*c19)/lcyt; _39 is "v39";  // modifiers: Aprota, a18, a19, Aprotc, Ba, Bc
  _40: $ext -> a19; PPin*(-(Ba*a19) + Bc*c19)/lambda + Pdiff*(-2*Aprota*a19 + Aprotc*(c19 + c20))/lambda; _40 is "v40";  // modifiers: Ba, Bc, c19, Aprota, Aprotc, c20
  _41: $ext -> c20; Pdiff*(Aprota*(a19 + a20) - 2*Aprotc*c20)/lcyt + PPin*(Ba*a20 - Bc*c20)/lcyt; _41 is "v41";  // modifiers: Aprota, a19, a20, Aprotc, Ba, Bc
  _42: $ext -> a20; 2*Dvar*(Fvar - a20)/(lambda*(Ls + lambda)) + Pdiff/lambda*(Aprotc*c20 - Aprota*a20) + PPin/lambda*(Bc*c20 - Ba*a20); _42 is "v42";  // modifiers: Fvar, Aprotc, c20, Aprota, Bc, Ba
  _43: $ext -> Fvar; 2*Dvar*(a20 - Fvar)/(Ls*(Ls + lambda)); _43 is "v43";  // modifiers: a20
end
