// SBML level 2 version 4

model Fallon2000_IL2dynamics()
  // This a model from the article:
  // Computational model for effects of ligand/receptor binding properties on interleukin-2 trafficking dynamics and T cell proliferation response.
  // Fallon EM, Lauffenburger DA. Biotechnol Prog 2000 Sep-Oct;16(5):905-16 11027188 ,
  // Abstract:
  // Multisubunit cytokine receptors such as the heterotrimeric receptor for interleukin-2 (IL-2) are ubiquitous in hematopoeitic cell types of importance in biotechnology and are crucial regulators of cell proliferation and differentiation behavior. Dynamics of cytokine/receptor endocytic trafficking can significantly impact cell responses through effects of receptor down-regulation and ligand depletion, and in turn are governed by ligand/receptor binding properties. We describe here a computational model for trafficking dynamics of the IL-2 receptor (IL-2R) system, which is able to predict T cell proliferation responses to IL-2. This model comprises kinetic equations describing binding, internalization, and postendocytic sorting of IL-2 and IL-2R, including an experimentally derived dependence of cell proliferation rate on these properties. Computational results from this model predict that IL-2 depletion can be reduced by decreasing its binding affinity for the IL-2R betagamma subunit relative to the alpha subunit at endosomal pH, as a result of enhanced ligand sorting to recycling vis-a-vis degradation, and that an IL-2 analogue with such altered binding properties should exhibit increased potency for stimulating the T cell proliferation response. These results are in agreement with our recent experimental findings for the IL-2 analogue termed 2D1 [Fallon, E. M. et al. J. Biol. Chem. 2000, 275, 6790-6797]. Thus, this type of model may enable prediction of beneficial cytokine/receptor binding properties to aid development of molecular design criteria for improvements in applications such as in vivo cytokine therapies and in vitro hematopoietic cell bioreactors.
  // This model was taken from the CellML repository and automatically converted to SBML.
  // The original model was: Fallon EM, Lauffenburger DA. (2000) - version=1.0
  // The original CellML model was created by:
  // Catherine Lloyd
  // c.lloyd@auckland.ac.nz
  // The University of Auckland
  // This model originates from BioModels Database: A Database of Annotated Published Models (http://www.ebi.ac.uk/biomodels/). It is copyright (c) 2005-2011 The BioModels.net Team.
  // To the extent possible under law, all copyright and related or neighbouring rights to this encoded model have been dedicated to the public domain worldwide. Please refer to CC0 Public Domain Dedication for more information.
  // In summary, you are entitled to use this encoded model in absolutely any manner you deem suitable, verbatim, or with modification, alone or embedded it in a larger context, redistribute it, commercially or not, in a restricted way or not..
  // To cite BioModels Database, please use: Li C, Donizelli M, Rodriguez N, Dharuri H, Endler L, Chelliah V, Li L, He E, Henry A, Stefan MI, Snoep JL, Hucka M, Le Novère N, Laibe C (2010) BioModels Database: An enhanced, curated and annotated resource for published quantitative kinetic models. BMC Syst Biol., 4:92.
  // biomodels.db:MODEL1006230001
  // isDescribedBy pubmed:11027188
  // biomodels.db:MODEL1006230001
  // isDescribedBy pubmed:11027188
  // biomodels.db:MODEL1006230001
  // biomodels.db:MODEL1006230001

  // Compartments:
  compartment COMpartment = 1 litre;

  // Parameters:
  time_environment has minute;
  Rs = 1500;
  Cs = 1;
  Ri = 300;
  Ci = 1;
  Li = 0.01;
  Ld = 1;
  L = 10 picomolar;
  Y = 250000000 cell_per_L;
  kr = 0.0138 first_order_rate_constant;
  kf has second_order_rate_constant;
  kre has first_order_rate_constant;
  kfe has second_order_rate_constant;
  kt = 0.007 first_order_rate_constant;
  Vs = 11 number_per_cell_minute;
  ksyn = 0.0011 first_order_rate_constant;
  ke = 0.04 first_order_rate_constant;
  kx = 0.15 first_order_rate_constant;
  kh = 0.035 first_order_rate_constant;
  Ve = 1e-14 L_per_cell;
  NA = 6.022e11 number_per_picomole;
  IL2 = 1 dimensionless;

  // Assignment rules:
  kf := piecewise(kr/11.1, IL2 == 1, kr/8.2);
  kre := piecewise(kr*8, IL2 == 1, kr*5);
  kfe := piecewise(kre/1000, IL2 == 1, kre/3000);

  // Rate rules:
  Rs' = (kr + ksyn)*Cs + Vs - (kf*L*Rs + kt*Rs);
  Cs' = kf*L*Rs - (kr + ke)*Cs;
  Ri' = kre*Ci + kt*Rs - (kfe*Li*Ri + kh*Ri);
  Ci' = kfe*Li*Ri + ke*Cs - (kre + kh)*Ci;
  Li' = (kre*Ci - kfe*Li*Ri)/(Ve*NA) - kx*Li;
  Ld' = kh*Ci;
  L' = (kr*Cs + kx*Li*Ve*NA - kf*L*Rs)*Y/NA;
  Y' = piecewise((600*Cs/(250 + Cs) - 200)*1, 600*Cs/(250 + Cs) - 200 > 0, 0);

  // Unit definitions:
  unit picomolar = 1e-12 mole / litre;
  unit minute = 60 second;
  unit flux = 1e-12 mole / (litre * 60 second);
  unit first_order_rate_constant = 1 / (60 second);
  unit second_order_rate_constant = litre / (1e-12 mole * 60 second);
  unit number_per_picomole = 1 / (1e-12 mole);
  unit number_per_cell_minute = 1 / (60 second);
  unit L_per_cell = litre;
  unit cell_per_L_minute = 1 / (litre * 60 second);
  unit cell_per_L = 1 / litre;
  unit time = 60 second;
end
