// SBML level 2 version 4

model Chen2000_CellCycle()
  // This a model from the article:
  // Kinetic analysis of a molecular model of the budding yeast cell cycle.
  // Chen KC, Csikasz-Nagy A, Gyorffy B, Val J, Novak B, Tyson JJ. Mol Biol Cell 2000 Jan;11(1):369-91 10637314 ,
  // Abstract:
  // The molecular machinery of cell cycle control is known in more detail for budding yeast, Saccharomyces cerevisiae, than for any other eukaryotic organism. In recent years, many elegant experiments on budding yeast have dissected the roles of cyclin molecules (Cln1-3 and Clb1-6) in coordinating the events of DNA synthesis, bud emergence, spindle formation, nuclear division, and cell separation. These experimental clues suggest a mechanism for the principal molecular interactions controlling cyclin synthesis and degradation. Using standard techniques of biochemical kinetics, we convert the mechanism into a set of differential equations, which describe the time courses of three major classes of cyclin-dependent kinase activities. Model in hand, we examine the molecular events controlling "Start" (the commitment step to a new round of chromosome replication, bud formation, and mitosis) and "Finish" (the transition from metaphase to anaphase, when sister chromatids are pulled apart and the bud separates from the mother cell) in wild-type cells and 50 mutants. The model accounts for many details of the physiology, biochemistry, and genetics of cell cycle control in budding yeast.
  // This model was taken from the CellML repository and automatically converted to SBML.
  // The original model was: Chen KC, Csikasz-Nagy A, Gyorffy B, Val J, Novak B, Tyson JJ. (2000) - version=1.0
  // The original CellML model was created by:
  // Catherine Lloyd
  // c.lloyd@auckland.ac.nz
  // The University of Auckland
  // This model originates from BioModels Database: A Database of Annotated Published Models (http://www.ebi.ac.uk/biomodels/). It is copyright (c) 2005-2011 The BioModels.net Team.
  // To the extent possible under law, all copyright and related or neighbouring rights to this encoded model have been dedicated to the public domain worldwide. Please refer to CC0 Public Domain Dedication for more information.
  // In summary, you are entitled to use this encoded model in absolutely any manner you deem suitable, verbatim, or with modification, alone or embedded it in a larger context, redistribute it, commercially or not, in a restricted way or not..
  // To cite BioModels Database, please use: Li C, Donizelli M, Rodriguez N, Dharuri H, Endler L, Chelliah V, Li L, He E, Henry A, Stefan MI, Snoep JL, Hucka M, Le Novère N, Laibe C (2010) BioModels Database: An enhanced, curated and annotated resource for published quantitative kinetic models. BMC Syst Biol., 4:92.
  // biomodels.db:MODEL1006230004
  // isDescribedBy pubmed:10637314
  // biomodels.db:MODEL1006230004
  // isDescribedBy pubmed:10637314
  // biomodels.db:MODEL1006230004
  // biomodels.db:MODEL1006230004

  // Compartments:
  compartment COMpartment = 1 litre;

  // Parameters:
  Cln2 = 0.0078;
  ks_n2 = 0;
  ks_n2_ = 0.05;
  kd_n2 = 0.1;
  Clb2_T = 0.2342;
  Hct1_T = 1;
  ks_b2 = 0.002;
  ks_b2_ = 0.05;
  kd_b2 = 0.01;
  kd_b2_ = 2;
  kd_b2__ = 0.05;
  Clb5_T = 0.0614;
  ks_b5 = 0.006;
  ks_b5_ = 0.02;
  kd_b5 = 0.1;
  kd_b5_ = 0.25;
  Bck2_0 = 0.0027;
  Jn3 = 6;
  Dn3 = 1;
  Cln3_max = 0.02;
  Sic1_T = 0.1231;
  ks_c1 = 0.02;
  ks_c1_ = 0.1;
  Clb2_Sic1 = 0.079;
  kas_b2 = 50;
  kdi_b2 = 0.05;
  Clb5_Sic1 = 0.0207;
  kas_b5 = 50;
  kdi_b5 = 0.05;
  kd2_c1 = 0.3;
  epsilonc1_n3 = 20;
  epsilonc1_k2 = 2;
  epsilonc1_b5 = 1;
  epsilonc1_b2 = 0.067;
  Cdc20_T = 0.8332;
  ks_20 = 0.005;
  ks_20_ = 0.06;
  Cdc20 = 0.6848;
  ka_20 = 1;
  ki_20 = 0.1;
  ki_20_ = 10;
  Hct1 = 0.9946;
  ka_t1 = 0.04;
  ka_t1_ = 2;
  ki_t1 = 0;
  ki_t1_ = 0.64;
  Ji_t1 = 0.05;
  Ja_t1 = 0.05;
  epsiloni_t1_n2 = 1;
  epsiloni_t1_b5 = 0.5;
  epsiloni_t1_b2 = 1;
  mass = 0.6608;
  mu = 0.005776;
  ORI = 0;
  ks_ori = 2;
  kd_ori = 0.06;
  epsilonori_b2 = 0.4;
  BUD = 0;
  ks_bud = 0.3;
  kd_bud = 0.06;
  epsilonbud_b5 = 1;
  SPN = 0;
  ks_spn = 0.08;
  kd_spn = 0.06;
  J_spn = 0.2;
  ka_sbf = 1;
  ki_sbf = 0.5;
  ki_sbf_ = 6;
  Ji_sbf = 0.01;
  Ja_sbf = 0.01;
  epsilonsbf_n3 = 75;
  epsilonsbf_b5 = 0.5;
  ka_mcm = 1;
  ki_mcm = 0.15;
  Ji_mcm = 1;
  Ja_mcm = 1;
  ka_swi = 1;
  ki_swi = 0.3;
  ki_swi_ = 0.2;
  Ji_swi = 0.1;
  Ja_swi = 0.1;
  kd1_c1 = 0.01;
  kd_20 = 0.08;
  Jd2_c1 = 0.05;

  // Assignment rules:
  Vd_b2 := kd_b2*(Hct1_T - Hct1) + kd_b2_*Hct1 + kd_b2__*Cdc20;
  Clb2 := Clb2_T - Clb2_Sic1;
  Clb5 := Clb5_T - Clb5_Sic1;
  Sic1 := Sic1_T - (Clb2_Sic1 + Clb5_Sic1);
  Vd_b5 := kd_b5 + kd_b5_*Cdc20;
  Bck2 := Bck2_0*mass;
  Cln3 := Cln3_max*Dn3*mass/(Jn3 + Dn3*mass);
  Vd2_c1 := kd2_c1*(epsilonc1_n3*Cln3 + epsilonc1_k2*Bck2 + Cln2 + epsilonc1_b5*Clb5 + epsilonc1_b2*Clb2);
  Vi_20 := piecewise(ki_20_, ORI >= 1, ki_20, SPN >= 1, 0.1);
  Vi_t1 := ki_t1 + ki_t1_*(Cln3 + epsiloni_t1_n2*Cln2 + epsiloni_t1_b5*Clb5 + epsiloni_t1_b2*Clb2);
  SBF := 2*Va_sbf*Ji_sbf/(ki_sbf + ki_sbf_*Clb2 + Va_sbf*Ji_sbf + (ki_sbf + ki_sbf_*Clb2)*Ja_sbf - Va_sbf + sqrt((ki_sbf + ki_sbf_*Clb2 + Va_sbf*Ji_sbf + (ki_sbf + ki_sbf_*Clb2)*Ja_sbf - Va_sbf)^2 - 4*Va_sbf*Ji_sbf*(ki_sbf + ki_sbf_*Clb2 - Va_sbf)));
  Va_sbf := ka_sbf*(Cln2 + epsilonsbf_n3*(Cln3 + Bck2) + epsilonsbf_b5*Clb5);
  MBF := SBF;
  Mcm1 := 2*ka_mcm*Clb2*Ji_mcm/(ki_mcm + ka_mcm*Clb2*Ji_mcm + ki_mcm*Ja_mcm - ka_mcm*Clb2 + sqrt((ki_mcm + ka_mcm*Clb2*Ji_mcm + ki_mcm*Ja_mcm - ka_mcm*Clb2)^2 - 4*(ki_mcm - ka_mcm*Clb2)*ka_mcm*Clb2*Ji_mcm));
  Swi5 := 2*ka_swi*Cdc20*Ji_swi/(ki_swi + ki_swi_*Clb2 + ka_swi*Cdc20*Ji_swi + (ki_swi + ki_swi_*Clb2)*Ja_swi - ka_swi*Cdc20 + sqrt((ki_swi + ki_swi_*Clb2 + ka_swi*Cdc20*Ji_swi + (ki_swi + ki_swi_*Clb2)*Ja_swi - ka_swi*Cdc20)^2 - 4*(ki_swi + ki_swi_*Clb2 - ka_swi*Cdc20)*ka_swi*Cdc20*Ji_swi));

  // Rate rules:
  Cln2' = mass*(ks_n2 + ks_n2_*SBF) - kd_n2*Cln2;
  Clb2_T' = mass*(ks_b2 + ks_b2_*Mcm1) - Vd_b2*Clb2_T;
  Clb5_T' = mass*(ks_b5 + ks_b5_*MBF) - Vd_b5*Clb5_T;
  Sic1_T' = ks_c1 + ks_c1_*Swi5 - Sic1_T*(kd1_c1 + Vd2_c1/(Jd2_c1 + Sic1_T));
  Clb2_Sic1' = kas_b2*Clb2*Sic1 - Clb2_Sic1*(kdi_b2 + Vd_b2 + kd1_c1 + Vd2_c1/(Jd2_c1 + Sic1_T));
  Clb5_Sic1' = kas_b5*Clb5*Sic1 - Clb5_Sic1*(kdi_b5 + Vd_b5 + kd1_c1 + Vd2_c1/(Jd2_c1 + Sic1_T));
  Cdc20_T' = ks_20 + ks_20_*Clb2 - kd_20*Cdc20_T;
  Cdc20' = ka_20*(Cdc20_T - Cdc20) - Cdc20*(Vi_20 + kd_20);
  Hct1' = (ka_t1 + ka_t1_*Cdc20)*(Hct1_T - Hct1)/(Ja_t1 + Hct1_T - Hct1) - Vi_t1*Hct1/(Ji_t1 + Hct1);
  mass' = mu*mass;
  ORI' = ks_ori*(Clb5 + epsilonori_b2*Clb2) - kd_ori*ORI;
  BUD' = ks_bud*(Cln2 + Cln3 + epsilonbud_b5*Clb5) - kd_bud*BUD;
  SPN' = ks_spn*Clb2/(J_spn + Clb2) - kd_spn*SPN;

  // Unit definitions:
  unit nanomolar = 1e-9 mole / litre;
  unit minute = 60 second;
  unit flux = 1e-9 mole / (litre * 60 second);
  unit first_order_rate_constant = 1 / (60 second);
  unit time = 60 second;
end
