// SBML level 2 version 4

model Chen2006_NitricOxideRelease()
  // This a model from the article:
  // Theoretical analysis of biochemical pathways of nitric oxide release from vascular endothelial cells.
  // Chen K, Popel AS. Free Radic Biol Med 2006 Aug 15;41(4):668-80 16864000 ,
  // Abstract:
  // Vascular endothelium expressing endothelial nitric oxide synthase (eNOS) produces nitric oxide (NO), which has a number of important physiological functions in the microvasculature. The rate of NO production by the endothelium is a critical determinant of NO distribution in the vascular wall. We have analyzed the biochemical pathways of NO synthesis and formulated a model to estimate NO production by the microvascular endothelium under physiological conditions. The model quantifies the NO produced by eNOS based on the kinetics of NO synthesis and the availability of eNOS and its intracellular substrates. The predicted NO production from microvessels was in the range of 0.005-0.1 microM/s. This range of predicted values is in agreement with some experimental values but is much lower than other rates previously measured or estimated from experimental data with the help of mathematical modeling. Paradoxical discrepancies between the model predictions and previously reported results based on experimental measurements of NO concentration in the vicinity of the arteriolar wall suggest that NO can also be released through eNOS-independent mechanisms, such as catalysis by neuronal NOS (nNOS). We also used our model to test the sensitivity of NO production to substrate availability, eNOS concentration, and potential rate-limiting factors. The results indicated that the predicted low level of NO production can be attributed primarily to a low expression of eNOS in the microvascular endothelial cells.
  // This model was taken from the CellML repository and automatically converted to SBML.
  // The original model was: Chen K, Popel AS. (2006) - version=1.0
  // The original CellML model was created by:
  // Catherine Lloyd
  // c.lloyd@auckland.ac.nz
  // The University of Auckland
  // This model originates from BioModels Database: A Database of Annotated Published Models (http://www.ebi.ac.uk/biomodels/). It is copyright (c) 2005-2011 The BioModels.net Team.
  // To the extent possible under law, all copyright and related or neighbouring rights to this encoded model have been dedicated to the public domain worldwide. Please refer to CC0 Public Domain Dedication for more information.
  // In summary, you are entitled to use this encoded model in absolutely any manner you deem suitable, verbatim, or with modification, alone or embedded it in a larger context, redistribute it, commercially or not, in a restricted way or not..
  // To cite BioModels Database, please use: Li C, Donizelli M, Rodriguez N, Dharuri H, Endler L, Chelliah V, Li L, He E, Henry A, Stefan MI, Snoep JL, Hucka M, Le Novère N, Laibe C (2010) BioModels Database: An enhanced, curated and annotated resource for published quantitative kinetic models. BMC Syst Biol., 4:92.
  // biomodels.db:MODEL1006230005
  // isDescribedBy pubmed:16864000
  // biomodels.db:MODEL1006230005
  // isDescribedBy pubmed:16864000
  // biomodels.db:MODEL1006230005
  // biomodels.db:MODEL1006230005

  // Compartments:
  compartment COMpartment = 1 litre;

  // Parameters:
  Arg = 100;
  Fe3 = 0.045;
  Fe3_Arg = 0;
  Fe2 = 0;
  Fe2_Arg = 0;
  Fe3_O2_Arg = 0;
  Fe3_NOHA = 0;
  Fe2_NOHA = 0;
  Fe3_O2_NOHA = 0;
  Fe3_NO = 0;
  Fe2_NO = 0;
  NO = 0;
  citrulline = 0;
  NO3 = 0;
  NOHA = 0;
  O2 = 172;
  k1 = 0.1;
  k_1 = 0.1;
  k2 = 0.91;
  k3 = 0.91;
  k4 = 1.89;
  k_4 = 11.4;
  k5 = 2.58;
  k_5 = 98;
  k6 = 12.6;
  k7 = 0.91;
  k8 = 0.1;
  k_8 = 0.1;
  k9 = 11.4;
  k_9 = 1.89;
  k10 = 3.33;
  k_10 = 89.9;
  k11 = 29.4;
  k12 = 0.91;
  k13 = 0.033;
  k14 = 53.9;

  // Assignment rules:
  S := k1*Arg*Fe3 + k4*Arg*Fe2 - (k_1*Fe3_Arg + k_4*Fe2_Arg);
  dNOdt := k14*Fe3_NO;

  // Rate rules:
  Arg' = k_1*Fe3_Arg + k_4*Fe2_Arg + S - (k1*Arg*Fe3 + k4*Arg*Fe2);
  Fe3' = k_1*Fe3_Arg + k14*Fe3_NO + k13*Fe2_NO*O2 + k8*Fe3_NOHA - (k1*Arg*Fe3 + k2*Fe3 + k_8*NOHA*Fe3);
  Fe3_Arg' = k1*Fe3*Arg - (k_1*Fe3_Arg + k3*Fe3_Arg);
  Fe2' = k2*Fe3 + k_4*Fe2_Arg + k9*Fe2_NOHA - (k4*Fe2*Arg + k_9*Fe2*NOHA);
  Fe2_Arg' = k3*Fe3_Arg + k_5*Fe3_O2_Arg + k4*Fe2*Arg - (k5*Fe2_Arg*O2 + k_4*Fe2_Arg);
  Fe3_O2_Arg' = k5*Fe2_Arg*O2 - (k6*Fe3_O2_Arg + k_5*Fe3_O2_Arg);
  Fe3_NOHA' = k6*Fe3_O2_Arg + k_8*Fe3*NOHA - (k7*Fe3_NOHA + k8*Fe3_NOHA);
  Fe2_NOHA' = k7*Fe3_NOHA + k_10*Fe3_O2_NOHA + k_9*Fe2*NOHA - (k9*Fe2_NOHA + k10*Fe2_NOHA*O2);
  Fe3_O2_NOHA' = k10*Fe2_NOHA*O2 - (k11*Fe3_O2_NOHA + k_10*Fe3_O2_NOHA);
  Fe3_NO' = k11*Fe3_O2_NOHA - (k14*Fe3_NO + k12*Fe3_NO);
  Fe2_NO' = k12*Fe3_NO - k13*Fe2_NO*O2;
  NO' = k14*Fe3_NO;
  citrulline' = k11*Fe3_O2_NOHA;
  NO3' = k13*Fe2_NO*O2;
  NOHA' = k8*Fe3_NOHA + k9*Fe2_NOHA - (k_8*Fe3*NOHA + k_9*Fe2*NOHA);

  // Unit definitions:
  unit micromolar = 1e-6 mole / litre;
  unit first_order_rate_constant = 1 / second;
  unit second_order_rate_constant = litre / (second * 1e-6 mole);
  unit flux = 1e-6 mole / (litre * second);
end
