// SBML level 2 version 4

model Holmes2006_MuscleContration()
  // This a model from the article:
  // Teaching from classic papers: Hill's model of muscle contraction.
  // Holmes JW. Adv Physiol Educ 2006 Jun;30(2):67-72 16709736 ,
  // Abstract:
  // A. V. Hill's 1938 paper "The heat of shortening and the dynamic constants of muscle" is an enduring classic, presenting detailed methods, meticulous experiments, and the model of muscle contraction that now bears Hill's name. Pairing a simulation based on Hill's model with a reading of his paper allows students to follow his thought process to discover key principles of muscle physiology and gain insight into how to develop quantitative models of physiological processes. In this article, the experience of the author using this approach in a graduate biomedical engineering course is outlined, along with suggestions for adapting this approach to other audiences.
  // This model was taken from the CellML repository and automatically converted to SBML.
  // The original model was: Holmes JW. (2006) - version=1.0
  // The original CellML model was created by:
  // Paul Harrington
  // paul.harrington@auckland.ac.nz
  // The University of Auckland
  // This model originates from BioModels Database: A Database of Annotated Published Models (http://www.ebi.ac.uk/biomodels/). It is copyright (c) 2005-2011 The BioModels.net Team.
  // To the extent possible under law, all copyright and related or neighbouring rights to this encoded model have been dedicated to the public domain worldwide. Please refer to CC0 Public Domain Dedication for more information.
  // In summary, you are entitled to use this encoded model in absolutely any manner you deem suitable, verbatim, or with modification, alone or embedded it in a larger context, redistribute it, commercially or not, in a restricted way or not..
  // To cite BioModels Database, please use: Li C, Donizelli M, Rodriguez N, Dharuri H, Endler L, Chelliah V, Li L, He E, Henry A, Stefan MI, Snoep JL, Hucka M, Le Novère N, Laibe C (2010) BioModels Database: An enhanced, curated and annotated resource for published quantitative kinetic models. BMC Syst Biol., 4:92.
  // biomodels.db:MODEL1006230007
  // isDescribedBy pubmed:16709736
  // biomodels.db:MODEL1006230007
  // isDescribedBy pubmed:16709736
  // biomodels.db:MODEL1006230007
  // biomodels.db:MODEL1006230007

  // Compartments:
  compartment COMpartment = 1 litre;

  // Parameters:
  a = 37.24;
  b = 0.325;
  Po = 144.9;
  alpha = 1449.027;
  L_se_o = 0.3;
  L_ce = 0.7;

  // Assignment rules:
  L_se := L - L_ce;
  L := piecewise(1, time <= 1, 0.92, (time > 1) && (time < 5), 0.9);
  P := alpha*(L_se - L_se_o);
  v := -b*(Po - P)/(P + a);

  // Rate rules:
  L_ce' = v;

  // Unit definitions:
  unit ms = 1e-3 second;
  unit mNpermmsq = 1e-3 newton / (1e-3 metre)^2;
  unit pms = 1 / (1e-3 second);
end
