// SBML level 2 version 4

model Fink2008_VentricularActionPotential()
  // This a model from the article:
  // Contributions of HERG K+ current to repolarization of the human ventricular action potential.
  // Fink M, Noble D, Virag L, Varro A, Giles WR. Prog Biophys Mol Biol 2008 Jan-Apr;96(1-3):357-76 17919688 ,
  // Abstract:
  // Action potential repolarization in the mammalian heart is governed by interactions of a number of time- and voltage-dependent channel-mediated currents, as well as contributions from the Na+/Ca2+ exchanger and the Na+/K+ pump. Recent work has shown that one of the K+ currents (HERG) which contributes to repolarization in mammalian ventricle is a locus at which a number of point mutations can have significant functional consequences. In addition, the remarkable sensitivity of this K+ channel isoform to inhibition by a variety of pharmacological agents and clinical drugs has resulted in HERG being a major focus for Safety Pharmacology requirements. For these reasons we and others have attempted to define the functional role for HERG-mediated K+ currents in repolarization of the action potential in the human ventricle. Here, we describe and evaluate changes in the formulations for two K+ currents, IK1 and HERG (or IK,r), within the framework of ten Tusscher model of the human ventricular action potential. In this computational study, new mathematical formulations for the two nonlinear K+ conductances, IK1 and HERG, have been developed based upon experimental data obtained from electrophysiological studies of excised human ventricular tissue and/or myocytes. The resulting mathematical model provides much improved simulations of the relative sizes and time courses of the K+ currents which modulate repolarization. Our new formulation represents an important first step in defining the mechanism(s) of repolarization of the membrane action potential in the human ventricle. Our overall goal is to understand the genesis of the T-wave of the human electrocardiogram.
  // This model was taken from the CellML repository and automatically converted to SBML.
  // The original model was: Fink M, Noble D, Virag L, Varro A, Giles WR. (2008) - version=1.0
  // The original CellML model was created by:
  // Catherine Lloyd
  // c.lloyd@auckland.ac.nz
  // The University of Auckland
  // This model originates from BioModels Database: A Database of Annotated Published Models (http://www.ebi.ac.uk/biomodels/). It is copyright (c) 2005-2011 The BioModels.net Team.
  // To the extent possible under law, all copyright and related or neighbouring rights to this encoded model have been dedicated to the public domain worldwide. Please refer to CC0 Public Domain Dedication for more information.
  // In summary, you are entitled to use this encoded model in absolutely any manner you deem suitable, verbatim, or with modification, alone or embedded it in a larger context, redistribute it, commercially or not, in a restricted way or not..
  // To cite BioModels Database, please use: Li C, Donizelli M, Rodriguez N, Dharuri H, Endler L, Chelliah V, Li L, He E, Henry A, Stefan MI, Snoep JL, Hucka M, Le Novère N, Laibe C (2010) BioModels Database: An enhanced, curated and annotated resource for published quantitative kinetic models. BMC Syst Biol., 4:92.
  // biomodels.db:MODEL1006230009
  // isDescribedBy pubmed:17919688
  // biomodels.db:MODEL1006230009
  // isDescribedBy pubmed:17919688
  // biomodels.db:MODEL1006230009
  // biomodels.db:MODEL1006230009

  // Compartments:
  compartment COMpartment = 1 litre;

  // Parameters:
  time_Environment = ;
  R = 8314.472;
  T_Environment = 310;
  F = 9.64853415e4;
  K_o_Environment = 5.4;
  Ca_o = 2;
  Na_o = 140;
  V_cell = -86.45;
  Cm = 0.115;
  Vol_c = 0.016404;
  stim_Period = 1000;
  var E_K_reversal_potentials;
  P_kna = 0.03;
  g_K1_0 = 0.6821;
  Mg_Buf = 0.0356;
  SPM = 0.0014613;
  fac = 1.0648;
  phi = 0.8838;
  E_K_iK1_rectification = ;
  V_iK1_rectification = ;
  g_Kr_0 = 0.024;
  Cr1 = 0.9786;
  Cr2 = 0.0031;
  Cr3 = 0.0029;
  Or4 = 0.014;
  Ir5 = 0.0014;
  time_iKr_Markov = ;
  V_iKr_Markov = ;
  K_o_iKr_Markov = ;
  T_iKr_Markov = ;
  T_Base = 310;
  Sotalol_mM = 0;
  BCr1 = 0;
  BCr2 = 0;
  BCr3 = 0;
  BOr4 = 0;
  BIr5 = 0;
  kBinding = 0.005;
  kDiss = 0.00125;
  time_iKr_Markov_Sotalol_block = ;
  g_Ks = 0.0392;
  Xs = 0.00303;
  V_iKs_Xs_gate = ;
  time_iKs_Xs_gate = ;
  g_to = 0.2;
  s = 1;
  V_ito_s_gate = ;
  time_ito_s_gate = ;
  r = 2.11e-8;
  V_ito_r_gate = ;
  time_ito_r_gate = ;
  g_Na = 11;
  shift_INa_inact = 0;
  m = 0.00132;
  V_iNa_m_gate = ;
  time_iNa_m_gate = ;
  h = 0.7768;
  V_iNa_h_gate = ;
  time_iNa_h_gate = ;
  j = 0.7766;
  V_iNa_j_gate = ;
  time_iNa_j_gate = ;
  g_bna = 0.00029;
  g_CaL = 2e-5;
  z = 2;
  d_iCaL_d_gate = 5.06e-6;
  V_iCaL_d_gate = ;
  time_iCaL_d_gate = ;
  d_inf_shift = 5;
  f = 0.9999;
  V_iCaL_f_gate = ;
  time_iCaL_f_gate = ;
  f2 = 0.9995;
  V_iCaL_f2_gate = ;
  time_iCaL_f2_gate = ;
  fCass = 1;
  Ca_ss_iCaL_fCass_gate = ;
  V_iCaL_fCass_gate = ;
  time_iCaL_fCass_gate = ;
  g_bca = 0.0004736;
  g_pCa = 0.0619;
  K_pCa = 0.0005;
  g_pK = 0.00973;
  P_NaK = 1.297;
  K_mk = 1;
  K_mNa = 40;
  K_NaCa = 200;
  K_sat = 0.1;
  alpha = 2.5;
  gamma = 0.35;
  Km_Ca = 1.38;
  Km_Nai = 87.5;
  Ca_i = 0.0001092;
  Ca_SR = 2.7656;
  Ca_ss_Ca = 0.0001893;
  V_sr = 0.001094;
  V_ss = 5.468e-5;
  d_Ca = ;
  Vol_xfer = 0.0038;
  K_up = 0.00025;
  Vol_leak = 0.00036;
  Vmax_up = 0.006375;
  R_prime = 0.9864;
  k1_prime = 0.15;
  k2_prime = 0.045;
  EC = 1.5;
  max_sr = 2.5;
  min_sr = 1;
  k3 = 0.06;
  k4 = 0.005;
  Vol_rel = 0.306;
  time_Irel = ;
  Buf_c = 0.2;
  K_buf_c = 0.001;
  Buf_sr = 10;
  K_buf_sr = 0.3;
  Buf_ss = 0.4;
  K_buf_ss = 0.00025;
  Na_i = 7.940167;
  K_i = 141.0167;

  // Assignment rules:
  i_Stim := piecewise(-12, (time_Environment - floor(time_Environment/stim_Period)*stim_Period >= 100) && (time_Environment - floor(time_Environment/stim_Period)*stim_Period <= 103), 0);
  E_Na := R*T_Environment/F*ln(Na_o/Na_i);
  E_K_reversal_potentials := R*T_Environment/F*ln(K_o_Environment/K_i);
  E_Ks := R*T_Environment/F*ln((K_o_Environment + P_kna*Na_o)/(K_i + P_kna*Na_i));
  E_Ca := 0.5*R*T_Environment/F*ln(Ca_o/Ca_i);
  i_K1 := g_K1_0*(T_Environment/35 - 55/7)*sqrt(K_o_Environment/5.4)*xK1_inf*(V_cell - E_K_reversal_potentials);
  KiMg := 2.8*exp(-(V_iK1_rectification - fac*E_K_iK1_rectification)/180);
  KbMg := 0.45*exp(-(V_iK1_rectification - fac*E_K_iK1_rectification)/20);
  Kd1SPM := 0.7*exp(-(V_iK1_rectification - fac*E_K_iK1_rectification + 8*Mg_Buf)/4.8);
  Kd2SPM := 40*exp(-(V_iK1_rectification - fac*E_K_iK1_rectification)/9.1);
  temp := 1 + Mg_Buf/KbMg;
  rec1 := temp*temp/(SPM/Kd1SPM + Mg_Buf/KiMg + temp*temp*temp);
  rec2 := 1/(1 + SPM/Kd2SPM);
  xK1_inf := phi*rec1 + (1 - phi)*rec2;
  i_Kr := g_Kr_0*(T_Environment/35 - 55/7)*sqrt(K_o_Environment/5.4)*Or4*(V_cell - E_K_reversal_potentials);
  alpha_xr1 := 1*T_iKr_Markov/T_Base*exp(24.335 + T_Base/T_iKr_Markov*(0.0112*V_iKr_Markov - 25.914));
  beta_xr1 := 1*T_iKr_Markov/T_Base*exp(13.688 + T_Base/T_iKr_Markov*(-0.0603*V_iKr_Markov - 15.707));
  alpha_xr2 := 1*T_iKr_Markov/T_Base*exp(22.746 + T_Base/T_iKr_Markov*(0*V_iKr_Markov - 25.914));
  beta_xr2 := 1*T_iKr_Markov/T_Base*exp(13.193 + T_Base/T_iKr_Markov*(0*V_iKr_Markov - 15.707));
  alpha_xr3 := 1*T_iKr_Markov/T_Base*exp(22.098 + T_Base/T_iKr_Markov*(0.0365*V_iKr_Markov - 25.914));
  beta_xr3 := 1*T_iKr_Markov/T_Base*exp(7.313 + T_Base/T_iKr_Markov*(-0.0399*V_iKr_Markov - 15.707));
  alpha_xr4 := 1*T_iKr_Markov/T_Base*exp(30.016 + T_Base/T_iKr_Markov*(0.0223*V_iKr_Markov - 30.888))*(5.4/K_o_iKr_Markov)^0.4;
  beta_xr4 := 1*T_iKr_Markov/T_Base*exp(30.061 + T_Base/T_iKr_Markov*(-0.0312*V_iKr_Markov - 33.243));
  OtoB := Or4*Sotalol_mM*kBinding;
  BtoO := BOr4*kDiss;
  i_Ks := g_Ks*Xs^2*(V_cell - E_Ks);
  xs_inf := 1/(1 + exp((-5 - V_iKs_Xs_gate)/14));
  alpha_xs := 1400/sqrt(1 + exp((5 - V_iKs_Xs_gate)/6));
  beta_xs := 1/(1 + exp((V_iKs_Xs_gate - 35)/15));
  tau_xs := 1*alpha_xs*beta_xs + 80;
  i_to := g_to*r*s*(V_cell - E_K_reversal_potentials);
  s_inf := 1/(1 + exp((V_ito_s_gate + 20)/5));
  tau_s := 85*exp(-(V_ito_s_gate + 45)^2/320) + 5/(1 + exp((V_ito_s_gate - 20)/5)) + 3;
  r_inf := 1/(1 + exp((20 - V_ito_r_gate)/6));
  tau_r := 9.5*exp(-(V_ito_r_gate + 40)^2/1800) + 0.8;
  i_Na := g_Na*m^3*h*j*(V_cell - E_Na);
  m_inf := 1/(1 + exp((-56.86 - V_iNa_m_gate)/9.03))^2;
  alpha_m := 1/(1 + exp((-60 - V_iNa_m_gate)/5));
  beta_m := 0.1/(1 + exp((V_iNa_m_gate + 35)/5)) + 0.1/(1 + exp((V_iNa_m_gate - 50)/200));
  tau_m := 1*alpha_m*beta_m;
  h_inf := 1/(1 + exp((V_iNa_h_gate + 71.55 - shift_INa_inact)/7.43))^2;
  alpha_h := piecewise(0.057*exp(-(V_iNa_h_gate + 80 - shift_INa_inact)/6.8), V_iNa_h_gate < -40 + shift_INa_inact, 0);
  beta_h := piecewise(2.7*exp(0.079*(V_iNa_h_gate - shift_INa_inact)) + 310000*exp(0.3485*(V_iNa_h_gate - shift_INa_inact)), V_iNa_h_gate < -40 + shift_INa_inact, 0.77/(0.13*(1 + exp((V_iNa_h_gate + 10.66 - shift_INa_inact)/(-11.1)))));
  tau_h := 1/(alpha_h + beta_h);
  j_inf := 1/(1 + exp((V_iNa_j_gate + 71.55 - shift_INa_inact)/7.43))^2;
  alpha_j := piecewise((-25428*exp(0.2444*(V_iNa_j_gate - shift_INa_inact)) - 6.948*exp(-0.04391*(V_iNa_j_gate - shift_INa_inact)))*(V_iNa_j_gate + 37.78)/1/(1 + exp(0.311*(V_iNa_j_gate + 79.23 - shift_INa_inact))), V_iNa_j_gate < -40 + shift_INa_inact, 0);
  beta_j := piecewise(0.02424*exp(-0.01052*(V_iNa_j_gate - shift_INa_inact))/(1 + exp(-0.1378*(V_iNa_j_gate + 40.14 - shift_INa_inact))), V_iNa_j_gate < -40 + shift_INa_inact, 0.6*exp(0.057*(V_iNa_j_gate - shift_INa_inact))/(1 + exp(-0.1*(V_iNa_j_gate + 32 - shift_INa_inact))));
  tau_j := 1/(alpha_j + beta_j);
  i_b_Na := g_bna*(V_cell - E_Na);
  i_CaL := g_CaL*d_iCaL_d_gate*f*f2*fCass*z^2*(V_cell - 15)*F^2/(R*T_Environment)*(0.25*Ca_ss_Ca*exp(2*(V_cell - 15)*F/(R*T_Environment)) - Ca_o)/(exp(2*(V_cell - 15)*F/(R*T_Environment)) - 1);
  d_inf := 1/(1 + exp((d_inf_shift - V_iCaL_d_gate)/7.5));
  alpha_d := 1.4/(1 + exp((-35 - V_iCaL_d_gate)/13)) + 0.25;
  beta_d := 1.4/(1 + exp((V_iCaL_d_gate + 5)/5));
  gamma_d := 1/(1 + exp((50 - V_iCaL_d_gate)/20));
  tau_d := 1*alpha_d*beta_d + gamma_d;
  f_inf := 1/(1 + exp((V_iCaL_f_gate + 20)/7));
  tau_f := (1102.5*exp(-(V_iCaL_f_gate + 27)^2/225) + 200/(1 + exp((13 - V_iCaL_f_gate)/10)) + 180/(1 + exp((V_iCaL_f_gate + 30)/10)) + 20)/4;
  f2_inf := 0.75/(1 + exp((V_iCaL_f2_gate + 35)/7)) + 0.25;
  tau_f2 := (562*exp(-(V_iCaL_f2_gate + 27)^2/240) + 31/(1 + exp((25 - V_iCaL_f2_gate)/10)) + 80/(1 + exp((V_iCaL_f2_gate + 30)/10)))/2;
  fCass_inf := 0.4/(1 + (Ca_ss_iCaL_fCass_gate/0.05)^2) + 0.6;
  tau_fCass := 80/(1 + (Ca_ss_iCaL_fCass_gate/0.05)^2) + 2;
  i_b_Ca := g_bca*(V_cell - E_Ca);
  i_p_Ca := g_pCa*Ca_i/(Ca_i + K_pCa);
  i_p_K := g_pK*(V_cell - E_K_reversal_potentials)/(1 + exp((25 - V_cell)/5.98));
  i_NaK := P_NaK*K_o_Environment/(K_o_Environment + K_mk)*Na_i/(Na_i + K_mNa)/(1 + 0.1245*exp(-0.1*V_cell*F/(R*T_Environment)) + 0.0353*exp(-V_cell*F/(R*T_Environment)));
  i_NaCa := K_NaCa*(exp(gamma*V_cell*F/(R*T_Environment))*Na_i^3*Ca_o - exp((gamma - 1)*V_cell*F/(R*T_Environment))*Na_o^3*Ca_i*alpha)/((Km_Nai^3 + Na_o^3)*(Km_Ca + Ca_o)*(1 + K_sat*exp((gamma - 1)*V_cell*F/(R*T_Environment))));
  i_up := Vmax_up/(1 + K_up^2/Ca_i^2);
  i_leak := Vol_leak*(Ca_SR - Ca_i);
  i_xfer := Vol_xfer*(Ca_ss_Ca - Ca_i);
  kcasr := max_sr - (max_sr - min_sr)/(1 + (EC/Ca_SR)^2);
  k1 := k1_prime/kcasr;
  k2 := k2_prime*kcasr;
  O := k1*Ca_ss_Ca^2*R_prime/(k3 + k1*Ca_ss_Ca^2);
  i_rel := Vol_rel*O*(Ca_SR - Ca_ss_Ca);
  Ca_i_bufc := 1/(1 + Buf_c*K_buf_c/(Ca_i + K_buf_c)^2);
  Ca_sr_bufsr := 1/(1 + Buf_sr*K_buf_sr/(Ca_SR + K_buf_sr)^2);
  Ca_ss_bufss := 1/(1 + Buf_ss*K_buf_ss/(Ca_ss_Ca + K_buf_ss)^2);
  i_tot := i_K1 + i_to + i_Kr + i_Ks + i_CaL + i_NaK + i_Na + i_b_Na + i_NaCa + i_b_Ca + i_p_K + i_p_Ca + i_Stim;

  // Rate rules:
  V_cell' = -i_tot;
  Cr1' = beta_xr1*Cr2 - alpha_xr1*Cr1;
  Cr2' = alpha_xr1*Cr1 + beta_xr2*Cr3 - (alpha_xr2 + beta_xr1)*Cr2;
  Cr3' = alpha_xr2*Cr2 + beta_xr3*Or4 - (alpha_xr3 + beta_xr2)*Cr3;
  Or4' = alpha_xr3*Cr3 + beta_xr4*Ir5 - (alpha_xr4 + beta_xr3)*Or4 - OtoB + BtoO;
  Ir5' = alpha_xr4*Or4 - beta_xr4*Ir5;
  BCr1' = beta_xr1*BCr2 - alpha_xr1*BCr1;
  BCr2' = alpha_xr1*BCr1 + beta_xr2*BCr3 - (alpha_xr2 + beta_xr1)*BCr2;
  BCr3' = alpha_xr2*BCr2 + beta_xr3*BOr4 - (alpha_xr3 + beta_xr2)*BCr3;
  BOr4' = alpha_xr3*BCr3 + beta_xr4*BIr5 - (alpha_xr4 + beta_xr3)*BOr4 + OtoB - BtoO;
  BIr5' = alpha_xr4*BOr4 - beta_xr4*BIr5;
  Xs' = (xs_inf - Xs)/tau_xs;
  s' = (s_inf - s)/tau_s;
  r' = (r_inf - r)/tau_r;
  m' = (m_inf - m)/tau_m;
  h' = (h_inf - h)/tau_h;
  j' = (j_inf - j)/tau_j;
  d_iCaL_d_gate' = (d_inf - d_iCaL_d_gate)/tau_d;
  f' = (f_inf - f)/tau_f;
  f2' = (f2_inf - f2)/tau_f2;
  fCass' = (fCass_inf - fCass)/tau_fCass;
  Ca_i' = Ca_i_bufc*((i_leak - i_up)*V_sr/Vol_c + i_xfer - (i_b_Ca + i_p_Ca - 2*i_NaCa)*Cm/(2*Vol_c*F));
  Ca_SR' = Ca_sr_bufsr*(i_up - (i_rel + i_leak));
  Ca_ss_Ca' = Ca_ss_bufss*(-i_CaL*Cm/(2*V_ss*F) + i_rel*V_sr/V_ss - i_xfer*Vol_c/V_ss);
  R_prime' = -k2*Ca_ss_Ca*R_prime + k4*(1 - R_prime);
  Na_i' = -(i_Na + i_b_Na + 3*i_NaK + 3*i_NaCa)*Cm/(Vol_c*F);
  K_i' = -(i_K1 + i_to + i_Kr + i_Ks + i_p_K + i_Stim - 2*i_NaK)/(Vol_c*F)*Cm;

  // Unit definitions:
  unit nanolitre = 1e-9 litre;
  unit millisecond = 1e-3 second;
  unit per_millisecond = 1 / (1e-3 second);
  unit millivolt = 1e-3 volt;
  unit millivolt2 = (1e-3 volt)^2;
  unit per_millivolt = 1 / (1e-3 volt);
  unit milliS = 1e-3 siemens;
  unit microS = 1e-6 siemens;
  unit nanoF = 1e-9 farad;
  unit nanoA = 1e-9 ampere;
  unit microS_per_nanoF = 1e-6 siemens / (1e-9 farad);
  unit nanoA_per_nanoF = 1e-9 ampere / (1e-9 farad);
  unit molar = mole / litre;
  unit millimolar = 1e-3 mole * 1e-3 litre;
  unit millivolt_per_millimolar = 1e-3 volt * litre / (1e-3 mole);
  unit millimolar_per_millisecond = 1e-3 mole / (litre * 1e-3 second);
  unit per_millimolar_per_millisecond = litre / (1e-3 mole * 1e-3 second);
  unit per_millimolar2_per_millisecond = litre^2 / ((1e-3 mole)^2 * 1e-3 second);
  unit millijoule_per_mole_kelvin = 1e-3 joule / (mole * kelvin);
  unit coulomb_per_mole = coulomb / mole;
  unit litre_per_farad_millisecond = litre / (farad * 1e-3 second);
  unit time = 1e-3 second;
end
