// SBML level 2 version 4

model Waugh2006_WoundHealingMacrophageDynamics_Diabetic_ModelC()
  // This a model from the article:
  // Macrophage dynamics in diabetic wound dealing.
  // Waugh HV, Sherratt JA. Bull Math Biol 2006 Jan;68(1):197-207 16794927 ,
  // Abstract:
  // Wound healing in diabetes is a complex process, characterised by a chronic inflammation phase. The exact mechanism by which this occurs is not fully understood, and whilst several treatments for healing diabetic wounds exist, very little research has been conducted towards the causes of the extended inflammation phase. We describe a mathematical model which offers a possible explanation for diabetic wound healing in terms of the distribution of macrophage phenotypes being altered in the diabetic patient compared to normal wound repair. As a consequence of this, we put forward a suggestion for treatment based on rectifying the macrophage phenotype imbalance.
  // This model was taken from the CellML repository and automatically converted to SBML.
  // The original model was: Waugh HV, Sherratt JA. (2006) - version=1.0
  // The original CellML model was created by:
  // Catherine Lloyd
  // c.lloyd@auckland.ac.nz
  // The University of Auckland
  // This model originates from BioModels Database: A Database of Annotated Published Models (http://www.ebi.ac.uk/biomodels/). It is copyright (c) 2005-2011 The BioModels.net Team.
  // To the extent possible under law, all copyright and related or neighbouring rights to this encoded model have been dedicated to the public domain worldwide. Please refer to CC0 Public Domain Dedication for more information.
  // In summary, you are entitled to use this encoded model in absolutely any manner you deem suitable, verbatim, or with modification, alone or embedded it in a larger context, redistribute it, commercially or not, in a restricted way or not..
  // To cite BioModels Database, please use: Li C, Donizelli M, Rodriguez N, Dharuri H, Endler L, Chelliah V, Li L, He E, Henry A, Stefan MI, Snoep JL, Hucka M, Le Novère N, Laibe C (2010) BioModels Database: An enhanced, curated and annotated resource for published quantitative kinetic models. BMC Syst Biol., 4:92.
  // biomodels.db:MODEL1006230011
  // isDescribedBy pubmed:16794927
  // biomodels.db:MODEL1006230011
  // isDescribedBy pubmed:16794927
  // biomodels.db:MODEL1006230011
  // biomodels.db:MODEL1006230011

  // Compartments:
  compartment COMpartment = 1 litre;

  // Parameters:
  time_environment has day;
  phi_I = 200 cells_per_mm3;
  total_macrophages has cells_per_mm3;
  phi_R = 200 cells_per_mm3;
  T = 6 pg_per_mm3;
  tau1 = -2.47 mm6_cells_per_pg3_day;
  tau2 = 21.94 mm3_cells_per_pg2_day;
  tau3 = 6.41 cells_per_pg_day;
  tau4 = 1.75 cells_per_mm3_day;
  alpha has dimensionless;
  k1 = 0.05 dimensionless;
  k2 = 0.693 first_order_rate_constant;
  k3 = 0.002 per_cells_per_mm3;
  k4 = 0.07 second_order_rate_constant;
  d1 = 0.2 first_order_rate_constant;
  d2 = 9.1 first_order_rate_constant;

  // Assignment rules:
  total_macrophages := phi_R + phi_I;
  K_T := tau1*T^3 + tau2*T^2 + tau3*T + tau4;
  alpha := piecewise(0.8, (time_environment >= 0) && (time_environment <= 10), 0.2);

  // Rate rules:
  phi_I' = alpha*K_T + k1*k2*phi_I*(1 - k3*(phi_I + phi_R)) - d1*phi_I;
  phi_R' = (1 - alpha)*K_T + k1*k2*phi_R*(1 - k3*(phi_I + phi_R)) - d1*phi_R;
  T' = k4*phi_I - d2*T;

  // Unit definitions:
  unit day = 86400 second;
  unit cells_per_mm3 = 1 / (1e-3 metre)^3;
  unit cells_per_mm3_day = 1 / ((1e-3 metre)^3 * 86400 second);
  unit cells_per_pg_day = 1 / (1e-12 gram * 86400 second);
  unit mm3_cells_per_pg2_day = (1e-3 metre)^3 / ((1e-12 gram)^2 * 86400 second);
  unit mm6_cells_per_pg3_day = (1e-3 metre)^6 / ((1e-12 gram)^3 * 86400 second);
  unit per_cells_per_mm3 = (1e-3 metre)^3;
  unit pg_per_cells = 1e-12 gram;
  unit pg_per_mm3 = 1e-12 gram / (1e-3 metre)^3;
  unit first_order_rate_constant = 1 / (86400 second);
  unit second_order_rate_constant = 1e-12 gram / (86400 second);
  unit time = 86400 second;
end
