// SBML level 2 version 4

model Stewart2009_ActionPotential_PurkinjeFibreCells()
  // This a model from the article:
  // Mathematical models of the electrical action potential of Purkinje fibre cells.
  // Philip Stewart, Oleg V. Aslanidi, Denis Noble, Penelope J. Noble, Mark R. Boyett and Henggui Zhang. Phil. Trans. R. Soc. A 13 June 2009 vol. 367 no. 1896 2225-2255 doi:10.1098/rsta.2008.0283 ,
  // Abstract:
  // Early development of ionic models for cardiac myocytes, from the pioneering modification of the Hodgkin–Huxley giant squid axon model by Noble to the iconic DiFrancesco–Noble model integrating voltage-gated ionic currents, ion pumps and exchangers, Ca2+ sequestration and Ca2+-induced Ca2+ release, provided a general description for a mammalian Purkinje fibre (PF) and the framework for modern cardiac models. In the past two decades, development has focused on tissue-specific models with an emphasis on the sino-atrial (SA) node, atria and ventricles, while the PFs have largely been neglected. However, achieving the ultimate goal of creating a virtual human heart will require detailed models of all distinctive regions of the cardiac conduction system, including the PFs, which play an important role in conducting cardiac excitation and ensuring the synchronized timing and sequencing of ventricular contraction. In this paper, we present details of our newly developed model for the human PF cell including validation against experimental data. Ionic mechanisms underlying the heterogeneity between the PF and ventricular action potentials in humans and other species are analysed. The newly developed PF cell model adds a new member to the family of human cardiac cell models developed previously for the SA node, atrial and ventricular cells, which can be incorporated into an anatomical model of the human heart with details of its electrophysiological heterogeneity and anatomical complexity.
  // This model was taken from the CellML repository and automatically converted to SBML.
  // The original model was: CellMLdetails
  // The original CellML model was created by:
  // Penny Noble
  // penny.noble@dpag.ox.ac.uk
  // The University of Oxford
  // This model originates from BioModels Database: A Database of Annotated Published Models (http://www.ebi.ac.uk/biomodels/). It is copyright (c) 2005-2011 The BioModels.net Team.
  // To the extent possible under law, all copyright and related or neighbouring rights to this encoded model have been dedicated to the public domain worldwide. Please refer to CC0 Public Domain Dedication for more information.
  // In summary, you are entitled to use this encoded model in absolutely any manner you deem suitable, verbatim, or with modification, alone or embedded it in a larger context, redistribute it, commercially or not, in a restricted way or not. .
  // To cite BioModels Database, please use: Li C, Donizelli M, Rodriguez N, Dharuri H, Endler L, Chelliah V, Li L, He E, Henry A, Stefan MI, Snoep JL, Hucka M, Le Novère N, Laibe C (2010) BioModels Database: An enhanced, curated and annotated resource for published quantitative kinetic models. BMC Syst Biol., 4:92.
  // biomodels.db:MODEL1006230012
  // isDescribedBy doi:10.1098/rsta.2008.0283
  // biomodels.db:MODEL1006230012
  // isDescribedBy pubmed:19414454
  // biomodels.db:MODEL1006230012
  // biomodels.db:MODEL1006230012

  // Compartments:
  compartment COMpartment = 1 litre;

  // Parameters:
  V_membrane = -74.79238;
  R = 8314.472;
  T = 310;
  F = 9.64853415e4;
  Cm = 0.185;
  V_c = 0.016404;
  P_kna = 0.03;
  g_f_Na = 0.0145654;
  g_f_K = 0.0234346;
  y = 0.003925665;
  V_hyperpolarization_activated_current_y_gate = ;
  time_hyperpolarization_activated_current_y_gate = ;
  g_K1 = 0.065;
  g_Kr = 0.0918;
  Xr1 = 0.5425042;
  V_rapid_time_dependent_potassium_current_Xr1_gate = ;
  time_rapid_time_dependent_potassium_current_Xr1_gate = ;
  Xr2 = 0.3652477;
  V_rapid_time_dependent_potassium_current_Xr2_gate = ;
  time_rapid_time_dependent_potassium_current_Xr2_gate = ;
  g_Ks = 0.2352;
  Xs = 0.05917275;
  V_slow_time_dependent_potassium_current_Xs_gate = ;
  time_slow_time_dependent_potassium_current_Xs_gate = ;
  g_Na = 130.5744;
  m = 0.01456836;
  V_fast_sodium_current_m_gate = ;
  time_fast_sodium_current_m_gate = ;
  h = 0.2277963;
  V_fast_sodium_current_h_gate = ;
  time_fast_sodium_current_h_gate = ;
  j = 0.04275258;
  V_fast_sodium_current_j_gate = ;
  time_fast_sodium_current_j_gate = ;
  g_bna = 0.00029;
  g_CaL = 3.98e-5;
  d_L_type_Ca_current_d_gate = 0.0001359989;
  V_L_type_Ca_current_d_gate = ;
  time_L_type_Ca_current_d_gate = ;
  f = 0.522415;
  V_L_type_Ca_current_f_gate = ;
  time_L_type_Ca_current_f_gate = ;
  f2 = 0.7714946;
  V_L_type_Ca_current_f2_gate = ;
  time_L_type_Ca_current_f2_gate = ;
  fCass = 0.9775369;
  Ca_ss_L_type_Ca_current_fCass_gate = ;
  V_L_type_Ca_current_fCass_gate = ;
  time_L_type_Ca_current_fCass_gate = ;
  g_bca = 0.000592;
  g_to = 0.08184;
  s = 0.8572448;
  V_transient_outward_current_s_gate = ;
  time_transient_outward_current_s_gate = ;
  r = 0.0008118072;
  V_transient_outward_current_r_gate = ;
  time_transient_outward_current_r_gate = ;
  g_sus = 0.0227;
  P_NaK = 2.724;
  K_mk = 1;
  K_mNa = 40;
  K_NaCa = 1000;
  K_sat = 0.1;
  alpha = 2.5;
  gamma = 0.35;
  Km_Ca = 1.38;
  Km_Nai = 87.5;
  g_pCa = 0.1238;
  K_pCa = 0.0005;
  g_pK = 0.0146;
  Ca_i = 0.0001717968;
  Ca_o = 2;
  Ca_SR = 3.267828;
  Ca_ss_calcium_dynamics = 0.0006702166;
  R_prime = 0.8215042;
  k1_prime = 0.15;
  k2_prime = 0.045;
  k3 = 0.06;
  k4 = 0.005;
  EC = 1.5;
  max_sr = 2.5;
  min_sr = 1;
  V_rel = 0.102;
  V_xfer = 0.0038;
  K_up = 0.00025;
  V_leak = 0.00036;
  Vmax_up = 0.006375;
  Buf_c = 0.2;
  K_buf_c = 0.001;
  Buf_sr = 10;
  K_buf_sr = 0.3;
  Buf_ss = 0.4;
  K_buf_ss = 0.00025;
  V_sr = 0.001094;
  V_ss = 5.468e-5;
  d_calcium_dynamics = ;
  Na_i = 8.606402;
  Na_o = 140;
  K_i = 136.9305;
  K_o = 5.4;

  // Assignment rules:
  E_Na := R*T/F*ln(Na_o/Na_i);
  E_K := R*T/F*ln(K_o/K_i);
  E_Ks := R*T/F*ln((K_o + P_kna*Na_o)/(K_i + P_kna*Na_i));
  E_Ca := 0.5*R*T/F*ln(Ca_o/Ca_i);
  i_f_Na := y*g_f_Na*(V_membrane - E_Na);
  i_f_K := y*g_f_K*(V_membrane - E_K);
  i_f := i_f_Na + i_f_K;
  y_inf := 1/(1 + exp((V_hyperpolarization_activated_current_y_gate + 80.6)/6.8));
  alpha_y := 1*exp(-2.9 - 0.04*V_hyperpolarization_activated_current_y_gate);
  beta_y := 1*exp(3.6 + 0.11*V_hyperpolarization_activated_current_y_gate);
  tau_y := 4000/(alpha_y + beta_y);
  xK1_inf := 1/(1 + exp(0.1*(V_membrane + 75.44)));
  i_K1 := g_K1*xK1_inf*(V_membrane - 8 - E_K);
  i_Kr := g_Kr*sqrt(K_o/5.4)*Xr1*Xr2*(V_membrane - E_K);
  xr1_inf := 1/(1 + exp((-26 - V_rapid_time_dependent_potassium_current_Xr1_gate)/7));
  alpha_xr1 := 450/(1 + exp((-45 - V_rapid_time_dependent_potassium_current_Xr1_gate)/10));
  beta_xr1 := 6/(1 + exp((V_rapid_time_dependent_potassium_current_Xr1_gate + 30)/11.5));
  tau_xr1 := 1*alpha_xr1*beta_xr1;
  xr2_inf := 1/(1 + exp((V_rapid_time_dependent_potassium_current_Xr2_gate + 88)/24));
  alpha_xr2 := 3/(1 + exp((-60 - V_rapid_time_dependent_potassium_current_Xr2_gate)/20));
  beta_xr2 := 1.12/(1 + exp((V_rapid_time_dependent_potassium_current_Xr2_gate - 60)/20));
  tau_xr2 := 1*alpha_xr2*beta_xr2;
  i_Ks := g_Ks*Xs^2*(V_membrane - E_Ks);
  xs_inf := 1/(1 + exp((-5 - V_slow_time_dependent_potassium_current_Xs_gate)/14));
  alpha_xs := 1400/sqrt(1 + exp((5 - V_slow_time_dependent_potassium_current_Xs_gate)/6));
  beta_xs := 1/(1 + exp((V_slow_time_dependent_potassium_current_Xs_gate - 35)/15));
  tau_xs := 1*alpha_xs*beta_xs + 80;
  i_Na := g_Na*m^3*h*j*(V_membrane - E_Na);
  m_inf := 1/(1 + exp((-56.86 - V_fast_sodium_current_m_gate)/9.03))^2;
  alpha_m := 1/(1 + exp((-60 - V_fast_sodium_current_m_gate)/5));
  beta_m := 0.1/(1 + exp((V_fast_sodium_current_m_gate + 35)/5)) + 0.1/(1 + exp((V_fast_sodium_current_m_gate - 50)/200));
  tau_m := 1*alpha_m*beta_m;
  h_inf := 1/(1 + exp((V_fast_sodium_current_h_gate + 71.55)/7.43))^2;
  alpha_h := piecewise(0.057*exp(-(V_fast_sodium_current_h_gate + 80)/6.8), V_fast_sodium_current_h_gate < -40, 0);
  beta_h := piecewise(2.7*exp(0.079*V_fast_sodium_current_h_gate) + 310000*exp(0.3485*V_fast_sodium_current_h_gate), V_fast_sodium_current_h_gate < -40, 0.77/(0.13*(1 + exp((V_fast_sodium_current_h_gate + 10.66)/(-11.1)))));
  tau_h := 1/(alpha_h + beta_h);
  j_inf := 1/(1 + exp((V_fast_sodium_current_j_gate + 71.55)/7.43))^2;
  alpha_j := piecewise((-25428*exp(0.2444*V_fast_sodium_current_j_gate) - 6.948e-6*exp(-0.04391*V_fast_sodium_current_j_gate))*(V_fast_sodium_current_j_gate + 37.78)/1/(1 + exp(0.311*(V_fast_sodium_current_j_gate + 79.23))), V_fast_sodium_current_j_gate < -40, 0);
  beta_j := piecewise(0.02424*exp(-0.01052*V_fast_sodium_current_j_gate)/(1 + exp(-0.1378*(V_fast_sodium_current_j_gate + 40.14))), V_fast_sodium_current_j_gate < -40, 0.6*exp(0.057*V_fast_sodium_current_j_gate)/(1 + exp(-0.1*(V_fast_sodium_current_j_gate + 32))));
  tau_j := 1/(alpha_j + beta_j);
  i_b_Na := g_bna*(V_membrane - E_Na);
  i_CaL := g_CaL*d_calcium_dynamics*f*f2*fCass*4*(V_membrane - 15)*F^2/(R*T)*(0.25*Ca_ss_calcium_dynamics*exp(2*(V_membrane - 15)*F/(R*T)) - Ca_o)/(exp(2*(V_membrane - 15)*F/(R*T)) - 1);
  d_inf := 1/(1 + exp((-8 - V_L_type_Ca_current_d_gate)/7.5));
  alpha_d := 1.4/(1 + exp((-35 - V_L_type_Ca_current_d_gate)/13)) + 0.25;
  beta_d := 1.4/(1 + exp((V_L_type_Ca_current_d_gate + 5)/5));
  gamma_d := 1/(1 + exp((50 - V_L_type_Ca_current_d_gate)/20));
  tau_d := 1*alpha_d*beta_d + gamma_d;
  f_inf := 1/(1 + exp((V_L_type_Ca_current_f_gate + 20)/7));
  tau_f := 1102.5*exp(-(V_L_type_Ca_current_f_gate + 27)^2/225) + 200/(1 + exp((13 - V_L_type_Ca_current_f_gate)/10)) + 180/(1 + exp((V_L_type_Ca_current_f_gate + 30)/10)) + 20;
  f2_inf := 0.67/(1 + exp((V_L_type_Ca_current_f2_gate + 35)/7)) + 0.33;
  tau_f2 := 562*exp(-(V_L_type_Ca_current_f2_gate + 27)^2/240) + 31/(1 + exp((25 - V_L_type_Ca_current_f2_gate)/10)) + 80/(1 + exp((V_L_type_Ca_current_f2_gate + 30)/10));
  fCass_inf := 0.6/(1 + (Ca_ss_L_type_Ca_current_fCass_gate/0.05)^2) + 0.4;
  tau_fCass := 80/(1 + (Ca_ss_L_type_Ca_current_fCass_gate/0.05)^2) + 2;
  i_b_Ca := g_bca*(V_membrane - E_Ca);
  i_to := g_to*r*s*(V_membrane - E_K);
  s_inf := 1/(1 + exp((V_transient_outward_current_s_gate + 27)/13));
  tau_s := 85*exp(-(V_transient_outward_current_s_gate + 25)^2/320) + 5/(1 + exp((V_transient_outward_current_s_gate - 40)/5)) + 42;
  r_inf := 1/(1 + exp((20 - V_transient_outward_current_r_gate)/13));
  tau_r := 10.45*exp(-(V_transient_outward_current_r_gate + 40)^2/1800) + 7.3;
  i_sus := g_sus*a*(V_membrane - E_K);
  a := 1/(1 + exp((5 - V_membrane)/17));
  i_NaK := P_NaK*K_o/(K_o + K_mk)*Na_i/(Na_i + K_mNa)/(1 + 0.1245*exp(-0.1*V_membrane*F/(R*T)) + 0.0353*exp(-V_membrane*F/(R*T)));
  i_NaCa := K_NaCa*(exp(gamma*V_membrane*F/(R*T))*Na_i^3*Ca_o - exp((gamma - 1)*V_membrane*F/(R*T))*Na_o^3*Ca_i*alpha)/((Km_Nai^3 + Na_o^3)*(Km_Ca + Ca_o)*(1 + K_sat*exp((gamma - 1)*V_membrane*F/(R*T))));
  i_p_Ca := g_pCa*Ca_i/(Ca_i + K_pCa);
  i_p_K := g_pK*(V_membrane - E_K)/(1 + exp((25 - V_membrane)/5.98));
  i_rel := V_rel*O*(Ca_SR - Ca_ss_calcium_dynamics);
  i_up := Vmax_up/(1 + K_up^2/Ca_i^2);
  i_leak := V_leak*(Ca_SR - Ca_i);
  i_xfer := V_xfer*(Ca_ss_calcium_dynamics - Ca_i);
  O := k1*Ca_ss_calcium_dynamics^2*R_prime/(k3 + k1*Ca_ss_calcium_dynamics^2);
  k1 := k1_prime/kcasr;
  k2 := k2_prime*kcasr;
  kcasr := max_sr - (max_sr - min_sr)/(1 + (EC/Ca_SR)^2);
  Ca_i_bufc := 1/(1 + Buf_c*K_buf_c/(Ca_i + K_buf_c)^2);
  Ca_sr_bufsr := 1/(1 + Buf_sr*K_buf_sr/(Ca_SR + K_buf_sr)^2);
  Ca_ss_bufss := 1/(1 + Buf_ss*K_buf_ss/(Ca_ss_calcium_dynamics + K_buf_ss)^2);

  // Rate rules:
  V_membrane' = -1/1*(i_K1 + i_to + i_sus + i_Kr + i_Ks + i_CaL + i_NaK + i_Na + i_b_Na + i_NaCa + i_b_Ca + i_p_K + i_p_Ca + i_f);
  y' = (y_inf - y)/tau_y;
  Xr1' = (xr1_inf - Xr1)/tau_xr1;
  Xr2' = (xr2_inf - Xr2)/tau_xr2;
  Xs' = (xs_inf - Xs)/tau_xs;
  m' = (m_inf - m)/tau_m;
  h' = (h_inf - h)/tau_h;
  j' = (j_inf - j)/tau_j;
  d_L_type_Ca_current_d_gate' = (d_inf - d_L_type_Ca_current_d_gate)/tau_d;
  f' = (f_inf - f)/tau_f;
  f2' = (f2_inf - f2)/tau_f2;
  fCass' = (fCass_inf - fCass)/tau_fCass;
  s' = (s_inf - s)/tau_s;
  r' = (r_inf - r)/tau_r;
  R_prime' = -k2*Ca_ss_calcium_dynamics*R_prime + k4*(1 - R_prime);
  Ca_i' = Ca_i_bufc*((i_leak - i_up)*V_sr/V_c + i_xfer - 1*(i_b_Ca + i_p_Ca - 2*i_NaCa)*Cm/(2*1*V_c*F));
  Ca_SR' = Ca_sr_bufsr*(i_up - (i_rel + i_leak));
  Ca_ss_calcium_dynamics' = Ca_ss_bufss*(-1*i_CaL*Cm/(2*1*V_ss*F) + i_rel*V_sr/V_ss - i_xfer*V_c/V_ss);
  Na_i' = -1*(i_Na + i_b_Na + i_f_Na + 3*i_NaK + 3*i_NaCa)/(1*V_c*F)*Cm;
  K_i' = -1*(i_K1 + i_to + i_f_K + i_sus + i_Kr + i_Ks + i_p_K - 2*i_NaK)/(1*V_c*F)*Cm;

  // Unit definitions:
  unit micrometre = 1e-6 metre;
  unit micrometre3 = (1e-6 metre)^3;
  unit litre_micrometre3 = litre / (1e-6 metre)^3;
  unit millisecond = 1e-3 second;
  unit per_millisecond = 1 / (1e-3 second);
  unit millivolt = 1e-3 volt;
  unit millivolt_square = (1e-3 volt)^2;
  unit per_millivolt = 1 / (1e-3 volt);
  unit nanoS_per_picoF = 1e-9 siemens / (1e-12 farad);
  unit microF = 1e-6 farad;
  unit picoA = 1e-12 ampere;
  unit picoA_per_picoF = 1e-12 ampere / (1e-12 farad);
  unit nanoA_per_millimolar = 1e-9 ampere * litre / (1e-3 mole);
  unit millimolar = 1e-3 mole / litre;
  unit millimolar_per_millisecond = 1e-3 mole / (litre * 1e-3 second);
  unit per_millimolar_per_millisecond = litre / (1e-3 mole * 1e-3 second);
  unit per_millimolar2_per_millisecond = litre^2 / ((1e-3 mole)^2 * 1e-3 second);
  unit joule_per_mole_kelvin = joule / (mole * kelvin);
  unit coulomb_per_millimole = coulomb / (1e-3 mole);
  unit cm2 = (0.01 metre)^2;
  unit microF_per_cm2 = 1e-6 farad / (0.01 metre)^2;
  unit litre_per_farad_second = litre / (farad * second);
  unit time = 1e-3 second;
end
