// SBML level 2 version 4

model Jelic2005_HypothalamicPituitaryAdrenal()
  // This a model from the article:
  // Mathematical modeling of the hypothalamic-pituitary-adrenal system activity.
  // Jelic S, Cupic Z, Kolar-Anic L. Math Biosci 2005 Oct;197(2):173-87 16112688 ,
  // Abstract:
  // Mathematical modeling has proven to be valuable in understanding of the complex biological systems dynamics. In the present report we have developed an initial model of the hypothalamic-pituitary-adrenal system self-regulatory activity. A four-dimensional non-linear differential equation model of the hormone secretion was formulated and used to analyze plasma cortisol levels in humans. The aim of this work was to explore in greater detail the role of this system in normal, homeostatic, conditions, since it is the first and unavoidable step in further understanding of the role of this complex neuroendocrine system in pathophysiological conditions. Neither the underlying mechanisms nor the physiological significance of this system are fully understood yet.
  // This model was taken from the CellML repository and automatically converted to SBML.
  // The original model was: Jelic S, Cupic Z, Kolar-Anic L. (2005) - version=1.0
  // The original CellML model was created by:
  // Catherine Lloyd
  // c.lloyd@auckland.ac.nz
  // The University of Auckland
  // This model originates from BioModels Database: A Database of Annotated Published Models (http://www.ebi.ac.uk/biomodels/). It is copyright (c) 2005-2011 The BioModels.net Team.
  // To the extent possible under law, all copyright and related or neighbouring rights to this encoded model have been dedicated to the public domain worldwide. Please refer to CC0 Public Domain Dedication for more information.
  // In summary, you are entitled to use this encoded model in absolutely any manner you deem suitable, verbatim, or with modification, alone or embedded it in a larger context, redistribute it, commercially or not, in a restricted way or not..
  // To cite BioModels Database, please use: Li C, Donizelli M, Rodriguez N, Dharuri H, Endler L, Chelliah V, Li L, He E, Henry A, Stefan MI, Snoep JL, Hucka M, Le Novère N, Laibe C (2010) BioModels Database: An enhanced, curated and annotated resource for published quantitative kinetic models. BMC Syst Biol., 4:92.
  // biomodels.db:MODEL1006230013
  // isDescribedBy pubmed:16112688
  // biomodels.db:MODEL1006230013
  // isDescribedBy pubmed:16112688
  // biomodels.db:MODEL1006230013
  // biomodels.db:MODEL1006230013

  // Compartments:
  compartment COMpartment = 1 litre;

  // Parameters:
  tau = ;
  a = 7.68e-8;
  g = 3.43e-8;
  k2 = 0.0006;
  k3 = 4.8e-6;
  k6 = 0.000891;
  k7 = 0.006831;
  k0 = 8.7831e-11;
  k4 = 2.1e12;
  km = 6.9001e-14;

  // Assignment rules:
  C_0 := k2;
  C_1 := sqrt(k2/k4);
  C_2 := sqrt(k2/k4);
  A := C_1*a;
  G := C_2*g;
  alpha := k3/k2;
  beta := k6/k2;
  gamma := k7/k2;
  K := sqrt(k0^2*k4/k2^3);
  L := sqrt(km^2*k4/k2^3);

  // Rate rules:
  a' = K - ((1 + alpha + beta)*a + a*g^2);
  g' = (1 - alpha)*a + a*g^2 - (L + gamma*g);

  // Unit definitions:
  unit per_second = 1 / second;
  unit molar = mole / litre;
  unit molar_per_second = mole / (litre * second);
  unit second_per_molar = second * litre / mole;
  unit per_molar2_per_second = litre^2 / (mole^2 * second);
end
