// SBML level 2 version 4

model Halloy2002_FollicularAutomaton()
  // This a model from the article:
  // The follicular automaton model: effect of stochasticity and of synchronization of hair cycles.
  // Halloy J, Bernard BA, Loussouarn G, Goldbeter A. J Theor Biol 2002 Feb 7;214(3):469-79 11846603 ,
  // Abstract:
  // Human scalp hair consists of a set of about 10(5)follicles which progress independently through developmental cycles. Each hair follicle successively goes through the anagen (A), catagen (C), telogen (T) and latency (L) phases that correspond, respectively, to growth, arrest and hair shedding before a new anagen phase is initiated. Long-term experimental observations in a group of ten male, alopecic and non-alopecic volunteers allowed determination of the characteristics of hair follicle cycles. On the basis of these observations, we previously proposed a follicular automaton model to simulate the dynamics of human hair cycles and the development of different patterns of alopecia [Halloy et al. (2000) Proc. Natl Acad. Sci. U.S.A.97, 8328-8333]. The automaton model is defined by a set of rules that govern the stochastic transitions of each follicle between the successive states A, T, L and the subsequent return to A. These transitions occur independently for each follicle, after time intervals given stochastically by a distribution characterized by a mean and a standard deviation. The follicular automaton model was shown to account both for the dynamical transitions observed in a single follicle, and for the behaviour of an ensemble of independently cycling follicles. Here, we extend these results and investigate additional properties of the model. We present a deterministic version of the follicular automaton. We show that numerical simulations of the stochastic version of the automaton yield steady-state level of follicles in the different phases which approach the levels predicted by the deterministic equations as the number of follicles progressively increases. Only the stochastic version can successfully reproduce the fluctuations of the fractions of follicles in each of the three phases, observed in small follicle populations. When the standard deviation is reduced or when the follicles become otherwise synchronized, e.g. by a periodic external signal inducing the transition of anagen follicles into telogen phase, large-amplitude oscillations occur in the fractions of follicles in the three phases. These oscillations are not observed in humans but are reminiscent of the phenomenon of moulting observed in a number of mammalian species. Copyright 2002 Elsevier Science Ltd.
  // This model was taken from the CellML repository and automatically converted to SBML.
  // The original model was: Halloy J, Bernard BA, Loussouarn G, Goldbeter A. (2002) - version=1.0
  // The original CellML model was created by:
  // Catherine Lloyd
  // c.lloyd@auckland.ac.nz
  // The University of Auckland
  // This model originates from BioModels Database: A Database of Annotated Published Models (http://www.ebi.ac.uk/biomodels/). It is copyright (c) 2005-2011 The BioModels.net Team.
  // To the extent possible under law, all copyright and related or neighbouring rights to this encoded model have been dedicated to the public domain worldwide. Please refer to CC0 Public Domain Dedication for more information.
  // In summary, you are entitled to use this encoded model in absolutely any manner you deem suitable, verbatim, or with modification, alone or embedded it in a larger context, redistribute it, commercially or not, in a restricted way or not..
  // To cite BioModels Database, please use: Li C, Donizelli M, Rodriguez N, Dharuri H, Endler L, Chelliah V, Li L, He E, Henry A, Stefan MI, Snoep JL, Hucka M, Le Novère N, Laibe C (2010) BioModels Database: An enhanced, curated and annotated resource for published quantitative kinetic models. BMC Syst Biol., 4:92.
  // biomodels.db:MODEL1006230014
  // isDescribedBy pubmed:11846603
  // biomodels.db:MODEL1006230014
  // isDescribedBy pubmed:11846603
  // biomodels.db:MODEL1006230014
  // biomodels.db:MODEL1006230014

  // Compartments:
  compartment COMpartment = 1 litre;

  // Parameters:
  time_environment has month;
  L = 0.33;
  L_0 has dimensionless;
  A = 0.34;
  A_0 has dimensionless;
  T = 0.33;
  T_0 has dimensionless;
  M = 0;
  mu_L = 2 month;
  mu_A = 3.6 month;
  mu_T = 2.4 month;
  epsilon = 0 first_order_rate_constant;

  // Assignment rules:
  L_0 := mu_L/(mu_A + mu_T + mu_L);
  A_0 := mu_A/(mu_A + mu_T + mu_L);
  T_0 := mu_T/(mu_A + mu_T + mu_L);

  // Rate rules:
  L' = 1/mu_T*T - 1/mu_L*L + epsilon*M;
  A' = 1/mu_L*L - 1/mu_A*A;
  T' = 1/mu_A*A - 1/mu_T*T;
  M' = epsilon*T;

  // Unit definitions:
  unit month = 2592000 second;
  unit flux = 1 / (2592000 second);
  unit first_order_rate_constant = 1 / (2592000 second);
  unit time = 2592000 second;
end
