// SBML level 2 version 4

model Lindblad1996_ActionPotential_AtrialMyocyte()
  // This a model from the article:
  // A model of the action potential and underlying membrane currents in a rabbit atrial cell.
  // Lindblad DS, Murphey CR, Clark JW, Giles WR. Am J Physiol 1996 Oct;271(4 Pt 2):H1666-96 8897964 ,
  // Abstract:
  // We have developed a mathematical model of the rabbit atrial myocyte and have used it in an examination of the ionic basis of the atrial action potential. Available biophysical data have been incorporated into the model to quantify the specific ultrastructural morphology, intracellular ion buffering, and time- and voltage-dependent currents and transport mechanisms of the rabbit atrial cell. When possible, mathematical expressions describing ionic currents identified in rabbit atrium are based on whole cell voltage-clamp data from enzymatically isolated rabbit atrial myocytes. This membrane model is coupled to equations describing Na+, K+, and Ca2+ homeostasis, including the uptake and release of Ca2+ by the sarcoplasmic reticulum and Ca2+ buffering. The resulting formulation can accurately simulate the whole cell voltage-clamp data on which it is based and provides fits to a family of rabbit atrial cell action potentials obtained at 35 degrees C over a range of stimulus rates (0.2-3.0 Hz). The model is utilized to provide a qualitative prediction of the intracellular Ca2+ concentration transient during the action potential and to illustrate the interactions between membrane currents that underlie repolarization in the rabbit atrial myocyte.
  // This model was taken from the CellML repository and automatically converted to SBML.
  // The original model was: Lindblad DS, Murphey CR, Clark JW, Giles WR. (1996) - version=1.0
  // The original CellML model was created by:
  // Penny Noble
  // penny.noble@dpag.ox.ac.uk
  // The University of Oxford
  // This model originates from BioModels Database: A Database of Annotated Published Models (http://www.ebi.ac.uk/biomodels/). It is copyright (c) 2005-2011 The BioModels.net Team.
  // To the extent possible under law, all copyright and related or neighbouring rights to this encoded model have been dedicated to the public domain worldwide. Please refer to CC0 Public Domain Dedication for more information.
  // In summary, you are entitled to use this encoded model in absolutely any manner you deem suitable, verbatim, or with modification, alone or embedded it in a larger context, redistribute it, commercially or not, in a restricted way or not. .
  // To cite BioModels Database, please use: Li C, Donizelli M, Rodriguez N, Dharuri H, Endler L, Chelliah V, Li L, He E, Henry A, Stefan MI, Snoep JL, Hucka M, Le Novère N, Laibe C (2010) BioModels Database: An enhanced, curated and annotated resource for published quantitative kinetic models. BMC Syst Biol., 4:92.
  // biomodels.db:MODEL1006230015
  // isDescribedBy pubmed:8897964
  // biomodels.db:MODEL1006230015
  // isDescribedBy pubmed:8897964
  // biomodels.db:MODEL1006230015
  // biomodels.db:MODEL1006230015

  // Compartments:
  compartment COMpartment = 1 litre;

  // Parameters:
  V_membrane = -69.83663;
  R = 8314.472;
  T = 308;
  F = 9.64853415e4;
  Cm = 5e-5;
  stim_start = 0.1;
  stim_end = 100000;
  stim_period = 1;
  stim_duration = 0.0008;
  stim_amplitude = -2;
  P_Na = 1.4e-6;
  m = 0.01309;
  V_sodium_current_m_gate = ;
  time_sodium_current_m_gate = ;
  h1 = 0.706;
  V_sodium_current_h1_gate = ;
  time_sodium_current_h1_gate = ;
  h2 = 0.61493;
  V_sodium_current_h2_gate = ;
  time_sodium_current_h2_gate = ;
  g_Ca_L = 0.004;
  E_Ca_app = 60;
  d_L = 3e-5;
  V_L_type_Ca_channel_d_L_gate = ;
  time_L_type_Ca_channel_d_L_gate = ;
  f_L = 0.99981;
  V_L_type_Ca_channel_f_L_gate = ;
  time_L_type_Ca_channel_f_L_gate = ;
  g_Ca_T = 0.006;
  E_Ca_T = 38;
  d_T = 0.00046;
  V_T_type_Ca_channel_d_T_gate = ;
  time_T_type_Ca_channel_d_T_gate = ;
  f_T = 0.30752;
  V_T_type_Ca_channel_f_T_gate = ;
  time_T_type_Ca_channel_f_T_gate = ;
  g_to = 0.050002;
  r = 6e-5;
  V_Ca_independent_transient_outward_K_current_r_gate = ;
  time_Ca_independent_transient_outward_K_current_r_gate = ;
  s1 = 0.5753;
  V_Ca_independent_transient_outward_K_current_s1_gate = ;
  time_Ca_independent_transient_outward_K_current_s1_gate = ;
  s2 = 0.39871;
  V_Ca_independent_transient_outward_K_current_s2_gate = ;
  time_Ca_independent_transient_outward_K_current_s2_gate = ;
  s3 = 0.57363;
  V_Ca_independent_transient_outward_K_current_s3_gate = ;
  time_Ca_independent_transient_outward_K_current_s3_gate = ;
  g_Ks = 0.0025;
  g_Kr = 0.0035;
  z = 0.02032;
  V_delayed_rectifier_K_current_z_gate = ;
  time_delayed_rectifier_K_current_z_gate = ;
  p_a = 0.00016;
  V_delayed_rectifier_K_current_pa_gate = ;
  time_delayed_rectifier_K_current_pa_gate = ;
  p_i = 0.76898;
  V_delayed_rectifier_K_current_pi_gate = ;
  time_delayed_rectifier_K_current_pi_gate = ;
  g_K1 = 0.005088;
  KmK1 = 0.59;
  steepK1 = 1.393;
  shiftK1 = -3.6;
  g_B_Na = 6.4e-5;
  g_B_Ca = 3.1e-5;
  g_B_Cl = 0.00012;
  k_NaK_K = 1;
  k_NaK_Na = 11;
  i_NaK_max = 0.06441;
  i_CaP_max = 0.009509;
  k_CaP = 0.0002;
  k_NaCa = 2e-5;
  d_NaCa = 0.0003;
  gamma = 0.45;
  Na_i = 8.4;
  Ca_i = 7.305e-5;
  K_i = 100;
  Cl_i = 30;
  Vol_i = 1.26e-5;
  Vol_Ca = 5.884e-6;
  O_C = 0.02981;
  O_TC = 0.01442;
  O_TMgC = 0.23532;
  O_TMgMg = 0.67476;
  Mg_i = 2.5;
  Na_c = 140;
  Ca_c = 2.5;
  K_c = 5;
  Cl_c = 132;
  I_up_max = 2.8;
  k_cyca = 0.0003;
  k_srca = 0.5;
  k_xcs = 0.4;
  alpha_rel = 200;
  Ca_rel = 0.59984;
  Ca_up = 0.64913;
  Vol_up = 3.969e-7;
  Vol_rel = 4.41e-8;
  O_Calse = 0.41837;
  F1 = 0.21603;
  F2 = 0.00205;
  F3 = 0.68492;
  tau_tr = 0.01;
  k_rel = 0.0003;
  k_F3 = 0.815;

  // Assignment rules:
  i_Stim := piecewise(stim_amplitude, (time >= stim_start) && (time <= stim_end) && (time - stim_start - floor((time - stim_start)/stim_period)*stim_period <= stim_duration), 0);
  E_Na := R*T/F*ln(Na_c/Na_i);
  i_Na := P_Na*m^3*(0.635*h1 + 0.365*h2)*Na_c*V_membrane*F^2/(R*T)*(exp((V_membrane - E_Na)*F/(R*T)) - 1)/(exp(V_membrane*F/(R*T)) - 1);
  E0_m := V_sodium_current_m_gate + 44.4;
  alpha_m := -460*E0_m/(exp(E0_m/(-12.673)) - 1);
  beta_m := 18400*exp(E0_m/(-12.673));
  alpha_h := 44.9*exp((V_sodium_current_h1_gate + 66.9)/(-5.57));
  beta_h := 1491/(1 + 323.3*exp((V_sodium_current_h1_gate + 94.6)/(-12.9)));
  h_infinity := alpha_h/(alpha_h + beta_h);
  tau_h1 := 0.03/(1 + exp((V_sodium_current_h1_gate + 40)/6)) + 0.00035;
  tau_h2 := 0.12/(1 + exp((V_sodium_current_h2_gate + 60)/2)) + 0.00295;
  d_prime := 1/(1 + exp((V_membrane - 33)/(-12)));
  i_Ca_L := g_Ca_L*d_L*f_L*d_prime*(V_membrane - E_Ca_app);
  E0_alpha_d_L := V_L_type_Ca_channel_d_L_gate + 35;
  E0_beta_d_L := V_L_type_Ca_channel_d_L_gate - 5;
  alpha_d_L := -16.72*E0_alpha_d_L/(exp(E0_alpha_d_L/(-2.5)) - 1) + (-50*V_L_type_Ca_channel_d_L_gate/(exp(V_L_type_Ca_channel_d_L_gate/(-4.808)) - 1));
  beta_d_L := 4.48*E0_beta_d_L/(exp(E0_beta_d_L/2.5) - 1);
  d_L_infinity := 1/(1 + exp((V_L_type_Ca_channel_d_L_gate + 0.95)/(-6.6)));
  tau_d_L := 1/(alpha_d_L + beta_d_L);
  E0_f_L := V_L_type_Ca_channel_f_L_gate + 28;
  alpha_f_L := 8.49*E0_f_L/(exp(E0_f_L/4) - 1);
  beta_f_L := 67.922/(1 + exp(E0_f_L/(-4)));
  f_L_infinity := alpha_f_L/(alpha_f_L + beta_f_L);
  x_f := (V_L_type_Ca_channel_f_L_gate + 37.427)/20.213;
  tau_f_L := 0.211*exp(-x_f*x_f) + 0.015;
  i_Ca_T := g_Ca_T*d_T*f_T*(V_membrane - E_Ca_T);
  E0_d_T := V_T_type_Ca_channel_d_T_gate + 23;
  alpha_d_T := 674.173*exp(E0_d_T/30);
  beta_d_T := 674.173*exp(E0_d_T/(-30));
  d_T_infinity := 1/(1 + exp(E0_d_T/(-6.1)));
  tau_d_T := 1/(alpha_d_T + beta_d_T);
  E0_f_T := V_T_type_Ca_channel_f_T_gate + 75;
  alpha_f_T := 9.637*exp(E0_f_T/(-83.333));
  beta_f_T := 9.637*exp(E0_f_T/15.385);
  f_T_infinity := alpha_f_T/(alpha_f_T + beta_f_T);
  tau_f_T := 1/(alpha_f_T + beta_f_T);
  E_K := R*T/F*ln(K_c/K_i);
  i_to := g_to*r*(0.59*s1^3 + 0.41*s2^3)*(0.6*s3^6 + 0.4)*(V_membrane - E_K);
  alpha_r := 386.6*exp(V_Ca_independent_transient_outward_K_current_r_gate/12);
  beta_r := 8.011*exp(V_Ca_independent_transient_outward_K_current_r_gate/(-7.2));
  r_infinity := 1/(1 + exp((V_Ca_independent_transient_outward_K_current_r_gate + 15)/(-5.633)));
  tau_r := 1/(alpha_r + beta_r) + 0.0004;
  s1_infinity := 1/(1 + exp((V_Ca_independent_transient_outward_K_current_s1_gate + 28.29)/7.06));
  tau_s1 := 0.5466/(1 + exp((V_Ca_independent_transient_outward_K_current_s1_gate + 32.8)/0.1)) + 0.0204;
  s2_infinity := 1/(1 + exp((V_Ca_independent_transient_outward_K_current_s2_gate + 28.29)/7.06));
  tau_s2 := 5.75/(1 + exp((V_Ca_independent_transient_outward_K_current_s2_gate + 32.8)/0.1)) + 0.45/(1 + exp((V_Ca_independent_transient_outward_K_current_s2_gate - 13.54)/(-13.97)));
  s3_infinity := (1/(1 + exp((V_Ca_independent_transient_outward_K_current_s3_gate + 50.67)/27.38)) + 0.666)/1.666;
  tau_s3 := 7.5/(1 + exp((V_Ca_independent_transient_outward_K_current_s3_gate + 23)/0.5)) + 0.5;
  i_Ks := g_Ks*z*(V_membrane - E_K);
  i_Kr := g_Kr*p_a*p_i*(V_membrane - E_K);
  alpha_z := 1.66*exp(V_delayed_rectifier_K_current_z_gate/69.452);
  beta_z := 0.3*exp(V_delayed_rectifier_K_current_z_gate/(-21.826));
  z_infinity := 1/(1 + exp((V_delayed_rectifier_K_current_z_gate - 0.9)/(-13.8)));
  tau_z := 1/(alpha_z + beta_z) + 0.06;
  alpha_p_a := 9*exp(V_delayed_rectifier_K_current_pa_gate/25.371);
  beta_p_a := 1.3*exp(V_delayed_rectifier_K_current_pa_gate/(-13.026));
  p_a_infinity := 1/(1 + exp((V_delayed_rectifier_K_current_pa_gate + 5.1)/(-7.4)));
  tau_p_a := 1/(alpha_p_a + beta_p_a);
  alpha_p_i := 100*exp(V_delayed_rectifier_K_current_pi_gate/(-54.645));
  beta_p_i := 656*exp(V_delayed_rectifier_K_current_pi_gate/106.157);
  p_i_infinity := 1/(1 + exp((V_delayed_rectifier_K_current_pi_gate + 47.3921)/18.6603));
  tau_p_i := 1/(alpha_p_i + beta_p_i);
  i_K1 := g_K1*(V_membrane - E_K)*(K_c/(K_c + KmK1))^3*1/(1 + exp(steepK1*F*(V_membrane - E_K - shiftK1)/(R*T)));
  E_Ca := R*T/(2*F)*ln(Ca_c/Ca_i);
  E_Cl := R*T/F*ln(Cl_i/Cl_c);
  E_B_Cl := E_Cl - 0.49*(E_Cl + 30.59);
  i_B_Na := g_B_Na*(V_membrane - E_Na);
  i_B_Ca := g_B_Ca*(V_membrane - E_Ca);
  i_B_Cl := g_B_Cl*(V_membrane - E_B_Cl)*(1 + exp((V_membrane - (E_Cl + 36.95))/74.514));
  i_p := i_NaK_max*K_c/(K_c + k_NaK_K)*Na_i^1.5/(Na_i^1.5 + k_NaK_Na^1.5)*1.6/(1.5 + exp((V_membrane + 60)/(-40)));
  i_CaP := i_CaP_max*Ca_i/(Ca_i + k_CaP);
  i_NaCa := k_NaCa*(Na_i^3*Ca_c*exp(gamma*F*V_membrane/(R*T)) - Na_c^3*Ca_i*exp((gamma - 1)*V_membrane*F/(R*T)))/(1 + d_NaCa*(Na_c^3*Ca_i + Na_i^3*Ca_c)*(1 + Ca_i/0.0069));
  dOCdt := 200000*Ca_i*(1 - O_C) - 476*O_C;
  dOTCdt := 78400*Ca_i*(1 - O_TC) - 392*O_TC;
  dOTMgCdt := 200000*Ca_i*(1 - O_TMgC - O_TMgMg) - 6.6*O_TMgC;
  r_act := 203.8*exp(0.08*(V_membrane - 40)) + 203.8*(Ca_i/(Ca_i + k_rel))^4;
  r_inact := 33.96 + 339.6*(Ca_i/(Ca_i + k_rel))^4;
  i_up := I_up_max*(Ca_i/k_cyca - k_xcs^2*Ca_up/k_srca)/((Ca_i + k_cyca)/k_cyca + k_xcs*(Ca_up + k_srca)/k_srca);
  i_tr := (Ca_up - Ca_rel)*2*F*Vol_rel/tau_tr;
  i_rel := alpha_rel*(F2/(F2 + 0.25))^2*(Ca_rel - Ca_i);

  // Rate rules:
  V_membrane' = -1/Cm*(i_Kr + i_Ks + i_Na + i_Ca_L + i_Ca_T + i_to + i_K1 + i_B_Na + i_B_Ca + i_B_Cl + i_p + i_CaP + i_NaCa + i_Stim);
  m' = alpha_m*(1 - m) - beta_m*m;
  h1' = (h_infinity - h1)/tau_h1;
  h2' = (h_infinity - h2)/tau_h2;
  d_L' = (d_L_infinity - d_L)/tau_d_L;
  f_L' = (f_L_infinity - f_L)/tau_f_L;
  d_T' = (d_T_infinity - d_T)/tau_d_T;
  f_T' = (f_T_infinity - f_T)/tau_f_T;
  r' = (r_infinity - r)/tau_r;
  s1' = (s1_infinity - s1)/tau_s1;
  s2' = (s2_infinity - s2)/tau_s2;
  s3' = (s3_infinity - s3)/tau_s3;
  z' = (z_infinity - z)/tau_z;
  p_a' = (p_a_infinity - p_a)/tau_p_a;
  p_i' = (p_i_infinity - p_i)/tau_p_i;
  Na_i' = -(i_Na + i_B_Na + 3*i_p + 3*i_NaCa)/(Vol_i*F);
  K_i' = -(i_to + i_K1 + i_Kr + i_Ks - 2*i_p)/(Vol_i*F);
  Ca_i' = -(i_Ca_L + i_Ca_T + i_B_Ca + i_CaP - 2*i_NaCa + i_up - i_rel)/(2*Vol_Ca*F) - (0.08*dOTCdt + 0.16*dOTMgCdt + 0.045*dOCdt);
  O_C' = dOCdt;
  O_TC' = dOTCdt;
  O_TMgC' = dOTMgCdt;
  O_TMgMg' = 2000*Mg_i*(1 - O_TMgC - O_TMgMg) - 666*O_TMgMg;
  O_Calse' = 480*Ca_rel*(1 - O_Calse) - 400*O_Calse;
  Ca_rel' = (i_tr - i_rel)/(2*Vol_rel*F) - 31*O_Calse;
  Ca_up' = (i_up - i_tr)/(2*Vol_up*F);
  F1' = k_F3*F3 - r_act*F1;
  F2' = r_act*F1 - r_inact*F2;
  F3' = F2*r_inact - k_F3*F3;

  // Unit definitions:
  unit per_second = 1 / second;
  unit millivolt = 1e-3 volt;
  unit per_millivolt = 1 / (1e-3 volt);
  unit per_millivolt_second = 1 / (1e-3 volt * second);
  unit millimolar = 1e-3 mole / litre;
  unit per_millimolar_second = litre / (1e-3 mole * second);
  unit per_millimolar_4 = litre^4 / (1e-3 mole)^4;
  unit picoA_per_millimolar = 1e-12 ampere * litre / (1e-3 mole);
  unit picoA_per_millimolar_4 = 1e-12 ampere * litre^4 / (1e-3 mole)^4;
  unit picoA = 1e-12 ampere;
  unit nanoS = 1e-9 siemens;
  unit nanoF = 1e-9 farad;
  unit nanolitre = 1e-9 litre;
  unit nanolitre_per_second = 1e-9 litre / second;
  unit millijoule_per_mole_kelvin = 1e-3 joule / (mole * kelvin);
  unit coulomb_per_mole = coulomb / mole;
end
