// SBML level 2 version 4

model Aslanidi2009_RightAtrialTissue_Arrhythmogenesis()
  // This a model from the article:
  // Mechanisms of transition from normal to reentrant electrical activity in a model of rabbit atrial tissue: interaction of tissue heterogeneity and anisotropy.
  // Aslanidi OV, Boyett MR, Dobrzynski H, Li J, Zhang H. Biophys J 2009 Feb;96(3):798-817 19186122 ,
  // Abstract:
  // Experimental evidence suggests that regional differences in action potential (AP) morphology can provide a substrate for initiation and maintenance of reentrant arrhythmias in the right atrium (RA), but the relationships between the complex electrophysiological and anatomical organization of the RA and the genesis of reentry are unclear. In this study, a biophysically detailed three-dimensional computer model of the right atrial tissue was constructed to study the role of tissue heterogeneity and anisotropy in arrhythmogenesis. The model of Lindblad et al. for a rabbit atrial cell was modified to incorporate experimental data on regional differences in several ionic currents (primarily, I(Na), I(CaL), I(K1), I(to), and I(sus)) between the crista terminalis and pectinate muscle cells. The modified model was validated by its ability to reproduce the AP properties measured experimentally. The anatomical model of the rabbit RA (including tissue geometry and fiber orientation) was based on a recent histological reconstruction. Simulations with the resultant electrophysiologically and anatomically detailed three-dimensional model show that complex organization of the RA tissue causes breakdown of regular AP conduction patterns at high pacing rates (>11.75 Hz): as the AP in the crista terminalis cells is longer, and electrotonic coupling transverse to fibers of the crista terminalis is weak, high-frequency pacing at the border between the crista terminalis and pectinate muscles results in a unidirectional conduction block toward the crista terminalis and generation of reentry. Contributions of the tissue heterogeneity and anisotropy to reentry initiation mechanisms are quantified by measuring action potential duration (APD) gradients at the border between the crista terminalis and pectinate muscles: the APD gradients are high in areas where both heterogeneity and anisotropy are high, such that intrinsic APD differences are not diminished by electrotonic interactions. Thus, our detailed computer model reconstructs complex electrical activity in the RA, and provides new insights into the mechanisms of transition from focal atrial tachycardia into reentry.
  // This model was taken from the CellML repository and automatically converted to SBML.
  // The original model was: Aslanidi OV, Boyett MR, Dobrzynski H, Li J, Zhang H. (2009) - version=1.0
  // The original CellML model was created by:
  // Penny Noble
  // penny.noble@dpag.ox.ac.uk
  // The University of Oxford
  // To the extent possible under law, all copyright and related or neighbouring rights to this encoded model have been dedicated to the public domain worldwide. Please refer to CC0 Public Domain Dedication for more information.
  // In summary, you are entitled to use this encoded model in absolutely any manner you deem suitable, verbatim, or with modification, alone or embedded it in a larger context, redistribute it, commercially or not, in a restricted way or not.
  // To cite BioModels Database, please use: Li C, Donizelli M, Rodriguez N, Dharuri H, Endler L, Chelliah V, Li L, He E, Henry A, Stefan MI, Snoep JL, Hucka M, Le Novère N, Laibe C (2010) BioModels Database: An enhanced, curated and annotated resource for published quantitative kinetic models. BMC Syst Biol., 4:92.
  // biomodels.db:MODEL1006230017
  // isDescribedBy pubmed:19186122
  // biomodels.db:MODEL1006230017
  // isDescribedBy pubmed:19186122
  // biomodels.db:MODEL1006230017
  // biomodels.db:MODEL1006230017

  // Compartments:
  compartment COMpartment = 1 litre;

  // Parameters:
  CT = 1 dimensionless;
  PM = 0 dimensionless;
  V_membrane = -80 millivolt;
  R = 8314 millijoule_per_mole_kelvin;
  T = 308 kelvin;
  F = 96487 coulomb_per_mole;
  Cm = 5e-5 nanoF;
  i_Stim has picoA;
  stim_start = 0.01 second;
  stim_end = 100 second;
  stim_period = 0.5 second;
  stim_duration = 0.0002 second;
  stim_amplitude = -20 picoA;
  i_Na has picoA;
  E_Na has millivolt;
  P_Na = 1.4e-6 nanolitre_per_second;
  m = 0.01309 dimensionless;
  E0_m has millivolt;
  alpha_m has per_second;
  beta_m has per_second;
  V_sodium_current_m_gate has millivolt;
  time_sodium_current_m_gate has second;
  h1 = 0.706 dimensionless;
  alpha_h has per_second;
  beta_h has per_second;
  h_infinity has dimensionless;
  tau_h1 has second;
  V_sodium_current_h1_gate has millivolt;
  time_sodium_current_h1_gate has second;
  h2 = 0.61493 dimensionless;
  tau_h2 has second;
  V_sodium_current_h2_gate has millivolt;
  time_sodium_current_h2_gate has second;
  i_Ca_L has picoA;
  g_Ca_L = 0.004 nanoS;
  E_Ca_app = 50 millivolt;
  d_prime has dimensionless;
  d_L = 3e-5 dimensionless;
  E0_alpha_d_L has millivolt;
  E0_beta_d_L has millivolt;
  E10 has millivolt;
  alpha_d_L has per_second;
  beta_d_L has per_second;
  d_L_infinity has dimensionless;
  tau_d_L has second;
  V_L_type_Ca_channel_d_L_gate has millivolt;
  time_L_type_Ca_channel_d_L_gate has second;
  f_L = 0.99981 dimensionless;
  E0_f_L has millivolt;
  alpha_f_L has per_second;
  beta_f_L has per_second;
  f_L_infinity has dimensionless;
  tau_f_L has second;
  V_L_type_Ca_channel_f_L_gate has millivolt;
  time_L_type_Ca_channel_f_L_gate has second;
  i_Ca_T has picoA;
  g_Ca_T = 0.006 nanoS;
  E_Ca_T = 38 millivolt;
  d_T = 0.00046 dimensionless;
  E0_d_T has millivolt;
  alpha_d_T has per_second;
  beta_d_T has per_second;
  d_T_infinity has dimensionless;
  tau_d_T has second;
  V_T_type_Ca_channel_d_T_gate has millivolt;
  time_T_type_Ca_channel_d_T_gate has second;
  f_T = 0.30752 dimensionless;
  E0_f_T has millivolt;
  alpha_f_T has per_second;
  beta_f_T has per_second;
  f_T_infinity has dimensionless;
  tau_f_T has second;
  V_T_type_Ca_channel_f_T_gate has millivolt;
  time_T_type_Ca_channel_f_T_gate has second;
  i_to has picoA;
  i_sus has picoA;
  E_K has millivolt;
  g_to = 0.050002 nanoS;
  r = 6e-5 dimensionless;
  alpha_r has per_second;
  beta_r has per_second;
  tau_r has second;
  r_infinity has dimensionless;
  V_Ca_independent_transient_outward_K_current_r_gate has millivolt;
  time_Ca_independent_transient_outward_K_current_r_gate has second;
  s1 = 0.5753 dimensionless;
  tau_s1 has second;
  s1_infinity has dimensionless;
  V_Ca_independent_transient_outward_K_current_s1_gate has millivolt;
  time_Ca_independent_transient_outward_K_current_s1_gate has second;
  s2 = 0.39871 dimensionless;
  tau_s2 has second;
  s2_infinity has dimensionless;
  V_Ca_independent_transient_outward_K_current_s2_gate has millivolt;
  time_Ca_independent_transient_outward_K_current_s2_gate has second;
  s3 = 0.57363 dimensionless;
  tau_s3 has second;
  s3_infinity has dimensionless;
  V_Ca_independent_transient_outward_K_current_s3_gate has millivolt;
  time_Ca_independent_transient_outward_K_current_s3_gate has second;
  i_Ks has picoA;
  i_Kr has picoA;
  g_Ks = 0.0025 nanoS;
  g_Kr = 0.0035 nanoS;
  z = 0.02032 dimensionless;
  alpha_z has per_second;
  beta_z has per_second;
  tau_z has second;
  z_infinity has dimensionless;
  V_delayed_rectifier_K_current_z_gate has millivolt;
  time_delayed_rectifier_K_current_z_gate has second;
  p_a = 0.00016 dimensionless;
  alpha_p_a has per_second;
  beta_p_a has per_second;
  tau_p_a has second;
  p_a_infinity has dimensionless;
  V_delayed_rectifier_K_current_pa_gate has millivolt;
  time_delayed_rectifier_K_current_pa_gate has second;
  p_i = 0.76898 dimensionless;
  alpha_p_i has per_second;
  beta_p_i has per_second;
  tau_p_i has second;
  p_i_infinity has dimensionless;
  V_delayed_rectifier_K_current_pi_gate has millivolt;
  time_delayed_rectifier_K_current_pi_gate has second;
  i_K1 has picoA;
  g_K1 = 0.00508 nanoS;
  KmK1 = 0.59 millimolar;
  steepK1 = 1.393 dimensionless;
  shiftK1 = -3.6 millivolt;
  i_B_Na has picoA;
  i_B_Ca has picoA;
  g_B_Na = 6.4e-5 nanoS;
  g_B_Ca = 3.1e-5 nanoS;
  E_Ca has millivolt;
  i_p has picoA;
  k_NaK_K = 1 millimolar;
  k_NaK_Na = 11 millimolar;
  i_NaK_max = 0.06441 picoA;
  i_CaP has picoA;
  i_CaP_max = 0.009509 picoA;
  k_CaP = 0.0002 millimolar;
  i_NaCa has picoA;
  k_NaCa = 2e-5 picoA_per_millimolar_4;
  d_NaCa = 0.0003 per_millimolar_4;
  gamma = 0.45 dimensionless;
  Na_i = 8.4 millimolar;
  Ca_i = 7.1e-5 millimolar;
  K_i = 100 millimolar;
  Vol_i = 1.26e-5 nanolitre;
  Vol_Ca = 5.884e-6 nanolitre;
  O_C = 0.029108 dimensionless;
  dOCdt has per_second;
  O_TC = 0.014071 dimensionless;
  dOTCdt has per_second;
  O_TMgC = 0.214036 dimensionless;
  dOTMgCdt has per_second;
  O_TMgMg = 0.693565 dimensionless;
  Mg_i = 2.5 millimolar;
  Na_c = 140 millimolar;
  Ca_c = 2.5 millimolar;
  K_c = 5 millimolar;
  Vol_c = 2.5e-6 nanolitre;
  i_rel has picoA;
  i_up has picoA;
  i_tr has picoA;
  I_up_max = 2.8 picoA;
  k_cyca = 0.0003 millimolar;
  k_srca = 0.5 millimolar;
  k_xcs = 0.4 dimensionless;
  alpha_rel = 200 picoA_per_millimolar;
  Ca_rel = 0.726776 millimolar;
  Ca_up = 0.730866 millimolar;
  Vol_up = 3.969e-7 nanolitre;
  Vol_rel = 4.4e-8 nanolitre;
  r_act has per_second;
  r_inact has per_second;
  O_Calse = 0.465921 dimensionless;
  F1 = 0.288039 dimensionless;
  F2 = 0.002262 dimensionless;
  F3 = 0.612697 dimensionless;
  tau_tr = 0.01 second;
  k_rel = 0.0003 millimolar;
  k_F3 = 0.815 per_second;

  // Assignment rules:
  i_Stim := piecewise(stim_amplitude, (time >= stim_start) && (time <= stim_end) && (time - stim_start - floor((time - stim_start)/stim_period)*stim_period <= stim_duration), 0);
  E_Na := R*T/F*ln(Na_c/Na_i);
  i_Na := P_Na*m^3*(0.635*h1 + 0.365*h2)*Na_c*V_membrane*F^2/(R*T)*(exp((V_membrane - E_Na)*F/(R*T)) - 1)/(exp(V_membrane*F/(R*T)) - 1);
  E0_m := V_sodium_current_m_gate + 44.4;
  alpha_m := -460*E0_m/(exp(E0_m/(-12.673)) - 1);
  beta_m := 18400*exp(E0_m/(-12.673));
  alpha_h := 44.9*exp((V_sodium_current_h1_gate + 66.9)/(-5.57));
  beta_h := 1491/(1 + 323.3*exp((V_sodium_current_h1_gate + 94.6)/(-12.9)));
  h_infinity := alpha_h/(alpha_h + beta_h);
  tau_h1 := 0.03/(1 + exp((V_sodium_current_h1_gate + 40)/6)) + 0.00015;
  tau_h2 := 0.12/(1 + exp((V_sodium_current_h2_gate + 60)/2)) + 0.00045;
  d_prime := 1/(1 + exp((V_membrane - 23)/(-12)));
  i_Ca_L := piecewise(1.8*g_Ca_L*(d_L*f_L + d_prime)*(V_membrane - E_Ca_app), (CT == 1) && (PM == 0), 2.1*g_Ca_L*(d_L*f_L + d_prime)*(V_membrane - E_Ca_app), (CT == 0) && (PM == 1), g_Ca_L*(d_L*f_L + d_prime)*(V_membrane - E_Ca_app));
  E0_alpha_d_L := V_L_type_Ca_channel_d_L_gate + 45;
  E0_beta_d_L := V_L_type_Ca_channel_d_L_gate + 5;
  E10 := V_L_type_Ca_channel_d_L_gate + 10;
  alpha_d_L := -16.72*E0_alpha_d_L/(exp(E0_alpha_d_L/(-2.5)) - 1) + (-50*E10/(exp(E10/(-4.808)) - 1));
  beta_d_L := 4.48*E0_beta_d_L/(exp(E0_beta_d_L/2.5) - 1);
  d_L_infinity := 1/(1 + exp((E10 + 0.95)/(-6.6)));
  tau_d_L := 1/(alpha_d_L + beta_d_L);
  E0_f_L := V_L_type_Ca_channel_f_L_gate + 18;
  alpha_f_L := 8.49*E0_f_L/(exp(E0_f_L/4) - 1);
  beta_f_L := 67.922/(1 + exp(E0_f_L/(-4)));
  f_L_infinity := alpha_f_L/(alpha_f_L + beta_f_L);
  tau_f_L := 1/(alpha_f_L + beta_f_L);
  i_Ca_T := g_Ca_T*d_T*f_T*(V_membrane - E_Ca_T);
  E0_d_T := V_T_type_Ca_channel_d_T_gate + 23.3;
  alpha_d_T := 674.173*exp(E0_d_T/30);
  beta_d_T := 674.173*exp(E0_d_T/(-30));
  d_T_infinity := 1/(1 + exp((E0_d_T - 0.3)/(-6.1)));
  tau_d_T := 1/(alpha_d_T + beta_d_T);
  E0_f_T := V_T_type_Ca_channel_f_T_gate + 75;
  alpha_f_T := 9.637*exp(E0_f_T/(-83.3));
  beta_f_T := 9.637*exp(E0_f_T/15.38);
  f_T_infinity := alpha_f_T/(alpha_f_T + beta_f_T);
  tau_f_T := 1/(alpha_f_T + beta_f_T);
  E_K := R*T/F*ln(K_c/K_i);
  i_to := piecewise(0.2*g_to*r*(0.59*s1^3 + 0.41*s2^3)*(0.6*s3^6 + 0.4)*(V_membrane - E_K), (CT == 1) && (PM == 0), 0.35*g_to*r*(0.59*s1^3 + 0.41*s2^3)*(0.6*s3^6 + 0.4)*(V_membrane - E_K), (CT == 0) && (PM == 1), g_to*r*(0.59*s1^3 + 0.41*s2^3)*(0.6*s3^6 + 0.4)*(V_membrane - E_K));
  i_sus := piecewise(0.0014*(V_membrane + 70), (CT == 1) && (PM == 0), 0.0024*(V_membrane + 70), (CT == 0) && (PM == 1), 0.001*(V_membrane + 70));
  alpha_r := 386.6*exp(V_Ca_independent_transient_outward_K_current_r_gate/12);
  beta_r := 8.011*exp(V_Ca_independent_transient_outward_K_current_r_gate/(-7.2));
  r_infinity := 1/(1 + exp((V_Ca_independent_transient_outward_K_current_r_gate + 15)/(-5.633)));
  tau_r := 1/(alpha_r + beta_r) + (-4);
  s1_infinity := 1/(1 + exp((V_Ca_independent_transient_outward_K_current_s1_gate + 28.29)/7.06));
  tau_s1 := 0.5466/(1 + exp((V_Ca_independent_transient_outward_K_current_s1_gate + 32.8)/0.1)) + 0.0204;
  s2_infinity := 1/(1 + exp((V_Ca_independent_transient_outward_K_current_s2_gate + 28.29)/7.06));
  tau_s2 := 5.75/(1 + exp((V_Ca_independent_transient_outward_K_current_s2_gate + 32.8)/0.1)) + 0.45/(1 + exp((V_Ca_independent_transient_outward_K_current_s2_gate - 13.54)/(-13.97)));
  s3_infinity := (1/(1 + exp((V_Ca_independent_transient_outward_K_current_s3_gate + 50.67)/27.38)) + 0.666)/1.666;
  tau_s3 := 7.5/(1 + exp((V_Ca_independent_transient_outward_K_current_s3_gate + 23)/0.5)) + 0.5;
  i_Ks := g_Ks*z*(V_membrane - E_K);
  i_Kr := g_Kr*p_a*p_i*(V_membrane - E_K);
  alpha_z := 1.66*exp(V_delayed_rectifier_K_current_z_gate/69.452);
  beta_z := 0.3*exp(V_delayed_rectifier_K_current_z_gate/(-21.826));
  z_infinity := 1/(1 + exp((V_delayed_rectifier_K_current_z_gate - 0.9)/(-13.8)));
  tau_z := 1/(alpha_z + beta_z) + 0.06;
  alpha_p_a := 9*exp(V_delayed_rectifier_K_current_pa_gate/25.371);
  beta_p_a := 1.3*exp(V_delayed_rectifier_K_current_pa_gate/(-13.026));
  p_a_infinity := 1/(1 + exp((V_delayed_rectifier_K_current_pa_gate + 5.1)/(-7.4)));
  tau_p_a := 1/(alpha_p_a + beta_p_a);
  alpha_p_i := 100*exp(V_delayed_rectifier_K_current_pi_gate/(-54.645));
  beta_p_i := 656*exp(V_delayed_rectifier_K_current_pi_gate/106.157);
  p_i_infinity := 1/(1 + exp((V_delayed_rectifier_K_current_pi_gate + 47.3921)/18.6603));
  tau_p_i := 1/(alpha_p_i + beta_p_i);
  i_K1 := piecewise(2*g_K1*(V_membrane - E_K)*(K_c/(K_c + KmK1))^3*1/(1 + exp(steepK1*F*(V_membrane - E_K - shiftK1)/(R*T))), (CT == 1) && (PM == 0), 2.5*g_K1*(V_membrane - E_K)*(K_c/(K_c + KmK1))^3*1/(1 + exp(steepK1*F*(V_membrane - E_K - shiftK1)/(R*T))), (CT == 0) && (PM == 1), g_K1*(V_membrane - E_K)*(K_c/(K_c + KmK1))^3*1/(1 + exp(steepK1*F*(V_membrane - E_K - shiftK1)/(R*T))));
  E_Ca := R*T/(2*F)*ln(Ca_c/Ca_i);
  i_B_Na := piecewise(2e-5*(V_membrane - E_Na), (CT == 1) && (PM == 0), 3e-5*(V_membrane - E_Na), (CT == 0) && (PM == 1), g_B_Na*(V_membrane - E_Na));
  i_B_Ca := piecewise(2e-5*(V_membrane - E_Ca), (CT == 1) && (PM == 0), 3e-5*(V_membrane - E_Ca), (CT == 0) && (PM == 1), g_B_Ca*(V_membrane - E_Ca));
  i_p := i_NaK_max*K_c/(K_c + k_NaK_K)*Na_i^1.5/(Na_i^1.5 + k_NaK_Na^1.5)*1.6/(1.5 + exp((V_membrane + 60)/(-40)));
  i_CaP := i_CaP_max*Ca_i/(Ca_i + k_CaP);
  i_NaCa := k_NaCa*(Na_i^3*Ca_c*exp(gamma*F*V_membrane/(R*T)) - Na_c^3*Ca_i*exp((gamma - 1)*V_membrane*F/(R*T)))/(1 + d_NaCa*(Na_c^3*Ca_i + Na_i^3*Ca_c));
  dOCdt := 200000*Ca_i*(1 - O_C) - 476*O_C;
  dOTCdt := 78400*Ca_i*(1 - O_TC) - 392*O_TC;
  dOTMgCdt := 200000*Ca_i*(1 - O_TMgC - O_TMgMg) - 6.6*O_TMgC;
  r_act := 240*exp(0.08*(V_membrane - 20)) + 203.8*(Ca_i/(Ca_i + k_rel))^4;
  r_inact := 33.96 + 339.6*(Ca_i/(Ca_i + k_rel))^4;
  i_up := I_up_max*(Ca_i/k_cyca - k_xcs^2*Ca_up/k_srca)/((Ca_i + k_cyca)/k_cyca + k_xcs*(Ca_up + k_srca)/k_srca);
  i_tr := (Ca_up - Ca_rel)*2*F*Vol_rel/tau_tr;
  i_rel := alpha_rel*(F2/(F2 + 0.25))^2*(Ca_rel - Ca_i);

  // Rate rules:
  V_membrane' = -1/Cm*(i_Kr + i_Ks + i_Na + i_Ca_L + i_Ca_T + i_to + i_sus + i_K1 + i_B_Na + i_B_Ca + i_p + i_CaP + i_NaCa + i_Stim);
  m' = alpha_m*(1 - m) - beta_m*m;
  h1' = (h_infinity - h1)/tau_h1;
  h2' = (h_infinity - h2)/tau_h2;
  d_L' = (d_L_infinity - d_L)/tau_d_L;
  f_L' = (f_L_infinity - f_L)/tau_f_L;
  d_T' = (d_T_infinity - d_T)/tau_d_T;
  f_T' = (f_T_infinity - f_T)/tau_f_T;
  r' = (r_infinity - r)/tau_r;
  s1' = (s1_infinity - s1)/tau_s1;
  s2' = (s2_infinity - s2)/tau_s2;
  s3' = (s3_infinity - s3)/tau_s3;
  z' = (z_infinity - z)/tau_z;
  p_a' = (p_a_infinity - p_a)/tau_p_a;
  p_i' = (p_i_infinity - p_i)/tau_p_i;
  Na_i' = -(i_Na + i_B_Na + 3*i_p + 3*i_NaCa)/(Vol_i*F);
  K_i' = -(i_to + i_sus + i_K1 + i_Kr + i_Ks - 2*i_p)/(Vol_i*F);
  Ca_i' = -(i_Ca_L + i_Ca_T + i_B_Ca + i_CaP - 2*i_NaCa + i_up - i_rel)/(2*Vol_Ca*F) - (0.08*dOTCdt + 0.16*dOTMgCdt + 0.045*dOCdt);
  O_C' = dOCdt;
  O_TC' = dOTCdt;
  O_TMgC' = dOTMgCdt;
  O_TMgMg' = 2000*Mg_i*(1 - O_TMgC - O_TMgMg) - 666*O_TMgMg;
  K_c' = (i_to + i_sus + i_K1 + i_Kr + i_Ks - 2*i_p)/(Vol_c*F);
  O_Calse' = 480*Ca_rel*(1 - O_Calse) - 400*O_Calse;
  Ca_rel' = (i_tr - i_rel)/(2*Vol_rel*F) - 31*O_Calse;
  Ca_up' = (i_up - i_tr)/(2*Vol_up*F);
  F1' = k_F3*F3 - r_act*F1;
  F2' = r_act*F1 - r_inact*F2;
  F3' = F2*r_inact - k_F3*F3;

  // Unit definitions:
  unit per_second = 1 / second;
  unit millivolt = 1e-3 volt;
  unit per_millivolt = 1 / (1e-3 volt);
  unit per_millivolt_second = 1 / (1e-3 volt * second);
  unit millimolar = 1e-3 mole / litre;
  unit per_millimolar_second = litre / (1e-3 mole * second);
  unit per_millimolar_4 = litre^4 / (1e-3 mole)^4;
  unit picoA_per_millimolar = 1e-12 ampere * litre / (1e-3 mole);
  unit picoA_per_millimolar_4 = 1e-12 ampere * litre^4 / (1e-3 mole)^4;
  unit picoA = 1e-12 ampere;
  unit nanoS = 1e-9 siemens;
  unit nanoF = 1e-9 farad;
  unit nanolitre = 1e-9 litre;
  unit nanolitre_per_second = 1e-9 litre / second;
  unit millijoule_per_mole_kelvin = 1e-3 joule / (mole * kelvin);
  unit coulomb_per_mole = coulomb / mole;
end
