// SBML level 2 version 4

model Warren2009_CalciumWavePropagation()
  // This a model from the article:
  // Mathematical modelling of calcium wave propagation in mammalian airway epithelium: evidence for regenerative ATP release.
  // Warren NJ, Tawhai MH, Crampin EJ. Exp Physiol 2010 Jan;95(1):232-49 19700517 ,
  // Abstract:
  // Airway epithelium has been shown to exhibit intracellular calcium waves after mechanical stimulation. Two classes of mechanism have been proposed to explain calcium wave propagation: diffusion through gap junctions of the intracellular messenger inositol 1,4,5-trisphosphate (IP3), and diffusion of paracrine extracellular messengers such as ATP. We have used single cell recordings of airway epithelium to parameterize a model of an airway epithelial cell. This was then incorporated into a spatial model of a cell culture where both mechanisms for calcium wave propagation are possible. It is shown that a decreasing return on the radius of Ca2+ wave propagation is achieved as the amount of ATP released from the stimulated cell increases. It is therefore shown that for a Ca2+ wave to propagate large distances, a significant fraction of the intracellular ATP pool would be required to be released. Further to this, the radial distribution of maximal calcium response from the stimulated cell does not produce the same flat profile of maximal calcium response seen in experiential studies. This suggests that an additional mechanism is important in Ca2+ wave propagation, such as regenerative release of ATP from cells downstream of the stimulated cell.
  // This model was taken from the CellML repository and automatically converted to SBML.
  // The original model was: Warren NJ, Tawhai MH, Crampin EJ. (2009) - version=1.0
  // The original CellML model was created by:
  // Nic Warren
  // n.warren@auckland.ac.nz
  // The University of Auckland
  // This model originates from BioModels Database: A Database of Annotated Published Models (http://www.ebi.ac.uk/biomodels/). It is copyright (c) 2005-2011 The BioModels.net Team.
  // To the extent possible under law, all copyright and related or neighbouring rights to this encoded model have been dedicated to the public domain worldwide. Please refer to CC0 Public Domain Dedication for more information.
  // In summary, you are entitled to use this encoded model in absolutely any manner you deem suitable, verbatim, or with modification, alone or embedded it in a larger context, redistribute it, commercially or not, in a restricted way or not..
  // To cite BioModels Database, please use: Li C, Donizelli M, Rodriguez N, Dharuri H, Endler L, Chelliah V, Li L, He E, Henry A, Stefan MI, Snoep JL, Hucka M, Le Novère N, Laibe C (2010) BioModels Database: An enhanced, curated and annotated resource for published quantitative kinetic models. BMC Syst Biol., 4:92.
  // biomodels.db:MODEL1006230018
  // isDescribedBy pubmed:19700517
  // biomodels.db:MODEL1006230018
  // isDescribedBy pubmed:19700517
  // biomodels.db:MODEL1006230018
  // biomodels.db:MODEL1006230018

  // Compartments:
  compartment COMpartment = 1 litre;

  // Parameters:
  volume_i0 = 1450;
  gamma = 4.9;
  volumeCa_i = 75.83359;
  volumeCa_er = 1199.737;
  volume_iIP3 = -3.282874e-93;
  PIP2 = 1;
  PIP2_Total_PIP2 = 5;
  PIP2_Total_IPX = 25;
  J_ip3R0 = 10;
  ATP_e = 0;
  MechanicalStimulation = 0;
  V_mech0 = 1;
  C_1 = 2.6;
  C_2 = 0.02;
  C_3 = 2.3;
  C_4 = 10;
  V_ATP = 0.001;
  K_ATP = 0.0001;
  Beta_1 = 0;
  Beta_2 = 36;
  K_rc = 0.3;
  K_IP3 = 0.01;
  Jipt0 = 28;
  Ka = 0.3722419;
  Kb = 0.636005;
  Kc = 0.0571428;
  Jryr0 = 0;
  Jer0 = 0.0035;
  Vserca = 0.09;
  Kserca = 0.04;
  Vm = -39;
  R = 8314;
  T = 310;
  F = 96485;
  z_Ca = 2;
  Ca_ext = 1300;
  P_pm_1 = 0.6;
  P_pm_2 = 28;
  Vpm = 0.072;
  Kpm = 0.6;
  O = -2.420135e-89;
  I1 = 2.243433e-81;
  I2 = 1.012768e-40;
  k1_ = 0.88;
  k2 = 0.5;
  k3 = 0.5;
  k5 = 0.02;
  alpha_1 = 40;
  beta_1 = 0.8;
  alpha_4 = 0.06;
  beta_4 = 0.01;

  // Assignment rules:
  volume_i := volume_i0;
  volume_er := volume_i/gamma;
  Ca_i := volumeCa_i/volume_i;
  Ca_er := volumeCa_er/volume_er;
  IP3 := volume_iIP3/volume_i;
  IPX := 1 - IP3/PIP2_Total_IPX - PIP2;
  J_ip3R := J_ip3R0;
  V_mech := piecewise(V_mech0, (time > 10) && (time < 25) && (MechanicalStimulation > 0), 0);
  V_IP3 := C_1*ATP_e/(C_2 + ATP_e) + C_3*ATP_e^2/(C_4^2 + ATP_e^2);
  J_ip3P := V_IP3*PIP2;
  F_Ca := Ca_i/(K_rc + Ca_i);
  J_ip3D := (Beta_1 + Beta_2*F_Ca^2)*IP3/(K_IP3 + IP3);
  Pipt := O^4;
  Jipt := Jipt0*volume_i0*Pipt*(Ca_er - Ca_i);
  W_inf := (1 + (Ka/Ca_i)^4 + (Ca_i/Kb)^3)/(1 + 1/Kc + (Ca_i/Kb)^3 + (Ka/Ca_i)^4);
  Pryr := W_inf*(1 + (Ka/Ca_i)^4 + (Ca_i/Kb)^3)/(1 + 1/Kc + (Ca_i/Kb)^3 + (Ka/Ca_i)^4);
  Jryr := Jryr0*volume_i0*(Ca_er - Ca_i);
  Jer := Jer0*volume_i0*(Ca_er - Ca_i);
  Jserca := volume_i0*Vserca*Ca_i^2/(Kserca^2 + Ca_i^2)*1/Ca_er;
  V_Ca := R*T/(z_Ca*F)*ln(Ca_ext/Ca_i);
  Iin_1 := volume_i0*P_pm_1*(V_Ca - Vm);
  Iin_2 := volume_i0*P_pm_2*V_mech*(V_Ca - Vm);
  Jin_1 := Iin_1/(z_Ca*F);
  Jin_2 := Iin_2/(z_Ca*F);
  Jin := Jin_1 + Jin_2;
  Jpm := Vpm*volume_i0*Ca_i^2/(Kpm^2 + Ca_i^2);
  S := 1 - (O + I1 + I2);
  k1 := alpha_1*Ca_i^3/(beta_1^3 + Ca_i^3);
  k4 := alpha_4*IP3/(beta_4 + IP3);

  // Rate rules:
  volumeCa_i' = Jipt + Jryr + Jer - Jserca + (Jin - Jpm);
  volumeCa_er' = -(Jipt + Jryr + Jer - Jserca);
  volume_iIP3' = (J_ip3P - J_ip3D)*volume_i;
  PIP2' = J_ip3R*IPX - J_ip3P/PIP2_Total_PIP2;
  ATP_e' = -V_ATP*ATP_e/(K_ATP + ATP_e);
  O' = k1*IP3*S - (k1_*O + k2*O);
  I1' = k2*O - (k3 + k4)*I1;
  I2' = k4*I1 - k5*I2;

  // Unit definitions:
  unit micron = 1e-6 metre;
  unit volume = (1e-6 metre)^3;
  unit milliV = 1e-3 volt;
  unit millijoule_per_mole_kelvin = 1e-3 joule / (mole * kelvin);
  unit area = (1e-6 metre)^2;
  unit capacitance = 1e-12 farad / (1e-6 metre)^2;
  unit current = 1e-21 ampere;
  unit coulomb_per_mole = ampere * second / mole;
  unit conductance = 1e-18 siemens;
  unit conductancepervolume = 1e-18 siemens / (1e-6 metre)^3;
  unit conductancesec2permicroM2volume = 1e-18 siemens * second^2 * litre^2 / ((1e-6 metre)^3 * (1e-6 mole)^2);
  unit mM = 1e-3 mole / litre;
  unit mMvolume = 1e-3 mole * (1e-6 metre)^3 / litre;
  unit mMvolumepersec = 1e-3 mole * (1e-6 metre)^3 / (litre * second);
  unit microMvolumepersec = 1e-6 mole * (1e-6 metre)^3 / (litre * second);
  unit microMpervolumesec = 1e-6 mole / (litre * (1e-6 metre)^3 * second);
  unit microM2persec = (1e-6 mole)^2 / (litre^2 * second);
  unit microM = 1e-6 mole / litre;
  unit per_microM = litre / (1e-6 mole);
  unit microMpersec = 1e-6 mole / (litre * second);
  unit microMVolume = 1e-6 mole * (1e-6 metre)^3 / litre;
  unit Volumepersec = (1e-6 metre)^3 / second;
  unit mmol = 1e-3 mole;
  unit per_mmol = 1 / (1e-3 mole);
  unit per_sec = 1 / second;
  unit per_secmicroM = litre / (second * 1e-6 mole);
  unit micromolar = 1e-6 mole / litre;
  unit flux = 1e-6 mole / (litre * second);
  unit first_order_rate_constant = 1 / second;
  unit second_order_rate_constant = litre / (1e-6 mole * second);
end
