// SBML level 2 version 4

model Wolf2000_AnaerobicGlycolysis()
  // This a model from the article:
  // Effect of cellular interaction on glycolytic oscillations in yeast: a theoretical investigation.
  // Wolf J, Heinrich R. Biochem J 2000 Jan 15;345 Pt 2:321-34 10702114 ,
  // Abstract:
  // On the basis of a detailed model of yeast glycolysis, the effect of intercellular dynamics is analysed theoretically. The model includes the main steps of anaerobic glycolysis, and the production of ethanol and glycerol. Transmembrane diffusion of acetaldehyde is included, since it has been hypothesized that this substance mediates the interaction. Depending on the kinetic parameter, the single-cell model shows both stationary and oscillatory behaviour. This agrees with experimental data with respect to metabolite concentrations and phase shifts. The inclusion of intercellular coupling leads to a variety of dynamical modes, such as synchronous oscillations, and different kinds of asynchronous behavior. These oscillations can co-exist, leading to bi- and tri-rhythmicity. The corresponding parameter regions have been identified by a bifurcation analysis. The oscillatory dynamics of synchronized cell populations are investigated by calculating the phase responses to acetaldehyde pulses. Simulations are performed with respect to the synchronization of two subpopulations that are oscillating out of phase before mixing. The effect of the various process on synchronization is characterized quantitatively. While continuous exchange of acetaldehyde might synchronize the oscillations for appropriate sets of parameter values, the calculated synchronization time is longer than that observed experimentally. It is concluded either that addition to the transmembrane exchange of acetaldehyde, other processes may contribute to intercellular coupling, or that intracellular regulator feedback plays a role in the acceleration of the synchronization. for appropriate sets of parameter values, the calculated synchronization time is longer than that observed experimentally. It is concluded either that addition to the transmembrane exchange of acetaldehyde, other processes may contribute to intercellular coupling, or that intracellular regulator feedback plays a role in the acceleration of the synchronization.
  // This model was taken from the CellML repository and automatically converted to SBML.
  // The original model was: Wolf J, Heinrich R. (2000) - version=1.0
  // The original CellML model was created by:
  // Catherine Lloyd
  // c.lloyd@auckland.ac.nz
  // The University of Auckland
  // This model originates from BioModels Database: A Database of Annotated Published Models (http://www.ebi.ac.uk/biomodels/). It is copyright (c) 2005-2011 The BioModels.net Team.
  // To the extent possible under law, all copyright and related or neighbouring rights to this encoded model have been dedicated to the public domain worldwide. Please refer to CC0 Public Domain Dedication for more information.
  // In summary, you are entitled to use this encoded model in absolutely any manner you deem suitable, verbatim, or with modification, alone or embedded it in a larger context, redistribute it, commercially or not, in a restricted way or not..
  // To cite BioModels Database, please use: Li C, Donizelli M, Rodriguez N, Dharuri H, Endler L, Chelliah V, Li L, He E, Henry A, Stefan MI, Snoep JL, Hucka M, Le Novère N, Laibe C (2010) BioModels Database: An enhanced, curated and annotated resource for published quantitative kinetic models. BMC Syst Biol., 4:92.
  // biomodels.db:MODEL1006230022
  // isDescribedBy pubmed:10702114
  // biomodels.db:MODEL1006230022
  // isDescribedBy pubmed:10702114
  // biomodels.db:MODEL1006230022
  // biomodels.db:MODEL1006230022

  // Compartments:
  compartment COMpartment = 1 litre;

  // Parameters:
  S1 = 5.8;
  S2 = 0.9;
  S3 = 0.2;
  S4 = 0.2;
  S4_ex = 0.1;
  phi = 0.1;
  A3 = 2.4;
  A = 4;
  N2 = 0.1;
  N = 1;
  K_I = 0.52;
  k_1 = 100;
  q = 4;
  k_2 = 6;
  k_3 = 16;
  k_4 = 100;
  k_5 = 1.28;
  k_6 = 12;
  k = 1.3;
  Jo = 3;
  kappa = 13;

  // Assignment rules:
  A2 := A - A3;
  N1 := N - N2;
  v1 := k_1*S1*A3*f_A3;
  f_A3 := (1 + (A3/K_I)^q)^(-1);
  v2 := k_2*S2*N1;
  v3 := k_3*S3*A2;
  v4 := k_4*S4*N2;
  v5 := k_5*A3;
  v6 := k_6*S2*N2;
  v7 := k*S4_ex;
  J := kappa*(S4 - S4_ex);

  // Rate rules:
  S1' = Jo - v1;
  S2' = 2*v1 - (v2 + v6);
  S3' = v2 - v3;
  S4' = v3 - (v4 + J);
  S4_ex' = phi*J - v7;
  A3' = 2*v3 - (2*v1 + v5);
  N2' = v2 - (v4 + v6);

  // Unit definitions:
  unit minute = 60 second;
  unit millimolar = 1e-3 mole / litre;
  unit flux = 1e-3 mole / (litre * 60 second);
  unit first_order_rate_constant = 1 / (60 second);
  unit second_order_rate_constant = litre / (1e-3 mole * 60 second);
  unit time = 60 second;
end
