// SBML level 2 version 4

model Koivumaki2009_SERCAATPase_Standalone()
  // This a model from the article:
  // Modelling sarcoplasmic reticulum calcium ATPase and its regulation in cardiac myocytes.
  // Koivumaki JT, Takalo J, Korhonen T, Tavi P, Weckstrom M. Philos Transact A Math Phys Eng Sci 2009 Jun 13;367(1896):2181-202 19414452 ,
  // Abstract:
  // When developing large-scale mathematical models of physiology, some reduction in complexity is necessarily required to maintain computational efficiency. A prime example of such an intricate cell is the cardiac myocyte. For the predictive power of the cardiomyocyte models, it is vital to accurately describe the calcium transport mechanisms, since they essentially link the electrical activation to contractility. The removal of calcium from the cytoplasm takes place mainly by the Na(+)/Ca(2+) exchanger, and the sarcoplasmic reticulum Ca(2+) ATPase (SERCA). In the present study, we review the properties of SERCA, its frequency-dependent and beta-adrenergic regulation, and the approaches of mathematical modelling that have been used to investigate its function. Furthermore, we present novel theoretical considerations that might prove useful for the elucidation of the role of SERCA in cardiac function, achieving a reduction in model complexity, but at the same time retaining the central aspects of its function. Our results indicate that to faithfully predict the physiological properties of SERCA, we should take into account the calcium-buffering effect and reversible function of the pump. This 'uncomplicated' modelling approach could be useful to other similar transport mechanisms as well.
  // This model was taken from the CellML repository and automatically converted to SBML.
  // The original model was: Koivumaki JT, Takalo J, Korhonen T, Tavi P, Weckstrom M. (2009) - version=1.0
  // The original CellML model was created by:
  // Geoffrey Nunns
  // gnunns1@jhu.edu
  // The University of Auckland
  // This model originates from BioModels Database: A Database of Annotated Published Models (http://www.ebi.ac.uk/biomodels/). It is copyright (c) 2005-2011 The BioModels.net Team.
  // To the extent possible under law, all copyright and related or neighbouring rights to this encoded model have been dedicated to the public domain worldwide. Please refer to CC0 Public Domain Dedication for more information.
  // In summary, you are entitled to use this encoded model in absolutely any manner you deem suitable, verbatim, or with modification, alone or embedded it in a larger context, redistribute it, commercially or not, in a restricted way or not..
  // To cite BioModels Database, please use: Li C, Donizelli M, Rodriguez N, Dharuri H, Endler L, Chelliah V, Li L, He E, Henry A, Stefan MI, Snoep JL, Hucka M, Le Novère N, Laibe C (2010) BioModels Database: An enhanced, curated and annotated resource for published quantitative kinetic models. BMC Syst Biol., 4:92.
  // biomodels.db:MODEL1006230023
  // isDescribedBy pubmed:19414452
  // biomodels.db:MODEL1006230023
  // isDescribedBy pubmed:19414452
  // biomodels.db:MODEL1006230023
  // biomodels.db:MODEL1006230023

  // Compartments:
  compartment COMpartment = 1 litre;

  // Parameters:
  Ca_cyt = 0.25;
  Ca_NSR = 760;
  CaMKII_reg = 0;
  SERCA_TOT = 47;
  PSR = 1;
  Kmf_PLBKO = 0.15;
  Kmf_PLB = 0.15;
  Kmr_PLBKO = 2500;
  Kmr_PLB = 1110;
  br_serca_sr = 0.00625;
  Ca_serca = 12;

  // Assignment rules:
  EC_50_fwd := (Kmf_PLBKO + Kmf_PLB*PSR)*(1 + 0.27*CaMKII_reg);
  EC_50_rev := Kmr_PLBKO - Kmr_PLB*PSR;
  br_cyt_serca := 1000*br_serca_sr;
  k_cyt_serca := br_cyt_serca*(1 + 0.7*CaMKII_reg);
  k_serca_cyt := EC_50_fwd^2*br_cyt_serca;
  k_serca_sr := br_serca_sr*(1 + 0.7*CaMKII_reg);
  k_sr_serca := br_serca_sr/EC_50_rev^2;
  J_cyt_serca := k_cyt_serca*Ca_cyt^2*(SERCA_TOT - Ca_serca) - k_serca_cyt*Ca_serca;
  J_serca_sr := k_serca_sr*Ca_serca - k_sr_serca*Ca_NSR^2*(SERCA_TOT - Ca_serca);

  // Rate rules:
  Ca_serca' = J_cyt_serca - J_serca_sr;

  // Unit definitions:
  unit uM = 1e-6 mole / litre;
  unit per_uM2 = litre^2 / (1e-6 mole)^2;
  unit msec = 1e-3 second;
  unit per_msec = 1 / (1e-3 second);
  unit uM_per_msec = 1e-6 mole / (litre * 1e-3 second);
  unit per_msec_per_uM2 = litre^2 / (1e-3 second * (1e-6 mole)^2);
  unit time = 1e-3 second;
end
