// SBML level 2 version 4

model Bertram2002_Gprotein_SynapticSignal()
  // This a model from the article:
  // Role for G protein Gbetagamma isoform specificity in synaptic signal processing: a computational study.
  // Bertram R, Arnot MI, Zamponi GW. J Neurophysiol 2002 May;87(5):2612-23 11976397 ,
  // Abstract:
  // Computational modeling is used to investigate the functional impact of G protein-mediated presynaptic autoinhibition on synaptic filtering properties. It is demonstrated that this form of autoinhibition, which is relieved by depolarization, acts as a high-pass filter. This contrasts with vesicle depletion, which acts as a low-pass filter. Model parameters are adjusted to reproduce kinetic slowing data from different Gbetagamma dimeric isoforms, which produce different degrees of slowing. With these sets of parameter values, we demonstrate that the range of frequencies filtered out by the autoinhibition varies greatly depending on the Gbetagamma isoform activated by the autoreceptors. It is shown that G protein autoinhibition can enhance the spatial contrast between a spatially distributed high-frequency signal and surrounding low-frequency noise, providing an alternate mechanism to lateral inhibition. It is also shown that autoinhibition can increase the fidelity of coincidence detection by increasing the signal-to-noise ratio in the postsynaptic cell. The filter cut, the input frequency below which signals are filtered, depends on several biophysical parameters in addition to those related to Gbetagamma binding and unbinding. By varying one such parameter, the rate at which transmitter unbinds from autoreceptors, we show that the filter cut can be adjusted up or down for several of the Gbetagamma isoforms. This allows for great synapse-to-synapse variability in the distinction between signal and noise.
  // This model was taken from the CellML repository and automatically converted to SBML.
  // The original model was: Bertram R, Arnot MI, Zamponi GW. (2002) - version=1.0
  // The original CellML model was created by:
  // Catherine Lloyd
  // c.lloyd@auckland.ac.nz
  // The University of Auckland
  // This model originates from BioModels Database: A Database of Annotated Published Models (http://www.ebi.ac.uk/biomodels/). It is copyright (c) 2005-2011 The BioModels.net Team.
  // To the extent possible under law, all copyright and related or neighbouring rights to this encoded model have been dedicated to the public domain worldwide. Please refer to CC0 Public Domain Dedication for more information.
  // In summary, you are entitled to use this encoded model in absolutely any manner you deem suitable, verbatim, or with modification, alone or embedded it in a larger context, redistribute it, commercially or not, in a restricted way or not..
  // To cite BioModels Database, please use: Li C, Donizelli M, Rodriguez N, Dharuri H, Endler L, Chelliah V, Li L, He E, Henry A, Stefan MI, Snoep JL, Hucka M, Le Novère N, Laibe C (2010) BioModels Database: An enhanced, curated and annotated resource for published quantitative kinetic models. BMC Syst Biol., 4:92.
  // biomodels.db:MODEL1006230024
  // isDescribedBy pubmed:11976397
  // biomodels.db:MODEL1006230024
  // isDescribedBy pubmed:11976397
  // biomodels.db:MODEL1006230024
  // biomodels.db:MODEL1006230024

  // Compartments:
  compartment COMpartment = 1 litre;

  // Parameters:
  R_gas_const = 8314.41;
  Temp = 310;
  F = 96485;
  V = -65;
  Cm = 1;
  IstimStart = 10;
  IstimEnd = 50000;
  IstimAmplitude = 40;
  IstimPeriod = 100;
  IstimPulseDuration = 1;
  n = 0;
  T_bar = 4000;
  R = 0;
  kr_plus = 0.15;
  kr_minus = 2.5;
  Ca_ex = 2000;
  Dc = 220;
  r = 10;
  g_Ca = 1.2;
  P = 0.006;
  kG_minus = 0.00025;
  kG2_minus = 0.016;
  kG3_minus = 1.024;
  a = 0;
  ka_plus = 200;
  ka_minus = 0.0015;
  C1 = 1;
  C2 = 0;
  C3 = 0;
  C4 = 0;
  C_G1 = 0;
  C_G2 = 0;
  C_G3 = 0;

  // Assignment rules:
  i_app := piecewise(IstimAmplitude, (time >= IstimStart) && (time <= IstimEnd) && (time - IstimStart - floor((time - IstimStart)/IstimPeriod)*IstimPeriod <= IstimPulseDuration), 0);
  i_Na := 120*x_infinity^3*(1 - n)*(V - 120);
  x_infinity := alpha_x/(alpha_x + beta_x);
  alpha_x := 0.2*(V + 40)/(1 - 1*exp(-(V + 40)/10));
  beta_x := 8*exp(1/(-(V + 65/18)));
  i_K := 36*n^4*(V + 77)/1;
  alpha_n := 0.02*(V + 55)/(1 - exp(-(V + 55)/10));
  beta_n := 0.25*exp(-(V + 65)/80);
  i_leak := 0.3*(V + 54);
  T := T_bar*R;
  Ca_open := sigma/(2*Dc*r*pi);
  sigma := -5.182*i_V;
  i_V := g_Ca*P*2*F*V/(R_gas_const*Temp)*Ca_ex/(1 - exp(2*F*V/(R_gas_const*Temp)));
  Ca := O*Ca_open + 0.1;
  alpha := 0.45*exp(V/22);
  alpha_ := alpha/8;
  beta := 0.015*exp(-V/14);
  beta_ := beta*8;
  kG_plus := 3*a/(680 + 320*a);
  O := 1 - C1 - C2 - C3 - C4 - C_G1 - C_G2 - C_G3;
  C_G := C_G1 + C_G2 + C_G3;

  // Rate rules:
  V' = -(i_Na + i_K + i_leak - i_app)/Cm;
  n' = alpha_n*(1 - n) - beta_n*n;
  R' = kr_plus*Ca*(1 - R) - kr_minus*R;
  a' = ka_plus*T*(1 - a) - ka_minus*a;
  C1' = beta*C2 + kG_minus*C_G1 - C1*(4*alpha + kG_plus);
  C2' = 4*alpha*C1 + 2*beta*C3 + kG2_minus*C_G2 - C2*(beta + 3*alpha + kG_plus);
  C3' = 3*alpha*C2 + 3*beta*C4 + kG3_minus*C_G3 - C3*(2*beta + 2*alpha + kG_plus);
  C4' = 2*alpha*C3 + 4*beta*O - C4*(3*beta + alpha);
  C_G1' = beta_*C_G2 + kG_plus*C1 - C_G1*(4*alpha_ + kG_minus);
  C_G2' = 4*alpha_*C_G1 + 2*beta_*C_G3 + kG_plus*C2 - C_G2*(beta_ + 3*alpha_ + kG2_minus);
  C_G3' = 3*alpha_*C_G2 + kG_plus*C3 - C_G3*(2*beta_ + kG3_minus);

  // Unit definitions:
  unit s = second;
  unit ms = 1e-3 second;
  unit uM = 1e-6 mole / litre;
  unit uA = 1e-6 ampere;
  unit pS = 1e-12 siemens;
  unit mV = 1e-3 volt;
  unit cm2 = (0.01 metre)^2;
  unit per_cm2 = 1 / (0.01 metre)^2;
  unit per_ms = 1 / (1e-3 second);
  unit uM_per_ms = 1e-6 mole / (litre * 1e-3 second);
  unit per_uM_per_ms = litre / (1e-6 mole * 1e-3 second);
  unit per_mV_per_ms = 1 / (1e-3 volt * 1e-3 second);
  unit uM2_per_ms = (1e-6 mole)^2 / (litre^2 * 1e-3 second);
  unit mV_per_uM = 1e-3 volt * litre / (1e-6 mole);
  unit uF_per_cm2 = 1e-6 farad / (0.01 metre)^2;
  unit uA_per_cm2 = 1e-6 ampere / (0.01 metre)^2;
  unit pS_per_cm2 = 1e-12 siemens / (0.01 metre)^2;
  unit mS_per_cm2 = 1e-3 siemens / (0.01 metre)^2;
  unit nm = 1e-9 metre;
  unit uM2_nm = (1e-6 mole)^2 * 1e-9 metre / litre^2;
  unit uM_per_cm2 = 1e-6 mole / (litre * (0.01 metre)^2);
  unit millijoule_per_mole_kelvin = 1e-3 joule / (mole * kelvin);
  unit coulomb_per_mole = coulomb / mole;
  unit uM_per_coulomb = 1e-6 mole / (litre * coulomb);
  unit um2_per_second = (1e-6 metre)^2 / second;
  unit per_um3 = 1 / (1e-6 metre)^3;
  unit time = 1e-3 second;
end
