// SBML level 2 version 4

model Bagci2008_NO_Apoptosis_modelB()
  // This a model from the article:
  // Computational insights on the competing effects of nitric oxide in regulating apoptosis.
  // Bagci EZ, Vodovotz Y, Billiar TR, Ermentrout B, Bahar I. PLoS One 2008 May 28;3(5):e2249 18509469 ,
  // Abstract:
  // Despite the establishment of the important role of nitric oxide (NO) on apoptosis, a molecular-level understanding of the origin of its dichotomous pro- and anti-apoptotic effects has been elusive. We propose a new mathematical model for simulating the effects of nitric oxide (NO) on apoptosis. The new model integrates mitochondria-dependent apoptotic pathways with NO-related reactions, to gain insights into the regulatory effect of the reactive NO species N(2)O(3), non-heme iron nitrosyl species (FeL(n)NO), and peroxynitrite (ONOO(-)). The biochemical pathways of apoptosis coupled with NO-related reactions are described by ordinary differential equations using mass-action kinetics. In the absence of NO, the model predicts either cell survival or apoptosis (a bistable behavior) with shifts in the onset time of apoptotic response depending on the strength of extracellular stimuli. Computations demonstrate that the relative concentrations of anti- and pro-apoptotic reactive NO species, and their interplay with glutathione, determine the net anti- or pro-apoptotic effects at long time points. Interestingly, transient effects on apoptosis are also observed in these simulations, the duration of which may reach up to hours, despite the eventual convergence to an anti-apoptotic state. Our computations point to the importance of precise timing of NO production and external stimulation in determining the eventual pro- or anti-apoptotic role of NO.
  // This model was taken from the CellML repository and automatically converted to SBML.
  // The original model was: Bagci EZ, Vodovotz Y, Billiar TR, Ermentrout B, Bahar I. (2008) - version=1.0
  // The original CellML model was created by:
  // Wendy Kang
  // wkan014@aucklanduni.ac.nz
  // The University of Auckland
  // This model originates from BioModels Database: A Database of Annotated Published Models (http://www.ebi.ac.uk/biomodels/). It is copyright (c) 2005-2011 The BioModels.net Team.
  // To the extent possible under law, all copyright and related or neighbouring rights to this encoded model have been dedicated to the public domain worldwide. Please refer to CC0 Public Domain Dedication for more information.
  // In summary, you are entitled to use this encoded model in absolutely any manner you deem suitable, verbatim, or with modification, alone or embedded it in a larger context, redistribute it, commercially or not, in a restricted way or not..
  // To cite BioModels Database, please use: Li C, Donizelli M, Rodriguez N, Dharuri H, Endler L, Chelliah V, Li L, He E, Henry A, Stefan MI, Snoep JL, Hucka M, Le Novère N, Laibe C (2010) BioModels Database: An enhanced, curated and annotated resource for published quantitative kinetic models. BMC Syst Biol., 4:92.
  // biomodels.db:MODEL1006230026
  // isDescribedBy pubmed:18509469
  // biomodels.db:MODEL1006230026
  // isDescribedBy pubmed:18509469
  // biomodels.db:MODEL1006230026
  // biomodels.db:MODEL1006230026

  // Compartments:
  compartment COMpartment = 1 litre;

  // Parameters:
  Casp8 = 0;
  Casp8Bid = 0;
  Apaf_1 = 0.004;
  CytcApaf_1 = 0;
  Cytc = 0;
  Cytc_mito = 0.004;
  Bax_2 = 0;
  tBid_mito = 0;
  tBid = 0;
  tBidBax = 0;
  Bax = 0.004;
  Bcl_2 = 0.004;
  Casp3Bcl_2 = 0;
  Casp3Bid = 0;
  Bid = 0.004;
  Casp3 = 0;
  Casp3IAP = 0;
  Apop = 0;
  Pro9 = 0.004;
  ApopPro9 = 0;
  ApopPro9_2 = 0;
  ApopCasp9_2Pro3 = 0;
  Casp9Pro3 = 0;
  Pro3 = 0.004;
  IAP = 0.004;
  Casp9IAP = 0;
  ApopCasp9IAP = 0;
  ApopCasp9_2IAP = 0;
  ApopCasp9 = 0;
  Casp9 = 0;
  ApopCasp9_2 = 0;
  NO = 0;
  O_2 = 35;
  NO_2 = 0;
  CcOX = 0.1;
  O_2m = 35;
  SOD = 10;
  ONOO_m = 0;
  GPX = 5.8;
  CO_2 = 1000;
  Cyt_c = 400;
  GSH = 10000;
  GSNO = 0;
  N2O3 = 0;
  FeLn = 0.05;
  FeLnNO = 0;
  PTPC = 0;
  k_10 = 10;
  k_f0 = 0.1;
  k_01 = 0.5;
  k_01b = 0.5;
  k_02 = 0.5;
  k_03 = 0.5;
  k_14 = 5;
  k_14b = 5;
  k_15 = 5;
  k_15b = 5;
  k_15c = 5;
  k_16 = 10;
  k_f6 = 0.001;
  k_06b = 0.5;
  k_17 = 5;
  k_18 = 10;
  k_f8 = 0.1;
  k_09 = 0.5;
  k11 = 10;
  k12b = 10;
  k14 = 10;
  k_00 = 0.5;
  k_11 = 5;
  k_11b = 50000;
  k_12 = 10;
  k_13 = 10;
  k_f3 = 0.1;
  k_04 = 0.5;
  k_04b = 0.5;
  k_05 = 0.0035;
  k_05b = 0.0035;
  k_05c = 0.0035;
  k_06 = 0.5;
  k_16b = 10;
  k_f6b = 0.1;
  k_07 = 0.0035;
  k_08 = 0.5;
  k_19 = 10;
  k_f9 = 0.1;
  k12a = 10;
  k13 = 10;
  p53_thresh = 0.004;
  u = 0.006;
  u_Bax = 0.006;
  u_Bcl_2 = 0.006;
  P_Apaf_1 = 0.0003;
  P_IAP = 3e-5;
  P_Pro3 = 0.0003;
  P_Pro9 = 0.0003;
  P_Bid = 3e-5;
  P_oBcl_2 = 8e-5;
  P_oBax = 3e-5;
  P_Cytc_mito = 0.0003;
  p53 = 0.0066;
  k_1NO = 1;
  k_2NO = 0.1;
  k_4NO = 6700;
  k_5NO = 2400;
  k_6NO = 0.00135;
  k_7NO = 2;
  k_8NO = 0.058;
  k_9NO = 0.025;
  k_10NO = 0.0006;
  k_11NO = 66;
  k_12aNO = 6e-6;
  k_12bNOm = 81000;
  k_12bNOp = 1100;
  k_13NO = 1600;
  v_m = 320;
  k_m = 50;
  k_14NO = 0.0002;
  k_15NO = 100;
  k_16NO = 1.21;
  k_17NO = 66;
  k_17bNO = 0.0002;
  FeLn_0 = 0.05;
  GSH_0 = 10000;
  k_18NO = 1;
  k_19NO = 10;
  k_20NO = 66;
  k_21NO = 66;
  k_22NO = 66;
  k_1 = 1;
  PTPC_0 = 0;
  p = 4;

  // Assignment rules:
  J_f0 := k_f0*Casp8Bid;
  J_Casp8 := -u*Casp8;
  J_0 := k_10*Casp8*Bid - k_00*Casp8Bid;
  r_20NO := k_20NO*FeLnNO*Casp8;
  J_Apaf_1 := P_Apaf_1 - u*Apaf_1;
  J_1 := k_11*Cytc*Apaf_1 - k_01*CytcApaf_1;
  J_1b := k_11b*CytcApaf_1^p - k_01b*Apop;
  J_Cytc := -u*Cytc;
  PTPC_act := PTPC_0 - PTPC;
  J_Cytc_mito := P_Cytc_mito - u*Cytc_mito;
  J_14 := k14*Bax_2*Cytc_mito;
  J_Bax_2 := -u*Bax_2;
  J_tBid_mito := -u*tBid_mito;
  J_12a := k12a*tBid_mito*Bax;
  J_11 := k11*tBid;
  J_tBid := -u*tBid;
  J_tBidBax := -u*tBidBax;
  J_12b := k12b*tBidBax*Bax;
  P_Bax := P_oBax*(1 + p53^4/(p53^4 + p53_thresh^4));
  J_Bax := P_Bax - u_Bax*Bax;
  J_13 := k13*Bcl_2*Bax;
  P_Bcl_2 := P_oBcl_2*p53_thresh^4/(p53^4 + p53_thresh^4);
  J_9 := k_19*Casp3*Bcl_2 - k_09*Casp3Bcl_2;
  J_Bcl_2 := P_Bcl_2 - u_Bcl_2*Bcl_2;
  J_f9 := k_f9*Casp3Bcl_2;
  J_8 := k_18*Casp3*Bid - k_08*Casp3Bid;
  J_f8 := k_f8*Casp3Bid;
  J_Bid := P_Bid - u*Bid;
  J_Casp3 := -u*Casp3;
  J_7 := k_17*Casp3*IAP - k_07*Casp3IAP;
  J_Pro9 := P_Pro9 - u*Pro9;
  J_2 := k_12*Apop*Pro9 - k_02*ApopPro9;
  J_3 := k_13*ApopPro9*Pro9 - k_03*ApopPro9_2;
  J_f3 := k_f3*ApopPro9_2;
  J_6b := k_16b*ApopCasp9_2*Pro3 - k_06b*ApopCasp9_2Pro3;
  J_f6b := k_f6b*ApopCasp9_2Pro3;
  J_f6 := k_f6*Casp9Pro3;
  J_6 := k_16*Casp9*Pro3 - k_06*Casp9Pro3;
  J_Pro3 := P_Pro3 - u*Pro3;
  J_5 := k_15*Casp9*IAP - k_05*Casp9IAP;
  J_5b := k_15b*ApopCasp9*IAP - k_05b*ApopCasp9IAP;
  J_5c := k_15c*ApopCasp9_2*IAP - k_05c*ApopCasp9_2IAP;
  J_IAP := P_IAP - u*IAP;
  J_4 := k_14*ApopCasp9_2 - k_04*ApopCasp9*Casp9;
  J_4b := k_14b*ApopCasp9 - k_04b*Apop*Casp9;
  J_Casp9 := -u*Casp9;
  r_1NO := k_1NO;
  r_4NO := k_4NO*NO*O_2m;
  r_12aNO := k_12aNO*NO^2*O_2;
  r_12bNOp := k_12bNOp*NO_2*NO;
  r_12bNOm := k_12bNOm*N2O3;
  r_14NO := k_14NO*GSNO;
  r_15NO := k_15NO*CcOX*NO;
  r_16NO := k_16NO*FeLn*NO;
  r_2NO := k_2NO;
  r_5NO := k_5NO*SOD*O_2m;
  r_10NO := k_10NO*GSNO^2*O_2m;
  r_6NO := k_6NO*ONOO_m*GSH;
  r_7NO := k_7NO*ONOO_m*GPX;
  r_8NO := k_8NO*ONOO_m*CO_2;
  r_9NO := k_9NO*ONOO_m*Cyt_c;
  r_18NO := k_18NO*ONOO_m*PTPC;
  GSSG := (GSH_0 - GSH - GSNO)/2;
  r_11NO := k_11NO*N2O3*GSH;
  r_m := v_m*GSSG/(k_m + GSSG);
  r_17NO := k_17NO*FeLnNO*GSH;
  r_13NO := k_13NO*N2O3;
  r_21NO := k_21NO*FeLnNO*Casp9;
  r_22NO := k_22NO*FeLnNO*Casp3;
  r_19NO := k_19NO*N2O3*Casp8;

  // Rate rules:
  Casp8' = -J_0 + J_f0 + J_Casp8 - r_19NO - r_20NO;
  Casp8Bid' = J_0 - J_f0;
  Apaf_1' = -J_1 + J_Apaf_1;
  CytcApaf_1' = J_1 - 7*J_1b;
  Cytc' = J_14 - J_1 + J_Cytc + k_1*PTPC_act*Cytc_mito;
  Cytc_mito' = -J_14 + J_Cytc_mito;
  Bax_2' = J_12b + J_Bax_2;
  tBid_mito' = J_11 - J_12a + J_tBid_mito;
  tBid' = J_f0 + J_f8 - J_11 + J_12b + J_tBid;
  tBidBax' = J_12a - J_12b + J_tBidBax;
  Bax' = -J_12a - J_12b - J_13 + J_Bax;
  Bcl_2' = -J_9 - J_13 + J_Bcl_2;
  Casp3Bcl_2' = J_9 - J_f9;
  Casp3Bid' = J_8 - J_f8;
  Bid' = -J_0 - J_8 + J_Bid;
  Casp3IAP' = J_7;
  Casp3' = J_f6 + J_f6b - J_7 - J_8 + J_f8 - J_9 + J_f9 + J_Casp3 - r_22NO;
  Apop' = J_1b - J_2 + J_4b;
  Pro9' = -J_2 - J_3 + J_Pro9;
  ApopPro9' = J_2 - J_3;
  ApopPro9_2' = J_3 - J_f3;
  ApopCasp9_2Pro3' = J_6b - J_f6b;
  Casp9Pro3' = J_6 - J_f6;
  Pro3' = -J_6 - J_6b + J_Pro3;
  Casp9IAP' = J_5;
  ApopCasp9IAP' = J_5b;
  ApopCasp9_2IAP' = J_5c;
  IAP' = -J_5 - J_5b - J_5c - J_7 + J_IAP;
  ApopCasp9' = J_4 - J_4b - J_5b;
  Casp9' = J_4 + J_4b - J_5 - J_6 + J_f6 + J_Casp9 - r_21NO;
  ApopCasp9_2' = J_f3 - J_4 - J_5c - J_6b + J_f6b;
  NO' = r_1NO - r_4NO - 2*r_12aNO - r_12bNOp + r_12bNOm + r_14NO - r_15NO - r_16NO;
  CcOX' = -r_15NO;
  NO_2' = 2*r_12aNO - r_12bNOp + r_12bNOm;
  O_2m' = r_2NO - r_4NO - r_5NO - r_10NO;
  ONOO_m' = r_4NO - r_6NO - r_7NO - r_8NO - r_9NO - r_18NO;
  GSH' = -r_6NO - r_11NO + 2*r_m - r_17NO;
  GSNO' = r_6NO - 2*r_10NO + r_11NO - r_14NO + r_17NO;
  N2O3' = -r_11NO + r_12bNOp - r_12bNOm - r_13NO - r_19NO;
  FeLn' = -r_16NO + r_17NO + r_20NO + r_21NO + r_22NO;
  FeLnNO' = r_16NO - r_17NO - r_20NO - r_21NO - r_22NO;
  PTPC' = -r_19NO;

  // Unit definitions:
  unit micromolar = 1e-6 mole / litre;
  unit first_order_rate_constant = 1 / second;
  unit second_order_rate_constant = litre / (second * 1e-6 mole);
  unit flux = 1e-6 mole / (litre * second);
  unit rate = litre^3 / ((1e-6 mole)^3 * second);
  unit rate2 = litre^2 / ((1e-6 mole)^2 * second);
end
