// SBML level 2 version 4

model vanBeek2007_OxPhos_HeartMuscleCells()
  // This a model from the article:
  // Adenine nucleotide-creatine-phosphate module in myocardial metabolic system explains fast phase of dynamic regulation of oxidative phosphorylation.
  // van Beek JH. Am J Physiol Cell Physiol 2007 Sep;293(3):C815-29 17581855 ,
  // Abstract:
  // Computational models of a large metabolic system can be assembled from modules that represent a biological function emerging from interaction of a small subset of molecules. A "skeleton model" is tested here for a module that regulates the first phase of dynamic adaptation of oxidative phosphorylation (OxPhos) to demand in heart muscle cells. The model contains only diffusion, mitochondrial outer membrane (MOM) permeation, and two isoforms of creatine kinase (CK), in cytosol and mitochondrial intermembrane space (IMS), respectively. The communication with two neighboring modules occurs via stimulation of mitochondrial ATP production by ADP and P(i) from the IMS and via time-varying cytosolic ATP hydrolysis during contraction. Assuming normal cytosolic diffusion and high MOM permeability for ADP, the response time of OxPhos (t(mito); generalized time constant) to steps in cardiac pacing rate is predicted to be 2.4 s. In contrast, with low MOM permeability, t(mito) is predicted to be 15 s. An optimized MOM permeability of 21 mum/s gives t(mito) = 3.7 s, in agreement with experiments on rabbit heart with blocked glycolytic ATP synthesis. The model correctly predicts a lower t(mito) if CK activity is reduced by 98%. Among others, the following predictions result from the model analysis: 1) CK activity buffers large ADP oscillations; 2) ATP production is pulsatile in beating heart, although it adapts slowly to demand with "time constant" approximately 14 heartbeats; 3) if the muscle isoform of CK is overexpressed, OxPhos reacts slower to changing workload; and 4) if mitochondrial CK is overexpressed, OxPhos reacts faster.
  // This model was taken from the CellML repository and automatically converted to SBML.
  // The original model was: van Beek JH. (2007) - version=1.0
  // The original CellML model was created by:
  // Catherine Lloyd
  // c.lloyd@auckland.ac.nz
  // The University of Auckland
  // This model originates from BioModels Database: A Database of Annotated Published Models (http://www.ebi.ac.uk/biomodels/). It is copyright (c) 2005-2011 The BioModels.net Team.
  // To the extent possible under law, all copyright and related or neighbouring rights to this encoded model have been dedicated to the public domain worldwide. Please refer to CC0 Public Domain Dedication for more information.
  // In summary, you are entitled to use this encoded model in absolutely any manner you deem suitable, verbatim, or with modification, alone or embedded it in a larger context, redistribute it, commercially or not, in a restricted way or not..
  // To cite BioModels Database, please use: Li C, Donizelli M, Rodriguez N, Dharuri H, Endler L, Chelliah V, Li L, He E, Henry A, Stefan MI, Snoep JL, Hucka M, Le Novère N, Laibe C (2010) BioModels Database: An enhanced, curated and annotated resource for published quantitative kinetic models. BMC Syst Biol., 4:92.
  // biomodels.db:MODEL1006230027
  // isDescribedBy pubmed:17581855
  // biomodels.db:MODEL1006230027
  // isDescribedBy pubmed:17581855
  // biomodels.db:MODEL1006230027
  // biomodels.db:MODEL1006230027

  // Compartments:
  compartment COMpartment = 1 litre;

  // Parameters:
  ATP_cyt = 5912.77;
  ADP_cyt = 64;
  PCr_cyt = 5000;
  Cr_cyt = 10500;
  Pi_cyt = 913;
  ATP_ims = 5912.77;
  ADP_ims = 39;
  PCr_ims = 5000;
  Cr_ims = 10500;
  Pi_ims = 910;
  Kia_J_CKMM = 900;
  Kb_J_CKMM = 15500;
  Kib_J_CKMM = 34900;
  var KIb_J_CKMM;
  var Kc_J_CKMM;
  Kic_J_CKMM = 222.4;
  Kd_J_CKMM = 1670;
  Kid_J_CKMM = 4730;
  Vmax_MM_f = 11440;
  Vmax_MM_b = 48040;
  Kia_J_CKMi = 750;
  Kb_J_CKMi = 5200;
  Kib_J_CKMi = 28800;
  var KIb_J_CKMi;
  var Kc_J_CKMi;
  Kic_J_CKMi = 204.8;
  Kd_J_CKMi = 500;
  Kid_J_CKMi = 1600;
  Vmax_Mi_f = 882;
  Vmax_Mi_b = 3704;
  J_hyd_basis_1 = 486.5;
  J_hyd_basis_2 = 627.6;
  freq_1 = 135;
  freq_2 = 220;
  nb_of_cycles_1 = 5;
  KPi = 800;
  KADP = 25;
  V_max_syn = 15040;
  PS_tot_ATP = 13.3;
  PS_tot_ADP = 13.3;
  PS_tot_PCr = 155;
  PS_tot_Cr = 155;
  PS_tot_Pi = 194;
  V_cyt = 0.75;
  V_ims = 0.0625;

  // Assignment rules:
  J_CKMM := (Vmax_MM_f*(ATP_cyt*Cr_cyt/(Kia_J_CKMM*Kb_J_CKMM)) - Vmax_MM_b*(ADP_cyt*PCr_cyt/(Kic_J_CKMM*Kd_J_CKMM)))/Den_MMCK;
  Den_MMCK := 1 + Cr_cyt/Kib_J_CKMM + PCr_cyt/Kid_J_CKMM + ATP_cyt*(1/Kia_J_CKMM + Cr_cyt/(Kia_J_CKMM*Kb_J_CKMM)) + ADP_cyt*(1/Kic_J_CKMM + PCr_cyt/(Kid_J_CKMM*Kc_J_CKMM) + Cr_cyt/(Kic_J_CKMM*KIb_J_CKMM));
  Kc_J_CKMM := Kic_J_CKMM*Kd_J_CKMM/Kid_J_CKMM;
  KIb_J_CKMM := Kib_J_CKMM;
  J_CKMi := (Vmax_Mi_f*(ATP_ims*Cr_ims/(Kia_J_CKMi*Kb_J_CKMi)) - Vmax_Mi_b*(ADP_ims*PCr_ims/(Kic_J_CKMi*Kd_J_CKMi)))/Den_MiCK;
  Den_MiCK := 1 + Cr_ims/Kib_J_CKMi + PCr_ims/Kid_J_CKMi + ATP_ims*(1/Kia_J_CKMi + Cr_ims/(Kia_J_CKMi*Kb_J_CKMi)) + ADP_ims*(1/Kic_J_CKMi + PCr_ims/(Kid_J_CKMi*Kc_J_CKMi) + Cr_ims/(Kic_J_CKMi*KIb_J_CKMi));
  Kc_J_CKMi := Kic_J_CKMi*Kd_J_CKMi/Kid_J_CKMi;
  KIb_J_CKMi := Kib_J_CKMi;
  t_cycle_1 := 60/freq_1;
  t_cycle_2 := 60/freq_2;
  duration_1 := nb_of_cycles_1*t_cycle_1;
  ltime := piecewise(time - t_cycle_1*floor(time/t_cycle_1), time <= duration_1, time - duration_1 - t_cycle_2*floor((time - duration_1)/t_cycle_2));
  t_cycle := piecewise(t_cycle_1, time <= duration_1, t_cycle_2);
  H_ATPmax := piecewise(6*J_hyd_basis_1, time <= duration_1, 6*J_hyd_basis_2);
  J_hyd := piecewise(H_ATPmax*ltime/t_cycle*6, (ltime >= 0) && (ltime < 1/6*t_cycle), H_ATPmax*(1 - 6*(ltime/t_cycle - 1/6)), (ltime >= 1/6*t_cycle) && (ltime < 1/3*t_cycle), 0, (ltime >= 1/3*t_cycle) && (ltime < t_cycle));
  J_syn := V_max_syn*(ADP_ims*Pi_ims/(KPi*KADP*Den_syn));
  Den_syn := 1 + ADP_ims/KADP + Pi_ims/KPi + ADP_ims*Pi_ims/(KADP*KPi);
  J_diff_ATP := PS_tot_ATP*(ATP_ims - ATP_cyt);
  J_diff_ADP := PS_tot_ADP*(ADP_ims - ADP_cyt);
  J_diff_PCr := PS_tot_PCr*(PCr_ims - PCr_cyt);
  J_diff_Cr := PS_tot_Cr*(Cr_ims - Cr_cyt);
  J_diff_Pi := PS_tot_Pi*(Pi_ims - Pi_cyt);

  // Rate rules:
  ATP_cyt' = (J_diff_ATP - (J_hyd + J_CKMM))/V_cyt;
  ADP_cyt' = (J_diff_ADP + J_hyd + J_CKMM)/V_cyt;
  PCr_cyt' = (J_diff_PCr + J_CKMM)/V_cyt;
  Cr_cyt' = (J_diff_Cr - J_CKMM)/V_cyt;
  Pi_cyt' = (J_diff_Pi + J_hyd)/V_cyt;
  ATP_ims' = (J_syn - (J_diff_ATP + J_CKMi))/V_ims;
  ADP_ims' = (J_CKMi - (J_syn + J_diff_ADP))/V_ims;
  PCr_ims' = (J_CKMi - J_diff_PCr)/V_ims;
  Cr_ims' = -(J_CKMi + J_diff_Cr)/V_ims;
  Pi_ims' = -(J_syn + J_diff_Pi)/V_ims;

  // Unit definitions:
  unit micromolar = 1e-6 mole / litre;
  unit flux = 1e-6 mole / (litre * second);
  unit first_order_rate_constant = 1 / second;
end
