// SBML level 2 version 4

model Iyer2007_Arrhythmia_CardiacDeath()
  // This a model from the article:
  // Mechanisms of abnormal calcium homeostasis in mutations responsible for catecholaminergic polymorphic ventricular tachycardia.
  // Iyer V, Hajjar RJ, Armoundas AA. Circ Res 2007 Feb 2;100(2):e22-31 17234962 ,
  // Abstract:
  // Catecholaminergic polymorphic ventricular tachycardia is a heritable arrhythmia unmasked by exertion or stress and is characterized by triggered activity and sudden cardiac death. In this study, we simulated mutations in 2 genes linked to catecholaminergic polymorphic ventricular tachycardia, the first located in calsequestrin (CSQN2) and the second in the ryanodine receptor (RyR2). The aim of the study was to investigate the mechanistic basis for spontaneous Ca2+ release events that lead to delayed afterdepolarizations in affected patients. Sarcoplasmic reticulum (SR) luminal Ca2+ sensing was incorporated into a model of the human ventricular myocyte, and CSQN2 mutations were modeled by simulating disrupted RyR2 luminal Ca2+ sensing. In voltage-clamp mode, the mutant CSQN2 model recapitulated the smaller calcium transients, smaller time to peak calcium transient, and accelerated recovery from inactivation seen in experiments. In current clamp mode, in the presence of beta stimulation, we observed delayed afterdepolarizations, suggesting that accelerated recovery of RyR2 induced by impaired luminal Ca2+ sensing underlies the triggered activity observed in mutant CSQN2-expressing myocytes. In current-clamp mode, in a model of mutant RyR2 that is characterized by reduced FKBP12.6 binding to the RyR2 on beta stimulation, the impaired coupled gating characteristic of these mutations was modeled by reducing cooperativity of RyR2 activation. In current-clamp mode, the mutant RyR2 model exhibited increased diastolic RyR2 open probability that resulted in formation of delayed afterdepolarizations. In conclusion, these minimal order models of mutant CSQN2 and RyR2 provide plausible mechanisms by which defects in RyR2 gating may lead to the cellular triggers for arrhythmia, with implications for the development of targeted therapy.
  // This model was taken from the CellML repository and automatically converted to SBML.
  // The original model was: Iyer V, Hajjar RJ, Armoundas AA. (2007) - version=1.0
  // The original CellML model was created by:
  // Penny Noble
  // penny.noble@dpag.ox.ac.uk
  // The University of Oxford
  // This model originates from BioModels Database: A Database of Annotated Published Models (http://www.ebi.ac.uk/biomodels/). It is copyright (c) 2005-2011 The BioModels.net Team.
  // To the extent possible under law, all copyright and related or neighbouring rights to this encoded model have been dedicated to the public domain worldwide. Please refer to CC0 Public Domain Dedication for more information.
  // In summary, you are entitled to use this encoded model in absolutely any manner you deem suitable, verbatim, or with modification, alone or embedded it in a larger context, redistribute it, commercially or not, in a restricted way or not. .
  // To cite BioModels Database, please use: Li C, Donizelli M, Rodriguez N, Dharuri H, Endler L, Chelliah V, Li L, He E, Henry A, Stefan MI, Snoep JL, Hucka M, Le Novère N, Laibe C (2010) BioModels Database: An enhanced, curated and annotated resource for published quantitative kinetic models. BMC Syst Biol., 4:92.
  // biomodels.db:MODEL1006230030
  // isDescribedBy pubmed:17234962
  // biomodels.db:MODEL1006230030
  // isDescribedBy pubmed:17234962
  // biomodels.db:MODEL1006230030
  // biomodels.db:MODEL1006230030

  // Compartments:
  compartment COMpartment = 1 litre;

  // Parameters:
  iso = 0;
  CSQN2 = 0;
  RyR2 = 0;
  var a1_COMPUTE_CONCENTRATION_AND_VOLTAGE_DERIVATIVES;
  var a2_COMPUTE_CONCENTRATION_AND_VOLTAGE_DERIVATIVES;
  Faraday = 96.5;
  Temp = 310;
  Rgas = 8.315;
  Acap = 0.0001534;
  Vmyo = 2.584e-5;
  VJSR = 1.6e-7;
  VNSR = 2.1e-6;
  VSS = 1.2e-9;
  Nai = 9.855733;
  Ki = 125.4271;
  Cai = 0.0003639687;
  CaSS = 0.0005066043;
  CaJSR = 0.421937;
  CaNSR = 0.4235516;
  V = -86.72615;
  Ko = 4;
  Nao = 138;
  Cao = 2;
  stim_period = 500;
  stim_duration = 3;
  stim_amplitude = -15;
  stim_offset = 100;
  Kfb = 0.000168;
  Nfb = 1.2;
  Krb = 3.29;
  Nrb = 1;
  KSR = 1.2;
  vmaxf = 7.48e-5;
  vmaxr = 0.000318;
  v1 = 1.8;
  tautr = 0.5747;
  tauxfer = 26.7;
  LTRPNtot = 0.07;
  HTRPNtot = 0.14;
  khtrpn_plus = 20;
  khtrpn_minus = 6.6e-5;
  kltrpn_plus = 40;
  kltrpn_minus = 0.04;
  CMDNtot = 0.05;
  EGTAtot = 0;
  KmCMDN = 0.00238;
  KmCSQN = 0.8;
  KmEGTA = 0.00015;
  LTRPNCa = 0.280466;
  HTRPNCa = 0.9934776;
  kaplus = 0.01215;
  kaminus = 0.576;
  kbplus = 0.00405;
  kbminus = 1.93;
  kcplus = 0.1;
  kcminus = 0.0008;
  ncoop = 4;
  mcoop = 3;
  kryr = 1;
  HmaxC1O1 = 0.5;
  HmaxC2O1 = 0.5;
  Hmin = 5;
  H50C1O1 = 1;
  H50O1C2 = 1;
  HN = 2.5;
  C1_RyR = 0.1320709;
  O2_RyR = 3.113508e-7;
  C2_RyR = 0.866792;
  O1_RyR = 0.001136847;
  fL = 0.3;
  gL = 4;
  bL = 2;
  aL = 2;
  var a1_C0_COMPUTE_DERIVATIVES_OF_LTYPE_CHANNEL_STATES;
  var a2_C0_COMPUTE_DERIVATIVES_OF_LTYPE_CHANNEL_STATES;
  var a1_C1_COMPUTE_DERIVATIVES_OF_LTYPE_CHANNEL_STATES;
  var a2_C1_COMPUTE_DERIVATIVES_OF_LTYPE_CHANNEL_STATES;
  var a1_C2_COMPUTE_DERIVATIVES_OF_LTYPE_CHANNEL_STATES;
  var a2_C2_COMPUTE_DERIVATIVES_OF_LTYPE_CHANNEL_STATES;
  var a1_C3_COMPUTE_DERIVATIVES_OF_LTYPE_CHANNEL_STATES;
  var a2_C3_COMPUTE_DERIVATIVES_OF_LTYPE_CHANNEL_STATES;
  C0 = 0.4656792;
  C1 = 0.008344577;
  C2 = 5.607362e-5;
  C3 = 1.674709e-7;
  C4 = 1.875717e-10;
  CCa0 = 0.4898468;
  CCa1 = 0.03511101;
  CCa2 = 0.0009437459;
  CCa3 = 1.127412e-5;
  CCa4 = 5.050569e-8;
  Open = 1.40806e-11;
  yCa = 0.9954344;
  C0Kv43 = 0.9081891;
  C1Kv43 = 0.03433857;
  C2Kv43 = 0.0004876542;
  C3Kv43 = 3.115507e-6;
  OKv43 = 7.42912e-9;
  CI0Kv43 = 0.0349937;
  CI1Kv43 = 0.01711633;
  CI2Kv43 = 0.004284717;
  CI3Kv43 = 0.0005647242;
  OIKv43 = 2.196034e-5;
  alphaa0Kv43 = 0.543708;
  aaKv43 = 0.028983;
  betaa0Kv43 = 0.080185;
  baKv43 = 0.0468437;
  alphai0Kv43 = 0.0498424;
  aiKv43 = 0.000373016;
  betai0Kv43 = 0.000819482;
  biKv43 = 5.374e-8;
  f1Kv43 = 1.8936;
  f2Kv43 = 14.22465;
  f3Kv43 = 158.5744;
  f4Kv43 = 142.9366;
  b1Kv43 = 6.77348;
  b2Kv43 = 15.62127;
  b3Kv43 = 28.75326;
  b4Kv43 = 524.5762;
  f1Kv14 = 0.5246507;
  f2Kv14 = 17.51885;
  f3Kv14 = 938.5876;
  f4Kv14 = 54749.19;
  b1Kv14 = 1.009478;
  b2Kv14 = 1.171005;
  b3Kv14 = 0.6390277;
  b4Kv14 = 2.120354;
  alphaa0Kv14 = 1.840024;
  aaKv14 = 0.00768548031;
  betaa0Kv14 = 0.0108174834;
  baKv14 = 0.07793378;
  alphai0Kv14 = 0.00305767916;
  betai0Kv14 = 2.44936e-6;
  var a1_C0_COMPUTE_DERIVATIVES_OF_Kv1_4_CHANNEL_STATES;
  var a2_C0_COMPUTE_DERIVATIVES_OF_Kv1_4_CHANNEL_STATES;
  C0Kv14 = 0.1493744;
  var a1_C1_COMPUTE_DERIVATIVES_OF_Kv1_4_CHANNEL_STATES;
  var a2_C1_COMPUTE_DERIVATIVES_OF_Kv1_4_CHANNEL_STATES;
  C1Kv14 = 0.06067949;
  var a1_C2_COMPUTE_DERIVATIVES_OF_Kv1_4_CHANNEL_STATES;
  var a2_C2_COMPUTE_DERIVATIVES_OF_Kv1_4_CHANNEL_STATES;
  C2Kv14 = 0.009303142;
  var a1_C3_COMPUTE_DERIVATIVES_OF_Kv1_4_CHANNEL_STATES;
  var a2_C3_COMPUTE_DERIVATIVES_OF_Kv1_4_CHANNEL_STATES;
  C3Kv14 = 0.000676404;
  var a1_O_COMPUTE_DERIVATIVES_OF_Kv1_4_CHANNEL_STATES;
  var a2_O_COMPUTE_DERIVATIVES_OF_Kv1_4_CHANNEL_STATES;
  OKv14 = 3.851872e-5;
  CI0Kv14 = 0.04427226;
  CI1Kv14 = 0.009524327;
  CI2Kv14 = 0.05673967;
  CI3Kv14 = 0.1131228;
  OIKv14 = 0.556269;
  var a1_COMPUTE_REVERSAL_POTENTIALS;
  var a2_COMPUTE_REVERSAL_POTENTIALS;
  GKr = 0.0186;
  GKs = 0.0035;
  GK1 = 0.1253051;
  GNa = 56.32;
  GNab = 0.001;
  KvScale = 0.872;
  Kv43Frac = 0.889;
  var VF_over_RT_COMPUTE_INa_IKr_IKs_Ito1_IK1_INab_IKp;
  var VFsq_over_RT_COMPUTE_INa_IKr_IKs_Ito1_IK1_INab_IKp;
  var a1_K_COMPUTE_INa_IKr_IKs_Ito1_IK1_INab_IKp;
  var a2_COMPUTE_INa_IKr_IKs_Ito1_IK1_INab_IKp;
  var a1_Na_COMPUTE_INa_IKr_IKs_Ito1_IK1_INab_IKp;
  kNaCa = 0.44;
  KmNa = 87.5;
  KmCa = 1.38;
  ksat = 0.2;
  eta = 0.35;
  INaKmax = 2.387;
  KmNai = 20;
  KmKo = 1.5;
  IpCamax = 0.05;
  KmpCa = 0.0005;
  GCab = 7.684e-5;
  var VF_over_RT_COMPUTE_INaK_INaCa_ICab_IpCa;
  var a1_Na_COMPUTE_INaK_INaCa_ICab_IpCa;
  var a1_K_COMPUTE_INaK_INaCa_ICab_IpCa;
  var a2_K_COMPUTE_INaK_INaCa_ICab_IpCa;
  var VF_over_RT_COMPUTE_ICa_ICaK;
  var VFsq_over_RT_COMPUTE_ICa_ICaK;
  var a1_K_COMPUTE_ICa_ICaK;
  var a2_K_COMPUTE_ICa_ICaK;
  ICahalf = -0.265;
  Pscale = 7;
  na1 = 0.1112845;
  na2 = 0.04810198;
  na3 = 0.007796927;
  na4 = 0.0005616996;
  na5 = 1.517464e-5;
  na6 = 1.021187e-7;
  na7 = 1.934992e-8;
  na8 = 0.3685827;
  na9 = 0.3124632;
  na10 = 0.09933988;
  na11 = 0.01404317;
  na12 = 0.0007500738;
  na13 = 0.0370605;
  TNa = 294.16;
  T_Const_HERG = 5.32;
  A0_HERG = 0.01714764;
  B0_HERG = 0.03304608;
  A1_HERG = 0.03969328;
  B1_HERG = -0.04306054;
  A2_HERG = 0.02057449;
  B2_HERG = 0.02617413;
  A3_HERG = 0.001343666;
  B3_HERG = -0.02691385;
  A4_HERG = 0.1066632;
  B4_HERG = 0.005689089;
  A5_HERG = 0.006463939;
  B5_HERG = -0.04536643;
  A6_HERG = 8.039374e-5;
  B6_HERG = 6.9808924e-7;
  C1Herg = 0.9949483;
  var a1_C2_IKr;
  var a2_C2_IKr;
  C2Herg = 0.0005956537;
  var a1_C3_IKr;
  var a2_C3_IKr;
  C3Herg = 0.0002281832;
  var a1_O_IKr;
  var a2_O_IKr;
  OHerg = 0.001202847;
  IHerg = 0.0002437897;
  C0ks = 0.938065;
  C1ks = 0.03605257;
  O1ks = 5.654602e-7;
  O2ks = 0.02588188;

  // Assignment rules:
  RT_over_F := Rgas*Temp/Faraday;
  C := Acap*1;
  a1_COMPUTE_CONCENTRATION_AND_VOLTAGE_DERIVATIVES := C/(Vmyo*Faraday);
  a2_COMPUTE_CONCENTRATION_AND_VOLTAGE_DERIVATIVES := C/(2*VSS*Faraday);
  past := floor(time/stim_period)*stim_period;
  i_Stim := piecewise(stim_amplitude, (time - past >= stim_offset) && (time - past <= stim_offset + stim_duration), 0);
  fb := (Cai/Kfb)^Nfb;
  rb := (CaNSR/Krb)^Nrb;
  Jup := piecewise(KSR*(vmaxf*fb - vmaxr*rb)/(1 + fb + rb), iso == 0, 1.5*KSR*(vmaxf*fb - vmaxr*rb)/(1 + fb + rb));
  Jrel := v1*(O1_RyR + O2_RyR)*(CaJSR - CaSS);
  Jtr := (CaNSR - CaJSR)/tautr;
  Jxfer := (CaSS - Cai)/tauxfer;
  CSQNtot := piecewise(15, RyR2 == 1, 0.5*15);
  dLTRPNCa := kltrpn_plus*Cai*(1 - LTRPNCa) - kltrpn_minus*LTRPNCa;
  dHTRPNCa := khtrpn_plus*Cai*(1 - HTRPNCa) - khtrpn_minus*HTRPNCa;
  Jtrpn := LTRPNtot*dLTRPNCa + HTRPNtot*dHTRPNCa;
  beta_SS := 1/(1 + CMDNtot*KmCMDN/(CaSS + KmCMDN)^2 + EGTAtot*KmEGTA/(CaSS + KmEGTA)^2);
  beta_JSR := 1/(1 + CSQNtot*KmCSQN/(CaJSR + KmCSQN)^2);
  beta_i := 1/(1 + CMDNtot*KmCMDN/(Cai + KmCMDN)^2 + EGTAtot*KmEGTA/(Cai + KmEGTA)^2);
  HmaxO1C2 := piecewise(0.2, CSQN2 == 1, 0.5);
  H50C2O1 := piecewise(0.5, CSQN2 == 1, 1);
  klumenC1O1 := HmaxC1O1 - (HmaxC1O1 - Hmin)/(1 + (H50C1O1/CaJSR)^HN);
  klumenO1C2 := HmaxO1C2 - (HmaxO1C2 - Hmin)/(1 + (H50O1C2/CaJSR)^HN);
  klumenC2O1 := HmaxC2O1 - (HmaxC2O1 - Hmin)/(1 + (H50C2O1/CaJSR)^HN);
  dC1_RyR := -kaplus*klumenC1O1*(CaSS*1000)^(ncoop*kryr)*C1_RyR + kaminus*O1_RyR;
  dO2_RyR := kbplus*(CaSS*1000)^(mcoop*kryr)*O1_RyR - kbminus*O2_RyR;
  dC2_RyR := kcplus/klumenO1C2*O1_RyR - kcminus*klumenC2O1*C2_RyR;
  dO1_RyR := -(dC1_RyR + dO2_RyR + dC2_RyR);
  alpha := 4*1.2*0.416*exp(0.012*(V - 35));
  beta := 4*0.45*0.049*exp(-0.065*(V - 22));
  alpha_prime := aL*alpha;
  beta_prime := beta/bL;
  gamma := 0.6*0.09233*CaSS;
  omega := 0.25*0.01;
  C0_to_C1 := 4*alpha;
  C1_to_C2 := 3*alpha;
  C2_to_C3 := 2*alpha;
  C3_to_C4 := alpha;
  CCa0_to_CCa1 := 4*alpha_prime;
  CCa1_to_CCa2 := 3*alpha_prime;
  CCa2_to_CCa3 := 2*alpha_prime;
  CCa3_to_CCa4 := alpha_prime;
  C1_to_C0 := beta;
  C2_to_C1 := 2*beta;
  C3_to_C2 := 3*beta;
  C4_to_C3 := 4*beta;
  CCa1_to_CCa0 := beta_prime;
  CCa2_to_CCa1 := 2*beta_prime;
  CCa3_to_CCa2 := 3*beta_prime;
  CCa4_to_CCa3 := 4*beta_prime;
  C0_to_CCa0 := gamma;
  C1_to_CCa1 := aL*C0_to_CCa0;
  C2_to_CCa2 := aL*C1_to_CCa1;
  C3_to_CCa3 := aL*C2_to_CCa2;
  C4_to_CCa4 := aL*C3_to_CCa3;
  CCa0_to_C0 := omega;
  CCa1_to_C1 := CCa0_to_C0/bL;
  CCa2_to_C2 := CCa1_to_C1/bL;
  CCa3_to_C3 := CCa2_to_C2/bL;
  CCa4_to_C4 := CCa3_to_C3/bL;
  a1_C0_COMPUTE_DERIVATIVES_OF_LTYPE_CHANNEL_STATES := (C0_to_C1 + C0_to_CCa0)*C0;
  a2_C0_COMPUTE_DERIVATIVES_OF_LTYPE_CHANNEL_STATES := C1_to_C0*C1 + CCa0_to_C0*CCa0;
  a1_C1_COMPUTE_DERIVATIVES_OF_LTYPE_CHANNEL_STATES := (C1_to_C0 + C1_to_C2 + C1_to_CCa1)*C1;
  a2_C1_COMPUTE_DERIVATIVES_OF_LTYPE_CHANNEL_STATES := C0_to_C1*C0 + C2_to_C1*C2 + CCa1_to_C1*CCa1;
  a1_C2_COMPUTE_DERIVATIVES_OF_LTYPE_CHANNEL_STATES := (C2_to_C1 + C2_to_C3 + C2_to_CCa2)*C2;
  a2_C2_COMPUTE_DERIVATIVES_OF_LTYPE_CHANNEL_STATES := C1_to_C2*C1 + C3_to_C2*C3 + CCa2_to_C2*CCa2;
  a1_C3_COMPUTE_DERIVATIVES_OF_LTYPE_CHANNEL_STATES := (C3_to_C2 + C3_to_C4 + C3_to_CCa3)*C3;
  a2_C3_COMPUTE_DERIVATIVES_OF_LTYPE_CHANNEL_STATES := C2_to_C3*C2 + C4_to_C3*C4 + CCa3_to_C3*CCa3;
  a1_C4 := (C4_to_C3 + fL + C4_to_CCa4)*C4;
  a2_C4 := C3_to_C4*C3 + gL*Open + CCa4_to_C4*CCa4;
  a1_Ca0 := (CCa0_to_CCa1 + CCa0_to_C0)*CCa0;
  a2_Ca0 := CCa1_to_CCa0*CCa1 + C0_to_CCa0*C0;
  a1_Ca1 := (CCa1_to_CCa0 + CCa1_to_CCa2 + CCa1_to_C1)*CCa1;
  a2_Ca1 := CCa0_to_CCa1*CCa0 + CCa2_to_CCa1*CCa2 + C1_to_CCa1*C1;
  a1_Ca2 := (CCa2_to_CCa1 + CCa2_to_CCa3 + CCa2_to_C2)*CCa2;
  a2_Ca2 := CCa1_to_CCa2*CCa1 + CCa3_to_CCa2*CCa3 + C2_to_CCa2*C2;
  a1_Ca3 := (CCa3_to_CCa2 + CCa3_to_CCa4 + CCa3_to_C3)*CCa3;
  a2_Ca3 := CCa2_to_CCa3*CCa2 + CCa4_to_CCa3*CCa4 + C3_to_CCa3*C3;
  a1_Ca4 := (CCa4_to_CCa3 + CCa4_to_C4)*CCa4;
  a2_Ca4 := CCa3_to_CCa4*CCa3 + C4_to_CCa4*C4;
  a1_Cainf := 0.82;
  yCa_inf := a1_Cainf/(1 + exp((V + 28.5)/7.8)) + 1 - a1_Cainf;
  tau_yCa := 1/(0.003363362/(0.5 + exp(V/(-5.538999))) + 0.007790466*exp(V/(-49.5104)));
  alpha_act43 := alphaa0Kv43*exp(aaKv43*V);
  beta_act43 := betaa0Kv43*exp(-baKv43*V);
  alpha_inact43 := alphai0Kv43*exp(-aiKv43*V);
  beta_inact43 := betai0Kv43*exp(biKv43*V);
  C0Kv43_to_C1Kv43 := 4*alpha_act43;
  C1Kv43_to_C2Kv43 := 3*alpha_act43;
  C2Kv43_to_C3Kv43 := 2*alpha_act43;
  C3Kv43_to_OKv43 := alpha_act43;
  CI0Kv43_to_CI1Kv43 := 4*b1Kv43*alpha_act43;
  CI1Kv43_to_CI2Kv43 := 3*b2Kv43*alpha_act43/b1Kv43;
  CI2Kv43_to_CI3Kv43 := 2*b3Kv43*alpha_act43/b2Kv43;
  CI3Kv43_to_OIKv43 := b4Kv43*alpha_act43/b3Kv43;
  C1Kv43_to_C0Kv43 := beta_act43;
  C2Kv43_to_C1Kv43 := 2*beta_act43;
  C3Kv43_to_C2Kv43 := 3*beta_act43;
  OKv43_to_C3Kv43 := 4*beta_act43;
  CI1Kv43_to_CI0Kv43 := beta_act43/f1Kv43;
  CI2Kv43_to_CI1Kv43 := 2*f1Kv43*beta_act43/f2Kv43;
  CI3Kv43_to_CI2Kv43 := 3*f2Kv43*beta_act43/f3Kv43;
  OIKv43_to_CI3Kv43 := 4*f3Kv43*beta_act43/f4Kv43;
  C0Kv43_to_CI0Kv43 := beta_inact43;
  C1Kv43_to_CI1Kv43 := f1Kv43*beta_inact43;
  C2Kv43_to_CI2Kv43 := f2Kv43*beta_inact43;
  C3Kv43_to_CI3Kv43 := f3Kv43*beta_inact43;
  OKv43_to_OIKv43 := f4Kv43*beta_inact43;
  CI0Kv43_to_C0Kv43 := alpha_inact43;
  CI1Kv43_to_C1Kv43 := alpha_inact43/b1Kv43;
  CI2Kv43_to_C2Kv43 := alpha_inact43/b2Kv43;
  CI3Kv43_to_C3Kv43 := alpha_inact43/b3Kv43;
  OIKv43_to_OKv43 := alpha_inact43/b4Kv43;
  a1_C043 := (C0Kv43_to_C1Kv43 + C0Kv43_to_CI0Kv43)*C0Kv43;
  a2_C043 := C1Kv43_to_C0Kv43*C1Kv43 + CI0Kv43_to_C0Kv43*CI0Kv43;
  a1_C143 := (C1Kv43_to_C2Kv43 + C1Kv43_to_C0Kv43 + C1Kv43_to_CI1Kv43)*C1Kv43;
  a2_C143 := C2Kv43_to_C1Kv43*C2Kv43 + CI1Kv43_to_C1Kv43*CI1Kv43 + C0Kv43_to_C1Kv43*C0Kv43;
  a1_C243 := (C2Kv43_to_C3Kv43 + C2Kv43_to_C1Kv43 + C2Kv43_to_CI2Kv43)*C2Kv43;
  a2_C243 := C3Kv43_to_C2Kv43*C3Kv43 + CI2Kv43_to_C2Kv43*CI2Kv43 + C1Kv43_to_C2Kv43*C1Kv43;
  a1_C343 := (C3Kv43_to_OKv43 + C3Kv43_to_C2Kv43 + C3Kv43_to_CI3Kv43)*C3Kv43;
  a2_C343 := OKv43_to_C3Kv43*OKv43 + CI3Kv43_to_C3Kv43*CI3Kv43 + C2Kv43_to_C3Kv43*C2Kv43;
  a1_O43 := (OKv43_to_C3Kv43 + OKv43_to_OIKv43)*OKv43;
  a2_O43 := C3Kv43_to_OKv43*C3Kv43 + OIKv43_to_OKv43*OIKv43;
  a1_I043 := (CI0Kv43_to_C0Kv43 + CI0Kv43_to_CI1Kv43)*CI0Kv43;
  a2_I043 := C0Kv43_to_CI0Kv43*C0Kv43 + CI1Kv43_to_CI0Kv43*CI1Kv43;
  a1_I143 := (CI1Kv43_to_CI2Kv43 + CI1Kv43_to_C1Kv43 + CI1Kv43_to_CI0Kv43)*CI1Kv43;
  a2_I143 := CI2Kv43_to_CI1Kv43*CI2Kv43 + C1Kv43_to_CI1Kv43*C1Kv43 + CI0Kv43_to_CI1Kv43*CI0Kv43;
  a1_I243 := (CI2Kv43_to_CI3Kv43 + CI2Kv43_to_C2Kv43 + CI2Kv43_to_CI1Kv43)*CI2Kv43;
  a2_I243 := CI3Kv43_to_CI2Kv43*CI3Kv43 + C2Kv43_to_CI2Kv43*C2Kv43 + CI1Kv43_to_CI2Kv43*CI1Kv43;
  a1_I343 := (CI3Kv43_to_OIKv43 + CI3Kv43_to_C3Kv43 + CI3Kv43_to_CI2Kv43)*CI3Kv43;
  a2_I343 := OIKv43_to_CI3Kv43*OIKv43 + C3Kv43_to_CI3Kv43*C3Kv43 + CI2Kv43_to_CI3Kv43*CI2Kv43;
  a1_OI43 := (OIKv43_to_OKv43 + OIKv43_to_CI3Kv43)*OIKv43;
  a2_OI43 := OKv43_to_OIKv43*OKv43 + CI3Kv43_to_OIKv43*CI3Kv43;
  alpha_act14 := alphaa0Kv14*exp(aaKv14*V);
  beta_act14 := betaa0Kv14*exp(-baKv14*V);
  alpha_inact14 := alphai0Kv14;
  beta_inact14 := betai0Kv14;
  C0Kv14_to_C1Kv14 := 4*alpha_act14;
  C1Kv14_to_C2Kv14 := 3*alpha_act14;
  C2Kv14_to_C3Kv14 := 2*alpha_act14;
  C3Kv14_to_OKv14 := alpha_act14;
  CI0Kv14_to_CI1Kv14 := 4*b1Kv14*alpha_act14;
  CI1Kv14_to_CI2Kv14 := 3*b2Kv14*alpha_act14/b1Kv14;
  CI2Kv14_to_CI3Kv14 := 2*b3Kv14*alpha_act14/b2Kv14;
  CI3Kv14_to_OIKv14 := b4Kv14*alpha_act14/b3Kv14;
  C1Kv14_to_C0Kv14 := beta_act14;
  C2Kv14_to_C1Kv14 := 2*beta_act14;
  C3Kv14_to_C2Kv14 := 3*beta_act14;
  OKv14_to_C3Kv14 := 4*beta_act14;
  CI1Kv14_to_CI0Kv14 := beta_act14/f1Kv14;
  CI2Kv14_to_CI1Kv14 := 2*f1Kv14*beta_act14/f2Kv14;
  CI3Kv14_to_CI2Kv14 := 3*f2Kv14*beta_act14/f3Kv14;
  OIKv14_to_CI3Kv14 := 4*f3Kv14*beta_act14/f4Kv14;
  C0Kv14_to_CI0Kv14 := beta_inact14;
  C1Kv14_to_CI1Kv14 := f1Kv14*beta_inact14;
  C2Kv14_to_CI2Kv14 := f2Kv14*beta_inact14;
  C3Kv14_to_CI3Kv14 := f3Kv14*beta_inact14;
  OKv14_to_OIKv14 := f4Kv14*beta_inact14;
  CI0Kv14_to_C0Kv14 := alpha_inact14;
  CI1Kv14_to_C1Kv14 := alpha_inact14/b1Kv14;
  CI2Kv14_to_C2Kv14 := alpha_inact14/b2Kv14;
  CI3Kv14_to_C3Kv14 := alpha_inact14/b3Kv14;
  OIKv14_to_OKv14 := alpha_inact14/b4Kv14;
  a1_C0_COMPUTE_DERIVATIVES_OF_Kv1_4_CHANNEL_STATES := (C0Kv14_to_C1Kv14 + C0Kv14_to_CI0Kv14)*C0Kv14;
  a2_C0_COMPUTE_DERIVATIVES_OF_Kv1_4_CHANNEL_STATES := C1Kv14_to_C0Kv14*C1Kv14 + CI0Kv14_to_C0Kv14*CI0Kv14;
  a1_C1_COMPUTE_DERIVATIVES_OF_Kv1_4_CHANNEL_STATES := (C1Kv14_to_C2Kv14 + C1Kv14_to_C0Kv14 + C1Kv14_to_CI1Kv14)*C1Kv14;
  a2_C1_COMPUTE_DERIVATIVES_OF_Kv1_4_CHANNEL_STATES := C2Kv14_to_C1Kv14*C2Kv14 + CI1Kv14_to_C1Kv14*CI1Kv14 + C0Kv14_to_C1Kv14*C0Kv14;
  a1_C2_COMPUTE_DERIVATIVES_OF_Kv1_4_CHANNEL_STATES := (C2Kv14_to_C3Kv14 + C2Kv14_to_C1Kv14 + C2Kv14_to_CI2Kv14)*C2Kv14;
  a2_C2_COMPUTE_DERIVATIVES_OF_Kv1_4_CHANNEL_STATES := C3Kv14_to_C2Kv14*C3Kv14 + CI2Kv14_to_C2Kv14*CI2Kv14 + C1Kv14_to_C2Kv14*C1Kv14;
  a1_C3_COMPUTE_DERIVATIVES_OF_Kv1_4_CHANNEL_STATES := (C3Kv14_to_OKv14 + C3Kv14_to_C2Kv14 + C3Kv14_to_CI3Kv14)*C3Kv14;
  a2_C3_COMPUTE_DERIVATIVES_OF_Kv1_4_CHANNEL_STATES := OKv14_to_C3Kv14*OKv14 + CI3Kv14_to_C3Kv14*CI3Kv14 + C2Kv14_to_C3Kv14*C2Kv14;
  a1_O_COMPUTE_DERIVATIVES_OF_Kv1_4_CHANNEL_STATES := (OKv14_to_C3Kv14 + OKv14_to_OIKv14)*OKv14;
  a2_O_COMPUTE_DERIVATIVES_OF_Kv1_4_CHANNEL_STATES := C3Kv14_to_OKv14*C3Kv14 + OIKv14_to_OKv14*OIKv14;
  a1_CI0 := (CI0Kv14_to_C0Kv14 + CI0Kv14_to_CI1Kv14)*CI0Kv14;
  a2_CI0 := C0Kv14_to_CI0Kv14*C0Kv14 + CI1Kv14_to_CI0Kv14*CI1Kv14;
  a1_CI1 := (CI1Kv14_to_CI2Kv14 + CI1Kv14_to_C1Kv14 + CI1Kv14_to_CI0Kv14)*CI1Kv14;
  a2_CI1 := CI2Kv14_to_CI1Kv14*CI2Kv14 + C1Kv14_to_CI1Kv14*C1Kv14 + CI0Kv14_to_CI1Kv14*CI0Kv14;
  a1_CI2 := (CI2Kv14_to_CI3Kv14 + CI2Kv14_to_C2Kv14 + CI2Kv14_to_CI1Kv14)*CI2Kv14;
  a2_CI2 := CI3Kv14_to_CI2Kv14*CI3Kv14 + C2Kv14_to_CI2Kv14*C2Kv14 + CI1Kv14_to_CI2Kv14*CI1Kv14;
  a1_CI3 := (CI3Kv14_to_OIKv14 + CI3Kv14_to_C3Kv14 + CI3Kv14_to_CI2Kv14)*CI3Kv14;
  a2_CI3 := OIKv14_to_CI3Kv14*OIKv14 + C3Kv14_to_CI3Kv14*C3Kv14 + CI2Kv14_to_CI3Kv14*CI2Kv14;
  a1_OI := (OIKv14_to_OKv14 + OIKv14_to_CI3Kv14)*OIKv14;
  a2_OI := OKv14_to_OIKv14*OKv14 + CI3Kv14_to_OIKv14*CI3Kv14;
  ENa := RT_over_F*ln(Nao/Nai);
  EK := RT_over_F*ln(Ko/Ki);
  a1_COMPUTE_REVERSAL_POTENTIALS := Ko + 0.01833*Nao;
  a2_COMPUTE_REVERSAL_POTENTIALS := Ki + 0.01833*Nai;
  EKs := RT_over_F*ln(a1_COMPUTE_REVERSAL_POTENTIALS/a2_COMPUTE_REVERSAL_POTENTIALS);
  ECa := 0.5*RT_over_F*ln(Cao/Cai);
  PKv14 := (1 - Kv43Frac)*KvScale*4.2986;
  GKv43 := Kv43Frac*KvScale*0.1;
  INa := GNa*(na6 + na7)*(V - ENa);
  fKo := sqrt(Ko/4);
  IKr := GKr*fKo*OHerg*(V - EK);
  IKs := GKs*(O1ks + O2ks)*(V - EK);
  IKv43 := GKv43*OKv43*(V - EK);
  VF_over_RT_COMPUTE_INa_IKr_IKs_Ito1_IK1_INab_IKp := V/RT_over_F;
  VFsq_over_RT_COMPUTE_INa_IKr_IKs_Ito1_IK1_INab_IKp := 1000*Faraday*VF_over_RT_COMPUTE_INa_IKr_IKs_Ito1_IK1_INab_IKp;
  a1_K_COMPUTE_INa_IKr_IKs_Ito1_IK1_INab_IKp := Ki*exp(VF_over_RT_COMPUTE_INa_IKr_IKs_Ito1_IK1_INab_IKp) - Ko;
  a2_COMPUTE_INa_IKr_IKs_Ito1_IK1_INab_IKp := exp(VF_over_RT_COMPUTE_INa_IKr_IKs_Ito1_IK1_INab_IKp) - 1;
  IKv14_K := PKv14*OKv14*VFsq_over_RT_COMPUTE_INa_IKr_IKs_Ito1_IK1_INab_IKp*a1_K_COMPUTE_INa_IKr_IKs_Ito1_IK1_INab_IKp/a2_COMPUTE_INa_IKr_IKs_Ito1_IK1_INab_IKp;
  a1_Na_COMPUTE_INa_IKr_IKs_Ito1_IK1_INab_IKp := Nai*exp(VF_over_RT_COMPUTE_INa_IKr_IKs_Ito1_IK1_INab_IKp) - Nao;
  IKv14_Na := 0.02*PKv14*OKv14*VFsq_over_RT_COMPUTE_INa_IKr_IKs_Ito1_IK1_INab_IKp*a1_Na_COMPUTE_INa_IKr_IKs_Ito1_IK1_INab_IKp/a2_COMPUTE_INa_IKr_IKs_Ito1_IK1_INab_IKp;
  IKv14 := IKv14_K + IKv14_Na;
  Ito1 := IKv43 + IKv14;
  K1_inf := 1/(0.94 + exp(1.26/RT_over_F*(V - EK)));
  IK1 := GK1*sqrt(Ko/1)*K1_inf*(V - EK);
  INab := GNab*(V - ENa);
  ICab := GCab*(V - ECa);
  IpCa := IpCamax*Cai/(KmpCa + Cai);
  VF_over_RT_COMPUTE_INaK_INaCa_ICab_IpCa := V/RT_over_F;
  sigma := (exp(Nao/67.3) - 1)/7;
  a1_Na_COMPUTE_INaK_INaCa_ICab_IpCa := 1 + 0.1245*exp(-0.1*VF_over_RT_COMPUTE_INaK_INaCa_ICab_IpCa);
  a2_Na := 0.0365*sigma*exp(-1.33*VF_over_RT_COMPUTE_INaK_INaCa_ICab_IpCa);
  fNaK := 1/(a1_Na_COMPUTE_INaK_INaCa_ICab_IpCa + a2_Na);
  a1_K_COMPUTE_INaK_INaCa_ICab_IpCa := Ko/(Ko + KmKo);
  a2_K_COMPUTE_INaK_INaCa_ICab_IpCa := 1 + (KmNai/Nai)^1.5;
  INaK := INaKmax*fNaK*a1_K_COMPUTE_INaK_INaCa_ICab_IpCa/a2_K_COMPUTE_INaK_INaCa_ICab_IpCa;
  a1_ncx := exp(eta*VF_over_RT_COMPUTE_INaK_INaCa_ICab_IpCa)*Nai^3*Cao;
  a2_ncx := exp((eta - 1)*VF_over_RT_COMPUTE_INaK_INaCa_ICab_IpCa)*Nao^3*Cai;
  a3_ncx := 1 + ksat*exp((eta - 1)*VF_over_RT_COMPUTE_INaK_INaCa_ICab_IpCa);
  a4_ncx := KmCa + Cao;
  a5_ncx := (KmNa^3 + Nao^3)/5000;
  INaCa := kNaCa*(a1_ncx - a2_ncx)/(a4_ncx*a3_ncx*a5_ncx);
  PK := Pscale*4.574;
  PCa := piecewise(Pscale*2.469, iso == 0, 1.5*Pscale*2.469);
  VF_over_RT_COMPUTE_ICa_ICaK := V/RT_over_F;
  VFsq_over_RT_COMPUTE_ICa_ICaK := 1000*Faraday*VF_over_RT_COMPUTE_ICa_ICaK;
  a1_Ca := 1*exp(2*VF_over_RT_COMPUTE_ICa_ICaK) - Cao*0.341;
  a2_Ca := exp(2*VF_over_RT_COMPUTE_ICa_ICaK) - 1;
  ICamax := PCa*4*VFsq_over_RT_COMPUTE_ICa_ICaK*a1_Ca/a2_Ca;
  ICa := ICamax*yCa*Open;
  Icabar := piecewise(0, ICamax >= 0, ICamax);
  PKprime := PK/(1 + Icabar/ICahalf);
  a1_K_COMPUTE_ICa_ICaK := Ki*exp(VF_over_RT_COMPUTE_ICa_ICaK) - Ko;
  a2_K_COMPUTE_ICa_ICaK := exp(VF_over_RT_COMPUTE_ICa_ICaK) - 1;
  ICaK := PKprime*Open*yCa*VFsq_over_RT_COMPUTE_ICa_ICaK*a1_K_COMPUTE_ICa_ICaK/a2_K_COMPUTE_ICa_ICaK;
  FoverRT := 1/RT_over_F;
  KToverH := 1.381*TNa/6.626;
  RTNa := Rgas*TNa;
  RTNaF := Rgas*TNa/Faraday;
  Temp_Scale := 1.388623;
  alpha1 := Temp_Scale*KToverH*exp(-114007.5/RTNa + 224.114/Rgas + 0.2863743*V/RTNaF);
  beta1 := Temp_Scale*KToverH*exp(-272470.3/RTNa + 708.146/Rgas + (-2.285284*V/RTNaF));
  gamma1 := Temp_Scale*KToverH*exp(-196336.6/RTNa + 529.952/Rgas + 2.780849*V/RTNaF);
  Delta1 := Temp_Scale*KToverH*exp(-133689.9/RTNa + 229.205/Rgas + (-1.558042*V/RTNaF));
  On := Temp_Scale*KToverH*exp(-62123.08/RTNa + 39.295/Rgas + 0.288816*V/RTNaF);
  Of := Temp_Scale*KToverH*exp(-97657.85/RTNa + 1.51/Rgas + 0.0684862*V/RTNaF);
  GammaGamma := Temp_Scale*KToverH*exp(116431.1/RTNa + (-578.317/Rgas) + 0.764126*V/RTNaF);
  DeltaDelta := Temp_Scale*KToverH*exp(-55700.66/RTNa + (-130.639/Rgas) + (-3.649817*V/RTNaF));
  epsilon := Temp_Scale*KToverH*exp(-85800.37/RTNa + 70.078/Rgas);
  omega_na := Temp_Scale*KToverH*exp(-121955.2/RTNa + 225.175/Rgas);
  rho := Temp_Scale*KToverH*exp(-147814/RTNa + 338.915/Rgas + 2.136004*V/RTNaF);
  mu := Temp_Scale*KToverH*exp(-121322.1/RTNa + 193.265/Rgas + (-1.742903*V/RTNaF));
  Cn := Temp_Scale*KToverH*exp(-287913.4/RTNa + 786.217/Rgas);
  Cf := Temp_Scale*KToverH*exp(-59565.22/RTNa + 0.00711/Rgas);
  parameter_a := 1.400426;
  k12 := 4*alpha1;
  k23 := 3*alpha1;
  k34 := 2*alpha1;
  k45 := alpha1;
  k56 := gamma1;
  k67 := epsilon;
  k89 := k12*parameter_a;
  k910 := k23*parameter_a;
  k1011 := k34*parameter_a;
  k1112 := k45*parameter_a;
  k1213 := GammaGamma;
  k57 := rho;
  k21 := beta1;
  k32 := 2*beta1;
  k43 := 3*beta1;
  k54 := 4*beta1;
  k65 := Delta1;
  k76 := omega_na;
  k98 := k21/parameter_a;
  k109 := k32/parameter_a;
  k1110 := k43/parameter_a;
  k1211 := k54/parameter_a;
  k1312 := DeltaDelta;
  k75 := mu;
  k81 := Cf;
  k92 := k81/parameter_a;
  k103 := k92/parameter_a;
  k114 := k103/parameter_a;
  k125 := k114/parameter_a;
  k136 := Of;
  k18 := Cn;
  k29 := k18*parameter_a;
  k310 := k29*parameter_a;
  k411 := k310*parameter_a;
  k512 := k411*parameter_a;
  k613 := On;
  C2H_to_C3H := T_Const_HERG*0.02608362;
  C3H_to_C2H := T_Const_HERG*0.1483298;
  C1H_to_C2H := T_Const_HERG*A0_HERG*exp(B0_HERG*V);
  C2H_to_C1H := T_Const_HERG*A1_HERG*exp(B1_HERG*V);
  C3H_to_OH := T_Const_HERG*A2_HERG*exp(B2_HERG*V);
  OH_to_C3H := T_Const_HERG*A3_HERG*exp(B3_HERG*V);
  OH_to_IH := T_Const_HERG*A4_HERG*exp(B4_HERG*V);
  IH_to_OH := T_Const_HERG*A5_HERG*exp(B5_HERG*V);
  C3H_to_IH := T_Const_HERG*A6_HERG*exp(B6_HERG*V);
  IH_to_C3H := OH_to_C3H*IH_to_OH*C3H_to_IH/(C3H_to_OH*OH_to_IH);
  a1_C2_IKr := C1H_to_C2H*C1Herg + C3H_to_C2H*C3Herg;
  a2_C2_IKr := (C2H_to_C1H + C2H_to_C3H)*C2Herg;
  a1_C3_IKr := C2H_to_C3H*C2Herg + OH_to_C3H*OHerg + IH_to_C3H*IHerg;
  a2_C3_IKr := (C3H_to_IH + C3H_to_OH + C3H_to_C2H)*C3Herg;
  a1_O_IKr := C3H_to_OH*C3Herg + IH_to_OH*IHerg;
  a2_O_IKr := (OH_to_C3H + OH_to_IH)*OHerg;
  a1_I := C3H_to_IH*C3Herg + OH_to_IH*OHerg;
  a2_I := (IH_to_C3H + IH_to_OH)*IHerg;
  C0ks_C1ks := 0.007956008;
  C1ks_O1ks := 0.03966721;
  O1ks_O2ks := 0.007672544*exp(0.08662946*V);
  O1ks_C1ks := 0.007008066*exp(-0.1499975*V);
  O2ks_O1ks := 0.00379738*exp(-0.01425668*V);
  C1ks_C0ks := 0.2162558*exp(-1.889123e-5*V);
  i_tot := INa + ICa + ICaK + IKr + IKs + IK1 + INaCa + INaK + Ito1 + IpCa + ICab + INab + i_Stim;

  // Rate rules:
  Nai' = -(INa + INab + 3*(INaCa + INaK) + IKv14_Na)*a1_COMPUTE_CONCENTRATION_AND_VOLTAGE_DERIVATIVES;
  Ki' = -(IKr + IKs + IK1 + ICaK + i_Stim - 2*INaK + IKv43 + IKv14_K)*a1_COMPUTE_CONCENTRATION_AND_VOLTAGE_DERIVATIVES;
  Cai' = beta_i*(Jxfer - Jup - Jtrpn - (ICab - 2*INaCa + IpCa)*0.5*a1_COMPUTE_CONCENTRATION_AND_VOLTAGE_DERIVATIVES);
  CaSS' = beta_SS*(Jrel*VJSR/VSS - Jxfer*Vmyo/VSS - ICa*a2_COMPUTE_CONCENTRATION_AND_VOLTAGE_DERIVATIVES);
  CaJSR' = beta_JSR*(Jtr - Jrel);
  CaNSR' = Jup*Vmyo/VNSR - Jtr*VJSR/VNSR;
  V' = -i_tot;
  LTRPNCa' = dLTRPNCa;
  HTRPNCa' = dHTRPNCa;
  C1_RyR' = dC1_RyR;
  O2_RyR' = dO2_RyR;
  C2_RyR' = dC2_RyR;
  O1_RyR' = dO1_RyR;
  C0' = a2_C0_COMPUTE_DERIVATIVES_OF_LTYPE_CHANNEL_STATES - a1_C0_COMPUTE_DERIVATIVES_OF_LTYPE_CHANNEL_STATES;
  C1' = a2_C1_COMPUTE_DERIVATIVES_OF_LTYPE_CHANNEL_STATES - a1_C1_COMPUTE_DERIVATIVES_OF_LTYPE_CHANNEL_STATES;
  C2' = a2_C2_COMPUTE_DERIVATIVES_OF_LTYPE_CHANNEL_STATES - a1_C2_COMPUTE_DERIVATIVES_OF_LTYPE_CHANNEL_STATES;
  C3' = a2_C3_COMPUTE_DERIVATIVES_OF_LTYPE_CHANNEL_STATES - a1_C3_COMPUTE_DERIVATIVES_OF_LTYPE_CHANNEL_STATES;
  C4' = a2_C4 - a1_C4;
  Open' = fL*C4 - gL*Open;
  CCa0' = a2_Ca0 - a1_Ca0;
  CCa1' = a2_Ca1 - a1_Ca1;
  CCa2' = a2_Ca2 - a1_Ca2;
  CCa3' = a2_Ca3 - a1_Ca3;
  CCa4' = a2_Ca4 - a1_Ca4;
  yCa' = (yCa_inf - yCa)/tau_yCa;
  C0Kv43' = a2_C043 - a1_C043;
  C1Kv43' = a2_C143 - a1_C143;
  C2Kv43' = a2_C243 - a1_C243;
  C3Kv43' = a2_C343 - a1_C343;
  OKv43' = a2_O43 - a1_O43;
  CI0Kv43' = a2_I043 - a1_I043;
  CI1Kv43' = a2_I143 - a1_I143;
  CI2Kv43' = a2_I243 - a1_I243;
  CI3Kv43' = a2_I343 - a1_I343;
  OIKv43' = a2_OI43 - a1_OI43;
  C0Kv14' = a2_C0_COMPUTE_DERIVATIVES_OF_Kv1_4_CHANNEL_STATES - a1_C0_COMPUTE_DERIVATIVES_OF_Kv1_4_CHANNEL_STATES;
  C1Kv14' = a2_C1_COMPUTE_DERIVATIVES_OF_Kv1_4_CHANNEL_STATES - a1_C1_COMPUTE_DERIVATIVES_OF_Kv1_4_CHANNEL_STATES;
  C2Kv14' = a2_C2_COMPUTE_DERIVATIVES_OF_Kv1_4_CHANNEL_STATES - a1_C2_COMPUTE_DERIVATIVES_OF_Kv1_4_CHANNEL_STATES;
  C3Kv14' = a2_C3_COMPUTE_DERIVATIVES_OF_Kv1_4_CHANNEL_STATES - a1_C3_COMPUTE_DERIVATIVES_OF_Kv1_4_CHANNEL_STATES;
  OKv14' = a2_O_COMPUTE_DERIVATIVES_OF_Kv1_4_CHANNEL_STATES - a1_O_COMPUTE_DERIVATIVES_OF_Kv1_4_CHANNEL_STATES;
  CI0Kv14' = a2_CI0 - a1_CI0;
  CI1Kv14' = a2_CI1 - a1_CI1;
  CI2Kv14' = a2_CI2 - a1_CI2;
  CI3Kv14' = a2_CI3 - a1_CI3;
  OIKv14' = a2_OI - a1_OI;
  na1' = -(k18 + k12)*na1 + k21*na2 + k81*na8;
  na2' = k12*na1 - (k21 + k23 + k29)*na2 + k32*na3 + k92*na9;
  na3' = k23*na2 - (k32 + k34 + k310)*na3 + k43*na4 + k103*na10;
  na4' = k34*na3 - (k43 + k45 + k411)*na4 + k54*na5 + k114*na11;
  na5' = k45*na4 - (k54 + k56 + k57 + k512)*na5 + k65*na6 + k75*na7 + k125*na12;
  na6' = k56*na5 - (k65 + k67 + k613)*na6 + k76*na7 + k136*na13;
  na7' = k57*na5 + k67*na6 - (k75 + k76)*na7;
  na8' = k18*na1 - (k81 + k89)*na8 + k98*na9;
  na9' = k29*na2 + k89*na8 - (k98 + k92 + k910)*na9 + k109*na10;
  na10' = k310*na3 + k910*na9 - (k1011 + k103 + k109)*na10 + k1110*na11;
  na11' = k411*na4 + k1011*na10 - (k1110 + k114 + k1112)*na11 + k1211*na12;
  na12' = k512*na5 + k1112*na11 - (k1211 + k125 + k1213)*na12 + k1312*na13;
  na13' = k613*na6 + k1213*na12 - (k1312 + k136)*na13;
  C1Herg' = C2H_to_C1H*C2Herg - C1H_to_C2H*C1Herg;
  C2Herg' = a1_C2_IKr - a2_C2_IKr;
  C3Herg' = a1_C3_IKr - a2_C3_IKr;
  OHerg' = a1_O_IKr - a2_O_IKr;
  IHerg' = a1_I - a2_I;
  C0ks' = -C0ks_C1ks*C0ks + C1ks_C0ks*C1ks;
  C1ks' = C0ks_C1ks*C0ks - (C1ks_C0ks + C1ks_O1ks)*C1ks + O1ks_C1ks*O1ks;
  O1ks' = C1ks_O1ks*C1ks - (O1ks_C1ks + O1ks_O2ks)*O1ks + O2ks_O1ks*O2ks;
  O2ks' = O1ks_O2ks*O1ks - O2ks_O1ks*O2ks;

  // Unit definitions:
  unit ms = 1e-3 second;
  unit per_ms = 1 / (1e-3 second);
  unit micrometer = 1e-6 metre;
  unit L = litre;
  unit uL = 1e-6 litre;
  unit N_per_mm2 = newton / (1e-3 metre)^2;
  unit mm = 1e-3 metre;
  unit cm = 0.01 metre;
  unit cm_per_s = 0.01 metre / second;
  unit mm3 = (1e-3 metre)^3;
  unit mm2 = (1e-3 metre)^2;
  unit cm2 = (0.01 metre)^2;
  unit mV = 1e-3 volt;
  unit per_mV = 1 / (1e-3 volt);
  unit mS = 1e-3 siemens;
  unit uF = 1e-6 farad;
  unit uA_per_uF = 1e-6 ampere / (1e-6 farad);
  unit mS_per_uF = 1e-3 siemens / (1e-6 farad);
  unit pF = 1e-12 farad;
  unit mF = 1e-3 farad;
  unit mF_per_cm2 = 1e-3 farad / (0.01 metre)^2;
  unit uF_per_mm2 = 1e-6 farad / (1e-3 metre)^2;
  unit F_M_per_coulomb = farad * mole / (litre * coulomb);
  unit uA = 1e-6 ampere;
  unit molar = mole / litre;
  unit mM = 1e-3 mole / litre;
  unit uM = 1e-6 mole / litre;
  unit mM_per_ms = 1e-3 mole / (litre * 1e-3 second);
  unit per_mM = litre / (1e-3 mole);
  unit mM3 = (1e-3 mole)^3 / litre^3;
  unit mM4 = (1e-3 mole)^4 / litre^4;
  unit per_uM3_per_ms = litre^3 / ((1e-6 mole)^3 * 1e-3 second);
  unit per_uM4_per_ms = litre^4 / ((1e-6 mole)^4 * 1e-3 second);
  unit litre_per_farad_second = litre / (farad * second);
  unit joule_per_mole_kelvin = joule / (mole * kelvin);
  unit joule_per_kelvin = joule / kelvin;
  unit joule_ms = joule * 1e-3 second;
  unit joule_per_mole = joule / mole;
  unit coulomb_per_millimole = coulomb / (1e-3 mole);
  unit per_mM_per_ms = litre / (1e-3 mole * 1e-3 second);
  unit time = 1e-3 second;
end
