// SBML level 2 version 4

model Sakmann2000_SodiumCurrent_ModelB()
  // This a model from the article:
  // Distribution of a persistent sodium current across the ventricular wall in guinea pigs.
  // Sakmann BF, Spindler AJ, Bryant SM, Linz KW, Noble D. Circ Res 2000 Nov 10;87(10):910-4 11073887 ,
  // Abstract:
  // A tetrodotoxin-sensitive persistent sodium current, I(pNa), was found in guinea pig ventricular myocytes by whole-cell patch clamping. This current was characterized in cells derived from the basal left ventricular subendocardium, midmyocardium, and subepicardium. Midmyocardial cells show a statistically significant (P<0.05) smaller I(pNa) than subendocardial and subepicardial myocytes. There was no significant difference in I(pNa) current density between subepicardial and subendocardial cells. Computer modeling studies support a role of this current in the dispersion of action potential duration across the ventricular wall.
  // This model was taken from the CellML repository and automatically converted to SBML.
  // The original model was: Sakmann BF, Spindler AJ, Bryant SM, Linz KW, Noble D. (2000) - version=1.0
  // The original CellML model was created by:
  // Penny Noble
  // penny.noble@dpag.ox.ac.uk
  // The University of Oxford
  // This model originates from BioModels Database: A Database of Annotated Published Models (http://www.ebi.ac.uk/biomodels/). It is copyright (c) 2005-2011 The BioModels.net Team.
  // To the extent possible under law, all copyright and related or neighbouring rights to this encoded model have been dedicated to the public domain worldwide. Please refer to CC0 Public Domain Dedication for more information.
  // In summary, you are entitled to use this encoded model in absolutely any manner you deem suitable, verbatim, or with modification, alone or embedded it in a larger context, redistribute it, commercially or not, in a restricted way or not. .
  // To cite BioModels Database, please use: Li C, Donizelli M, Rodriguez N, Dharuri H, Endler L, Chelliah V, Li L, He E, Henry A, Stefan MI, Snoep JL, Hucka M, Le Novère N, Laibe C (2010) BioModels Database: An enhanced, curated and annotated resource for published quantitative kinetic models. BMC Syst Biol., 4:92.
  // biomodels.db:MODEL1006230031
  // isDescribedBy pubmed:11073887
  // biomodels.db:MODEL1006230031
  // isDescribedBy pubmed:11073887
  // biomodels.db:MODEL1006230031
  // biomodels.db:MODEL1006230031

  // Compartments:
  compartment COMpartment = 1 litre;

  // Parameters:
  V_membrane = -89.1374183;
  R = 8314.472;
  T = 310;
  F = 9.64853415e4;
  Cm = 0.00012;
  stim_start = 0.1;
  stim_end = 9;
  stim_period = 1;
  stim_duration = 0.003;
  stim_amplitude = -2;
  P_kna = 0.03;
  K_mk1 = 10;
  g_K1 = 0.2;
  xr = 1.98e-5;
  V_rapid_delayed_rectifier_potassium_current_xr_gate = ;
  time_rapid_delayed_rectifier_potassium_current_xr_gate = ;
  xs = 0.0381477;
  V_slow_delayed_rectifier_potassium_current_xs_gate = ;
  time_slow_delayed_rectifier_potassium_current_xs_gate = ;
  nachanneldensity = 1075;
  gnachannel = 20;
  m = 0.0026891;
  V_fast_sodium_current_m_gate = ;
  time_fast_sodium_current_m_gate = ;
  delta_m = 1e-5;
  h = 0.9873107;
  proton = 3.98e-5;
  V_fast_sodium_current_h_gate = ;
  time_fast_sodium_current_h_gate = ;
  g_pna = 0.0045;
  g_bna = 0.0006;
  P_Ca_L = 0.11;
  P_CaK = 0.002;
  P_CaNa = 0.01;
  Km_f2 = 100000;
  Km_f2ds = 0.001;
  R_decay = 20;
  FrICa = 1;
  d = 0.000144;
  V_L_type_Ca_channel_d_gate = ;
  time_L_type_Ca_channel_d_gate = ;
  speed_d = 3;
  f = 0.9999993;
  V_L_type_Ca_channel_f_gate = ;
  time_L_type_Ca_channel_f_gate = ;
  speed_f = 0.3;
  delta_f = 0.0001;
  f2 = 0.254433;
  Ca_i_L_type_Ca_channel_f2_gate = ;
  V_L_type_Ca_channel_f2_gate = ;
  time_L_type_Ca_channel_f2_gate = ;
  f2ds = 0.9292189;
  Ca_ds_L_type_Ca_channel_f2ds_gate = ;
  V_L_type_Ca_channel_f2ds_gate = ;
  time_L_type_Ca_channel_f2ds_gate = ;
  g_bca = 0.00025;
  g_to = 0.005;
  g_tos = 0;
  s = 0.7352365;
  V_transient_outward_current_s_gate = ;
  time_transient_outward_current_s_gate = ;
  r = 0;
  V_transient_outward_current_r_gate = ;
  time_transient_outward_current_r_gate = ;
  i_NaK_max = 0.7;
  K_mK = 1;
  K_mNa = 40;
  k_NaCa = 0.00012;
  n_NaCa = 3;
  d_NaCa = 0;
  gamma = 0.5;
  FRiNaCa = 0.001;
  K_cyca = 0.0003;
  K_xcs = 0.4;
  K_srca = 0.5;
  alpha_up = 0.4;
  beta_up = 0.03;
  K_leak_rate = 0.05;
  K_m_rel = 250;
  K_m_Ca_cyt = 0.0005;
  K_m_Ca_ds = 0.01;
  ActFrac = 0.0101647;
  ProdFrac = 0.9584464;
  Na_o = 140;
  Na_i = 5.6633707;
  Ca_o = 2;
  K_o = 4;
  K_i = 138.7964;
  Ca_i_intracellular_calcium_concentration = 5.44e-5;
  Ca_ds_intracellular_calcium_concentration = 0.0018991;
  Ca_up = 0.7625025;
  Ca_rel = 0.7368094;
  Ca_Calmod = 0.0018544;
  Ca_Trop = 0.0012852;
  Calmod = 0.02;
  Trop = 0.05;
  alpha_Calmod = 100000;
  beta_Calmod = 50;
  alpha_Trop = 100000;
  beta_Trop = 200;
  radius = 12;
  length = 74;
  V_ds_ratio = 0.1;
  V_rel_ratio = 0.1;
  V_e_ratio = 0.4;
  V_up_ratio = 0.01;
  Kdecay = 10;

  // Assignment rules:
  i_Stim := piecewise(stim_amplitude, (time >= stim_start) && (time <= stim_end) && (time - stim_start - floor((time - stim_start)/stim_period)*stim_period <= stim_duration), 0);
  E_Na := R*T/F*ln(Na_o/Na_i);
  E_K := R*T/F*ln(K_o/K_i);
  E_Ks := R*T/F*ln((K_o + P_kna*Na_o)/(K_i + P_kna*Na_i));
  E_Ca := 0.5*R*T/F*ln(Ca_o/Ca_i_intracellular_calcium_concentration);
  E_mh := R*T/F*ln((Na_o + 0.12*K_o)/(Na_i + 0.12*K_i));
  i_K1 := g_K1*K_o/(K_o + K_mk1)*(V_membrane - E_K)/(1 + exp((V_membrane - E_K - 10)*F*1.5/(R*T)));
  g_Kr := Cm*5.563*sqrt(K_o/5.4);
  i_Kr := g_Kr*xr*1/(1 + exp((V_membrane + 9)/22.4))*(V_membrane - E_K);
  xr_inf := 1/(1 + exp(-(V_rapid_delayed_rectifier_potassium_current_xr_gate + 21.5)/7.5));
  tau_xr := 0.001/(0.00138*(V_rapid_delayed_rectifier_potassium_current_xr_gate + 14.2)/(1 - exp(-0.123*(V_rapid_delayed_rectifier_potassium_current_xr_gate + 14.2))) + 0.00061*(V_rapid_delayed_rectifier_potassium_current_xr_gate + 38.9)/(exp(0.145*(V_rapid_delayed_rectifier_potassium_current_xr_gate + 38.9)) - 1));
  g_Ks := Cm*17.5;
  i_Ks := g_Ks*xs^2*(V_membrane - E_Ks);
  xs_inf := 1/(1 + exp(-(V_slow_delayed_rectifier_potassium_current_xs_gate - 1.5)/16.7));
  tau_xs := 0.001/(7.19e-5*(V_slow_delayed_rectifier_potassium_current_xs_gate + 30)/(1 - exp(-0.148*(V_slow_delayed_rectifier_potassium_current_xs_gate + 30))) + 0.000131*(V_slow_delayed_rectifier_potassium_current_xs_gate + 30)/(exp(0.0687*(V_slow_delayed_rectifier_potassium_current_xs_gate + 30)) - 1));
  g_Na := nachanneldensity*Cm*gnachannel*(1.26/(1 + proton/(1000*2.5119e-6)) + 0.34)/1.58;
  i_Na := g_Na*m^3*h*(V_membrane - E_mh);
  E0_m := V_fast_sodium_current_m_gate + 41;
  alpha_m := piecewise(2000, abs(E0_m) < delta_m, 200*E0_m/(1 - exp(-0.1*E0_m)));
  beta_m := 8000*exp(-0.056*(V_fast_sodium_current_m_gate + 66));
  shifth := 32.7/(1 + proton/1000/2.5119e-6) - 32.18;
  alpha_h := 20*exp(-0.125*(V_fast_sodium_current_h_gate + 75 - shifth));
  beta_h := 2000/(1 + 320*exp(-0.1*(V_fast_sodium_current_h_gate + 75 - shifth)));
  i_p_Na := Cm*1000000*g_pna*(V_membrane - 51.0795)/(1 + exp(-(V_membrane + 56.5076)/6.6215))/1000;
  i_b_Na := g_bna*(V_membrane - E_Na);
  i_Ca_L_Ca_cyt := (1 - FrICa)*4*P_Ca_L*d*f*f2*(V_membrane - 50)*F/(R*T)/(1 - exp(-(V_membrane - 50)*F*2/(R*T)))*(Ca_i_intracellular_calcium_concentration*exp(100*F/(R*T)) - Ca_o*exp(-(V_membrane - 50)*F*2/(R*T)));
  i_Ca_L_K_cyt := (1 - FrICa)*P_CaK*P_Ca_L*d*f*f2*(V_membrane - 50)*F/(R*T)/(1 - exp(-(V_membrane - 50)*F/(R*T)))*(K_i*exp(50*F/(R*T)) - K_o*exp(-(V_membrane - 50)*F/(R*T)));
  i_Ca_L_Na_cyt := (1 - FrICa)*P_CaNa*P_Ca_L*d*f*f2*(V_membrane - 50)*F/(R*T)/(1 - exp(-(V_membrane - 50)*F/(R*T)))*(Na_i*exp(50*F/(R*T)) - Na_o*exp(-(V_membrane - 50)*F/(R*T)));
  i_Ca_L_Ca_ds := FrICa*4*P_Ca_L*d*f*f2ds*(V_membrane - 50)*F/(R*T)/(1 - exp(-(V_membrane - 50)*F*2/(R*T)))*(Ca_i_intracellular_calcium_concentration*exp(100*F/(R*T)) - Ca_o*exp(-(V_membrane - 50)*F*2/(R*T)));
  i_Ca_L_K_ds := FrICa*P_CaK*P_Ca_L*d*f*f2ds*(V_membrane - 50)*F/(R*T)/(1 - exp(-(V_membrane - 50)*F/(R*T)))*(K_i*exp(50*F/(R*T)) - K_o*exp(-(V_membrane - 50)*F/(R*T)));
  i_Ca_L_Na_ds := FrICa*P_CaNa*P_Ca_L*d*f*f2ds*(V_membrane - 50)*F/(R*T)/(1 - exp(-(V_membrane - 50)*F/(R*T)))*(Na_i*exp(50*F/(R*T)) - Na_o*exp(-(V_membrane - 50)*F/(R*T)));
  i_Ca_L := i_Ca_L_Ca_cyt + i_Ca_L_K_cyt + i_Ca_L_Na_cyt + i_Ca_L_Ca_ds + i_Ca_L_K_ds + i_Ca_L_Na_ds;
  E0_d := V_L_type_Ca_channel_d_gate + 24 - 5;
  alpha_d := piecewise(120, abs(E0_d) < 0.0001, 30*E0_d/(1 - exp(-E0_d/7.2)));
  beta_d := piecewise(120, abs(E0_d) < 0.0001, 12*E0_d/(exp(E0_d/(2.5*7.2)) - 1));
  E0_f := V_L_type_Ca_channel_f_gate + 34;
  alpha_f := piecewise(25, abs(E0_f) < delta_f, 6.25*E0_f/(exp(E0_f/5.1) - 1));
  beta_f := 12/(1 + exp(-1*(V_L_type_Ca_channel_f_gate + 34)/5.1));
  i_b_Ca := g_bca*(V_membrane - E_Ca);
  i_to := g_to*(g_tos + s*(1 - g_tos))*r*(V_membrane - E_K);
  alpha_s := 0.033*exp(-V_transient_outward_current_s_gate/17);
  beta_s := 33/(1 + exp(-0.125*(V_transient_outward_current_s_gate + 10)));
  i_NaK := i_NaK_max*K_o/(K_mK + K_o)*Na_i/(K_mNa + Na_i);
  i_NaCa_cyt := (1 - FRiNaCa)*k_NaCa*(exp(gamma*(n_NaCa - 2)*V_membrane*F/(R*T))*Na_i^n_NaCa*Ca_o - exp((gamma - 1)*(n_NaCa - 2)*V_membrane*F/(R*T))*Na_o^n_NaCa*Ca_i_intracellular_calcium_concentration)/((1 + d_NaCa*(Ca_i_intracellular_calcium_concentration*Na_o^n_NaCa + Ca_o*Na_i^n_NaCa))*(1 + Ca_i_intracellular_calcium_concentration/0.0069));
  i_NaCa_ds := FRiNaCa*k_NaCa*(exp(gamma*(n_NaCa - 2)*V_membrane*F/(R*T))*Na_i^n_NaCa*Ca_o - exp((gamma - 1)*(n_NaCa - 2)*V_membrane*F/(R*T))*Na_o^n_NaCa*Ca_ds_intracellular_calcium_concentration)/((1 + d_NaCa*(Ca_ds_intracellular_calcium_concentration*Na_o^n_NaCa + Ca_o*Na_i^n_NaCa))*(1 + Ca_ds_intracellular_calcium_concentration/0.0069));
  i_NaCa := i_NaCa_cyt + i_NaCa_ds;
  K_1 := K_cyca*K_xcs/K_srca;
  K_2 := Ca_i_intracellular_calcium_concentration + Ca_up*K_1 + K_cyca*K_xcs + K_cyca;
  i_up := Ca_i_intracellular_calcium_concentration/K_2*alpha_up - Ca_up*K_1/K_2*beta_up;
  i_trans := 50*(Ca_up - Ca_rel);
  VoltDep := exp(0.08*(V_membrane - 40));
  CaiReg := Ca_i_intracellular_calcium_concentration/(Ca_i_intracellular_calcium_concentration + K_m_Ca_cyt);
  CadsReg := Ca_ds_intracellular_calcium_concentration/(Ca_ds_intracellular_calcium_concentration + K_m_Ca_ds);
  RegBindSite := CaiReg + (1 - CaiReg)*CadsReg;
  ActRate := 0*VoltDep + 500*RegBindSite^2;
  InactRate := 60 + 500*RegBindSite^2;
  SpeedRel := piecewise(5, V_membrane < -50, 1);
  PrecFrac := 1 - ActFrac - ProdFrac;
  i_rel := ((ActFrac/(ActFrac + 0.25))^2*K_m_rel + K_leak_rate)*Ca_rel;
  V_Cell := 3.141593*(radius/1000)^2*length/1000;
  V_i_ratio := 1 - V_e_ratio - V_up_ratio - V_rel_ratio;
  V_i := V_Cell*V_i_ratio;

  // Rate rules:
  V_membrane' = -1/Cm*(i_Stim + i_K1 + i_to + i_Kr + i_Ks + i_NaK + i_Na + i_b_Na + i_p_Na + i_Ca_L_Na_cyt + i_Ca_L_Na_ds + i_NaCa_cyt + i_NaCa_ds + i_Ca_L_Ca_cyt + i_Ca_L_Ca_ds + i_Ca_L_K_cyt + i_Ca_L_K_ds + i_b_Ca);
  xr' = (xr_inf - xr)/tau_xr;
  xs' = (xs_inf - xs)/tau_xs;
  m' = alpha_m*(1 - m) - beta_m*m;
  h' = alpha_h*(1 - h) - beta_h*h;
  d' = speed_d*(alpha_d*(1 - d) - beta_d*d);
  f' = speed_f*(alpha_f*(1 - f) - beta_f*f);
  f2' = 1 - 1*(Ca_i_L_type_Ca_channel_f2_gate/(Km_f2 + Ca_i_L_type_Ca_channel_f2_gate) + f2);
  f2ds' = R_decay*(1 - (Ca_ds_L_type_Ca_channel_f2ds_gate/(Km_f2ds + Ca_ds_L_type_Ca_channel_f2ds_gate) + f2ds));
  s' = alpha_s*(1 - s) - beta_s*s;
  r' = 333*(1/(1 + exp(-(V_transient_outward_current_r_gate + 4)/5)) - r);
  ActFrac' = PrecFrac*SpeedRel*ActRate - ActFrac*SpeedRel*InactRate;
  ProdFrac' = ActFrac*SpeedRel*InactRate - SpeedRel*1*ProdFrac;
  Na_i' = -1/(1*V_i*F)*(i_Na + i_p_Na + i_b_Na + 3*i_NaK + 3*i_NaCa_cyt + i_Ca_L_Na_cyt + i_Ca_L_Na_ds);
  K_i' = -1/(1*V_i*F)*(i_K1 + i_Kr + i_Ks + i_Ca_L_K_cyt + i_Ca_L_K_ds + i_to - 2*i_NaK);
  Ca_i_intracellular_calcium_concentration' = -1/(2*1*V_i*F)*(i_Ca_L_Ca_cyt + i_b_Ca - 2*i_NaCa_cyt - 2*i_NaCa_ds) + Ca_ds_intracellular_calcium_concentration*V_ds_ratio*Kdecay + i_rel*V_rel_ratio/V_i_ratio - Ca_Calmod - Ca_Trop - i_up;
  Ca_ds_intracellular_calcium_concentration' = -1*i_Ca_L_Ca_ds/(2*1*V_ds_ratio*V_i*F) - Ca_ds_intracellular_calcium_concentration*Kdecay;
  Ca_up' = V_i_ratio/V_up_ratio*i_up - i_trans;
  Ca_rel' = V_up_ratio/V_rel_ratio*i_trans - i_rel;
  Ca_Calmod' = alpha_Calmod*Ca_i_intracellular_calcium_concentration*(Calmod - Ca_Calmod) - beta_Calmod*Ca_Calmod;
  Ca_Trop' = alpha_Trop*Ca_i_intracellular_calcium_concentration*(Trop - Ca_Trop) - beta_Trop*Ca_Trop;

  // Unit definitions:
  unit micrometre = 1e-6 metre;
  unit per_second = 1 / second;
  unit millivolt = 1e-3 volt;
  unit per_millivolt = 1 / (1e-3 volt);
  unit per_millivolt_second = 1 / (1e-3 volt * second);
  unit microS = 1e-6 siemens;
  unit microF = 1e-6 farad;
  unit microS_per_microF = 1e-6 siemens / (1e-6 farad);
  unit per_microF = 1 / (1e-6 farad);
  unit nanoA = 1e-9 ampere;
  unit nanoA_per_millimolar = 1e-9 ampere * litre / (1e-3 mole);
  unit millimolar = 1e-3 mole / litre;
  unit millimolar4 = (1e-3 mole)^4 / litre^4;
  unit millimolar_per_second = 1e-3 mole / (litre * second);
  unit per_millimolar_second = litre / (1e-3 mole * second);
  unit joule_per_kilomole_kelvin = joule / (1000 mole * kelvin);
  unit coulomb_per_mole = coulomb / mole;
  unit micrometre3 = (1e-6 metre)^3;
  unit litre_micrometre3 = litre / (1e-6 metre)^3;
end
