// SBML level 2 version 4

model Nelson1995_HIV1therapy_DIVadministraion_ModelB()
  // This a model from the article:
  // Modeling defective interfering virus therapy for AIDS: conditions for DIV survival.
  // Nelson GW, Perelson AS. Math Biosci 1995 Feb;125(2):127-53 7881191 ,
  // Abstract:
  // The administration of a genetically engineered defective interfering virus (DIV) that interferes with HIV-1 replication has been proposed as a therapy for HIV-1 infection and AIDS. The proposed interfering virus, which is designed to superinfect HIV-1 infected cells, carries ribozymes that cleave conserved regions in HIV-1 RNA that code for the viral envelope protein. Thus DIV infection of HIV-1 infected cells should reduce or eliminate viral production by these cells. The success of this therapeutic strategy will depend both on the intercellular interaction of DIV and HIV-1, and on the overall dynamics of virus and T cells in the body. To study these dynamical issues, we have constructed a mathematical model of the interaction of HIV-1, DIV, and CD4+ cells in vivo. The results of both mathematical analysis and numerical simulation indicate that survival of the engineered DIV purely on a peripheral blood HIV-1 infection is unlikely. However, analytical results indicate that DIV might well survive on HIV-1 infected CD4+ cells in lymphoid organs such as lymph nodes and spleen, or on other HIV-1 infected cells in these organs.
  // This model was taken from the CellML repository and automatically converted to SBML.
  // The original model was: Nelson GW, Perelson AS. (1995) - version=1.0
  // The original CellML model was created by:
  // Ethan Choi
  // mcho099@aucklanduni.ac.nz
  // The University of Auckland
  // This model originates from BioModels Database: A Database of Annotated Published Models (http://www.ebi.ac.uk/biomodels/). It is copyright (c) 2005-2011 The BioModels.net Team.
  // To the extent possible under law, all copyright and related or neighbouring rights to this encoded model have been dedicated to the public domain worldwide. Please refer to CC0 Public Domain Dedication for more information.
  // In summary, you are entitled to use this encoded model in absolutely any manner you deem suitable, verbatim, or with modification, alone or embedded it in a larger context, redistribute it, commercially or not, in a restricted way or not..
  // To cite BioModels Database, please use: Li C, Donizelli M, Rodriguez N, Dharuri H, Endler L, Chelliah V, Li L, He E, Henry A, Stefan MI, Snoep JL, Hucka M, Le Novère N, Laibe C (2010) BioModels Database: An enhanced, curated and annotated resource for published quantitative kinetic models. BMC Syst Biol., 4:92.
  // biomodels.db:MODEL1006230033
  // isDescribedBy pubmed:7881191
  // biomodels.db:MODEL1006230033
  // isDescribedBy pubmed:7881191
  // biomodels.db:MODEL1006230033
  // biomodels.db:MODEL1006230033

  // Compartments:
  compartment COMpartment = 1 litre;

  // Parameters:
  mu_T = 0.02;
  r = 0.03;
  T_max = 1500;
  s_0 = 10;
  theta = 1;
  T = 1000;
  k_2 = 0.017;
  T_1 = 0;
  k_1D = 2.4e-5;
  mu_b = 0.24;
  T_2 = 0;
  k_s = 0.48;
  mu_bD = 0.12;
  T_D2 = 0;
  mu_TD = 0.02;
  T_D1 = 0;
  mu_D = 0.76;
  t_DIV = 2557;
  D_ode = 0;
  D_0 = 0.1;
  k_1 = 2.4e-5;
  mu_V = 2.4;
  V = 0.001;
  k_1_ = 2.4e-7;
  V_ = 0;
  N_0 = 300;
  gamma = 25;
  t_c = 7305;

  // Assignment rules:
  s_V := s_0*theta/(theta + V);
  D := piecewise(0, time < t_DIV, D_ode);
  N_D_t := 0.2*N_t;
  pi_D_t := 0.5*mu_b*N_t;
  N_2_t := 0.1*N_t;
  N_t_ := 0.1*N_t;
  pi_t_ := 0.01*mu_b*N_t;
  N_t := N_0*(1 + gamma*(time^2/(time^2 + t_c^2)));
  T_tot := T + T_1 + T_2 + T_D2 + T_D1;

  // Rate rules:
  T' = s_V - mu_T*T + r*T*(1 - (T + T_1)/T_max) - k_1*V*T - k_1_*V_*T;
  T_1' = k_1*V*T + k_1_*V_*T - mu_T*T_1 - k_2*T_1;
  T_2' = k_2*T_1 - k_1D*D*T_2 - mu_b*T_2;
  T_D2' = k_1D*D*T_2 - k_s*T_D2 - mu_bD*T_D2;
  T_D1' = k_s*T_D2 - mu_TD*T_D1;
  D_ode' = piecewise(D_0/t_DIV, time < t_DIV, N_D_t*mu_bD*T_D2 + pi_D_t*T_D1 - mu_D*D_ode);
  V' = N_t*mu_b*T_2 + N_2_t*mu_bD*T_D2 - k_1*V*T - mu_V*V;
  V_' = N_t_*mu_bD*T_D2 + pi_t_*T_D1 - mu_V*V_ - k_1_*T*V_;

  // Unit definitions:
  unit day = 86400 second;
  unit per_day = 1 / (86400 second);
  unit year = 3.155674e7 second;
  unit micro_L = 1e-6 litre;
  unit per_micro_L = 1 / (1e-6 litre);
  unit micro_L_per_day = 1e-6 litre / (86400 second);
  unit per_micro_L_day = 1 / (1e-6 litre * 86400 second);
  unit time = 86400 second;
end
