// SBML level 2 version 4

model Wu2006_ATPsynthesis_SkeletalMuscle()
  // This a model from the article:
  // Oxidative ATP synthesis in skeletal muscle is controlled by substrate feedback.
  // Wu F, Jeneson JA, Beard DA. Am J Physiol Cell Physiol 2007 Jan;292(1):C115-24 16837647 ,
  // Abstract:
  // Data from (31)P-nuclear magnetic resonance spectroscopy of human forearm flexor muscle were analyzed based on a previously developed model of mitochondrial oxidative phosphorylation (PLoS Comp Bio 1: e36, 2005) to test the hypothesis that substrate level (concentrations of ADP and inorganic phosphate) represents the primary signal governing the rate of mitochondrial ATP synthesis and maintaining the cellular ATP hydrolysis potential in skeletal muscle. Model-based predictions of cytoplasmic concentrations of phosphate metabolites (ATP, ADP, and P(i)) matched data obtained from 20 healthy volunteers and indicated that as work rate is varied from rest to submaximal exercise commensurate increases in the rate of mitochondrial ATP synthesis are effected by changes in concentrations of available ADP and P(i). Additional data from patients with a defect of complex I of the respiratory chain and a patient with a deficiency in the mitochondrial adenine nucleotide translocase were also predicted the by the model by making the appropriate adjustments to the activities of the affected proteins associates with the defects, providing both further validation of the biophysical model of the control of oxidative phosphorylation and insight into the impact of these diseases on the ability of the cell to maintain its energetic state.
  // This model was taken from the CellML repository and automatically converted to SBML.
  // The original model was: Wu F, Jeneson JA, Beard DA. (2006) - version=1.0
  // The original CellML model was created by:
  // Geoffrey Nunns
  // gnunns1@jhu.edu
  // The University of Auckland
  // This model originates from BioModels Database: A Database of Annotated Published Models (http://www.ebi.ac.uk/biomodels/). It is copyright (c) 2005-2011 The BioModels.net Team.
  // To the extent possible under law, all copyright and related or neighbouring rights to this encoded model have been dedicated to the public domain worldwide. Please refer to CC0 Public Domain Dedication for more information.
  // In summary, you are entitled to use this encoded model in absolutely any manner you deem suitable, verbatim, or with modification, alone or embedded it in a larger context, redistribute it, commercially or not, in a restricted way or not..
  // To cite BioModels Database, please use: Li C, Donizelli M, Rodriguez N, Dharuri H, Endler L, Chelliah V, Li L, He E, Henry A, Stefan MI, Snoep JL, Hucka M, Le Novère N, Laibe C (2010) BioModels Database: An enhanced, curated and annotated resource for published quantitative kinetic models. BMC Syst Biol., 4:92.
  // biomodels.db:MODEL1006230034
  // isDescribedBy pubmed:16837647
  // biomodels.db:MODEL1006230034
  // isDescribedBy pubmed:16837647
  // biomodels.db:MODEL1006230034
  // biomodels.db:MODEL1006230034

  // Compartments:
  compartment COMpartment = 1 litre;

  // Parameters:
  time_Environment has second;
  O2_x = 3.48e-5 molar;
  X_AtC = 0 mole_per_second_per_l_cell;
  RT = 2.5775 kilojoule_per_mole;
  F = 0.096484 kilojoule_per_mole_per_millivolt;
  dG_C1o = -69.37 kilojoule_per_mole;
  dG_C3o = -32.53 kilojoule_per_mole;
  dG_C4o = -122.94 kilojoule_per_mole;
  dG_C1op has kilojoule_per_mole;
  dG_C3op has kilojoule_per_mole;
  dG_C4op has kilojoule_per_mole;
  dG_F1o = 36.03 kilojoule_per_mole;
  dG_H has kilojoule_per_mole;
  k_dHPI has molar;
  k_dHatp has molar;
  k_dHadp has molar;
  K_DT = 2.4e-5 molar;
  K_DD = 0.000347 molar;
  K_AK = 0.4331 dimensionless;
  K_CK = 1660000000 per_molar;
  V_cyto = 0.894;
  V_mito = 0.056;
  n_A = 3 dimensionless;
  C_tot = 0.0027 molar;
  CR_tot = 0.0427 molar;
  Q_tot = 0.00135 molar;
  NAD_tot = 0.00297 molar;
  pH_C = 7 dimensionless;
  H_c has molar;
  K_c = 0.15 molar;
  H_i has molar;
  K_i has molar;
  k_PI1 = 0.0001553 molar;
  k_PI2 = 0.0008222 molar;
  k_PI3 = 0.0003601 molar;
  k_PI4 = 0.005651 molar;
  k_PIH = 0.0002542 molar;
  r = 4.559 dimensionless;
  X_DH = 0.0866 mole_per_second_per_l_mito_per_molar;
  X_C1 = 4405 mole_per_second_per_l_mito_per_molar_per_molar;
  X_C3 = 4.887;
  X_C4 = 6.766e-5 mole_per_second_per_l_mito_per_molar;
  X_F1 = 1000 mole_per_second_per_l_mito_per_molar_per_molar;
  X_ANT = 0.008123 mole_per_second_per_l_mito;
  X_PI1 = 385000 mole_per_second_per_l_mito_per_molar;
  X_KH = 56510000 mole_per_second_per_l_mito_per_molar_per_molar;
  X_Hle = 200 mole_per_second_per_l_mito_per_molar_per_millivolt;
  X_K = 0 mole_per_second_per_l_mito_per_molar_per_millivolt;
  k_mADP = 3.5e-6 molar;
  X_AK = 10000000 mole_per_second_per_l_mito_per_molar_per_molar;
  X_CK = 10000000 mole_per_second_per_l_mito_per_molar_per_molar;
  X_MgA = 10000000 mole_per_second_per_l_mito_per_molar_per_molar;
  k_O2 = 0.00012 molar;
  x_buff = 100 per_molar;
  C_IM = 6.75e-6 mole_per_l_mito_per_millivolt;
  X_A = 85 micron_per_second;
  X_PI2 = 327 micron_per_second;
  gamma = 5.99 per_micron;
  NAD_x has molar;
  QH2_x has molar;
  Cred_x has molar;
  ATP_fx has molar;
  ADP_fx has molar;
  pH_x = 7 dimensionless;
  H_x has molar;
  K_x = 0.14661 molar;
  Mg_x = 0.0010229 molar;
  NADH_x = 0.0015723 molar;
  Q_x = 0.000675 molar;
  Cox_x = 0.00135 molar;
  ATP_x = 0.0026657 molar;
  ADP_x = 0.0073343 molar;
  ATP_mx = 0.0026046 molar;
  ADP_mx = 0.0054765 molar;
  PI_x = 0.000172 molar;
  ATP_fi has molar;
  ADP_fi has molar;
  ATP_i = 0.0065339 molar;
  ADP_i = 6.5773e-5 molar;
  AMP_i = 2.8837e-7 molar;
  ATP_mi = 0.0063812 molar;
  ADP_mi = 4.8866e-5 molar;
  PI_i = 0.000172 molar;
  Mg_i = 0.0010029 molar;
  ATP_c = 0.0081312 molar;
  ADP_c = 6.85e-5 molar;
  AMP_c = 3.0911e-7 molar;
  ATP_mc = 0.0079786 molar;
  ADP_mc = 5.1958e-5 molar;
  PI_c = 0.0087702 molar;
  Mg_c = 0.001003 molar;
  PCr_c = 0.023589 molar;
  ATP_fc has molar;
  ADP_fc has molar;
  Cr_c has molar;
  deltaPsi = 166.67 millivolt;
  J_DH has mole_per_second_per_l_mito;
  J_C1 has mole_per_second_per_l_mito;
  J_C3 has mole_per_second_per_l_mito;
  J_C4 has mole_per_second_per_l_mito;
  J_F1 has mole_per_second_per_l_mito;
  J_ANT has mole_per_second_per_l_mito;
  mincon = 1e-9 molar;
  Psi_x has millivolt;
  Psi_i has millivolt;
  J_PI1 has mole_per_second_per_l_mito;
  H2PIi has molar;
  H2PIx has molar;
  J_Hle has mole_per_second_per_l_mito;
  mincond_J_Hle = 1e-6 millivolt;
  J_KH has mole_per_second_per_l_mito;
  J_K has mole_per_second_per_l_mito;
  mincond_J_K = 1e-6 millivolt;
  J_AMP has mole_per_second_per_l_mito;
  J_ADP has mole_per_second_per_l_mito;
  J_ATP has mole_per_second_per_l_mito;
  J_PI2 has mole_per_second_per_l_mito;
  J_MgATP_x has mole_per_second_per_l_mito;
  J_MgADP_x has mole_per_second_per_l_mito;
  J_MgATP_i has mole_per_second_per_l_mito;
  J_MgADP_i has mole_per_second_per_l_mito;
  J_MgATP_c has mole_per_second_per_l_cyto;
  J_MgADP_c has mole_per_second_per_l_cyto;
  J_AKi has mole_per_second_per_l_mito;
  J_AKc has mole_per_second_per_l_cyto;
  J_AtC has mole_per_second_per_l_cell;
  J_CKc has mole_per_second_per_l_cyto;

  // Assignment rules:
  H_c := 1*10^(-pH_C);
  k_dHPI := 1*10^(-6.75);
  k_dHatp := 1*10^(-6.48);
  k_dHadp := 1*10^(-6.29);
  W_m := 0.664*1.09;
  W_x := 0.9*W_m;
  W_i := 0.1*W_m;
  W_c := 0.807*1.044;
  H_i := H_c;
  K_i := K_c;
  Rm_cyto := V_mito/V_cyto;
  Rm_cell := V_mito;
  Rc_cell := V_cyto;
  dG_H := F*deltaPsi + RT*ln(H_i/H_x);
  dG_C1op := dG_C1o - 1*RT*ln(H_x/1);
  dG_C3op := dG_C3o + 2*RT*ln(H_x/1);
  dG_C4op := dG_C4o - 2*RT*ln(H_x/1);
  NAD_x := NAD_tot - NADH_x;
  QH2_x := Q_tot - Q_x;
  Cred_x := C_tot - Cox_x;
  ATP_fx := ATP_x - ATP_mx;
  ADP_fx := ADP_x - ADP_mx;
  H_x := 1*10^(-pH_x);
  ATP_fi := ATP_i - ATP_mi;
  ADP_fi := ADP_i - ADP_mi;
  ATP_fc := ATP_c - ATP_mc;
  ADP_fc := ADP_c - ADP_mc;
  Cr_c := CR_tot - PCr_c;
  J_DH := X_DH*(r*NAD_x - NADH_x)*(1 + PI_x/k_PI1)/(1 + PI_x/k_PI2);
  J_C1 := X_C1*(exp(-(dG_C1op + 4*dG_H)/RT)*NADH_x*Q_x - NAD_x*QH2_x);
  J_C3 := X_C3*(1 + PI_x/k_PI3)/(1 + PI_x/k_PI4)*(exp(-(dG_C3op + 4*dG_H - 2*F*deltaPsi)/(2*RT))*Cox_x*sqrt(QH2_x) - Cred_x*sqrt(Q_x));
  J_C4 := piecewise(0, O2_x < 1, X_C4*O2_x/(O2_x + k_O2)*(Cred_x/C_tot)*(exp(-(dG_C4op + 2*dG_H)/(2*RT))*Cred_x*(O2_x/1)^0.25 - Cox_x*exp(F*deltaPsi/RT)));
  J_F1 := X_F1*(exp(-(dG_F1o - n_A*dG_H)/RT)*K_DD/K_DT*ADP_mx*PI_x - ATP_mx*1);
  Psi_x := -0.65*deltaPsi;
  Psi_i := 0.35*deltaPsi;
  J_ANT := piecewise(X_ANT*(ADP_fi/(ADP_fi + ATP_fi*exp(-F*Psi_i/RT)) - ADP_fx/(ADP_fx + ATP_fx*exp(-F*Psi_x/RT)))*(ADP_fi/(ADP_fi + k_mADP)), (ADP_fi > mincon) || (ATP_fi > mincon), 0);
  H2PIi := PI_i*H_i/(H_i + k_dHPI);
  H2PIx := PI_x*H_x/(H_x + k_dHPI);
  J_PI1 := X_PI1*(H_i*H2PIi - H_x*H2PIx)/(H2PIi + k_PIH);
  J_Hle := piecewise(X_Hle*deltaPsi*(H_i*exp(F*deltaPsi/RT) - H_x)/(exp(F*deltaPsi/RT) - 1), abs(deltaPsi) > mincond_J_Hle, X_Hle*RT*(H_i - H_x)/F);
  J_KH := X_KH*(K_i*H_x - K_x*H_i);
  J_K := piecewise(X_K*deltaPsi*(K_i*exp(F*deltaPsi/RT) - K_x)/(exp(F*deltaPsi/RT) - 1), abs(deltaPsi) > mincond_J_K, X_K*RT*(K_i - K_x)/F);
  J_AMP := gamma*X_A*(AMP_c - AMP_i);
  J_ADP := gamma*X_A*(ADP_c - ADP_i);
  J_ATP := gamma*X_A*(ATP_c - ATP_i);
  J_PI2 := gamma*X_PI2*(PI_c - PI_i);
  J_MgATP_x := X_MgA*(ATP_fx*Mg_x - K_DT*ATP_mx);
  J_MgADP_x := X_MgA*(ADP_fx*Mg_x - K_DD*ADP_mx);
  J_MgATP_i := X_MgA*(ATP_fi*Mg_i - K_DT*ATP_mi);
  J_MgADP_i := X_MgA*(ADP_fi*Mg_i - K_DD*ADP_mi);
  J_MgATP_c := X_MgA*1*(ATP_fc*Mg_c - K_DT*ATP_mc);
  J_MgADP_c := X_MgA*1*(ADP_fc*Mg_c - K_DD*ADP_mc);
  J_AKi := X_AK*(K_AK*ADP_i*ADP_i - AMP_i*ATP_i);
  J_AKc := X_AK*1*(K_AK*ADP_c*ADP_c - AMP_c*ATP_c);
  J_AtC := X_AtC;
  J_CKc := X_CK*1*(K_CK*ADP_c*PCr_c*H_c - ATP_c*Cr_c);

  // Rate rules:
  pH_x' = -1/2.303*x_buff*(J_DH - 5*J_C1 - 2*J_C3 - 4*J_C4 + (n_A - 1)*J_F1 + 2*J_PI1 - J_KH + J_Hle)/W_x;
  K_x' = (J_KH + J_K)/W_x;
  Mg_x' = (-J_MgADP_x - J_MgATP_x)/W_x;
  NADH_x' = (J_DH - J_C1)/W_x;
  Q_x' = -(J_C1 - J_C3)/W_x;
  Cox_x' = -(2*J_C3 - 2*J_C4)/W_x;
  ATP_x' = (J_F1 - J_ANT)/W_x;
  ADP_x' = (-J_F1 + J_ANT)/W_x;
  ATP_mx' = J_MgATP_x/W_x;
  ADP_mx' = J_MgADP_x/W_x;
  PI_x' = (-J_F1 + J_PI1)/W_x;
  ATP_i' = (J_ATP + J_ANT + J_AKi)/W_i;
  ADP_i' = (J_ADP - J_ANT - 2*J_AKi)/W_i;
  AMP_i' = (J_AMP + J_AKi)/W_i;
  ATP_mi' = J_MgATP_i/W_i;
  ADP_mi' = J_MgADP_i/W_i;
  PI_i' = (-J_PI1 + J_PI2)/W_i;
  Mg_i' = (-J_MgADP_i - J_MgATP_i)/W_i;
  ATP_c' = (-Rm_cyto*J_ATP + J_AKc - J_AtC/Rc_cell + J_CKc)/W_c;
  ADP_c' = (-Rm_cyto*J_ADP - 2*J_AKc + J_AtC/Rc_cell - J_CKc)/W_c;
  AMP_c' = (-Rm_cyto*J_AMP + J_AKc)/W_c;
  ATP_mc' = J_MgATP_c/W_c;
  ADP_mc' = J_MgADP_c/W_c;
  PI_c' = (-J_PI2*Rm_cyto + J_AtC/Rc_cell)/W_c;
  Mg_c' = (-J_MgATP_c - J_MgADP_c)/W_c;
  PCr_c' = -J_CKc/W_c;
  deltaPsi' = (4*J_C1 + 2*J_C3 + 4*J_C4 - n_A*J_F1 - J_ANT - J_Hle - J_K)/C_IM;

  // Unit definitions:
  unit molar = mole / litre;
  unit molar_per_second = mole / (litre * second);
  unit micromolar = 1e-6 mole * 1e-6 litre;
  unit per_molar = litre / mole;
  unit micron_per_second = 1e-6 metre / second;
  unit per_micron = 1 / (1e-6 metre);
  unit kilojoule_per_mole = 1000 joule / mole;
  unit millivolt = 1e-3 volt;
  unit kilojoule_per_mole_per_millivolt = 1000 joule / (mole * 1e-3 volt);
  unit molar_per_cell = mole / litre;
  unit molar_per_cyto = mole / litre;
  unit molar_per_mito = mole / litre;
  unit mole_per_second_per_l_cell = mole / (litre * second);
  unit mole_per_second_per_l_cyto = mole / (litre * second);
  unit mole_per_second_per_l_mito = mole / (litre * second);
  unit mole_per_second_per_l_mito_per_molar = mole * litre / (litre * second * mole);
  unit mole_per_second_per_l_cyto_per_molar = mole * litre / (litre * second * mole);
  unit mole_per_second_per_l_mito_per_molar_per_molar = mole * litre * litre / (litre * second * mole * mole);
  unit mole_per_second_per_l_cyto_per_molar_per_molar = litre / (mole * second);
  unit mole_per_l_mito_per_millivolt = mole / (litre * 1e-3 volt);
  unit mole_per_second_per_l_mito_per_molar_per_millivolt = mole * litre / (litre * second * mole * 1e-3 volt);
end
