// SBML level 2 version 4

model Weinstein2000_OMCD()
  // This a model from the article:
  // A mathematical model of the outer medullary collecting duct of the rat.
  // Weinstein AM. Am J Physiol Renal Physiol 2000 Jul;279(1):F24-45 10894785 ,
  // Abstract:
  // A mathematical model of the outer medullary collecting duct (OMCD) has been developed, consisting of alpha-intercalated cells and a paracellular pathway, and which includes Na(+), K(+), Cl(-), HCO(3)(-), CO(2), H(2)CO(3), phosphate, ammonia, and urea. Proton secretion across the luminal cell membrane is mediated by both H(+)-ATPase and H-K-ATPase, with fluxes through the H-K-ATPase given by a previously developed kinetic model (Weinstein AM. Am J Physiol Renal Physiol 274: F856-F867, 1998). The flux across each ATPase is substantial, and variation in abundance of either pump can be used to control OMCD proton secretion. In comparison with the H(+)-ATPase, flux through the H-K-ATPase is relatively insensitive to changes in lumen pH, so as luminal acidification proceeds, proton secretion shifts toward this pathway. Peritubular HCO(3)(-) exit is via a conductive pathway and via the Cl(-)/HCO(3)(-) exchanger, AE1. To represent AE1, a kinetic model has been developed based on transport studies obtained at 38 degrees C in red blood cells. (Gasbjerg PK, Knauf PA, and Brahm J. J Gen Physiol 108: 565-575, 1996; Knauf PA, Gasbjerg PK, and Brahm J. J Gen Physiol 108: 577-589, 1996). Model calculations indicate that if all of the chloride entry via AE1 recycles across a peritubular chloride channel and if this channel is anything other than highly selective for chloride, then it should conduct a substantial fraction of the bicarbonate exit. Since both luminal membrane proton pumps are sensitive to small changes in cytosolic pH, variation in density of either AE1 or peritubular anion conductance can modulate OMCD proton secretory rate. With respect to the OMCD in situ, available buffer is predicted to be abundant, including delivered HCO(3)(-) and HPO(4)(2-), as well as peritubular NH(3). Thus, buffer availability is unlikely to exert a regulatory role in total proton secretion by this tubule segment.
  // This model was taken from the CellML repository and automatically converted to SBML.
  // The original model was: Weinstein AM. (2000) - version=1.0
  // The original CellML model was created by:
  // Jonna Terkildsen
  // j.terkildsen@auckland.ac.nz
  // The University of Auckland
  // This model originates from BioModels Database: A Database of Annotated Published Models (http://www.ebi.ac.uk/biomodels/). It is copyright (c) 2005-2011 The BioModels.net Team.
  // To the extent possible under law, all copyright and related or neighbouring rights to this encoded model have been dedicated to the public domain worldwide. Please refer to CC0 Public Domain Dedication for more information.
  // In summary, you are entitled to use this encoded model in absolutely any manner you deem suitable, verbatim, or with modification, alone or embedded it in a larger context, redistribute it, commercially or not, in a restricted way or not..
  // To cite BioModels Database, please use: Li C, Donizelli M, Rodriguez N, Dharuri H, Endler L, Chelliah V, Li L, He E, Henry A, Stefan MI, Snoep JL, Hucka M, Le Novère N, Laibe C (2010) BioModels Database: An enhanced, curated and annotated resource for published quantitative kinetic models. BMC Syst Biol., 4:92.
  // biomodels.db:MODEL1006230037
  // isDescribedBy pubmed:10894785
  // biomodels.db:MODEL1006230037
  // isDescribedBy pubmed:10894785
  // biomodels.db:MODEL1006230037
  // biomodels.db:MODEL1006230037

  // Compartments:
  compartment COMpartment = 1 litre;

  // Parameters:
  HCO3_i = 0;
  HCO3_e = 26;
  Cl_i = 29;
  Cl_e = 114;
  x_Tmax = 1;
  K_I = 172;
  Kc_p = 50;
  Kc_pp = 50;
  Kb_p = 198;
  Kb_pp = 198;
  Pc_p = 562;
  Pc_pp = 61;
  Pb_p = 1247;
  Pb_pp = 135;

  // Assignment rules:
  x_T := x_Tmax/(1 + HCO3_i/K_I);
  beta_p := HCO3_e/Kb_p;
  beta_pp := HCO3_i/Kb_pp;
  gamma_p := Cl_e/Kc_p;
  gamma_pp := Cl_i/Kc_pp;
  sigma := (1 + beta_p + gamma_p)*(Pb_pp*beta_pp + Pc_pp*gamma_pp) + (1 + beta_pp + gamma_pp)*(Pb_p*beta_p + Pc_p*gamma_p);
  x_p := x_T*(Pb_pp*beta_pp + Pc_pp*gamma_pp)/sigma;
  x_pp := x_T*(Pb_p*beta_p + Pc_p*gamma_p)/sigma;
  Jb_influx := x_T/sigma*Pb_p*beta_p*(Pb_pp*beta_pp + Pc_pp*gamma_pp);
  Jc_influx := x_T/sigma*Pc_p*gamma_p*(Pb_pp*beta_pp + Pc_pp*gamma_pp);
  J_HCO3 := x_T/sigma*(Pb_pp*beta_pp*Pc_p*gamma_p - Pb_p*beta_p*Pc_pp*gamma_pp);
  J_Cl := -J_HCO3;
  Jo_bm := (1/x_T*(1/Pb_p + 1/Pb_pp + Kb_pp/(Pb_pp*HCO3_i)))^(-1);
  Ji_bm := (1/x_T*(1/Pb_p + 1/Pb_pp + Kb_p/(Pb_p*HCO3_e)))^(-1);
  Js_bm := (1/x_T*(1/Pb_p + 1/Pb_pp))^(-1);
  Jo_cm := (1/x_T*(1/Pc_p + 1/Pc_pp + Kc_pp/(Pc_pp*Cl_i)))^(-1);
  Ji_cm := (1/x_T*(1/Pc_p + 1/Pc_pp + Kc_p/(Pc_p*Cl_e)))^(-1);
  Js_cm := (1/x_T*(1/Pc_p + 1/Pc_pp))^(-1);

  // Rate rules:
  HCO3_i' = 60;

  // Unit definitions:
  unit mmol = 1e-3 mole;
  unit mM = 1e-3 mole / litre;
  unit umol = 1e-6 mole;
  unit cm2 = (0.01 metre)^2;
  unit mM_per_s = 1e-3 mole / (litre * second);
  unit cm_per_s = 0.01 metre / second;
  unit per_s = 1 / second;
  unit umol_per_s_per_cm2 = 1e-6 mole / (second * (0.01 metre)^2);
  unit mmol_per_s_per_cm2 = 1e-3 mole / (second * (0.01 metre)^2);
  unit nmol_per_s_per_cm2 = 1e-9 mole / (second * (0.01 metre)^2);
  unit mmol_per_cm2 = 1e-3 mole / (0.01 metre)^2;
  unit nmol_per_cm2 = 1e-9 mole / (0.01 metre)^2;
end
