// SBML level 2 version 4

model Kirschner1998_Immunotherapy_Tumour()
  // This a model from the article:
  // Modeling immunotherapy of the tumor-immune interaction.
  // Kirschner D, Panetta JC. J Math Biol 1998 Sep;37(3):235-52 9785481 ,
  // Abstract:
  // A number of lines of evidence suggest that immunotherapy with the cytokine interleukin-2 (IL-2) may boost the immune system to fight tumors. CD4+ T cells, the cells that orchestrate the immune response, use these cytokines as signaling mechanisms for immune-response stimulation as well as lymphocyte stimulation, growth, and differentiation. Because tumor cells begin as 'self', the immune system may not respond in an effective way to eradicate them. Adoptive cellular immunotherapy can potentially restore or enhance these effects. We illustrate through mathematical modeling the dynamics between tumor cells, immune-effector cells, and IL-2. These efforts are able to explain both short tumor oscillations in tumor sizes as well as long-term tumor relapse. We then explore the effects of adoptive cellular immunotherapy on the model and describe under what circumstances the tumor can be eliminated.
  // This model was taken from the CellML repository and automatically converted to SBML.
  // The original model was: Kirschner D, Panetta JC. (1998) - version=1.0
  // The original CellML model was created by:
  // Catherine Lloyd
  // c.lloyd@auckland.ac.nz
  // The University of Auckland
  // This model originates from BioModels Database: A Database of Annotated Published Models (http://www.ebi.ac.uk/biomodels/). It is copyright (c) 2005-2011 The BioModels.net Team.
  // To the extent possible under law, all copyright and related or neighbouring rights to this encoded model have been dedicated to the public domain worldwide. Please refer to CC0 Public Domain Dedication for more information.
  // In summary, you are entitled to use this encoded model in absolutely any manner you deem suitable, verbatim, or with modification, alone or embedded it in a larger context, redistribute it, commercially or not, in a restricted way or not..
  // To cite BioModels Database, please use: Li C, Donizelli M, Rodriguez N, Dharuri H, Endler L, Chelliah V, Li L, He E, Henry A, Stefan MI, Snoep JL, Hucka M, Le Novère N, Laibe C (2010) BioModels Database: An enhanced, curated and annotated resource for published quantitative kinetic models. BMC Syst Biol., 4:92.
  // biomodels.db:MODEL1006230038
  // isDescribedBy pubmed:9785481
  // biomodels.db:MODEL1006230038
  // isDescribedBy pubmed:9785481
  // biomodels.db:MODEL1006230038
  // biomodels.db:MODEL1006230038

  // Compartments:
  compartment COMpartment = 1 litre;

  // Parameters:
  tau has dimensionless;
  mu2 = 0.03 dimensionless;
  c = 0.025 dimensionless;
  p1 = 0.1245 dimensionless;
  g1 = 2e-7 dimensionless;
  s1 = 0 dimensionless;
  x has dimensionless;
  y = 1 dimensionless;
  r2 = 0.18 dimensionless;
  a = 1 dimensionless;
  b = 1e-9 dimensionless;
  g2 = 100000 dimensionless;
  z has dimensionless;
  mu3 = 10 dimensionless;
  p2 = 5 dimensionless;
  g3 = 1000 dimensionless;
  s2 = 0 dimensionless;

  // Rate rules:
  x' = c*y - mu2*x + p1*x*z/(g1 + z) + s1;
  y' = r2*y*(1 - b*y) - a*x*y/(g2 + y);
  z' = p2*x*y/(g3 + y) - mu3*z + s2;

  // Unit definitions:
  unit day = 86400 second;
  unit first_order_rate_constant = 1 / (86400 second);
  unit cells_per_microlitre = 1 / (1e-6 litre);
  unit flux = 1 / (1e-6 litre * 86400 second);
  unit micromolar = 1e-6 mole / litre;
end
