// SBML level 2 version 4

model Lemon2003_Ca2Dynamics()
  // This a model from the article:
  // Metabotropic receptor activation, desensitization and sequestration-I: modelling calcium and inositol 1,4,5-trisphosphate dynamics following receptor activation.
  // Lemon G, Gibson WG, Bennett MR. J Theor Biol 2003 Jul 7;223(1):93-111 12782119 ,
  // Abstract:
  // A mathematical account is given of the processes governing the time courses of calcium ions (Ca2+), inositol 1,4,5-trisphosphate (IP(3)) and phosphatidylinositol 4,5-bisphosphate (PIP(2)) in single cells following the application of external agonist to metabotropic receptors. A model is constructed that incorporates the regulation of metabotropic receptor activity, the G-protein cascade and the Ca2+ dynamics in the cytosol. It is subsequently used to reproduce observations on the extent of desensitization and sequestration of the P(2)Y(2) receptor following its activation by uridine triphosphate (UTP). The theory predicts the dependence on agonist concentration of the change in the number of receptors in the membrane as well as the time course of disappearance of receptors from the plasmalemma, upon exposure to agonist. In addition, the extent of activation and desensitization of the receptor, using the calcium transients in cells initiated by exposure to agonist, is also predicted. Model predictions show the significance of membrane PIP(2) depletion and resupply on the time course of IP(3) and Ca2+ levels. Results of the modelling also reveal the importance of receptor recycling and PIP(2) resupply for maintaining Ca2+ and IP(3) levels during sustained application of agonist.
  // This model was taken from the CellML repository and automatically converted to SBML.
  // The original model was: Lemon G, Gibson WG, Bennett MR. (2003) - version=1.0
  // The original CellML model was created by:
  // Wei Liu
  // wliu052@aucklanduni.ac.nz
  // The University of Auckland
  // This model originates from BioModels Database: A Database of Annotated Published Models (http://www.ebi.ac.uk/biomodels/). It is copyright (c) 2005-2011 The BioModels.net Team.
  // To the extent possible under law, all copyright and related or neighbouring rights to this encoded model have been dedicated to the public domain worldwide. Please refer to CC0 Public Domain Dedication for more information.
  // In summary, you are entitled to use this encoded model in absolutely any manner you deem suitable, verbatim, or with modification, alone or embedded it in a larger context, redistribute it, commercially or not, in a restricted way or not..
  // To cite BioModels Database, please use: Li C, Donizelli M, Rodriguez N, Dharuri H, Endler L, Chelliah V, Li L, He E, Henry A, Stefan MI, Snoep JL, Hucka M, Le Novère N, Laibe C (2010) BioModels Database: An enhanced, curated and annotated resource for published quantitative kinetic models. BMC Syst Biol., 4:92.
  // biomodels.db:MODEL1006230039
  // isDescribedBy pubmed:12782119
  // biomodels.db:MODEL1006230039
  // isDescribedBy pubmed:12782119
  // biomodels.db:MODEL1006230039
  // biomodels.db:MODEL1006230039

  // Compartments:
  compartment COMpartment = 1 litre;

  // Parameters:
  R_T = 20000;
  K_1 = 5;
  K_2 = 100;
  k_r = 0.000175;
  k_p = 0.03;
  k_e = 0.006;
  xi = 0.85;
  G_T = 100000;
  k_deg = 1.25;
  k_a = 0.017;
  k_d = 0.15;
  PIP_2_T = 50000000;
  r_r = 10;
  delta = 0.001238;
  K_c = 0.4;
  alpha = 2.781e-5;
  N_a = 6.02252e17;
  v = 5e-13;
  epsilon_r = 0.185;
  d_1 = 0.13;
  d_2 = 1.05;
  d_3 = 0.943;
  d_5 = 0.0823;
  a_2 = 0.2;
  B_e = 150;
  K_e = 10;
  B_ER = 120000;
  K_ER = 1200;
  B_x = 50;
  K_x = 0.2;
  k_3 = 0.4;
  eta_1 = 575;
  eta_2 = 5.2;
  eta_3 = 45;
  C_T = 67;
  L = 1000;
  RS = 17000;
  RS_p = 0;
  G = 0;
  IP_3 = 0.01;
  PIP_2 = 49997000;
  C = 0.0961;
  h = 0.6155;

  // Assignment rules:
  r_h := alpha*C/(K_c + C)*G;
  rho_r := L*RS/(xi*R_T*(K_1 + L));
  tau_h := (a_2*(zeta + C))^(-1);
  h_infinit := zeta/(zeta + C);
  zeta := d_2*(IP_3 + d_1)/(IP_3 + d_3);
  m_infinit := IP_3/(d_1 + IP_3)*C/(d_5 + C);
  beta := (1 + K_e*B_e/(K_e + C)^2 + K_x*B_x/(K_x + C)^2)^(-1);
  gamma := (1 + B_e/(K_e + C) + B_x/(K_x + C))^(-1);
  C_ER := K_ER/(B_ER*epsilon_r)*(C_T - C/gamma);
  RS_E := k_r*(1 + k_p/k_e*(K_2 + L)/(K_1 + L))/(k_r + k_p*L/(K_1 + L) + k_r*k_p/k_e*(K_2 + L)/(K_1 + L))*xi*R_T + (1 - xi)*R_T;

  // Rate rules:
  RS' = k_r*R_T - (k_r + k_p*L/(K_1 + L))*RS - k_r*RS_p;
  RS_p' = L*(k_p*RS/(K_1 + L) - k_e*RS_p/(K_2 + L));
  G' = k_a*(delta + rho_r)*(G_T - G) - k_d*G;
  IP_3' = r_h*PIP_2/(N_a*v) - k_deg*IP_3;
  PIP_2' = -(r_h + r_r)*PIP_2 - r_r*N_a*v*IP_3 + r_r*PIP_2_T;
  C' = beta*(epsilon_r*(eta_1*m_infinit^3*h^3 + eta_2)*(C_ER - C) - eta_3*C^2/(k_3^2 + C^2));
  h' = (h_infinit - h)/tau_h;

  // Unit definitions:
  unit micromolar = 1e-6 mole / litre;
  unit per_micromolar = litre / (1e-6 mole);
  unit per_micromole = 1 / (1e-6 mole);
  unit flux = 1e-6 mole / (litre * second);
  unit per_second = 1 / second;
  unit per_micromolar_per_second = litre / (1e-6 mole * second);
  unit micromolar_square_per_second = (1e-6 mole)^2 / (litre^2 * second);
end
