// SBML level 2 version 4

model Yang2006_Methadone_PKmodel()
  // This a model from the article:
  // Population-based analysis of methadone distribution and metabolism using an age-dependent physiologically based pharmacokinetic model.
  // Yang F, Tong X, McCarver DG, Hines RN, Beard DA. J Pharmacokinet Pharmacodyn 2006 Aug;33(4):485-518 16758333 ,
  // Abstract:
  // Limited pharmacokinetic (PK) and pharmacodynamic (PD) data are available to use in methadone dosing recommendations in pediatric patients for either opioid abstinence or analgesia. Considering the extreme inter-individual variability of absorption and metabolism of methadone, population-based PK would be useful to provide insight into the relationship between dose, blood concentrations, and clinical effects of methadone. To address this need, an age-dependent physiologically based pharmacokinetic (PBPK) model has been constructed to systematically study methadone metabolism and PK. The model will facilitate the design of cost-effective studies that will evaluate methadone PK and PD relationships, and may be useful to guide methadone dosing in children. The PBPK model, which includes whole-body multi-organ distribution, plasma protein binding, metabolism, and clearance, is parameterized based on a database of pediatric PK parameters and data collected from clinical experiments. The model is further tailored and verified based on PK data from individual adults, then scaled appropriately to apply to children aged 0-24 months. Based on measured variability in CYP3A enzyme expression levels and plasma orosomucoid (ORM2) concentrations, a Monte-Carlo-based simulation of methadone kinetics in a pediatric population was performed. The simulation predicts extreme variability in plasma concentrations and clearance kinetics for methadone in the pediatric population, based on standard dosing protocols. In addition, it is shown that when doses are designed for individuals based on prior protein expression information, inter-individual variability in methadone kinetics may be greatly reduced.
  // This model was taken from the CellML repository and automatically converted to SBML.
  // The original model was: Yang F, Tong X, McCarver DG, Hines RN, Beard DA. (2006) - version=1.0
  // The original CellML model was created by:
  // Catherine Lloyd
  // c.lloyd@auckland.ac.nz
  // The University of Auckland
  // This model originates from BioModels Database: A Database of Annotated Published Models (http://www.ebi.ac.uk/biomodels/). It is copyright (c) 2005-2011 The BioModels.net Team.
  // To the extent possible under law, all copyright and related or neighbouring rights to this encoded model have been dedicated to the public domain worldwide. Please refer to CC0 Public Domain Dedication for more information.
  // In summary, you are entitled to use this encoded model in absolutely any manner you deem suitable, verbatim, or with modification, alone or embedded it in a larger context, redistribute it, commercially or not, in a restricted way or not..
  // To cite BioModels Database, please use: Li C, Donizelli M, Rodriguez N, Dharuri H, Endler L, Chelliah V, Li L, He E, Henry A, Stefan MI, Snoep JL, Hucka M, Le Novère N, Laibe C (2010) BioModels Database: An enhanced, curated and annotated resource for published quantitative kinetic models. BMC Syst Biol., 4:92.
  // biomodels.db:MODEL1006230040
  // isDescribedBy pubmed:16758333
  // biomodels.db:MODEL1006230040
  // isDescribedBy pubmed:16758333
  // biomodels.db:MODEL1006230040
  // biomodels.db:MODEL1006230040

  // Compartments:
  compartment COMpartment = 1 litre;

  // Parameters:
  time_environment has minute;
  B has micromolar;
  F = 0.48 micromolar;
  n2 = 1 dimensionless;
  K2 = 0.8532 per_micromolar;
  R has flux;
  Vmax = 0.009433 flux;
  Km = 198 micromolar;
  fu has dimensionless;
  ISF has dimensionless;
  age = 5 dimensionless;
  Ca = 6.6685 micromolar;
  Va = 2148 ml;
  Vv = 3431 ml;
  Cv has micromolar;
  C = 0 micromolar;
  V = 1454 ml;
  Q = 1221.34 flow;
  P = 15.61 dimensionless;
  Qc = 6445.65 flow;

  // Assignment rules:
  B := F*n2*K2*Ca/(1 + K2*F);
  R := ISF*Vmax*fu*C/(Km + fu*C);
  fu := F/(F + B);
  ISF := -8.3212 + 2.0401*age + 4.1962*log10(age*365);
  Cv := Q*C/P/Qc;

  // Rate rules:
  Ca' = Qc*(Cv - Ca)/(Va + Vv);
  C' = (Q*(Ca - C/P) - R*1)/V;

  // Unit definitions:
  unit minute = 60 second;
  unit year = 3.1536e7 second;
  unit flow = 1e-3 litre / (60 second);
  unit flux = 1e-6 mole / (litre * 60 second);
  unit ml = 1e-3 litre;
  unit micromolar = 1e-6 mole / litre;
  unit per_micromolar = litre / (1e-6 mole);
  unit first_order_rate_constant = 1 / (60 second);
  unit time = 60 second;
end
