// SBML level 2 version 4

model Cloutier2009_BrainEnergyMetabolism()
  // This a model from the article:
  // An integrative dynamic model of brain energy metabolism using in vivo neurochemical measurements.
  // Cloutier M, Bolger FB, Lowry JP, Wellstead P. J Comput Neurosci 2009 Dec;27(3):391-414 19396534 ,
  // Abstract:
  // An integrative, systems approach to the modelling of brain energy metabolism is presented. Mechanisms such as glutamate cycling between neurons and astrocytes and glycogen storage in astrocytes have been implemented. A unique feature of the model is its calibration using in vivo data of brain glucose and lactate from freely moving rats under various stimuli. The model has been used to perform simulated perturbation experiments that show that glycogen breakdown in astrocytes is significantly activated during sensory (tail pinch) stimulation. This mechanism provides an additional input of energy substrate during high consumption phases. By way of validation, data from the perfusion of 50 microM propranolol in the rat brain was compared with the model outputs. Propranolol affects the glucose dynamics during stimulation, and this was accurately reproduced in the model by a reduction in the glycogen breakdown in astrocytes. The model's predictive capacity was verified by using data from a sensory stimulation (restraint) that was not used for model calibration. Finally, a sensitivity analysis was conducted on the model parameters, this showed that the control of energy metabolism and transport processes are critical in the metabolic behaviour of cerebral tissue.
  // This model was taken from the CellML repository and automatically converted to SBML.
  // The original model was: Cloutier M, Bolger FB, Lowry JP, Wellstead P. (2009) - version=1.0
  // The original CellML model was created by:
  // Catherine Lloyd
  // c.lloyd@auckland.ac.nz
  // The University of Auckland
  // This model originates from BioModels Database: A Database of Annotated Published Models (http://www.ebi.ac.uk/biomodels/). It is copyright (c) 2005-2011 The BioModels.net Team.
  // To the extent possible under law, all copyright and related or neighbouring rights to this encoded model have been dedicated to the public domain worldwide. Please refer to CC0 Public Domain Dedication for more information.
  // In summary, you are entitled to use this encoded model in absolutely any manner you deem suitable, verbatim, or with modification, alone or embedded it in a larger context, redistribute it, commercially or not, in a restricted way or not..
  // To cite BioModels Database, please use: Li C, Donizelli M, Rodriguez N, Dharuri H, Endler L, Chelliah V, Li L, He E, Henry A, Stefan MI, Snoep JL, Hucka M, Le Novère N, Laibe C (2010) BioModels Database: An enhanced, curated and annotated resource for published quantitative kinetic models. BMC Syst Biol., 4:92.
  // biomodels.db:MODEL1006230041
  // isDescribedBy pubmed:19396534
  // biomodels.db:MODEL1006230041
  // isDescribedBy pubmed:19396534
  // biomodels.db:MODEL1006230041
  // biomodels.db:MODEL1006230041

  // Compartments:
  compartment COMpartment = 1 litre;

  // Parameters:
  NAn = 15.533;
  GLCn = 0.2633;
  G6Pn = 0.7275;
  F6Pn = 0.1091;
  GAPn = 0.0418;
  PEPn = 0.0037;
  PYRn = 0.0388;
  LACn = 0.3856;
  NADHn = 0.0319;
  ATPn = 2.2592;
  PCrn = 4.2529;
  O2n = 0.0975;
  GLUn = 3;
  NAg = 13.36;
  GLCg = 0.1656;
  G6Pg = 0.7326;
  F6Pg = 0.1116;
  GAPg = 0.0698;
  PEPg = 0.0254;
  PYRg = 0.1711;
  LACg = 0.4651;
  NADHg = 0.0445;
  ATPg = 2.24;
  PCrg = 4.6817;
  O2g = 0.1589;
  GLYg = 2.5;
  GLUg = 0;
  GLCe = 0.3339;
  LACe = 0.3986;
  GLUe = 0;
  O2c = 7.4201;
  GLCc = 4.6401;
  LACc = 0.3251;
  CO2c = 2.12;
  Vv = 0.0237;
  dHb = 0.0218;
  gn_NA = 0.0039;
  Km_en_GLC = 5.32;
  Vm_en_GLC = 0.50417;
  Vmax_n_hk = 0.0513;
  Vmaxf_n_pgi = 0.5;
  Vmaxr_n_pgi = 0.45;
  kn_pfk = 0.55783;
  kn_pgk = 0.4287;
  kn_pk = 28.6;
  kfn_ldh = 5.3;
  krn_ldh = 0.1046;
  Vmax_n_mito = 0.05557;
  Vmax_ne_LAC = 0.1978;
  Km_ne_LAC = 0.09314;
  Vmax_n_ATPase = 0.04889;
  krn_ck = 0.015;
  kfn_ck = 0.0524681;
  nh_O2_Vcn_O2 = 2.7;
  PScapn = 0.2202;
  gg_NA = 0.00325;
  Km_eg_GLC = 3.53;
  Vm_eg_GLC = 0.038089;
  Km_cg_GLC = 9.92;
  Vm_cg_GLC = 0.0098394;
  Vmax_g_hk = 0.050461;
  Vmaxf_g_pgi = 0.5;
  Vmaxr_g_pgi = 0.45;
  kg_pfk = 0.403;
  kg_pgk = 0.2514;
  kg_pk = 2.73;
  kfg_ldh = 6.2613;
  krg_ldh = 0.54682;
  Vmax_g_mito = 0.008454;
  Vmax_ge_LAC = 0.086124;
  Km_ge_LAC = 0.22163;
  Vmax_gc_LAC = 0.00021856;
  Km_gc_LAC = 0.12862;
  Vmax_g_ATPase = 0.035657;
  krg_ck = 0.02073;
  kfg_ck = 0.0243;
  PScapg = 0.2457;
  Km_ce_GLC = 8.4568;
  Vm_ce_GLC = 0.0489;
  Km_ec_LAC = 0.764818;
  Vm_ec_LAC = 0.0325;
  Vmax_g_gs = 0.3;
  Vmax_eg_GLU = 0.0208;
  Vmax_glys = 0.0001528;
  Km_G6P_glys = 0.5;
  Vmax_glyp = 4.922e-5;
  Km_GLY = 1;
  CBF0_Fin_t = 0.012;
  NADH_n_tot = 0.22;
  NADH_g_tot = 0.22;
  PCrn_tot = 5;
  PCrg_tot = 5;
  Km_PYR = 0.0632;
  Km_ATP = 0.01532;
  Ki_ATP = 0.7595;
  Km_ADP = 0.00107;
  Km_O2 = 0.0029658;
  Km_GLC = 0.105;
  Km_GLU = 0.05;
  Km_G6P = 0.5;
  Km_F6P_pgi = 0.06;
  Km_F6P_pfk = 0.18;
  Km_pump = 0.4243;
  nh_O2_model_parameters = 2.7;
  Ko2 = 0.089733;
  kpump = 3.17e-7;
  ATPtot = 2.379;
  NAe = 150;
  nH = 4;
  O2a = 8.34;
  CO2a = 1.2;
  GLCa = 4.8;
  LACa = 0.313;
  nOP = 15;
  NAero = 3;
  Rng = 1.8;
  Reg = 0.8;
  Ren = 0.4444444;
  Rcn = 0.01222;
  Rcg = 0.022;
  Rce = 0.0275;
  Sm_n = 40500;
  Vm = -70;
  RT = 2577340;
  F = 96500;
  Vn = 0.45;
  G6P_inh_hk = 0.6;
  aG6P_inh_hk = 20;
  rATP_mito = 20;
  aATP_mito = 5;
  HbOP = 8.6;
  Sm_g = 10500;
  Vg = 0.25;
  KO1 = 1;
  Vc = 0.0055;
  R_GLU_NA = 0.075;
  KO2 = 1;
  KO3 = 1;
  GLY_inh = 4.2;
  aGLY_inh = 20;
  CBF0_model_parameters = 0.012;
  Vv0 = 0.0236;
  tv = 35;
  qak = 0.92;
  k1 = 2.22;
  k2 = 0.46;
  k3 = 0.43;
  dHb0 = 0.064;
  stim = 1;
  to = 200;
  tend = 300;
  v1_n = 0.041;
  v2_n = 2.55;
  t_n_stim = 2;
  sr = 4.59186;
  t1 = 2;
  delta_GLY = 62;
  deltaf = 0.42;
  tend_GLY = 440;
  to_GLY = 83;
  sr_GLY = 4;

  // Assignment rules:
  Vn_leak_Na := Sm_n/Vn*(gn_NA/F)*(RT/F*ln(NAe/NAn) - Vm);
  Vn_pump := Sm_n/Vn*kpump*ATPn*NAn*(1 + ATPn/Km_pump)^(-1);
  V_en_GLC := Vm_en_GLC*(GLCe/(GLCe + Km_en_GLC) - GLCn/(GLCn + Km_en_GLC));
  Vn_hk := Vmax_n_hk*ATPn*(GLCn/(GLCn + Km_GLC))*(1 - 1/(1 + exp(-aG6P_inh_hk*1*(G6Pn - G6P_inh_hk))));
  Vn_pgi := Vmaxf_n_pgi*(G6Pn/(G6Pn + Km_G6P)) - Vmaxr_n_pgi*(F6Pn/(F6Pn + Km_F6P_pgi));
  Vn_pfk := kn_pfk*ATPn*(F6Pn/(F6Pn + Km_F6P_pfk))*(1 + (ATPn/Ki_ATP)^nH)^(-1);
  Vne_LAC := Vmax_ne_LAC*(LACn/(LACn + Km_ne_LAC) - LACe/(LACe + Km_ne_LAC));
  Vn_ATPase := Vmax_n_ATPase*(ATPn/(ATPn + 0.001));
  Vcn_O2 := PScapn/Vn*(Ko2*(HbOP/O2c - 1)^(-1/nh_O2_Vcn_O2) - O2n);
  Vg_leak_Na := Sm_g/Vg*(gg_NA/F)*(RT/F*ln(NAe/NAg) - Vm);
  Vg_pump := Sm_g/Vg*kpump*ATPg*NAg*(1 + ATPg/Km_pump)^(-1);
  Veg_GLC := KO1*Vm_eg_GLC*(GLCe/(GLCe + Km_eg_GLC) - GLCg/(GLCg + Km_eg_GLC));
  Vcg_GLC := Vm_cg_GLC*(GLCc/(GLCc + Km_cg_GLC) - GLCg/(GLCg + Km_cg_GLC));
  Vg_hk := Vmax_g_hk*ATPg*(GLCg/(GLCg + Km_GLC))*(1 - 1/(1 + exp(-aG6P_inh_hk*1*(G6Pg - G6P_inh_hk))));
  Vg_pgi := Vmaxf_g_pgi*(G6Pg/(G6Pg + Km_G6P)) - Vmaxr_g_pgi*(F6Pg/(F6Pg + Km_F6P_pgi));
  Vg_pfk := kg_pfk*ATPg*(F6Pg/(F6Pg + Km_F6P_pfk))*(1 + (ATPg/Ki_ATP)^nH)^(-1);
  Vg_pgk := kg_pgk*GAPg*ADPg*(NADg/NADHg);
  Vg_pk := kg_pk*PEPg*ADPg;
  Vg_ldh := kfg_ldh*PYRg*NADHg - krg_ldh*LACg*NADg;
  Vg_mito := Vmax_g_mito*(O2g/(O2g + Km_O2))*(ADPg/(ADPg + Km_ADP))*(PYRg/(PYRg + Km_PYR))*(1 - 1/(1 + exp(1*(-aATP_mito)*(ATPg/ADPg - 1*rATP_mito))));
  Vge_LAC := Vmax_ge_LAC*(LACg/(LACg + Km_ge_LAC) - LACe/(LACe + Km_ge_LAC));
  Vgc_LAC := Vmax_gc_LAC*(LACg/(LACg + Km_gc_LAC) - LACc/(LACc + Km_gc_LAC));
  Vg_ATPase := Vmax_g_ATPase*(ATPg/(ATPg + 0.001));
  Vg_ck := kfg_ck*PCrg*ADPg - krg_ck*CRg*ATPg;
  Vcg_O2 := PScapg/Vg*(Ko2*(HbOP/O2c - 1)^(-1/nh_O2_model_parameters) - O2g);
  Vc_O2 := 2*(Fin_t/Vc)*(O2a - O2c);
  Vc_GLC := 2*(Fin_t/Vc)*(GLCa - GLCc);
  Vce_GLC := Vm_ce_GLC*(GLCc/(GLCc + Km_ce_GLC) - GLCe/(GLCe + Km_ce_GLC));
  Vc_LAC := 2*(Fin_t/Vc)*(LACa - LACc);
  Vec_LAC := Vm_ec_LAC*(LACe/(LACe + Km_ec_LAC) - LACc/(LACc + Km_ec_LAC));
  Vnc_CO2 := 3*Vn_mito;
  Vgc_CO2 := 3*Vg_mito;
  Vn_stim_GLU := Vn_stim*R_GLU_NA*KO2*(GLUn/(GLUn + Km_GLU));
  Vg_gs := Vmax_g_gs*(GLUg/(GLUg + Km_GLU))*(ATPg/(ATPg + Km_ATP));
  Veg_GLU := Vmax_eg_GLU*(GLUe/(GLUe + Km_GLU));
  Vc_CO2 := 2*(Fin_t/Vc)*(CO2c - CO2a);
  Vg_glys := Vmax_glys*(G6Pg/(G6Pg + Km_G6P_glys))*(1 - 1/(1 + exp(-aGLY_inh*1*(GLYg - GLY_inh))));
  Vg_glyp := Vmax_glyp*(GLYg/(GLYg + Km_GLY))*deltaVt_GLY;
  deltaVt_GLY := 1 + stim*delta_GLY*KO3*(1/(1 + exp(1*(-sr_GLY)*(time - (to + to_GLY)))))*(1 - unitstepSB2);
  Fin_t := CBF0_Fin_t + (stim*CBF0_Fin_t*deltaf*(1/(1 + exp(1*(-sr)*(time - (to + t1 - 3))))) - stim*CBF0_Fin_t*deltaf*(1/(1 + exp(1*(-sr)*(time - (to + tend + t1 + 3))))));
  Fout_t := CBF0_model_parameters*(((Vv/Vv0)^2 + tv*(Vv/Vv0)^(-0.5)*(Fin_t/Vv0))/(1 + CBF0_model_parameters*tv*(Vv/Vv0)^(-0.5)*(1/Vv0)));
  NADn := NADH_n_tot - NADHn;
  NADg := NADH_g_tot - NADHg;
  CRn := PCrn_tot - PCrn;
  CRg := PCrg_tot - PCrg;
  ADPn := ATPn/2*(-qak + sqrt(qak^2 + 4*qak*(ATPtot/ATPn - 1)));
  ADPg := ATPg/2*(-qak + sqrt(qak^2 + 4*qak*(ATPtot/ATPg - 1)));
  Vn_pgk := kn_pgk*GAPn*ADPn*(NADn/NADHn);
  Vn_pk := kn_pk*PEPn*ADPn;
  Vn_ldh := kfn_ldh*PYRn*NADHn - krn_ldh*LACn*NADn;
  Vn_mito := Vmax_n_mito*(O2n/(O2n + Km_O2))*(ADPn/(ADPn + Km_ADP))*(PYRn/(PYRn + Km_PYR))*(1 - 1/(1 + exp(-aATP_mito*1*(ATPn/ADPn - 1*rATP_mito))));
  Vn_ck := kfn_ck*PCrn*ADPn - krn_ck*CRn*ATPn;
  u_n := qak^2 + 4*qak*(ATPtot/ATPn - 1);
  u_g := qak^2 + 4*qak*(ATPtot/ATPg - 1);
  dAMP_dATPn := qak/2 + qak*(ATPtot/(ATPn*sqrt(u_n))) - (1 + 0.5*sqrt(u_n));
  dAMP_dATPg := qak/2 + qak*(ATPtot/(ATPg*sqrt(u_g))) - (1 + 0.5*sqrt(u_g));
  AMPn := ATPtot - (ATPn + ADPn);
  AMPg := ATPtot - (ATPg + ADPg);
  BOLD := Vv0*((k1 + k2)*(1 - dHb/dHb0) - (k2 + k3)*(1 - Vv/Vv0));
  v_stim := stim*(v1_n + v2_n*((time - to)/t_n_stim)*exp(-((time - to)*(unitpulseSB/t_n_stim))))*unitpulseSB;
  Vn_stim := v_stim;
  unitpulseSB := piecewise(1, (time >= to) && (time <= to + tend), 0);
  unitstepSB := piecewise(1, time - (tend + to) >= 0, 0);
  unitstepSB2 := piecewise(1, time - (tend_GLY + to + to_GLY) >= 0, 0);

  // Rate rules:
  NAn' = Vn_leak_Na + Vn_stim - 3*Vn_pump;
  GLCn' = V_en_GLC - Vn_hk;
  G6Pn' = Vn_hk - Vn_pgi;
  F6Pn' = Vn_pgi - Vn_pfk;
  GAPn' = 2*Vn_pfk - Vn_pgk;
  PEPn' = Vn_pgk - Vn_pk;
  PYRn' = Vn_pk - (Vn_ldh + Vn_mito);
  LACn' = Vn_ldh - Vne_LAC;
  NADHn' = Vn_pgk - (Vn_ldh + Vn_mito);
  ATPn' = (Vn_pgk + Vn_pk + nOP*Vn_mito + Vn_ck - (Vn_hk + Vn_pfk + Vn_ATPase + Vn_pump))*(1 - dAMP_dATPn)^(-1);
  PCrn' = -Vn_ck;
  O2n' = Vcn_O2 - NAero*Vn_mito;
  GLUn' = Vg_gs*(1/Rng) - Vn_stim_GLU;
  NAg' = Vg_leak_Na + 3*Veg_GLU - 3*Vg_pump;
  GLCg' = Vcg_GLC + Veg_GLC - Vg_hk;
  G6Pg' = Vg_hk + Vg_glyp - (Vg_pgi + Vg_glys);
  F6Pg' = Vg_pgi - Vg_pfk;
  GAPg' = 2*Vg_pfk - Vg_pgk;
  PEPg' = Vg_pgk - Vg_pk;
  PYRg' = Vg_pk - (Vg_ldh + Vg_mito);
  LACg' = Vg_ldh - (Vge_LAC + Vgc_LAC);
  NADHg' = Vg_pgk - (Vg_ldh + Vg_mito);
  ATPg' = (Vg_pgk + Vg_pk + nOP*Vg_mito + Vg_ck - (Vg_hk + Vg_pfk + Vg_ATPase + Vg_pump + Vg_gs))*(1 - dAMP_dATPg)^(-1);
  PCrg' = -Vg_ck;
  O2g' = Vcg_O2 - NAero*Vg_mito;
  GLYg' = Vg_glys - Vg_glyp;
  GLUg' = Veg_GLU - Vg_gs;
  GLCe' = Vce_GLC - (Veg_GLC*(1/Reg) + V_en_GLC*(1/Ren));
  LACe' = Vne_LAC*(1/Ren) + Vge_LAC*(1/Reg) - Vec_LAC;
  GLUe' = Vn_stim_GLU*(1/Ren) - Veg_GLU*(1/Reg);
  O2c' = Vc_O2 - (Vcn_O2*(1/Rcn) + Vcg_O2*(1/Rcg));
  GLCc' = Vc_GLC - (Vce_GLC*(1/Rce) + Vcg_GLC*(1/Rcg));
  LACc' = Vc_LAC + Vec_LAC*(1/Rce) + Vgc_LAC*(1/Rcg);
  CO2c' = Vnc_CO2*(1/Rcn) + Vgc_CO2*(1/Rcg) - Vc_CO2;
  Vv' = Fin_t - Fout_t;
  dHb' = Fin_t*(O2a - O2c) - Fout_t*(dHb/Vv);

  // Unit definitions:
  unit s = second;
  unit mM = 1e-3 mole / litre;
  unit per_mM = litre / (1e-3 mole);
  unit mM_per_s = 1e-3 mole / (litre * second);
  unit per_mM_per_s = litre / (1e-3 mole * second);
  unit per_s = 1 / second;
  unit cm_per_mM_per_s = 0.01 metre * litre / (1e-3 mole * second);
  unit per_cm = 1 / (0.01 metre);
  unit C_per_mole = coulomb / mole;
  unit L_per_millimole = litre / (1e-3 mole);
  unit mS_per_cm2 = 1e-3 siemens / (0.01 metre)^2;
  unit mV = 1e-3 volt;
  unit mV_C_per_mol = 1e-3 volt * coulomb / mole;
  unit time = second;
end
