// SBML level 2 version 4

model Ueda2001_typeBtrichothecenes()
  // This a model from the article:
  // Critical study of and improvements in chromatographic methods for the analysis of type B trichothecenes.
  // Mateo JJ, Llorens A, Mateo R, Jimenez M. J Chromatogr A 2001 May 18;918(1):99-112 11403460 ,
  // Abstract:
  // Various analytical methods used in the analysis of type B trichothecenes (deoxynivalenol, nivalenol, 3- and 15-acetyldeoxynivalenol) in cereals were compared and optimised in this work. These methods use either GC-electron-capture detection (ECD) of trimethylsilyl, trifluoroacetyl and heptafluorobutyryl derivatives or HPLC with UV or photodiode array detection of analytes. A new HPLC procedure using fluorescence detection prior derivatisation with coumarin-3-carbonyl chloride has been also tested. Five extraction solvents and two solid-phase extraction cartridges (silica, Florisil) plus a especial clean-up column (MycoSep 225) were compared in order to obtain the best recovery of the mycotoxins with minimal presence of coextractives in the chromatograms. The chosen extraction solvent was a mixture of acetonitrile-water (84:16, v/v). The MycoSep 225 column was chosen as the best alternative for clean-up of grain samples. For GC-ECD analysis, derivatisation of analytes with heptafluorobutyric anhydride prior the final determination was chosen as the most suitable procedure. HPLC-photodiode array (at 221 nm) analysis was more suitable for determination of type B trichothecenes than HPLC of the fluorescent coumarin-3-carbonyl derivatives. Recoveries obtained in spiked corn, rice and wheat are reported. The utility of the proposed methodology was assayed in cereal cultures of various Fusarium strains.
  // This model was taken from the CellML repository and automatically converted to SBML.
  // The original model was: Mateo JJ, Llorens A, Mateo R, Jimenez M. (2001) - version=1.0
  // The original CellML model was created by:
  // Catherine Lloyd
  // c.lloyd@auckland.ac.nz
  // The University of Auckland
  // This model originates from BioModels Database: A Database of Annotated Published Models (http://www.ebi.ac.uk/biomodels/). It is copyright (c) 2005-2011 The BioModels.net Team.
  // To the extent possible under law, all copyright and related or neighbouring rights to this encoded model have been dedicated to the public domain worldwide. Please refer to CC0 Public Domain Dedication for more information.
  // In summary, you are entitled to use this encoded model in absolutely any manner you deem suitable, verbatim, or with modification, alone or embedded it in a larger context, redistribute it, commercially or not, in a restricted way or not..
  // To cite BioModels Database, please use: Li C, Donizelli M, Rodriguez N, Dharuri H, Endler L, Chelliah V, Li L, He E, Henry A, Stefan MI, Snoep JL, Hucka M, Le Novère N, Laibe C (2010) BioModels Database: An enhanced, curated and annotated resource for published quantitative kinetic models. BMC Syst Biol., 4:92.
  // biomodels.db:MODEL1006230044
  // isDescribedBy pubmed:11403560
  // biomodels.db:MODEL1006230044
  // isDescribedBy pubmed:11403560
  // biomodels.db:MODEL1006230044
  // biomodels.db:MODEL1006230044

  // Compartments:
  compartment COMpartment = 1 litre;

  // Parameters:
  Per_m = 0.5;
  B1 = 0;
  C1 = 0;
  S1 = 1.45;
  D1 = 0.94;
  L1 = 0.3;
  R1 = 1.02;
  A1 = 0.45;
  Per_c = 0.6;
  S2 = 0.48;
  D2 = 0.44;
  L2 = 0.2;
  Dbt_c = 1;
  Tim_m = 0.7;
  B2 = 0;
  C2 = 0;
  S3 = 1.45;
  D3 = 0.94;
  L3 = 0.3;
  R2 = 1.02;
  A2 = 0.45;
  Tim_c = 0.8;
  S4 = 0.48;
  D4 = 0.44;
  L4 = 0.2;
  PT_c = 0.9;
  D5 = 0.44;
  L5 = 0.2;
  PT_n = 1;
  D6 = 0.29;
  L6 = 0.2;
  Clk_m = 0.1;
  B3 = 0.6;
  C3 = 0;
  S5 = 1.63;
  D7 = 0.54;
  L7 = 0.13;
  R3 = 0.89;
  A3 = 0.8;
  Clk_c = 0.2;
  S6 = 0.47;
  D8 = 0.6;
  L8 = 0.2;
  Cyc_c = 1;
  CC_c = 0.3;
  D9 = 0.6;
  L9 = 0.2;
  CC_n = 0.4;
  D10 = 0.3;
  L10 = 0.2;
  K1 = 2;
  K2 = 2;
  K3 = 2;
  K4 = 2;
  V1 = 1.45;
  V2 = 1.45;
  V3 = 1.63;
  V4 = 1.63;
  T1 = 1.73;
  T2 = 0.72;
  T3 = 1.63;
  T4 = 0.52;
  a = 1;
  r = 4;
  D0 = 0.012;

  // Rate rules:
  Per_m' = C1 + S1*(((CC_n/A1)^a + B1)/(1 + (PT_n/R1)^r + (CC_n/A1)^a + B1)) - (D1*(Per_m/(L1 + Per_m)) + D0*Per_m);
  Per_c' = S2*Per_m + V2*PT_c - (V1*Per_c*Tim_c + D2*Dbt_c*(Per_c/(L2 + Per_c)) + D0*Per_c);
  Tim_m' = C2 + S3*(((CC_n/A2)^a + B2)/(1 + (PT_n/R2)^r + (CC_n/A2)^a + B2)) - (D3*(Tim_m/(L3 + Tim_m)) + D0*Tim_m);
  Tim_c' = S4*Tim_m + V2*PT_c - (V1*Per_c*Tim_c + D4*(Tim_c/(L4 + Tim_c)) + D0*Tim_c);
  PT_c' = V1*Per_c*Tim_c + T2*(PT_n/(K2 + PT_n)) - (V2*PT_c + T1*(PT_c/(K1 + PT_c)) + D5*(PT_c/(L5 + PT_c)) + D0*PT_c);
  PT_n' = T1*(PT_c/(K1 + PT_c)) - (T2*(PT_n/(K2 + PT_n)) + D6*(PT_n/(L6 + PT_n)) + D0*PT_n);
  Clk_m' = C3 + S5*(((PT_n/A3)^a + B3)/(1 + (CC_n/R3)^r + (PT_n/A3)^a + B3)) - (D7*(Clk_m/(L7 + Clk_m)) + D0*Clk_m);
  Clk_c' = S6*Clk_m + V4*CC_c - (V3*Clk_c*Cyc_c + D8*(Clk_c/(L8 + Clk_c)) + D0*Clk_c);
  CC_c' = V3*Clk_c*Cyc_c + T4*(CC_n/(K4 + CC_n)) - (V4*CC_c + T3*(CC_c/(K3 + CC_c)) + D9*(CC_c/(L9 + CC_c)) + D0*CC_c);
  CC_n' = T3*(CC_c/(K3 + CC_c)) - (T4*(CC_n/(K4 + CC_n)) + D10*(CC_n/(L10 + CC_n)) + D0*CC_n);

  // Unit definitions:
  unit nanomolar = 1e-9 mole / litre;
  unit hour = 3600 second;
  unit flux = 1e-9 mole / (litre * 3600 second);
  unit first_order_rate_constant = 1 / (3600 second);
  unit second_order_rate_constant = litre / (1e-9 mole * 3600 second);
  unit time = 3600 second;
end
