// SBML level 2 version 4

model Schlosser2000_GlucoseInsulinFeedback_BetaCells()
  // This a model from the article:
  // Modeling insulin kinetics: responses to a single oral glucose administration or ambulatory-fed conditions.
  // Lenbury Y, Ruktamatakul S, Amornsamarnkul S. Biosystems 2001 Jan;59(1):15-25 11226623 ,
  // Abstract:
  // This paper presents a nonlinear mathematical model of the glucose-insulin feedback system, which has been extended to incorporate the beta-cells' function on maintaining and regulating plasma insulin level in man. Initially, a gastrointestinal absorption term for glucose is utilized to effect the glucose absorption by the intestine and the subsequent release of glucose into the bloodstream, taking place at a given initial rate and falling off exponentially with time. An analysis of the model is carried out by the singular perturbation technique in order to derive boundary conditions on the system parameters which identify, in particular, the existence of limit cycles in our model system consistent with the oscillatory patterns often observed in clinical data. We then utilize a sinusoidal term to incorporate the temporal absorption of glucose in order to study the responses in the patients under ambulatory-fed conditions. A numerical investigation is carried out in this case to construct a bifurcation diagram to identify the ranges of parametric values for which chaotic behavior can be expected, leading to interesting biological interpretations.
  // This model was taken from the CellML repository and automatically converted to SBML.
  // The original model was: Lenbury Y, Ruktamatakul S, Amornsamarnkul S. (2000) - version=1.0
  // The original CellML model was created by:
  // Catherine Lloyd
  // c.lloyd@auckland.ac.nz
  // The University of Auckland
  // This model originates from BioModels Database: A Database of Annotated Published Models (http://www.ebi.ac.uk/biomodels/). It is copyright (c) 2005-2011 The BioModels.net Team.
  // To the extent possible under law, all copyright and related or neighbouring rights to this encoded model have been dedicated to the public domain worldwide. Please refer to CC0 Public Domain Dedication for more information.
  // In summary, you are entitled to use this encoded model in absolutely any manner you deem suitable, verbatim, or with modification, alone or embedded it in a larger context, redistribute it, commercially or not, in a restricted way or not..
  // To cite BioModels Database, please use: Li C, Donizelli M, Rodriguez N, Dharuri H, Endler L, Chelliah V, Li L, He E, Henry A, Stefan MI, Snoep JL, Hucka M, Le Novère N, Laibe C (2010) BioModels Database: An enhanced, curated and annotated resource for published quantitative kinetic models. BMC Syst Biol., 4:92.
  // biomodels.db:MODEL1006230045
  // isDescribedBy pubmed:11035997
  // biomodels.db:MODEL1006230045
  // isDescribedBy pubmed:11035997
  // biomodels.db:MODEL1006230045
  // biomodels.db:MODEL1006230045

  // Compartments:
  compartment COMpartment = 1 litre;

  // Parameters:
  rel_LH_E2_P4_RP_LH has microg_day;
  RP_LH = 467 microg;
  syn_LH_E2_P4 has microg_day;
  V0_LH = 1400 microg_day;
  V1_LH = 95900 microg_day;
  h = 8 dimensionless;
  Km_LH = 360 ng_L;
  Ki_LHP = 26 nmol_L;
  kLH_rel = 3 first_order_rate_constant;
  CLH_P = 0.024 L_nmol;
  CLH_E = 0.008 L_ng;
  LH = 40 microg_l;
  v_dis_LH = 2.5 litre;
  clear_LH has microg_l_day;
  kLH_cl = 14 first_order_rate_constant;
  rel_FSH_E2_P4_RP_FSH has microg_day;
  RP_FSH = 0 microg;
  syn_FSH_Ih has microg_day;
  V_FSH = 4400 microg_day;
  Ki_FSH_Ih = 1176.5 U_L;
  kFSH_rel = 45 first_order_rate_constant;
  CFSH_P = 3 L_nmol;
  CFSH_E = 0.005 L_ng2;
  FSH = 150 microg_l;
  v_dis_FSH = 2.5 litre;
  clear_FSH has microg_l_day;
  kFSH_cl = 8.21 first_order_rate_constant;
  E2 has ng_L;
  E2_dE has ng_L;
  dE = 0.42 day;
  P4 has nmol_L;
  P4_dP has nmol_L;
  dP = 2.9 day;
  Ih has U_L;
  Ih_dIh has U_L;
  dIh = 2 day;

  // Assignment rules:
  clear_LH := kLH_cl*LH;
  rel_FSH_E2_P4_RP_FSH := kFSH_rel*(1 + CFSH_P*P4)*RP_FSH/(1 + CFSH_E*E2^2);
  clear_FSH := kFSH_cl*FSH;
  E2 := 300 - 240*(time + 1)^2/(3 + (time + 1)^2) + 90*exp(-((time - 8)^2/10));
  E2_dE := 300 - 240*(time + 1 - dE)^2/(3 + (time + 1 - dE)^2) + 90*exp(-((time - (dE + 8))^2/10));
  P4 := 52*exp(-((time - 7)^2/18));
  rel_LH_E2_P4_RP_LH := kLH_rel*(1 + CLH_P*P4)*RP_LH/(1 + CLH_E*E2);
  P4_dP := 52*exp(-((time - (dP + 7))^2/18));
  syn_LH_E2_P4 := (V0_LH + V1_LH*E2_dE^h/(Km_LH^h + E2_dE^h))/(1 + P4_dP/Ki_LHP);
  Ih := 300 + 1330*exp(-((time - 7)^2/19));
  Ih_dIh := 300 + 1330*exp(-((time - (7 + dIh))^2/19));
  syn_FSH_Ih := V_FSH/(1 + Ih_dIh/Ki_FSH_Ih);

  // Rate rules:
  RP_LH' = syn_LH_E2_P4 - rel_LH_E2_P4_RP_LH;
  LH' = rel_LH_E2_P4_RP_LH/v_dis_LH - clear_LH;
  RP_FSH' = syn_FSH_Ih - rel_FSH_E2_P4_RP_FSH;
  FSH' = rel_FSH_E2_P4_RP_FSH/v_dis_FSH - clear_FSH;

  // Unit definitions:
  unit day = 86400 second;
  unit U_L = 1 / litre;
  unit U_L_day = 1 / (litre * 86400 second);
  unit day2 = (86400 second)^2;
  unit ng_L = 1e-9 gram / litre;
  unit ng_L_day = 1e-9 gram / (litre * 86400 second);
  unit nmol_L_day = 1e-9 mole / (litre * 86400 second);
  unit ng_ml = 1e-9 gram / (1e-3 litre);
  unit nmol_L = 1e-9 mole / litre;
  unit pmol_ml = 1e-12 mole / (1e-3 litre);
  unit L_ng = litre / (1e-9 gram);
  unit L_nmol = litre / (1e-9 mole);
  unit L_ng2 = litre^2 / (1e-9 gram)^2;
  unit microg = 1e-6 gram;
  unit microg_l = 1e-6 gram / litre;
  unit microg_day = 1e-6 gram / (86400 second);
  unit microg_l_day = 1e-6 gram / (litre * 86400 second);
  unit first_order_rate_constant = 1 / (86400 second);
  unit time = 86400 second;
end
