// SBML level 2 version 4

model Webb2002_FasFasLsystem_Tumour()
  // This a model from the article:
  // Cells behaving badly: a theoretical model for the Fas/FasL system in tumour immunology.
  // Webb SD, Sherratt JA, Fish RG. Math Biosci 2002 Sep-Oct;179(2):113-29 12208611 ,
  // Abstract:
  // One proposed mechanism of tumour escape from immune surveillance is tumour up-regulation of the cell surface ligand FasL, which can lead to apoptosis of Fas receptor (Fas) positive lymphocytes. Based upon this 'counterattack', we have developed a mathematical model involving tumour cell-lymphocyte interaction, cell surface expression of Fas/FasL, and their secreted soluble forms. The model predicts that (a) the production of soluble forms of Fas and FasL will lead to the down-regulation of the immune response; (b) matrix metalloproteinase (MMP) inactivation should lead to increased membrane FasL and result in a higher rate of Fas-mediated apoptosis for lymphocytes than for tumour cells. Recent studies on cancer patients lend support for these predictions. The clinical implications are two-fold. Firstly, the use of broad spectrum MMP inhibitors as anti-angiogenic agents may be compromised by their adverse effect on tumour FasL up-regulation. Also, Fas/FasL interactions may have an impact on the outcome of numerous ongoing immunotherapeutic trials since the final common pathway of all these approaches is the transduction of death signals within the tumour cell.
  // This model was taken from the CellML repository and automatically converted to SBML.
  // The original model was: Webb SD, Sherratt JA, Fish RG. (2002) - version=1.0
  // The original CellML model was created by:
  // Catherine Lloyd
  // c.lloyd@auckland.ac.nz
  // The University of Auckland
  // This model originates from BioModels Database: A Database of Annotated Published Models (http://www.ebi.ac.uk/biomodels/). It is copyright (c) 2005-2011 The BioModels.net Team.
  // To the extent possible under law, all copyright and related or neighbouring rights to this encoded model have been dedicated to the public domain worldwide. Please refer to CC0 Public Domain Dedication for more information.
  // In summary, you are entitled to use this encoded model in absolutely any manner you deem suitable, verbatim, or with modification, alone or embedded it in a larger context, redistribute it, commercially or not, in a restricted way or not..
  // To cite BioModels Database, please use: Li C, Donizelli M, Rodriguez N, Dharuri H, Endler L, Chelliah V, Li L, He E, Henry A, Stefan MI, Snoep JL, Hucka M, Le Novère N, Laibe C (2010) BioModels Database: An enhanced, curated and annotated resource for published quantitative kinetic models. BMC Syst Biol., 4:92.
  // biomodels.db:MODEL1006230046
  // isDescribedBy pubmed:12208611
  // biomodels.db:MODEL1006230046
  // isDescribedBy pubmed:12208611
  // biomodels.db:MODEL1006230046
  // biomodels.db:MODEL1006230046

  // Compartments:
  compartment COMpartment = 1 litre;

  // Parameters:
  time_environment has hour;
  T = 500 cell_ml;
  LT = 0;
  RT = 10000;
  m = 500 cell_ml;
  Lm = 1000;
  Rm = 1000;
  SL = 0 molecule_ml;
  k1 = 8.38e-10 cell_per_ml_molecule2_hour;
  k2 = 0.006 molecule_ml2_per_cell3_hour;
  k3 = 5.9413 per_hour;
  k4 = 0.35 per_hour;
  k5 = 2.52e-9 ml2_per_cell_molecule_hour;
  k6 = 2244 molecule_per_cell_hour;
  k7 = 0.35 per_hour;
  k8 = 1.92e10 per_molar_per_minute;
  k9 = 8.73e9 per_molar_per_minute;
  k10 = 3110 molecule_per_cell_hour;
  k11 = 13.9 per_hour;

  // Rate rules:
  T' = -(1*k1*m*T*Lm*RT);
  LT' = k2*T*m - (k3*LT + k4*LT + k5*m*T*LT*Rm);
  RT' = k6 - (k7*RT + 1*k8*RT*SL);
  m' = -(1*k1*m*T*LT*Rm);
  Lm' = k10 - (k3*Lm + k4*Lm + k5*m*T*Lm*RT);
  Rm' = k6 - (k7*Rm + 1*k8*Rm*SL);
  SL' = k3*(Lm*m + LT*T) - (k11*SL + 1*k9*(Rm*m + RT*T)*SL);

  // Unit definitions:
  unit minute = 60 second;
  unit hour = 3600 second;
  unit molecule_ml = 1 / (1e-3 litre);
  unit ml2 = (1e-3 litre)^2;
  unit ml_per_molecule_hour = 1e-3 litre / (3600 second);
  unit molecule_per_cell_hour = 1 / (3600 second);
  unit molecule_ml2_per_cell3_hour = (1e-3 litre)^2 / (3600 second);
  unit ml2_per_cell_molecule_hour = (1e-3 litre)^2 / (3600 second);
  unit cell_per_ml_molecule2_hour = 1 / (1e-3 litre * 3600 second);
  unit cell_ml = 1 / (1e-3 litre);
  unit per_minute = 1 / (60 second);
  unit per_hour = 1 / (3600 second);
  unit molar = mole / litre;
  unit per_molar_per_minute = litre / (mole * 60 second);
  unit time = 3600 second;
end
