// SBML level 2 version 4

model Revilla2003_HIV1therapy()
  // This a model from the article:
  // Fighting a virus with a virus: a dynamic model for HIV-1 therapy.
  // Revilla T, Garcia-Ramos G. Math Biosci 2003 Oct;185(2):191-203 12941536 ,
  // Abstract:
  // A mathematical model examined a potential therapy for controlling viral infections using genetically modified viruses. The control of the infection is an indirect effect of the selective elimination by an engineered virus of infected cells that are the source of the pathogens. Therefore, this engineered virus could greatly compensate for a dysfunctional immune system compromised by AIDS. In vitro studies using engineered viruses have been shown to decrease the HIV-1 load about 1000-fold. However, the efficacy of this potential treatment for reducing the viral load in AIDS patients is unknown. The present model studied the interactions among the HIV-1 virus, its main host cell (activated CD4+ T cells), and a therapeutic engineered virus in an in vivo context; and it examined the conditions for controlling the pathogen. This model predicted a significant drop in the HIV-1 load, but the treatment does not eradicate HIV. A basic estimation using a currently engineered virus indicated an HIV-1 load reduction of 92% and a recovery of host cells to 17% of their normal level. Greater success (98% HIV reduction, 44% host cells recovery) is expected as more competent engineered viruses are designed. These results suggest that therapy using viruses could be an alternative to extend the survival of AIDS patients.
  // This model was taken from the CellML repository and automatically converted to SBML.
  // The original model was: Revilla T, Garcia-Ramos G. (2003) - version=1.0
  // The original CellML model was created by:
  // Catherine Lloyd
  // c.lloyd@auckland.ac.nz
  // The University of Auckland
  // This model originates from BioModels Database: A Database of Annotated Published Models (http://www.ebi.ac.uk/biomodels/). It is copyright (c) 2005-2011 The BioModels.net Team.
  // To the extent possible under law, all copyright and related or neighbouring rights to this encoded model have been dedicated to the public domain worldwide. Please refer to CC0 Public Domain Dedication for more information.
  // In summary, you are entitled to use this encoded model in absolutely any manner you deem suitable, verbatim, or with modification, alone or embedded it in a larger context, redistribute it, commercially or not, in a restricted way or not..
  // To cite BioModels Database, please use: Li C, Donizelli M, Rodriguez N, Dharuri H, Endler L, Chelliah V, Li L, He E, Henry A, Stefan MI, Snoep JL, Hucka M, Le Novère N, Laibe C (2010) BioModels Database: An enhanced, curated and annotated resource for published quantitative kinetic models. BMC Syst Biol., 4:92.
  // biomodels.db:MODEL1006230047
  // isDescribedBy pubmed:12941536
  // biomodels.db:MODEL1006230047
  // isDescribedBy pubmed:12941536
  // biomodels.db:MODEL1006230047
  // biomodels.db:MODEL1006230047

  // Compartments:
  compartment COMpartment = 1 litre;

  // Parameters:
  time_environment has day;
  x = 3;
  lamda = 2 cell_per_mm3_day;
  d = 0.01 first_order_rate_constant;
  y = 6;
  a = 0.33 first_order_rate_constant;
  z = 0;
  b = 2 first_order_rate_constant;
  v = 149;
  k = 50 vir_per_cell_day;
  u = 2 first_order_rate_constant;
  w = 1;
  c = 2000 vir_per_cell_day;
  q = 2 first_order_rate_constant;
  alpha = 0.004 mm3_per_vir_day;
  beta = 0.004 mm3_per_vir_day;

  // Rate rules:
  x' = 1*lamda - (d*x + 1*beta*x*v);
  y' = 1*beta*x*v - (a*y + 1*alpha*w*y);
  z' = 1*alpha*w*y - b*z;
  v' = k*y - u*v;
  w' = c*z - q*w;

  // Unit definitions:
  unit day = 86400 second;
  unit first_order_rate_constant = 1 / (86400 second);
  unit mm3 = (1e-3 metre)^3;
  unit per_mm3 = 1 / (1e-3 metre)^3;
  unit cell_per_mm3_day = 1 / ((1e-3 metre)^3 * 86400 second);
  unit vir_per_cell_day = 1 / (86400 second);
  unit mm3_per_vir_day = (1e-3 metre)^3 / (86400 second);
  unit time = 86400 second;
end
