// SBML level 2 version 4

model Mahajan2008_CardiacActionPotential_Arrhythmias()
  // This a model from the article:
  // A rabbit ventricular action potential model replicating cardiac dynamics at rapid heart rates.
  // Mahajan A, Shiferaw Y, Sato D, Baher A, Olcese R, Xie LH, Yang MJ, Chen PS, Restrepo JG, Karma A, Garfinkel A, Qu Z, Weiss JN. Biophys J 2008 Jan 15;94(2):392-410 18160660 ,
  // Abstract:
  // Mathematical modeling of the cardiac action potential has proven to be a powerful tool for illuminating various aspects of cardiac function, including cardiac arrhythmias. However, no currently available detailed action potential model accurately reproduces the dynamics of the cardiac action potential and intracellular calcium (Ca(i)) cycling at rapid heart rates relevant to ventricular tachycardia and fibrillation. The aim of this study was to develop such a model. Using an existing rabbit ventricular action potential model, we modified the L-type calcium (Ca) current (I(Ca,L)) and Ca(i) cycling formulations based on new experimental patch-clamp data obtained in isolated rabbit ventricular myocytes, using the perforated patch configuration at 35-37 degrees C. Incorporating a minimal seven-state Markovian model of I(Ca,L) that reproduced Ca- and voltage-dependent kinetics in combination with our previously published dynamic Ca(i) cycling model, the new model replicates experimentally observed action potential duration and Ca(i) transient alternans at rapid heart rates, and accurately reproduces experimental action potential duration restitution curves obtained by either dynamic or S1S2 pacing.
  // This model was taken from the CellML repository and automatically converted to SBML.
  // The original model was: Mahajan A, Shiferaw Y, Sato D, Baher A, Olcese R, Xie LH, Yang MJ, Chen PS, Restrepo JG, Karma A, Garfinkel A, Qu Z, Weiss JN. (2008) - version=1.0
  // The original CellML model was created by:
  // Penny Noble
  // penny.noble@dpag.ox.ac.uk
  // The University of Oxford
  // This model originates from BioModels Database: A Database of Annotated Published Models (http://www.ebi.ac.uk/biomodels/). It is copyright (c) 2005-2011 The BioModels.net Team.
  // To the extent possible under law, all copyright and related or neighbouring rights to this encoded model have been dedicated to the public domain worldwide. Please refer to CC0 Public Domain Dedication for more information.
  // In summary, you are entitled to use this encoded model in absolutely any manner you deem suitable, verbatim, or with modification, alone or embedded it in a larger context, redistribute it, commercially or not, in a restricted way or not. .
  // To cite BioModels Database, please use: Li C, Donizelli M, Rodriguez N, Dharuri H, Endler L, Chelliah V, Li L, He E, Henry A, Stefan MI, Snoep JL, Hucka M, Le Novère N, Laibe C (2010) BioModels Database: An enhanced, curated and annotated resource for published quantitative kinetic models. BMC Syst Biol., 4:92.
  // biomodels.db:MODEL1006230048
  // isDescribedBy pubmed:18160660
  // biomodels.db:MODEL1006230048
  // isDescribedBy pubmed:18160660
  // biomodels.db:MODEL1006230048
  // biomodels.db:MODEL1006230048

  // Compartments:
  compartment COMpartment = 1 litre;

  // Parameters:
  time_Environment = ;
  R = 8.314472;
  T = 308;
  F = 96.4853415;
  K_o = 5.4;
  Ca_o = 1.8;
  Na_o = 136;
  V = -87.16982;
  wca = 8;
  stim_offset = 0;
  stim_period = 400;
  stim_duration = 3;
  stim_amplitude = -15;
  xm = 0.001075453;
  xh = 0.9906913;
  xj = 0.9938889;
  gna = 12;
  c1 = 1.8211252e-5;
  c2 = 0.9793226;
  xi1ca = 0.001208153;
  xi1ba = 3.3616596e-5;
  xi2ca = 0.004173008;
  xi2ba = 0.01524259;
  gca = 182;
  pca = 0.00054;
  vth = 0;
  s6 = 8;
  vx = -40;
  sx = 3;
  vy = -40;
  sy = 4;
  vyr = -40;
  syr = 11.32;
  cat = 3;
  cpt = 6.09365;
  k2 = 0.000103615;
  k1t = 0.00413;
  k2t = 0.00224;
  r1 = 0.3;
  r2 = 3;
  s1t = 0.00195;
  tca = 78.0329;
  taupo = 1;
  tau3 = 3;
  gkix = 0.3;
  xr = 0.007074239;
  gkr = 0.0125;
  gks = 0.1386;
  xs1 = 0.04826759;
  xs2 = 0.1054688;
  xtos = 0.00364776906;
  ytos = 0.1744036;
  xtof = 0.003643593;
  ytof = 0.9933313;
  gtos = 0.04;
  gtof = 0.11;
  gNaK = 1.5;
  xkmko = 1.5;
  xkmnai = 12;
  gNaCa = 0.84;
  xkdna = 0.3;
  xmcao = 1.3;
  xmnao = 87.5;
  xmnai = 12.3;
  xmcai = 0.0036;
  cstar = 90;
  Ca_JSR = 97.50546;
  gryr = 2.58079;
  gbarsr = 2.68418e4;
  gdyad = 9000;
  ax = 0.3576;
  ay = 0.05;
  av = 11.3;
  taua = 100;
  taur = 30;
  xir = 0.006679257;
  cup = 0.5;
  kj = 50;
  vup = 0.4;
  gleak = 2.069e-5;
  Na_i = 11.44171;
  Ca_dyad = 1.716573;
  Ca_submem = 0.2269411;
  Ca_i = 0.256752;
  Ca_NSR = 104.45;
  bcal = 24;
  xkcal = 7;
  srmax = 47;
  srkd = 0.6;
  bmem = 15;
  kmem = 0.3;
  bsar = 42;
  ksar = 13;
  xkon = 0.0327;
  xkoff = 0.0196;
  btrop = 70;
  tropi = 22.17169;
  trops = 19.8647;
  taud = 4;
  taups = 0.5;
  ek = ;
  K_i = 140;
  prNaK = 0.01833;

  // Assignment rules:
  FonRT := F/(R*T);
  past := floor(time_Environment/stim_period)*stim_period;
  i_Stim := piecewise(stim_amplitude, (time_Environment - past >= stim_offset) && (time_Environment - past <= stim_offset + stim_duration), 0);
  am := piecewise(0.32*1*(V + 47.13)/(1 - exp(-0.1*(V + 47.13))), abs(V + 47.13) > 0.001, 3.2);
  bm := 0.08*exp(-V/11);
  ah := piecewise(0.135*exp((80 + V)/(-6.8)), V < -40, 0);
  bh := piecewise(3.56*exp(0.079*V) + 310000*exp(0.35*V), V < -40, 1/(0.13*(1 + exp((V + 10.66)/(-11.1)))));
  aj := piecewise((-127140*exp(0.2444*V) - 3.474e-5*exp(-0.04391*V))*1*(V + 37.78)/(1 + exp(0.311*(V + 79.23))), V < -40, 0);
  bj := piecewise(0.1212*exp(-0.01052*V)/(1 + exp(-0.1378*(V + 40.14))), V < -40, 0.3*exp(-2.535e-7*V)/(1 + exp(-0.1*(V + 32))));
  za := V*2*FonRT;
  csm := Ca_submem/1000;
  rxa := piecewise(4*pca*F*FonRT*(csm*exp(za) - 0.341*Ca_o)/(2*FonRT), abs(za) < 0.001, 4*pca*V*F*FonRT*(csm*exp(za) - 0.341*Ca_o)/(exp(za) - 1));
  poinf := 1/(1 + exp(-(V - vth)/s6));
  alpha := poinf/taupo;
  beta := (1 - poinf)/taupo;
  fca := 1/(1 + (cat/Ca_dyad)^3);
  s1 := 0.0182688*fca;
  k1 := 0.024168*fca;
  s2 := s1*r1/r2*k2/k1;
  s2t := s1t*r1/r2*k2t/k1t;
  poi := 1/(1 + exp(-(V - vx)/sx));
  k3 := (1 - poi)/tau3;
  k3t := k3;
  Pr := 1 - 1/(1 + exp(-(V - vy)/sy));
  recov := 10 + 4954*exp(V/15.6);
  tau_ca := tca/(1 + (Ca_dyad/cpt)^4) + 0.1;
  tauca := (recov - tau_ca)*Pr + tau_ca;
  tauba := (recov - 450)*Pr + 450;
  Ps := 1/(1 + exp(-(V - vyr)/syr));
  k6 := fca*Ps/tauca;
  k5 := (1 - Ps)/tauca;
  k6t := Ps/tauba;
  k5t := (1 - Ps)/tauba;
  k4 := k3*alpha/beta*k1/k2*k5/k6;
  k4t := k3t*alpha/beta*k1t/k2t*k5t/k6t;
  po := 1 - xi1ca - xi2ca - xi1ba - xi2ba - c1 - c2;
  jca := gca*po*rxa;
  xica := 2*wca*jca;
  aki := 1.02/(1 + exp(0.2385*(V - ek - 59.215)));
  bki := (0.49124*exp(0.08032*(V - ek + 5.476)) + 1*exp(0.06175*(V - ek - 594.31)))/(1 + exp(-0.5143*(V - ek + 4.753)));
  xkin := aki/(aki + bki);
  xik1 := gkix*sqrt(K_o/5.4)*xkin*(V - ek);
  xkrv1 := piecewise(0.00138*1*(V + 7)/(1 - exp(-0.123*(V + 7))), abs(V + 7) > 0.001, 0.00138/0.123);
  xkrv2 := piecewise(0.00061*1*(V + 10)/(exp(0.145*(V + 10)) - 1), abs(V + 10) > 0.001, 0.00061/0.145);
  taukr := 1/(xkrv1 + xkrv2);
  xkrinf := 1/(1 + exp(-(V + 50)/7.5));
  rg := 1/(1 + exp((V + 33)/22.4));
  xikr := gkr*sqrt(K_o/5.4)*xr*rg*(V - ek);
  xs1ss := 1/(1 + exp(-(V - 1.5)/16.7));
  xs2ss := xs1ss;
  tauxs1 := piecewise(1/(7.19e-5/0.148 + 0.000131/0.0687), abs(V + 30) < 0.001/0.0687, 1/(7.19e-5*(V + 30)/(1 - exp(-0.148*(V + 30))) + 0.000131*(V + 30)/(exp(0.0687*(V + 30)) - 1)));
  tauxs2 := 4*tauxs1;
  gksx := 1 + 0.8/(1 + (0.5/Ca_i)^3);
  rt1 := -(V + 3)/15;
  rt2 := (V + 33.5)/10;
  rt3 := (V + 60)/10;
  rt4 := -V/30*V/30;
  rt5 := (V + 33.5)/10;
  xtos_inf := 1/(1 + exp(rt1));
  ytos_inf := 1/(1 + exp(rt2));
  xtof_inf := xtos_inf;
  ytof_inf := ytos_inf;
  rs_inf := 1/(1 + exp(rt2));
  txs := 9/(1 + exp(-rt1)) + 0.5;
  tys := 3000/(1 + exp(rt3)) + 30;
  txf := 3.5*exp(rt4) + 1.5;
  tyf := 20/(1 + exp(rt5)) + 20;
  xitos := gtos*xtos*(ytos + 0.5*rs_inf)*(V - ek);
  xitof := gtof*xtof*ytof*(V - ek);
  xito := xitos + xitof;
  sigma := (exp(Na_o/67.3) - 1)/7;
  fNaK := 1/(1 + 0.1245*exp(-0.1*V*FonRT) + 0.0365*sigma*exp(-V*FonRT));
  xiNaK := gNaK*fNaK*Na_i/(Na_i + xkmnai)*K_o/(K_o + xkmko);
  zw3 := Na_i^3*Ca_o*exp(V*0.35*FonRT) - Na_o^3*csm*exp(V*(0.35 - 1)*FonRT);
  zw4 := 1 + 0.2*exp(V*(0.35 - 1)*FonRT);
  aloss := 1/(1 + (xkdna/Ca_submem)^3);
  yz1 := xmcao*Na_i^3 + xmnao^3*csm;
  yz2 := xmnai^3*Ca_o*(1 + csm/xmcai);
  yz3 := xmcai*Na_o^3*(1 + (Na_i/xmnai)^3);
  yz4 := Na_i^3*Ca_o + Na_o^3*csm;
  zw8 := yz1 + yz2 + yz3 + yz4;
  jNaCa := gNaCa*aloss*zw3/(zw4*zw8);
  xiNaCa := wca*jNaCa;
  bv := (1 - av)*cstar - 50;
  Qr0 := piecewise((Ca_JSR - 50)/1, (Ca_JSR > 50) && (Ca_JSR < cstar), av*Ca_JSR + bv, Ca_JSR >= cstar, 0);
  Qr := Ca_NSR*Qr0/cstar;
  sparkV := exp(-ay*(V + 30))/(1 + exp(-ay*(V + 30)));
  spark_rate := gryr/1*po*abs(rxa)*sparkV;
  xirp := po*Qr*abs(rxa)*gbarsr/1*exp(-ax*(V + 30))/(1 + exp(-ax*(V + 30)));
  xicap := po*gdyad*abs(rxa);
  xiryr := xirp + xicap;
  jup := vup*Ca_i*Ca_i/(Ca_i*Ca_i + cup*cup);
  jleak := gleak*Ca_NSR*Ca_NSR/(Ca_NSR*Ca_NSR + kj*kj)*(Ca_NSR*16.667 - Ca_i);
  bpxs := bcal*xkcal/((xkcal + Ca_submem)*(xkcal + Ca_submem));
  spxs := srmax*srkd/((srkd + Ca_submem)*(srkd + Ca_submem));
  mempxs := bmem*kmem/((kmem + Ca_submem)*(kmem + Ca_submem));
  sarpxs := bsar*ksar/((ksar + Ca_submem)*(ksar + Ca_submem));
  dcsib := 1/(1 + bpxs + spxs + mempxs + sarpxs);
  bpxi := bcal*xkcal/((xkcal + Ca_i)*(xkcal + Ca_i));
  spxi := srmax*srkd/((srkd + Ca_i)*(srkd + Ca_i));
  mempxi := bmem*kmem/((kmem + Ca_i)*(kmem + Ca_i));
  sarpxi := bsar*ksar/((ksar + Ca_i)*(ksar + Ca_i));
  dciib := 1/(1 + bpxi + spxi + mempxi + sarpxi);
  jd := (Ca_submem - Ca_i)/taud;
  xbi := xkon*Ca_i*(btrop - tropi) - xkoff*tropi;
  xbs := xkon*Ca_submem*(btrop - trops) - xkoff*trops;
  dCa_JSR := -xir + jup - jleak;
  eks := 1/FonRT*ln((K_o + prNaK*Na_o)/(K_i + prNaK*Na_i));
  xiks := gks*gksx*xs1*xs2*(V - eks);
  ena := 1/FonRT*ln(Na_o/Na_i);
  xina := gna*xh*xj*xm*xm*xm*(V - ena);
  Itotal := -(xina + xik1 + xikr + xiks + xito + xiNaCa + xica + xiNaK + i_Stim);

  // Rate rules:
  V' = Itotal;
  xh' = ah*(1 - xh) - bh*xh;
  xj' = aj*(1 - xj) - bj*xj;
  xm' = am*(1 - xm) - bm*xm;
  c1' = alpha*c2 + k2*xi1ca + k2t*xi1ba + r2*po - (beta + r1 + k1t + k1)*c1;
  c2' = beta*c1 + k5*xi2ca + k5t*xi2ba - (k6 + k6t + alpha)*c2;
  xi1ca' = k1*c1 + k4*xi2ca + s1*po - (k3 + k2 + s2)*xi1ca;
  xi1ba' = k1t*c1 + k4t*xi2ba + s1t*po - (k3t + k2t + s2t)*xi1ba;
  xi2ca' = k3*xi1ca + k6*c2 - (k5 + k4)*xi2ca;
  xi2ba' = k3t*xi1ba + k6t*c2 - (k5t + k4t)*xi2ba;
  xr' = (xkrinf - xr)/taukr;
  xs1' = (xs1ss - xs1)/tauxs1;
  xs2' = (xs2ss - xs2)/tauxs2;
  xtos' = (xtos_inf - xtos)/txs;
  ytos' = (ytos_inf - ytos)/tys;
  xtof' = (xtof_inf - xtof)/txf;
  ytof' = (ytof_inf - ytof)/tyf;
  Ca_JSR' = (Ca_NSR - Ca_JSR)/taua;
  xir' = spark_rate*Qr - xir*(1 - taur*dCa_JSR/Ca_NSR)/taur;
  Na_i' = -(xina + 3*xiNaK + 3*xiNaCa)/(wca*1000);
  Ca_dyad' = xiryr - (Ca_dyad - Ca_submem)/taups;
  Ca_submem' = dcsib*(50*(xir - jd - jca + jNaCa) - xbs);
  Ca_i' = dciib*(jd - jup + jleak - xbi);
  Ca_NSR' = dCa_JSR;
  tropi' = xbi;
  trops' = xbs;

  // Unit definitions:
  unit ms = 1e-3 second;
  unit per_ms = 1 / (1e-3 second);
  unit mV = 1e-3 volt;
  unit per_mV = 1 / (1e-3 volt);
  unit uS_per_nF = 1e-6 siemens / (1e-9 farad);
  unit nA_per_nF = 1e-9 ampere / (1e-9 farad);
  unit molar = mole / litre;
  unit mM = 1e-3 mole * 1e-3 litre;
  unit uM = 1e-6 mole * 1e-6 litre;
  unit mM4 = (1e-3 mole)^4 / litre^4;
  unit mV_per_uM = 1e-3 volt * litre / (1e-6 mole);
  unit uM_per_ms = 1e-6 mole / (litre * 1e-3 second);
  unit per_uM_per_ms = litre / (1e-6 mole * 1e-3 second);
  unit J_per_moleK = joule / (mole * kelvin);
  unit coulomb_per_mmole = coulomb / (1e-3 mole);
  unit cm_per_s = 0.01 metre / second;
  unit mA_per_cm2 = 1e-3 ampere / (0.01 metre)^2;
  unit mmole_per_coulomb_cm = 1e-3 mole / (coulomb * 0.01 metre);
  unit time = 1e-3 second;
end
