// SBML level 2 version 4

model Vinnakota2006_MuscleGlycogenolysis_ModelC()
  // This a model from the article:
  // Dynamics of muscle glycogenolysis modeled with pH time course computation and pH-dependent reaction equilibria and enzyme kinetics.
  // Vinnakota K, Kemp ML, Kushmerick MJ. Biophys J 2006 Aug 15;91(4):1264-87 16617075 ,
  // Abstract:
  // Cellular metabolites are moieties defined by their specific binding constants to H+, Mg2+, and K+ or anions without ligands. As a consequence, every biochemical reaction in the cytoplasm has an associated proton stoichiometry that is generally noninteger- and pH-dependent. Therefore, with metabolic flux, pH is altered in a medium with finite buffer capacity. Apparent equilibrium constants and maximum enzyme velocities, which are functions of pH, are also altered. We augmented an earlier mathematical model of skeletal muscle glycogenolysis with pH-dependent enzyme kinetics and reaction equilibria to compute the time course of pH changes. Analysis shows that kinetics and final equilibrium states of the closed system are highly constrained by the pH-dependent parameters. This kinetic model of glycogenolysis, coupled to creatine kinase and adenylate kinase, simulated published experiments made with a cell-free enzyme mixture to reconstitute the network and to synthesize PCr and lactate in vitro. Using the enzyme kinetic and thermodynamic data in the literature, the simulations required minimal adjustments of parameters to describe the data. These results show that incorporation of appropriate physical chemistry of the reactions with accurate kinetic modeling gives a reasonable simulation of experimental data and is necessary for a physically correct representation of the metabolic network. The approach is general for modeling metabolic networks beyond the specific pathway and conditions presented here.
  // This model was taken from the CellML repository and automatically converted to SBML.
  // The original model was: Vinnakota K, Kemp ML, Kushmerick MJ. (2006) - version=1.0
  // The original CellML model was created by:
  // Geoffrey Nunns
  // gnunns1@jhu.edu
  // The University of Auckland
  // This model originates from BioModels Database: A Database of Annotated Published Models (http://www.ebi.ac.uk/biomodels/). It is copyright (c) 2005-2011 The BioModels.net Team.
  // To the extent possible under law, all copyright and related or neighbouring rights to this encoded model have been dedicated to the public domain worldwide. Please refer to CC0 Public Domain Dedication for more information.
  // In summary, you are entitled to use this encoded model in absolutely any manner you deem suitable, verbatim, or with modification, alone or embedded it in a larger context, redistribute it, commercially or not, in a restricted way or not..
  // To cite BioModels Database, please use: Li C, Donizelli M, Rodriguez N, Dharuri H, Endler L, Chelliah V, Li L, He E, Henry A, Stefan MI, Snoep JL, Hucka M, Le Novère N, Laibe C (2010) BioModels Database: An enhanced, curated and annotated resource for published quantitative kinetic models. BMC Syst Biol., 4:92.
  // biomodels.db:MODEL1006230049
  // isDescribedBy pubmed:16617075
  // biomodels.db:MODEL1006230049
  // isDescribedBy pubmed:16617075
  // biomodels.db:MODEL1006230049
  // biomodels.db:MODEL1006230049

  // Compartments:
  compartment COMpartment = 1 litre;

  // Parameters:
  R = 0.008314;
  T1 = 298.15;
  PCr = 1e-9;
  Cr = 0.029999999;
  NAD = 0.0005;
  NADH = 1e-9;
  ATP = 0.005;
  ADP = 1e-9;
  AMP = 1e-9;
  Pi = 0.035;
  Gly = 0.04;
  G1P = 1e-9;
  G6P = 1e-9;
  F6P = 1e-9;
  FBP = 1e-9;
  DHAP = 1e-9;
  G3P = 1e-9;
  GAP = 1e-9;
  BPG = 1e-9;
  P3G = 1e-9;
  P2G = 1e-9;
  PEP = 1e-9;
  PYR = 1e-9;
  LAC = 1e-9;
  Mg = 0.0004913451;
  pH_calc = 7.3;
  protonload = 0;

  // Assignment rules:
  Par_1 := 1.9*5;
  Par_2 := 0.002;
  Par_3 := 1.7;
  Par_4 := 4;
  Par_5 := 2;
  Par_6 := 4.7;
  Par_7 := 1.5;
  Par_8 := 2.7;
  Par_9 := 1.01;
  Par_10 := 2;
  Par_11 := 4.6;
  Par_12 := 1.5;
  Par_13 := 1.5;
  Par_14 := 7.4;
  Par_15 := 4.4;
  Par_16 := 0.00266055;
  Par_17 := 2;
  Par_18 := 1.750524;
  Par_19 := 1.9*4.8;
  Par_20 := 6.3;
  Par_21 := 3;
  Par_22 := 1.9*8.8;
  Par_23 := 4.8;
  Par_24 := 1.19;
  Par_25 := 1.9*5.6;
  Par_26 := 1.8;
  Par_27 := 2;
  Par_28 := 8;
  Par_29 := 2.5;
  Par_30 := 4.02;
  Par_31 := 4.02;
  Par_32 := 2.7;
  Par_33 := 2.7;
  Par_34 := 8.7;
  Par_35 := 6;
  Par_36 := 1;
  Par_37 := 1;
  Par_38 := 13;
  Par_39 := 1.9*0.01065914;
  Par_40 := 5;
  Par_41 := 2;
  Par_42 := 1;
  Par_43 := 1.9*12;
  Par_44 := 3.2;
  Par_45 := 6.1;
  Par_46 := 1.9*8.25;
  Par_47 := 1.8;
  Par_48 := 1.2;
  Par_49 := 2.2;
  Par_50 := 8;
  Par_51 := 1.9*1.265;
  Par_52 := 2.5;
  Par_53 := 9;
  Par_54 := 2.9;
  Par_55 := 8;
  Par_56 := 3.3;
  Par_57 := 1.9*1.12;
  Par_58 := 2;
  Par_59 := 8;
  Par_60 := 1.2;
  Par_61 := 3.5;
  Par_62 := 1.9*1.12;
  Par_63 := 2;
  Par_64 := 1.4;
  Par_65 := 1.9*1.92;
  Par_66 := 1;
  Par_67 := 3.7;
  Par_68 := 1.9*1.44;
  Par_69 := 8;
  Par_70 := 3;
  Par_71 := 7.05;
  Par_72 := 1.13;
  Par_73 := 1.9*1.92;
  Par_74 := 3.35;
  Par_75 := 2;
  Par_76 := 1.7;
  Par_77 := 8.49;
  Par_78 := 1.9*5;
  Par_79 := 1.11;
  Par_80 := 3.5;
  Par_81 := 1.35;
  Par_82 := 3.9;
  Par_83 := 3.8;
  Par_84 := 1.9*8.8;
  Par_85 := 3.2;
  Par_86 := 2.7;
  Par_87 := 3.5;
  Par_88 := 5;
  Par_89 := 1;
  Par_90 := 1;
  Par_91 := 1.5;
  Par_92 := 2.5;
  Par_93 := 1;
  Par_94 := 310.15;
  Par_95 := 0.005;
  Par_96 := 0.08;
  Par_97 := 1;
  Par_98 := 7.3;
  Par_99 := 0;
  Par_100 := 45;
  addbuffer := Par_97;
  pHstat := Par_98;
  pH_cy := piecewise(pH_calc, (time <= 1) || ((time > 1) && (addbuffer == 0)), pHstat);
  T := Par_94;
  I := Par_90;
  mgT := Par_95;
  k := Par_96;
  c0 := 1;
  RT2dadT := 1.4775;
  B := 1.6;
  Icorr := RT2dadT*sqrt(I)/(1 + B*sqrt(I));
  I1 := 0.1;
  alphadebye := 1.17582;
  IcorrpKa := 1*alphadebye*(sqrt(I1)/(1 + B*sqrt(I1)) - sqrt(I)/(1 + B*sqrt(I)))/ln(10);
  TcorrpKa := (1/T - 1/T1)/(ln(10)*R);
  RTalpha := 2.91482;
  IcorrdeltaGpof := RTalpha*sqrt(I)/(1 + B*sqrt(I));
  pKak_Pi := 0.5;
  deltaH1o_Pi := 3;
  deltaHmgo_Pi := -2.9;
  deltaH1_Pi := deltaH1o_Pi + Icorr*(2^2 + 1^2 - 1^2);
  deltaHmg_Pi := deltaHmgo_Pi + Icorr*(2^2 + 2^2 - 0^2);
  pKa1_Pi := 6.75 + IcorrpKa/1*(2^2 + 1^2 - 1^2) + TcorrpKa*deltaH1_Pi;
  pKamg_Pi := 1.65 + IcorrpKa/1*(2^2 + 1^2 - 1^2) + TcorrpKa*deltaHmg_Pi;
  P_Pi := 1 + 10^(-pH_cy + pKa1_Pi) + Mg/c0*10^pKamg_Pi + k/c0*10^pKak_Pi;
  HPi2 := 1/P_Pi;
  H2Pi1 := 10^(-pH_cy + pKa1_Pi)*HPi2;
  kPi := k/c0*10^pKak_Pi*HPi2;
  mgPi := Mg/c0*10^pKamg_Pi*HPi2;
  Navg_Pi := 1*H2Pi1;
  dNavgPidH := 10^pKa1_Pi*(P_Pi - 10^(-pH_cy + pKa1_Pi))/(c0*P_Pi^2);
  dNavgPidmg := -10^(-pH_cy)/c0*10^(pKa1_Pi + pKamg_Pi)/P_Pi^2;
  dmgPidmg := (P_Pi*10^pKamg_Pi/c0 - Mg/c0*10^(2*pKamg_Pi)/c0)/P_Pi^2;
  dmgPidpH := Mg/c0*10^(-pH_cy + pKa1_Pi + pKamg_Pi)*ln(10)/P_Pi^2;
  NH_HPi2 := 1;
  deltaGof_HPi2 := -1096.1;
  deltaGpof_HPi2 := deltaGof_HPi2 + NH_HPi2*ln(10)*R*T*pH_cy - IcorrdeltaGpof*(4 - NH_HPi2);
  deltaH1o_ATP := -5;
  deltaHmgo_ATP := -18;
  deltaHko_ATP := -1;
  deltaH1_ATP := deltaH1o_ATP + Icorr*(4^2 + 1^2 - 3^2);
  deltaHmg_ATP := deltaHmgo_ATP + Icorr*(4^2 + 2^2 - 2^2);
  deltaHk_ATP := deltaHko_ATP + Icorr*(4^2 + 1^2 - 3^2);
  pKa1_ATP := 6.48 + IcorrpKa/1*(4^2 + 1^2 - 3^2) + TcorrpKa*deltaH1_ATP;
  pKamg_ATP := 4.19 + IcorrpKa/1*(4^2 + 2^2 - 2^2) + TcorrpKa*deltaHmg_ATP;
  pKak_ATP := 1.17 + IcorrpKa/1*(4^2 + 1^2 - 3^2) + TcorrpKa*deltaHk_ATP;
  P_ATP := 1 + 10^(-pH_cy + pKa1_ATP) + Mg/c0*10^pKamg_ATP + k/c0*10^pKak_ATP;
  ATP4 := 1/P_ATP;
  HATP3 := 10^(-pH_cy + pKa1_ATP)*ATP4;
  mgATP2 := Mg/c0*10^pKamg_ATP*ATP4;
  kATP := k/c0*10^pKak_ATP*ATP4;
  Navg_ATP := 0*ATP4 + 1*HATP3 + 0*mgATP2 + 0*kATP;
  dNavgATPdH := 10^pKa1_ATP*(P_ATP - 10^(-pH_cy + pKa1_ATP))/(c0*P_ATP^2);
  dNavgATPdmg := -10^(-pH_cy)/c0*10^(pKa1_ATP + pKamg_ATP)/P_ATP^2;
  dmgATP2dmg := (P_ATP*10^pKamg_ATP/c0 - Mg/c0*10^(2*pKamg_ATP)/c0)/P_ATP^2;
  dmgATP2dpH := Mg/c0*10^(-pH_cy + pKa1_ATP + pKamg_ATP)*ln(10)/P_ATP^2;
  NH_ATP4 := 12;
  deltaGof_ATP4 := -2768.1;
  deltaGpof_ATP4 := deltaGof_ATP4 + NH_ATP4*R*T*ln(10)*pH_cy - IcorrdeltaGpof*(16 - NH_ATP4);
  pKak_ADP := 1;
  deltaH1o_ADP := -3;
  deltaHmgo_ADP := -15;
  deltaH1_ADP := deltaH1o_ADP + Icorr*(3^2 + 1^2 - 2^2);
  deltaHmg_ADP := deltaHmgo_ADP + Icorr*(3^2 + 2^2 - 1^2);
  pKa1_ADP := 6.38 + IcorrpKa/1*(3^2 + 1^2 - 2^2) + TcorrpKa*deltaH1_ADP;
  pKamg_ADP := 3.25 + IcorrpKa/1*(3^2 + 2^2 - 1^2) + TcorrpKa*deltaHmg_ADP;
  P_ADP := 1 + 10^(-pH_cy + pKa1_ADP) + Mg/c0*10^pKamg_ADP + k/c0*10^pKak_ADP;
  ADP3 := 1/P_ADP;
  HADP2 := 10^(-pH_cy + pKa1_ADP)*ADP3;
  mgADP := ADP3*Mg/c0*10^pKamg_ADP;
  kADP := ADP3*k/c0*10^pKak_ADP;
  Navg_ADP := 0*ADP3 + 1*HADP2 + 0*mgADP + 0*kADP;
  dNavgADPdH := 10^pKa1_ADP*(P_ADP - 10^(-pH_cy + pKa1_ADP))/(c0*P_ADP^2);
  dNavgADPdmg := -10^(-pH_cy)/c0*10^(pKa1_ADP + pKamg_ADP)/P_ADP^2;
  dmgADPdmg := (P_ADP*10^pKamg_ADP/c0 - Mg/c0*10^(2*pKamg_ADP)/c0)/P_ADP^2;
  dmgADPdpH := Mg/c0*10^(-pH_cy + pKa1_ADP + pKamg_ADP)*ln(10)/P_ADP^2;
  NH_ADP3 := 12;
  deltaGof_ADP3 := -1906.13;
  deltaGpof_ADP3 := deltaGof_ADP3 + NH_ADP3*R*T*ln(10)*pH_cy - IcorrdeltaGpof*(9 - NH_ADP3);
  deltaH1o_AMP := -3;
  deltaHmgo_AMP := -7.5;
  deltaH1_AMP := deltaH1o_AMP + Icorr*(2^2 + 1^2 - 1^2);
  deltaHmg_AMP := deltaHmgo_AMP + Icorr*(2^2 + 2^2 - 0^2);
  pKa1_AMP := 6.29 + IcorrpKa/1*(2^2 + 1^2 - 1^2) + TcorrpKa*deltaH1_AMP;
  pKamg_AMP := 1.92 + IcorrpKa/1*(2^2 + 2^2 - 0^2) + TcorrpKa*deltaHmg_AMP;
  P_AMP := 1 + 10^(pKa1_AMP - pH_cy) + Mg/c0*10^pKamg_AMP;
  AMP2 := 1/P_AMP;
  HAMP1 := AMP2*10^(pKa1_AMP - pH_cy);
  mgAMP := Mg/c0*10^pKamg_AMP*AMP2;
  Navg_AMP := 0*AMP2 + HAMP1 + 0*mgAMP;
  dNavgAMPdH := 10^pKa1_AMP*(P_AMP - 10^(-pH_cy + pKa1_AMP))/(c0*P_AMP^2);
  dNavgAMPdmg := -10^(-pH_cy)/c0*10^(pKa1_AMP + pKamg_AMP)/P_AMP^2;
  dmgAMPdmg := (P_AMP*10^pKamg_AMP/c0 - Mg/c0*10^(2*pKamg_AMP)/c0)/P_AMP^2;
  dmgAMPdpH := Mg/c0*10^(-pH_cy + pKa1_AMP + pKamg_AMP)*ln(10)/P_AMP^2;
  NH_AMP2 := 12;
  deltaGof_AMP2 := -1040.45;
  deltaGpof_AMP2 := deltaGof_AMP2 + NH_AMP2*ln(10)*R*T*pH_cy - IcorrdeltaGpof*(4 - NH_AMP2);
  pKak_PCR := 0.31;
  deltaH1o_PCR := 2.66;
  deltaHmgo_PCR := 8.19;
  deltaH1_PCR := deltaH1o_PCR + Icorr*(2^2 + 1^2 - 1^2);
  deltaHmg_PCR := deltaHmgo_PCR + Icorr*(2^2 + 2^2 - 0^2);
  pKa1_PCR := 4.5 + IcorrpKa/1*(2^2 + 1^2 - 1^2) + TcorrpKa*deltaH1_PCR;
  pKamg_PCR := 1.6 + IcorrpKa/1*(2^2 + 2^2 - 0^2) + TcorrpKa*deltaHmg_PCR;
  P_PCR := 1 + 10^(-pH_cy + pKa1_PCR) + Mg/c0*10^pKamg_PCR + k/c0*10^pKak_PCR;
  HPCR := 1/P_PCR;
  H2PCR := 10^(-pH_cy + pKa1_PCR)*HPCR;
  kPCR := k/c0*10^pKak_PCR*HPCR;
  mgPCR := Mg/c0*10^pKamg_PCR*HPCR;
  Navg_PCR := H2PCR;
  dNavgPCRdH := 10^pKa1_PCR*(P_PCR - 10^(-pH_cy + pKa1_PCR))/(c0*P_PCR^2);
  dNavgPCRdmg := -10^(-pH_cy)/c0*10^(pKa1_PCR + pKamg_PCR)/P_PCR^2;
  dmgPCRdmg := (P_PCR*10^pKamg_PCR/c0 - Mg/c0*10^(2*pKamg_PCR)/c0)/P_PCR^2;
  dmgPCRdpH := Mg/c0*10^(-pH_cy + pKa1_PCR + pKamg_PCR)*ln(10)/P_PCR^2;
  NH_HPCR := 8;
  pKa1_CR := 2.3;
  P_CR := 1 + 10^(-pH_cy + pKa1_CR);
  HCR := 1/P_CR;
  H2CR := HCR*10^(-pH_cy + pKa1_CR);
  Navg_CR := 0*HCR + 1*H2CR;
  dNavgCRdH := 10^pKa1_CR*(P_CR - 10^(-pH_cy + pKa1_CR))/(c0*P_CR^2);
  dNavgCRdmg := 0;
  NH_HCR := 9;
  deltaH1o_G1P := -1.7;
  deltaHmgo_G1P := -12;
  deltaH1_G1P := deltaH1o_G1P + Icorr*(2^2 + 1^2 - 1^2);
  deltaHmg_G1P := deltaHmgo_G1P + Icorr*(2^2 + 2^2 - 0^2);
  pKa1_G1P := 6.09 + IcorrpKa/1*(2^2 + 1^2 - 1^2) + TcorrpKa*deltaH1_G1P;
  pKamg_G1P := 2.48 + IcorrpKa/1*(2^2 + 2^2 - 0^2) + TcorrpKa*deltaHmg_G1P;
  P_G1P := 1 + 10^(-pH_cy)*10^pKa1_G1P + Mg/c0*10^pKamg_G1P;
  UG1P := 1/P_G1P;
  HG1P := UG1P*10^(-pH_cy + pKa1_G1P);
  mgG1P := UG1P*Mg/c0*10^pKamg_G1P;
  Navg_G1P := HG1P;
  dNavgG1PdH := 10^pKa1_G1P*(P_G1P - 10^(-pH_cy + pKa1_G1P))/(c0*P_G1P^2);
  dNavgG1Pdmg := -10^(-pH_cy)/c0*10^(pKa1_G1P + pKamg_G1P)/P_G1P^2;
  dmgG1Pdmg := (P_G1P*10^pKamg_G1P/c0 - Mg/c0*10^(2*pKamg_G1P)/c0)/P_G1P^2;
  dmgG1PdpH := Mg/c0*10^(-pH_cy + pKa1_G1P + pKamg_G1P)*ln(10)/P_G1P^2;
  NH_UG1P := 11;
  deltaGof_UG1P := -1756.87;
  deltaGpof_UG1P := deltaGof_UG1P + NH_UG1P*ln(10)*R*T*pH_cy - IcorrdeltaGpof*(4 - NH_UG1P);
  pKa1_G6P := 6.11;
  P_G6P := 1 + 10^(-pH_cy + pKa1_G6P);
  UG6P := 1/P_G6P;
  HG6P := UG6P*10^(-pH_cy + pKa1_G6P);
  Navg_G6P := HG6P;
  dNavgG6PdH := 10^pKa1_G6P*(P_G6P - 10^(-pH_cy + pKa1_G6P))/(c0*P_G6P^2);
  dNavgG6Pdmg := 0;
  NH_UG6P := 11;
  deltaGof_UG6P := -1763.94;
  deltaGpof_UG6P := deltaGof_UG6P + NH_UG6P*ln(10)*R*T*pH_cy - IcorrdeltaGpof*(4 - NH_UG6P);
  pKa1_F6P := 5.89;
  P_F6P := 1 + 10^(-pH_cy + pKa1_F6P);
  UF6P := 1/P_F6P;
  HF6P := UF6P*10^(-pH_cy + pKa1_F6P);
  Navg_F6P := HF6P;
  dNavgF6PdH := 10^pKa1_F6P*(P_F6P - 10^(-pH_cy + pKa1_F6P))/(c0*P_F6P^2);
  dNavgF6Pdmg := 0;
  NH_UF6P := 11;
  deltaGof_UF6P := -1760.8;
  deltaGpof_UF6P := deltaGof_UF6P + NH_UF6P*ln(10)*R*T*pH_cy - IcorrdeltaGpof*(4 - NH_UF6P);
  pKa1_FDP := 6.4;
  pKa2_FDP := 5.92;
  pKamg_FDP := 2.7;
  P_FDP := 1 + 10^(-pH_cy + pKa1_FDP) + 10^(-2*pH_cy + pKa1_FDP + pKa2_FDP) + Mg/c0*10^pKamg_FDP;
  UFDP := 1/P_FDP;
  HFDP := UFDP*10^(-pH_cy + pKa1_FDP);
  H2FDP := UFDP*10^(-2*pH_cy + pKa1_FDP + pKa2_FDP);
  mgFDP := UFDP*Mg/c0*10^pKamg_FDP;
  Navg_FDP := HFDP + 2*H2FDP;
  dNavgFDPdH := (P_FDP*(10^pKa1_FDP + 2*10^(-pH_cy + pKa1_FDP + pKa2_FDP)) - (10^(-pH_cy + pKa1_FDP) + 2*10^(-2*pH_cy + pKa1_FDP + pKa2_FDP))*(10^pKa1_FDP + 2*10^(-pH_cy + pKa1_FDP + pKa2_FDP)))/(c0*P_FDP^2);
  dNavgFDPdmg := -(10^(-pH_cy + pKa1_FDP) + 2*10^(-2*pH_cy + pKa1_FDP + pKa2_FDP))*10^pKamg_FDP/(c0*P_FDP^2);
  dmgFDPdmg := (P_FDP*10^pKamg_FDP/c0 - Mg/c0*10^(2*pKamg_FDP)/c0)/P_FDP^2;
  dmgFDPdpH := Mg/c0*10^pKamg_FDP*(P_FDP*10^(-pH_cy + pKa1_FDP)*ln(10) - 10^(-2*pH_cy + pKa1_FDP + pKa2_FDP)*2*ln(10))/P_FDP^2;
  NH_UFDP := 10;
  deltaGof_UFDP := -2601.4;
  deltaGpof_UFDP := deltaGof_UFDP + NH_UFDP*ln(10)*R*T*pH_cy - IcorrdeltaGpof*(16 - NH_UFDP);
  pKa1_GAP := 6.45;
  P_GAP := 1 + 10^(-pH_cy + pKa1_GAP);
  UGAP := 1/P_GAP;
  HGAP := UGAP*10^(-pH_cy + pKa1_GAP);
  Navg_GAP := HGAP;
  dNavgGAPdH := 10^pKa1_GAP*(P_GAP - 10^(-pH_cy + pKa1_GAP))/(c0*P_GAP^2);
  dNavgGAPdmg := 0;
  NH_UGAP := 5;
  deltaGof_UGAP := -1288.6;
  deltaGpof_UGAP := deltaGof_UGAP + NH_UGAP*ln(10)*R*T*pH_cy - IcorrdeltaGpof*(4 - NH_UGAP);
  pKamg_G3P := 1.63;
  deltaH1o_G3P := -3.1;
  deltaH1_G3P := deltaH1o_G3P + Icorr*(2^2 + 1^2 - 1^2);
  pKa1_G3P := 6.22 + IcorrpKa/1*(2^2 + 1^2 - 1^2) + TcorrpKa*deltaH1_G3P;
  P_G3P := 1 + 10^(-pH_cy + pKa1_G3P) + Mg/c0*10^pKamg_G3P;
  UG3P := 1/P_G3P;
  HG3P := UG3P*10^(-pH_cy + pKa1_G3P);
  mgG3P := UG3P*Mg/c0*10^pKamg_G3P;
  Navg_G3P := HG3P;
  dNavgG3PdH := 10^pKa1_G3P*(P_G3P - 10^(-pH_cy + pKa1_G3P))/(c0*P_G3P^2);
  dNavgG3Pdmg := -10^(-pH_cy)/c0*10^(pKa1_G3P + pKamg_G3P)/P_G3P^2;
  dmgG3Pdmg := (P_G3P*10^pKamg_G3P/c0 - Mg/c0*10^(2*pKamg_G3P)/c0)/P_G3P^2;
  dmgG3PdpH := Mg/c0*10^(-pH_cy + pKa1_G3P + pKamg_G3P)*ln(10)/P_G3P^2;
  NH_UG3P := 7;
  deltaGof_UG3P := -1339.25;
  deltaGpof_UG3P := deltaGof_UG3P + NH_UG3P*ln(10)*R*T*pH_cy - IcorrdeltaGpof*(4 - NH_UG3P);
  pKa1_DHAP := 5.9;
  pKamg_DHAP := 1.57;
  P_DHAP := 1 + 10^(-pH_cy + pKa1_DHAP) + Mg/c0*10^pKamg_DHAP;
  UDHAP := 1/P_DHAP;
  HDHAP := UDHAP*10^(-pH_cy + pKa1_DHAP);
  mgDHAP := UDHAP*Mg/c0*10^pKamg_DHAP;
  Navg_DHAP := HDHAP;
  dNavgDHAPdH := 10^pKa1_DHAP*(P_DHAP - 10^(-pH_cy + pKa1_DHAP))/(c0*P_DHAP^2);
  dNavgDHAPdmg := -10^(-pH_cy)/c0*10^(pKa1_DHAP + pKamg_DHAP)/P_DHAP^2;
  dmgDHAPdmg := (P_DHAP*10^pKamg_DHAP/c0 - Mg/c0*10^(2*pKamg_DHAP)/c0)/P_DHAP^2;
  dmgDHAPdpH := Mg/c0*10^(-pH_cy + pKa1_DHAP + pKamg_DHAP)*ln(10)/P_DHAP^2;
  NH_UDHAP := 5;
  deltaGof_UDHAP := -1296.26;
  deltaGpof_UDHAP := deltaGof_UDHAP + NH_UDHAP*ln(10)*R*T*pH_cy - IcorrdeltaGpof*(4 - NH_UDHAP);
  pKa1_13DPG := 7.5;
  P_13DPG := 1 + 10^(-pH_cy + pKa1_13DPG);
  U13DPG := 1/P_13DPG;
  H13DPG := U13DPG*10^(-pH_cy + pKa1_13DPG);
  Navg_13DPG := H13DPG;
  dNavg13DPGdH := 10^pKa1_13DPG*(P_13DPG - 10^(-pH_cy + pKa1_13DPG))/(c0*P_13DPG^2);
  dNavg13DPGdmg := 0;
  NH_U13DPG := 4;
  deltaGof_U13DPG := -2356.14;
  deltaGpof_U13DPG := deltaGof_U13DPG + NH_U13DPG*ln(10)*R*T*pH_cy - IcorrdeltaGpof*(16 - NH_U13DPG);
  pKa1_3PG := 6.21;
  P_3PG := 1 + 10^(-pH_cy + 6.21);
  U3PG := 1/P_3PG;
  H3PG := U3PG*10^(-pH_cy + 6.21);
  Navg_3PG := H3PG;
  dNavg3PGdH := 10^pKa1_3PG*(P_3PG - 10^(-pH_cy + pKa1_3PG))/(c0*P_3PG^2);
  dNavg3PGdmg := 0;
  NH_U3PG := 4;
  deltaGof_U3PG := -1502.54;
  deltaGpof_U3PG := deltaGof_U3PG + NH_U3PG*ln(10)*R*T*pH_cy - IcorrdeltaGpof*(9 - NH_U3PG);
  pKa1_2PG := 7;
  pKamg_2PG := 2.45;
  pKak_2PG := 1.18;
  P_2PG := 1 + 10^(-pH_cy + pKa1_2PG) + Mg/c0*10^pKamg_2PG + k/c0*10^pKak_2PG;
  U2PG := 1/P_2PG;
  H2PG := U2PG*10^(-pH_cy + pKa1_2PG);
  mg2PG := U2PG*Mg/c0*10^pKamg_2PG;
  k2PG := U2PG*k/c0*10^pKak_2PG;
  Navg_2PG := H2PG;
  dNavg2PGdH := 10^pKa1_2PG*(P_2PG - 10^(-pH_cy + pKa1_2PG))/(c0*P_2PG^2);
  dNavg2PGdmg := -10^(-pH_cy)/c0*10^(pKa1_2PG + pKamg_2PG)/P_2PG^2;
  dmg2PGdmg := (P_2PG*10^pKamg_2PG/c0 - Mg/c0*10^(2*pKamg_2PG)/c0)/P_2PG^2;
  dmg2PGdpH := Mg/c0*10^(-pH_cy + pKa1_2PG + pKamg_2PG)*ln(10)/P_2PG^2;
  NH_U2PG := 4;
  deltaGof_U2PG := -1496.38;
  deltaGpof_U2PG := deltaGof_U2PG + NH_U2PG*ln(10)*R*T*pH_cy - IcorrdeltaGpof*(9 - NH_U2PG);
  pKa1_PEP := 6.35;
  pKamg_PEP := 2.26;
  pKak_PEP := 1.08;
  P_PEP := 1 + 10^(pKa1_PEP - pH_cy) + Mg/c0*10^pKamg_PEP + k/c0*10^pKak_PEP;
  UPEP := 1/P_PEP;
  HPEP := UPEP*10^(pKa1_PEP - pH_cy);
  kPEP := UPEP*k/c0*10^pKak_PEP;
  mgPEP := UPEP*Mg/c0*10^pKamg_PEP;
  Navg_PEP := HPEP;
  dNavgPEPdH := 10^pKa1_PEP*(P_PEP - 10^(-pH_cy + pKa1_PEP))/(c0*P_PEP^2);
  dNavgPEPdmg := -10^(-pH_cy)/c0*10^(pKa1_PEP + pKamg_PEP)/P_PEP^2;
  dmgPEPdmg := (P_PEP*10^pKamg_PEP/c0 - Mg/c0*10^(2*pKamg_PEP)/c0)/P_PEP^2;
  dmgPEPdpH := Mg/c0*10^(-pH_cy + pKa1_PEP + pKamg_PEP)*ln(10)/P_PEP^2;
  NH_UPEP := 2;
  deltaGof_UPEP := -1263.65;
  deltaGpof_UPEP := deltaGof_UPEP + NH_UPEP*ln(10)*R*T*pH_cy - IcorrdeltaGpof*(9 - NH_UPEP);
  pKa1_PYR := 2.49;
  P_PYR := 1 + 10^(-pH_cy + pKa1_PYR);
  UPYR := 1/P_PYR;
  HPYR := UPYR*10^(-pH_cy + pKa1_PYR);
  Navg_PYR := HPYR;
  dNavgPYRdH := 10^pKa1_PYR*(P_PYR - 10^(-pH_cy + pKa1_PYR))/(c0*P_PYR^2);
  dNavgPYRdmg := 0;
  NH_UPYR := 3;
  deltaGof_UPYR := -472.27;
  deltaGpof_UPYR := deltaGof_UPYR + NH_UPYR*ln(10)*R*T*pH_cy - IcorrdeltaGpof*(1 - NH_UPYR);
  pKamg_LAC := 0.98;
  deltaH1o_LAC := -0.33;
  deltaH1_LAC := deltaH1o_LAC + Icorr*(1^2 + 1^2 - 0^2);
  pKa1_LAC := 3.67 + IcorrpKa/1*(1^2 + 1^2 - 0^2) + TcorrpKa*deltaH1_LAC;
  P_LAC := 1 + 10^(-pH_cy + pKa1_LAC) + Mg/c0*10^pKamg_LAC;
  ULAC := 1/P_LAC;
  HLAC := ULAC*10^(-pH_cy + pKa1_LAC);
  mgLAC := Mg/c0*10^pKamg_LAC*ULAC;
  Navg_LAC := HLAC;
  dNavgLACdH := 10^pKa1_LAC*(P_LAC - 10^(-pH_cy + pKa1_LAC))/(c0*P_LAC^2);
  dNavgLACdmg := -10^(-pH_cy)/c0*10^(pKa1_LAC + pKamg_LAC)/P_LAC^2;
  dmgLACdmg := (P_LAC*10^pKamg_LAC/c0 - Mg/c0*10^(2*pKamg_LAC)/c0)/P_LAC^2;
  dmgLACdpH := Mg/c0*10^(-pH_cy + pKa1_LAC + pKamg_LAC)*ln(10)/P_LAC^2;
  NH_ULAC := 5;
  deltaGof_ULAC := -516.72;
  deltaGpof_ULAC := deltaGof_ULAC + NH_ULAC*ln(10)*R*T*pH_cy - IcorrdeltaGpof*(1 - NH_ULAC);
  dNH_GLY := -10;
  deltaGpo_GLY := 655.7 + dNH_GLY*ln(10)*R*T*pH_cy;
  NH_NAD := 26;
  deltaGof_NAD := 0;
  deltaGpof_NAD := deltaGof_NAD + NH_NAD*ln(10)*R*T*pH_cy - IcorrdeltaGpof*(1 - NH_NAD);
  NH_NADH := 27;
  deltaGof_NADH := 22.65;
  deltaGpof_NADH := deltaGof_NADH + NH_NADH*ln(10)*R*T*pH_cy - IcorrdeltaGpof*(4 - NH_NADH);
  NH_H2O := 2;
  deltaGof_H2O := -237.19;
  deltaGpof_H2O := deltaGof_H2O + NH_H2O*ln(10)*R*T*pH_cy - IcorrdeltaGpof*(0 - NH_H2O);
  NH_H := 1;
  deltaGof_H := 0;
  deltaGpof_H := deltaGof_H + NH_H*ln(10)*R*T*pH_cy;
  deltaH_CK := Navg_ATP + Navg_CR - Navg_PCR - Navg_ADP + (NH_ATP4 + NH_HCR - NH_HPCR - NH_ADP3);
  Kref_CK := 2.58;
  deltaHo_CKo := -17.55;
  deltaH1_CK := deltaHo_CKo + Icorr*(2^2 + 3^2 + 1^2 - 4^2 - 0^2);
  Kref_CKI := exp(ln(Kref_CK) + alphadebye*sqrt(I)*(2^2 + 3^2 + 1^2 - 4^2 - 0^2)/(1 + B*sqrt(I)));
  Kref_CKT := 10^(log10(Kref_CKI) - TcorrpKa*deltaH1_CK);
  deltaGpo_CK := -R*T*ln(Kref_CKT);
  Kapp_CK := exp(-deltaGpo_CK/(R*T))*10^(-pH_cy)*P_ATP*P_CR/(P_PCR*P_ADP);
  deltaH_ADK := 2*Navg_ADP - Navg_ATP - Navg_AMP + (2*NH_ADP3 - NH_ATP4 - NH_AMP2);
  deltaGpo_ADK := 2*deltaGpof_ADP3 - deltaGpof_ATP4 - deltaGpof_AMP2;
  Kapp_ADK := exp(-deltaGpo_ADK/(R*T))*P_ADP^2/(P_ATP*P_AMP);
  deltaH_GP := Navg_G1P - Navg_Pi + (1 - NH_HPi2);
  deltaGpo_GP := deltaGpo_GLY + deltaGpof_UG1P - deltaGpof_HPi2;
  Kapp_GP := exp(-deltaGpo_GP/(R*T))*P_G1P/P_Pi;
  deltaH_PGLM := Navg_G6P - Navg_G1P + (NH_UG6P - NH_UG1P);
  deltaGpo_PGLM := deltaGpof_UG6P - deltaGpof_UG1P;
  Kapp_PGLM := exp(-deltaGpo_PGLM/(R*T))*P_G6P/P_G1P;
  deltaH_PGI := Navg_F6P - Navg_G6P + (NH_UF6P - NH_UG6P);
  deltaGpo_PGI := deltaGpof_UF6P - deltaGpof_UG6P;
  Kapp_PGI := exp(-deltaGpo_PGI/(R*T))*P_F6P/P_G6P;
  deltaH_PFK := Navg_ADP + Navg_FDP - Navg_F6P - Navg_ATP + NH_ADP3 + NH_UFDP - NH_UF6P - NH_ATP4;
  deltaGpo_PFK := deltaGpof_UFDP + deltaGpof_ADP3 + deltaGpof_H - deltaGpof_UF6P - deltaGpof_ATP4;
  Kapp_PFK := exp(-deltaGpo_PFK/(R*T))*P_FDP*P_ADP/(P_F6P*P_ATP*10^(-pH_cy));
  deltaH_ALD := Navg_DHAP + Navg_GAP - Navg_FDP + (NH_UDHAP + NH_UGAP - NH_UFDP);
  deltaGpo_ALD := deltaGpof_UDHAP + deltaGpof_UGAP - deltaGpof_UFDP;
  Kapp_ALD := 1*exp(-deltaGpo_ALD/(R*T))*P_GAP*P_FDP/P_DHAP;
  deltaH_TPI := Navg_DHAP - Navg_GAP + (NH_UDHAP - NH_UGAP);
  deltaGpo_TPI := deltaGpof_UDHAP - deltaGpof_UGAP;
  Kapp_TPI := exp(-deltaGpo_TPI/(R*T))*P_DHAP/P_GAP;
  deltaH_GAPDH := Navg_13DPG - Navg_GAP - Navg_Pi + (NH_U13DPG + NH_NADH - NH_UGAP - NH_HPi2 - NH_NAD);
  deltaGpo_GAPDH := deltaGpof_U13DPG + deltaGpof_NADH + deltaGpof_H - deltaGpof_HPi2 - deltaGpof_UGAP - deltaGpof_NAD;
  Kapp_GAPDH := exp(-deltaGpo_GAPDH/(R*T))*P_13DPG/(P_Pi*P_GAP*10^(-pH_cy)*1);
  deltaH_G3PDH := Navg_DHAP - Navg_G3P + (NH_UDHAP + NH_NADH - NH_NAD - NH_UG3P);
  deltaGpo_G3PDH := deltaGpof_H + deltaGpof_NADH + deltaGpof_UDHAP - deltaGpof_NAD - deltaGpof_UG3P;
  Kapp_G3PDH := exp(-deltaGpo_G3PDH/(R*T))*P_DHAP/(P_G3P*10^(-pH_cy));
  deltaH_PGK := Navg_3PG + Navg_ATP - Navg_13DPG - Navg_ADP + (NH_U3PG + NH_ATP4 - NH_U13DPG - NH_ADP3);
  deltaGpo_PGK := deltaGpof_ATP4 + deltaGpof_U3PG - deltaGpof_U13DPG - deltaGpof_ADP3;
  Kapp_PGK := exp(-deltaGpo_PGK/(R*T))*P_ATP*P_3PG/(P_13DPG*P_ADP);
  deltaH_PGM := Navg_2PG - Navg_3PG + (NH_U2PG - NH_U3PG);
  deltaGpo_PGM := deltaGpof_U2PG - deltaGpof_U3PG;
  Kapp_PGM := exp(-deltaGpo_PGM/(R*T))*P_2PG/P_3PG;
  deltaH_ENOL := Navg_PEP - Navg_2PG + (NH_H2O + NH_UPEP - NH_U2PG);
  deltaGpo_ENOL := deltaGpof_H2O + deltaGpof_UPEP - deltaGpof_U2PG;
  Kapp_ENOL := exp(-deltaGpo_ENOL/(R*T))*P_PEP/P_2PG;
  deltaH_PK := Navg_PYR + Navg_ATP - Navg_PEP - Navg_ADP + (NH_UPYR + NH_ATP4 - NH_UPEP - NH_ADP3);
  deltaGpo_PK := deltaGpof_UPYR + deltaGpof_ATP4 - deltaGpof_H - deltaGpof_UPEP - deltaGpof_ADP3;
  Kapp_PK := exp(-deltaGpo_PK/(R*T))*P_PYR*P_ATP*10^(-pH_cy)/(P_PEP*P_ADP);
  deltaH_LDH := Navg_LAC - Navg_PYR + (NH_ULAC + NH_NAD - NH_UPYR - NH_NADH);
  deltaGpo_LDH := deltaGpof_ULAC + deltaGpof_NAD - deltaGpof_UPYR - deltaGpof_NADH - deltaGpof_H;
  Kapp_LDH := exp(-deltaGpo_LDH/(R*T))*P_LAC*10^(-pH_cy)/P_PYR;
  deltaH_ATPase := Navg_ADP + Navg_Pi - Navg_ATP + (NH_ADP3 + NH_HPi2 - NH_ATP4 - NH_H2O);
  deltaGpo_ATPase := deltaGpof_ADP3 + deltaGpof_HPi2 + deltaGpof_H - deltaGpof_H2O - deltaGpof_ATP4;
  Kapp_ATPase := exp(-deltaGpo_ATPase/(R*T))*P_ADP*P_Pi/(P_ATP*10^(-pH_cy));
  Vfgly := Par_1;
  expno := Par_100;
  fracA := piecewise(Par_2, expno != 45, 0.001, time < 40, 0.004, (time >= 40) && (time < 80), 0.01, (time >= 80) && (time < 100), 0.04, time >= 100);
  KgpA_glyf := Par_3;
  KgpA_pi := Par_4;
  KgpA_igly := Par_5;
  KgpA_ipi := Par_6;
  KgpA_glyb := Par_7;
  KgpA_g1p := Par_8;
  KgpA_ig1p := Par_9;
  Dglya := 1 + Gly/KgpA_glyf + Pi/KgpA_pi + Gly*Pi/(KgpA_glyf*KgpA_ipi) + Gly/KgpA_glyb + G1P/KgpA_g1p + Gly*G1P/(KgpA_ig1p*KgpA_glyb);
  pa := 1.404/(1 + 10^(5.94 - pH_cy) + 10^(pH_cy - 7.29));
  VbglyA := pa*Vfgly*KgpA_glyb*KgpA_ig1p/(KgpA_igly*KgpA_pi*Kapp_GP);
  glyAF := pa*Vfgly*Pi/(KgpA_igly*KgpA_pi)/Dglya;
  glyAR := VbglyA*Gly/(KgpA_glyb*KgpA_ig1p)/Dglya;
  flux_GPa := fracA*(Gly*glyAF - G1P*glyAR);
  fracB := 1 - fracA;
  KgpB_pi := Par_10;
  KgpB_ipi := Par_11;
  KgpB_iglyf := Par_12;
  KgpB_g1p := Par_13;
  KgpB_ig1p := Par_14;
  KgpB_iglyb := Par_15;
  Kgp_amp := Par_16;
  interactioncoeff := Par_17;
  nH := Par_18;
  M := (AMP/Kgp_amp)^nH/interactioncoeff/(1 + (AMP/Kgp_amp)^nH/interactioncoeff);
  Dglyb := 1 + Gly/KgpB_iglyf + Pi/KgpB_ipi + Gly/KgpB_iglyb + G1P/KgpB_ig1p + Gly*Pi/(KgpB_iglyf*KgpB_pi) + Gly*G1P/(KgpB_g1p*KgpB_iglyb);
  pb := 1.75/(1 + 10^(6.12 - pH_cy) + 10^(pH_cy - 7.03));
  VbglyB := pb*Vfgly*KgpB_g1p*KgpB_iglyb/(KgpB_iglyf*KgpB_pi*Kapp_GP);
  glyBF := pb*M*Vfgly*Pi/(KgpB_iglyf*KgpB_pi)/Dglyb;
  glyBR := M*VbglyB*Gly/(KgpB_g1p*KgpB_iglyb)/Dglyb;
  flux_GPb := fracB*(Gly*glyBF - G1P*glyBR);
  Vffpglm := Par_19;
  Kpglm_g1p := Par_20;
  Kpglm_g6p := Par_21;
  Vfpglm := Vffpglm*1.329/(1 + 10^(-pH_cy + 6.64) + 10^(pH_cy - 8.36));
  Vbpglm := Vfpglm*Kpglm_g6p/(Kpglm_g1p*Kapp_PGLM);
  v_PGLM := (Vfpglm*G1P/Kpglm_g1p - Vbpglm*G6P/Kpglm_g6p)/(1 + G1P/Kpglm_g1p + G6P/Kpglm_g6p);
  Vbbpgi := Par_22;
  Kpgi_g6p := Par_23;
  Kpgi_f6p := Par_24;
  Vbpgi := Vbbpgi/(1 + 10^(-pH_cy + 6.94) + 10^(pH_cy - 9.35));
  Vfpgi := Vbpgi*Kpgi_g6p/Kpgi_f6p*Kapp_PGI;
  v_PGI := (Vfpgi*G6P/Kpgi_g6p - Vbpgi*F6P/Kpgi_f6p)/(1 + F6P/Kpgi_f6p + G6P/Kpgi_g6p);
  Vffpfk := Par_25;
  Kpfk_f6p := Par_26;
  Kpfk_f6pT := Par_27;
  Kpfk_atp := Par_28;
  Kpfk_atpT := Par_29;
  Kpfk_fbp := Par_30;
  Kpfk_fbpT := Par_31;
  Kpfk_adp := Par_32;
  Kpfk_adpT := Par_33;
  Kpfki := Par_34;
  Kmpfk := Par_35;
  d := Par_36;
  e_ := Par_37;
  Lo := Par_38;
  Vfpfk := Vffpfk/(1 + (pH_cy/6.8)^(-30));
  Vbpfk := Vfpfk*Kpfk_fbp*Kpfk_adp/(Kpfk_f6p*Kpfk_atp*Kapp_PFK);
  L := Lo*((1 + ATP/Kpfki)/(1 + d*ATP/Kpfki)*(1 + e_*AMP/Kmpfk)/(1 + AMP/Kmpfk))^4;
  alpha := Kpfk_f6p*Kpfk_atp/(Kpfk_f6pT*Kpfk_atpT);
  Delta := (1 + F6P/Kpfk_f6p)*(1 + ATP/Kpfk_atp) + FBP/Kpfk_fbp + ADP/Kpfk_adp*(1 + FBP/Kpfk_fbp);
  Deltap := (1 + F6P/Kpfk_f6pT)*(1 + ATP/Kpfk_atpT) + FBP/Kpfk_fbpT + ADP/Kpfk_adpT*(1 + FBP/Kpfk_fbpT);
  v_PFK := (Vfpfk*F6P*ATP/(Kpfk_f6p*Kpfk_atp)/Delta - Vbpfk*ADP*FBP/(Kpfk_adp*Kpfk_fbp)/Delta)*(1 + alpha*L*(Deltap/Delta)^3)/(1 + L*(Deltap/Delta)^4);
  Vffald := Par_39;
  Kald_fbp := Par_40;
  Kald_dhap := Par_41;
  Kald_gap := Par_42;
  Vfald := Vffald*1.013/(1 + 10^(-pH_cy + 5.32) + 10^(pH_cy - 9.15));
  Vbald := Vfald*Kald_gap*Kald_dhap/(Kald_fbp*Kapp_ALD);
  v_ALD := (Vfald*FBP/Kald_fbp - Vbald*GAP*DHAP/(Kald_gap*Kald_dhap))/(1 + FBP/Kald_fbp + GAP/Kald_gap + DHAP/Kald_dhap);
  Vfftpi := Par_43;
  Ktpi_gap := Par_44;
  Ktpi_dhap := Par_45;
  Vftpi := Vfftpi;
  Vbtpi := Vftpi*Ktpi_dhap/(Ktpi_gap*Kapp_TPI);
  v_TPI := (Vftpi*GAP/Ktpi_gap - Vbtpi*DHAP/Ktpi_dhap)/(1 + GAP/Ktpi_gap + DHAP/Ktpi_dhap);
  Vbbg3pdh := Par_46;
  Kg3pdh_g3p := Par_47;
  Kg3pdh_nad := Par_48;
  Kg3pdh_dhap := Par_49;
  Kg3pdh_nadh := Par_50;
  Dg3pdh := (1 + G3P/Kg3pdh_g3p + NADH/Kg3pdh_nadh)*(1 + DHAP/Kg3pdh_dhap + NAD/Kg3pdh_nadh);
  Vbg3pdh := Vbbg3pdh;
  Vfg3pdh := Vbg3pdh*Kg3pdh_g3p*Kg3pdh_nad*Kapp_G3PDH/(Kg3pdh_dhap*Kg3pdh_nadh);
  v_G3PDH := (Vfg3pdh*G3P*NAD/(Kg3pdh_g3p*Kg3pdh_nad) - Vbg3pdh*DHAP*NADH/(Kg3pdh_dhap*Kg3pdh_nadh))/Dg3pdh;
  Vffgad := Par_51;
  Kgapdh_gap := Par_52;
  Kgapdh_nad := Par_53;
  Kgapdh_pi := Par_54;
  Kgapdh_bpg := Par_55;
  Kgapdh_nadh := Par_56;
  Dgap := 1 + Pi/Kgapdh_pi + GAP/Kgapdh_gap + NAD/Kgapdh_nad + GAP*NAD/(Kgapdh_gap*Kgapdh_nad) + GAP*NAD*Pi/(Kgapdh_gap*Kgapdh_nad*Kgapdh_pi) + BPG/Kgapdh_bpg + NADH/Kgapdh_nadh + BPG*NADH/(Kgapdh_nadh*Kgapdh_bpg);
  Vfgad := Vffgad*0.0007*exp(pH_cy*0.8979);
  Vbgad := Vfgad*Kgapdh_bpg*Kgapdh_nadh/(Kgapdh_gap*Kgapdh_pi*Kgapdh_nad*Kapp_GAPDH);
  v_GAPDH := (Vfgad*GAP*NAD*Pi/(Kgapdh_nad*Kgapdh_gap*Kgapdh_pi) - Vbgad*BPG*NADH/(Kgapdh_bpg*Kgapdh_nadh))/Dgap;
  Vbbpgk := Par_57;
  Kpgk_bpg := Par_58;
  Kpgk_adp := Par_59;
  Kpgk_3pg := Par_60;
  Kpgk_atp := Par_61;
  Vbpgk := Vbbpgk;
  Vfpgk := Vbpgk*Kpgk_bpg*Kpgk_adp/(Kpgk_3pg*Kpgk_atp)*Kapp_PGK;
  D_PGK := 1 + ADP/Kpgk_adp + BPG/Kpgk_bpg + BPG*ADP/(Kpgk_bpg*Kpgk_adp) + P3G/Kpgk_3pg + ATP/Kpgk_atp + P3G*ATP/(Kpgk_3pg*Kpgk_atp);
  v_PGK := (Vfpgk*BPG*ADP/(Kpgk_adp*Kpgk_bpg) - Vbpgk*ATP*P3G/(Kpgk_atp*Kpgk_3pg))/D_PGK;
  Vffpgm := Par_62;
  Kpgm_3pg := Par_63;
  Kpgm_2pg := Par_64;
  Vfpgm := Vffpgm*0.989/(1 + 10^(-pH_cy + 5.62) + 10^(pH_cy - 8.74));
  Vbpgm := Vfpgm*Kpgm_2pg/(Kpgm_3pg*Kapp_PGM);
  v_PGM := (Vfpgm*P3G/Kpgm_3pg - Vbpgm*P2G/Kpgm_2pg)/(1 + P3G/Kpgm_3pg + P2G/Kpgm_2pg);
  Vffen := Par_65;
  Ken_2pg := Par_66;
  Ken_pep := Par_67;
  Vfen := Vffen;
  Vben := Vfen*Ken_pep/(Ken_2pg*Kapp_ENOL);
  v_ENOL := (Vfen*P2G/Ken_2pg - Vben*PEP/Ken_pep)/(1 + PEP/Ken_pep + P2G/Ken_2pg);
  Vffpk := Par_68;
  Kpk_pep := Par_69;
  Kpk_adp := Par_70;
  Kpk_pyr := Par_71;
  Kpk_atp := Par_72;
  Vfpk := Vffpk*1.05/(1 + 10^(-pH_cy + 5.58) + 10^(pH_cy - 8.79));
  Vbpk := Vfpk*Kpk_pyr*Kpk_atp/(Kpk_pep*Kpk_adp*Kapp_PK);
  v_PK := (Vfpk*PEP*ADP/(Kpk_pep*Kpk_adp) - Vbpk*PYR*ATP/(Kpk_pyr*Kpk_atp))/(1 + PEP/Kpk_pep + ADP/Kpk_adp + PEP*ADP/(Kpk_pep*Kpk_adp) + ATP/Kpk_atp + PYR/Kpk_pyr + PYR*ATP/(Kpk_pyr*Kpk_atp));
  Vffldh := Par_73;
  Kldh_pyr := Par_74;
  Kldh_nadh := Par_75;
  Kldh_lac := Par_76;
  Kldh_nad := Par_77;
  Vfldh := Vffldh*(-0.1134*pH_cy + 1.6069);
  Vbldh := Vfldh*Kldh_lac*Kldh_nad/(Kldh_pyr*Kldh_nadh*Kapp_LDH);
  v_LDH := (Vfldh*PYR*NADH/(Kldh_pyr*Kldh_nadh) - Vbldh*LAC*NAD/(Kldh_lac*Kldh_nad))/(1 + PYR/Kldh_pyr + NADH/Kldh_nadh + PYR*NADH/(Kldh_pyr*Kldh_nadh) + LAC/Kldh_lac + NAD/Kldh_nad + LAC*NAD/(Kldh_lac*Kldh_nad));
  VmaxATPase := piecewise(Par_88, (expno != 5) && (expno != 45), Par_88, (expno != 5) && (expno == 45) && (time >= 110), Par_88, (expno == 5) && (time > 30), 0);
  Katp_ATPase := Par_89;
  ATPase := VmaxATPase*ATP/(Katp_ATPase + ATP);
  VforCK := Par_78;
  Kck_pcr := Par_79;
  Kck_iatp := Par_80;
  Kck_iadp := Par_81;
  Kck_ipcr := Par_82;
  Kck_cr := Par_83;
  VrevCK := VforCK/Kapp_CK*Kck_iatp*Kck_cr/(Kck_iadp*Kck_pcr);
  CK := (VrevCK*ATP*Cr/(Kck_iatp*Kck_cr) - VforCK*ADP*PCr/(Kck_iadp*Kck_pcr))/(1 + ADP/Kck_iadp + PCr/Kck_ipcr + PCr*ADP/(Kck_iadp*Kck_pcr) + ATP/Kck_iatp + Cr*ATP/(Kck_cr*Kck_iatp));
  Vfadk := Par_84;
  Kadk_amp := Par_85;
  Kadk_atp := Par_86;
  Kadk_adp := Par_87;
  Vbadk := Vfadk*Kadk_adp^2/(Kadk_amp*Kadk_atp*Kapp_ADK);
  ADK := (Vfadk*ATP*AMP/(Kadk_atp*Kadk_amp) - Vbadk*(ADP/Kadk_adp)^2)/(1 + ATP/Kadk_atp + AMP/Kadk_amp + ATP*AMP/(Kadk_atp*Kadk_amp) + 2*ADP/Kadk_adp + ADP^2/Kadk_adp^2);
  carnosine := Par_92;
  tris := Par_91;
  acetate := Par_93;
  bufcapfixed := ln(10)*carnosine*10^(-pH_cy - 6.87)/(10^(-pH_cy) + 10^(-6.87))^2 + ln(10)*tris*10^(-pH_cy - 8.3)/(10^(-pH_cy) + 10^(-8.3))^2 + ln(10)*acetate*10^(-pH_cy - 4.8)/(10^(-pH_cy) + 10^(-4.8))^2;
  bufcapmetab := ln(10)*10^(-pH_cy)*c0*(1 + dNavgPidH*Pi + dNavgATPdH*ATP + dNavgADPdH*ADP + dNavgAMPdH*AMP + dNavgPCRdH*PCr + dNavgCRdH*Cr + dNavgG1PdH*G1P + dNavgG6PdH*G6P + dNavgF6PdH*F6P + dNavgFDPdH*FBP + dNavgGAPdH*GAP + dNavgDHAPdH*DHAP + dNavgG3PdH*G3P + dNavg13DPGdH*BPG + dNavg3PGdH*P3G + dNavg2PGdH*P2G + dNavgPEPdH*PEP + dNavgPYRdH*PYR + dNavgLACdH*LAC);
  protons_consumed := deltaH_CK*(-CK) + deltaH_ADK*ADK + deltaH_PGLM*v_PGLM + deltaH_GP*(flux_GPa + flux_GPb) + deltaH_PGI*v_PGI + deltaH_PFK*v_PFK + deltaH_ALD*v_ALD + deltaH_TPI*v_TPI + deltaH_GAPDH*v_GAPDH + deltaH_PGK*v_PGK + deltaH_PGM*v_PGM + deltaH_ENOL*v_ENOL + deltaH_PK*v_PK + deltaH_LDH*v_LDH + deltaH_G3PDH*v_G3PDH;
  CKprtflux := deltaH_CK*(-CK);
  glycprtflux := deltaH_PGLM*v_PGLM + deltaH_GP*(flux_GPa + flux_GPb) + deltaH_PGI*v_PGI + deltaH_PFK*v_PFK + deltaH_ALD*v_ALD + deltaH_TPI*v_TPI + deltaH_GAPDH*v_GAPDH + deltaH_PGK*v_PGK + deltaH_PGM*v_PGM + deltaH_ENOL*v_ENOL + deltaH_PK*v_PK + deltaH_LDH*v_LDH + deltaH_G3PDH*v_G3PDH;
  pHODEterm1 := protons_consumed/(bufcapfixed + bufcapmetab);
  pHODEterm2 := (dNavgPidmg*Pi + dNavgATPdmg*ATP + dNavgADPdmg*ADP + dNavgAMPdmg*AMP + dNavgPCRdmg*PCr + dNavgCRdmg*Cr + dNavgG1Pdmg*G1P + dNavgG6Pdmg*G6P + dNavgF6Pdmg*F6P + dNavgFDPdmg*FBP + dNavgGAPdmg*GAP + dNavgDHAPdmg*DHAP + dNavgG3Pdmg*G3P + dNavg13DPGdmg*BPG + dNavg3PGdmg*P3G + dNavg2PGdmg*P2G + dNavgPEPdmg*PEP + dNavgPYRdmg*PYR + dNavgLACdmg*LAC)/(bufcapfixed + bufcapmetab);
  denom_mgODE := -1 - (dmgATP2dmg*ATP + dmgADPdmg*ADP + dmgAMPdmg*AMP + dmgPidmg*Pi + dmgPCRdmg*PCr + dmgG1Pdmg*G1P + dmgFDPdmg*FBP + dmgG3Pdmg*G3P + dmgDHAPdmg*DHAP + dmgPEPdmg*PEP + dmg2PGdmg*P2G + dmgLACdmg*LAC);
  RHSterm1_mgODE := (dmgATP2dpH*ATP + dmgADPdpH*ADP + dmgAMPdpH*AMP + dmgPidpH*Pi + dmgPCRdpH*PCr + dmgG1PdpH*G1P + dmgFDPdpH*FBP + dmgG3PdpH*G3P + dmgDHAPdpH*DHAP + dmgPEPdpH*PEP + dmg2PGdpH*P2G + dmgLACdpH*LAC)/denom_mgODE;
  denomMgpHODE := 1 - RHSterm1_mgODE*pHODEterm2;
  dPCrdt := CK;
  dCrdt := -CK;
  dNADdt := -v_GAPDH - v_G3PDH + v_LDH;
  dNADHdt := v_GAPDH + v_G3PDH - v_LDH;
  dATPdt := -CK - ADK - v_PFK + v_PGK + v_PK - ATPase;
  dADPdt := CK + 2*ADK + v_PFK - v_PGK - v_PK + ATPase;
  dAMPdt := -ADK;
  dPidt := -(flux_GPa + flux_GPb) - v_GAPDH + ATPase;
  dGlydt := -(flux_GPa + flux_GPb);
  dG1Pdt := flux_GPa + flux_GPb - v_PGLM;
  dG6Pdt := v_PGLM - v_PGI;
  dF6Pdt := v_PGI - v_PFK;
  dFBPdt := v_PFK - v_ALD;
  dDHAPdt := v_ALD + v_TPI + v_G3PDH;
  dG3Pdt := -v_G3PDH;
  dGAPdt := v_ALD - v_TPI - v_GAPDH;
  dBGPdt := v_GAPDH - v_PGK;
  dP3Gdt := v_PGK - v_PGM;
  dP2Gdt := v_PGM - v_ENOL;
  dPEPdt := v_ENOL - v_PK;
  dPYRdt := v_PK - v_LDH;
  dLACdt := v_LDH;
  RHSterm2_mgODE := (mgATP2*dATPdt + mgADP*dADPdt + mgAMP*dAMPdt + mgPi*dPidt + mgPCR*dPCrdt + mgG1P*dG1Pdt + mgFDP*dFBPdt + mgG3P*dG3Pdt + mgDHAP*dDHAPdt + mgPEP*dPEPdt + mg2PG*dP2Gdt + mgLAC*dLACdt)/denom_mgODE;
  fixmg := 1;
  fixpH := Par_99;

  // Rate rules:
  PCr' = dPCrdt;
  Cr' = dCrdt;
  NAD' = dNADdt;
  NADH' = dNADHdt;
  ATP' = dATPdt;
  ADP' = dADPdt;
  AMP' = dAMPdt;
  Pi' = dPidt;
  Gly' = dGlydt;
  G1P' = dG1Pdt;
  G6P' = dG6Pdt;
  F6P' = dF6Pdt;
  FBP' = dFBPdt;
  DHAP' = dDHAPdt;
  G3P' = dG3Pdt;
  GAP' = dGAPdt;
  BPG' = dBGPdt;
  P3G' = dP3Gdt;
  P2G' = dP2Gdt;
  PEP' = dPEPdt;
  PYR' = dPYRdt;
  LAC' = dLACdt;
  Mg' = piecewise(fixmg*(RHSterm2_mgODE + RHSterm1_mgODE*pHODEterm1)/(1 - RHSterm1_mgODE*pHODEterm2), time <= 1, fixmg*RHSterm2_mgODE);
  pH_calc' = fixpH*(pHODEterm1 + RHSterm2_mgODE*pHODEterm2)/(1 - RHSterm1_mgODE*pHODEterm2);
  protonload' = -protons_consumed;

  // Unit definitions:
  unit minute = 60 second;
  unit molar = mole / litre;
  unit molar_per_minute = mole / (litre * 60 second);
  unit per_minute = 1 / (60 second);
  unit kilojoule_per_mole = 1000 joule / mole;
  unit mole_per_kilojoule = mole / (1000 joule);
  unit kilojoule_per_kelvin_per_mole = 1000 joule / (kelvin * mole);
  unit per_molar = litre / mole;
  unit time = 60 second;
end
