// SBML level 2 version 4

model Lockwood2006_PKPD_AlzheimersDisease()
  // This a model from the article:
  // Application of clinical trial simulation to compare proof-of-concept study designs for drugs with a slow onset of effect; an example in Alzheimer's disease.
  // Lockwood P, Ewy W, Hermann D, Holford N. Pharm Res 2006 Sep;23(9):2050-9 16906456 ,
  // Abstract:
  // OBJECTIVE: Clinical trial simulation (CTS) was used to select a robust design to test the hypothesis that a new treatment was effective for Alzheimer's disease (AD). Typically, a parallel group, placebo controlled, 12-week trial in 200-400 AD patients would be used to establish drug effect relative to placebo (i.e., Ho: Drug Effect = 0). We evaluated if a crossover design would allow smaller and shorter duration trials. MATERIALS AND METHODS: A family of plausible drug and disease models describing the time course of the AD assessment scale (ADAS-Cog) was developed based on Phase I data and literature reports of other treatments for AD. The models included pharmacokinetic, pharmacodynamic, disease progression, and placebo components. Eight alternative trial designs were explored via simulation. One hundred replicates of each combination of drug and disease model and trial design were simulated. A 'positive trial' reflecting drug activity was declared considering both a dose trend test (p < 0.05) and pair-wise comparisons to placebo (p < 0.025). RESULTS: A 4 x 4 Latin Square design was predicted to have at least 80% power to detect activity across a range of drug and disease models. The trial design was subsequently implemented and the trial was completed. Based on the results of the actual trial, a conclusive decision about further development was taken. The crossover design provided enhanced power over a parallel group design due to the lower residual variability. CONCLUSION: CTS aided the decision to use a more efficient proof of concept trial design, leading to savings of up to US 4 M dollars in direct costs and a firm decision 8-12 months earlier than a 12-week parallel group trial.
  // This model was taken from the CellML repository and automatically converted to SBML.
  // The original model was: Lockwood P, Ewy W, Hermann D, Holford N. (2006) - version=1.0
  // The original CellML model was created by:
  // James Lawson
  // j.lawson@auckland.ac.nz
  // The University of Auckland
  // This model originates from BioModels Database: A Database of Annotated Published Models (http://www.ebi.ac.uk/biomodels/). It is copyright (c) 2005-2011 The BioModels.net Team.
  // To the extent possible under law, all copyright and related or neighbouring rights to this encoded model have been dedicated to the public domain worldwide. Please refer to CC0 Public Domain Dedication for more information.
  // In summary, you are entitled to use this encoded model in absolutely any manner you deem suitable, verbatim, or with modification, alone or embedded it in a larger context, redistribute it, commercially or not, in a restricted way or not..
  // To cite BioModels Database, please use: Li C, Donizelli M, Rodriguez N, Dharuri H, Endler L, Chelliah V, Li L, He E, Henry A, Stefan MI, Snoep JL, Hucka M, Le Novère N, Laibe C (2010) BioModels Database: An enhanced, curated and annotated resource for published quantitative kinetic models. BMC Syst Biol., 4:92.
  // biomodels.db:MODEL1006230054
  // isDescribedBy pubmed:16906456
  // biomodels.db:MODEL1006230054
  // isDescribedBy pubmed:16906456
  // biomodels.db:MODEL1006230054
  // biomodels.db:MODEL1006230054

  // Compartments:
  compartment COMpartment = 1 litre;

  // Parameters:
  time_environment has day;
  S0 = 30;
  alpha = 0.0164 units_per_day;
  epsilon = 0;
  beta_P = -3;
  Keq_p has per_day;
  Kel_p has per_day;
  t_half_el_p = 7 day;
  t_half_eq_p = 6 day;
  CL has litre_per_day;
  smk = 1 dimensionless;
  age = 40 year;
  Sv has dimensionless;
  beta_a = -0.047 units_ml_per_ng;
  CeA = 25 ng_per_ml;
  CC = 0 mg_per_litre;
  PC = 0 mg_per_litre;
  Vc = 172 litre;
  Vp = 222 litre;
  A_in = 25 mg;
  k_ab = 115.44 per_day;
  CL_ic = 763.2 litre_per_day;

  // Assignment rules:
  ADAS_Cog_p := beta_P*Keq_p/(Keq_p - Kel_p)*(exp(-Kel_p*time_environment) - exp(-Keq_p*time_environment));
  Keq_p := ln(2)/t_half_eq_p;
  Kel_p := ln(2)/t_half_el_p;
  CL := 2268*exp(-0.0135*(age - 40))*smk;
  Sv := exp(-0.00145*time_environment);
  PD_CeA := beta_a*CeA;
  S := S0 + alpha*time_environment + ADAS_Cog_p + PD_CeA + epsilon;

  // Rate rules:
  CC' = (k_ab*A_in - (CL*CC + CL_ic*(CC - PC)))/Vc;
  PC' = CL_ic*(CC - PC)/Vp;
  A_in' = -115.44*A_in;

  // Unit definitions:
  unit mg = 1e-3 gram;
  unit units_ml_per_ng = 1e-3 litre / (1e-9 gram);
  unit ng_per_ml = 1e-9 gram / (1e-3 litre);
  unit mg_per_litre = 1e-3 gram / litre;
  unit litre_per_day = litre / (86400 second);
  unit day = 86400 second;
  unit per_day = 1 / (86400 second);
  unit units_per_day = 1 / (86400 second);
  unit year = 3.1536e7 second;
  unit per_year = 1 / (3.1536e7 second);
  unit time = 86400 second;
end
