// SBML level 2 version 4

model Mittler1998_HIV1_interactingTargetCells()
  // This a model from the article:
  // Influence of delayed viral production on viral dynamics in HIV-1 infected patients.
  // Mittler JE, Sulzer B, Neumann AU, Perelson AS. Math Biosci 1998 Sep;152(2):143-63 9780612 ,
  // Abstract:
  // We present and analyze a model for the interaction of human immunodeficiency virus type 1 (HIV-1) with target cells that includes a time delay between initial infection and the formation of productively infected cells. Assuming that the variation among cells with respect to this 'intracellular' delay can be approximated by a gamma distribution, a high flexible distribution that can mimic a variety of biologically plausible delays, we provide analytical solutions for the expected decline in plasma virus concentration after the initiation of antiretroviral therapy with one or more protease inhibitors. We then use the model to investigate whether the parameters that characterize viral dynamics can be identified from biological data. Using non-linear least-squares regression to fit the model to simulated data in which the delays conform to a gamma distribution, we show that good estimates for free viral clearance rates, infected cell death rates, and parameters characterizing the gamma distribution can be obtained. For simulated data sets in which the delays were generated using other biologically plausible distributions, reasonably good estimates for viral clearance rates, infected cell death rates, and mean delay times can be obtained using the gamma-delay model. For simulated data sets that include added simulated noise, viral clearance rate estimates are not as reliable. If the mean intracellular delay is known, however, we show that reasonable estimates for the viral clearance rate can be obtained by taking the harmonic mean of viral clearance rate estimates from a group of patients. These results demonstrate that it is possible to incorporate distributed intracellular delays into existing models for HIV dynamics and to use these refined models to estimate the half-life of free virus from data on the decline in HIV-1 RNA following treatment.
  // This model was taken from the CellML repository and automatically converted to SBML.
  // The original model was: Mittler JE, Sulzer B, Neumann AU, Perelson AS. (1998) - version=1.0
  // The original CellML model was created by:
  // Catherine Lloyd
  // c.lloyd@auckland.ac.nz
  // The University of Auckland
  // This model originates from BioModels Database: A Database of Annotated Published Models (http://www.ebi.ac.uk/biomodels/). It is copyright (c) 2005-2011 The BioModels.net Team.
  // To the extent possible under law, all copyright and related or neighbouring rights to this encoded model have been dedicated to the public domain worldwide. Please refer to CC0 Public Domain Dedication for more information.
  // In summary, you are entitled to use this encoded model in absolutely any manner you deem suitable, verbatim, or with modification, alone or embedded it in a larger context, redistribute it, commercially or not, in a restricted way or not..
  // To cite BioModels Database, please use: Li C, Donizelli M, Rodriguez N, Dharuri H, Endler L, Chelliah V, Li L, He E, Henry A, Stefan MI, Snoep JL, Hucka M, Le Novère N, Laibe C (2010) BioModels Database: An enhanced, curated and annotated resource for published quantitative kinetic models. BMC Syst Biol., 4:92.
  // biomodels.db:MODEL1006230055
  // isDescribedBy pubmed:9780612
  // biomodels.db:MODEL1006230055
  // isDescribedBy pubmed:9780612
  // biomodels.db:MODEL1006230055
  // biomodels.db:MODEL1006230055

  // Compartments:
  compartment COMpartment = 1 litre;

  // Parameters:
  I = 0.1;
  VI = 200000;
  VI_0 = 200000;
  VNI = 0;
  E1 = 0;
  E2 = 0;
  E3 = 0;
  E4 = 0;
  tau_p = 0;
  c = 3;
  delta = 0.5;
  p = 774;
  k = 2.4e-5;
  b = 0.25;
  m = 0.01;
  n = 4;

  // Assignment rules:
  T := c*delta/(k*p);
  I_0 := c/p*VI_0;
  V := VI + VNI;
  h := piecewise(0, time < tau_p, 1);
  b_ := b/(1 + m*b);
  k_ := k/(1 + m*b)^n;

  // Rate rules:
  I' = k_*T*E4 - delta*I;
  VI' = (1 - h)*p*I - c*VI;
  VNI' = h*p*I - c*VNI;
  E1' = (VI - E1)/b_;
  E2' = (E1 - E2)/b_;
  E3' = (E2 - E3)/b_;
  E4' = (E3 - E4)/b_;

  // Unit definitions:
  unit per_ml = 1 / (1e-3 litre);
  unit day = 86400 second;
  unit first_order_rate_constant = 1 / (86400 second);
  unit ml_per_day = 1e-3 litre / (86400 second);
  unit time = 86400 second;
end
