// SBML level 2 version 4

model Bagci2006_ApoptoticStimuli()
  // This a model from the article:
  // Bistability in apoptosis: roles of bax, bcl-2, and mitochondrial permeability transition pores.
  // Bagci EZ, Vodovotz Y, Billiar TR, Ermentrout GB, Bahar I. Biophys J 2006 Mar 1;90(5):1546-59 16339882 ,
  // Abstract:
  // We propose a mathematical model for mitochondria-dependent apoptosis, in which kinetic cooperativity in formation of the apoptosome is a key element ensuring bistability. We examine the role of Bax and Bcl-2 synthesis and degradation rates, as well as the number of mitochondrial permeability transition pores (MPTPs), on the cell response to apoptotic stimuli. Our analysis suggests that cooperative apoptosome formation is a mechanism for inducing bistability, much more robust than that induced by other mechanisms, such as inhibition of caspase-3 by the inhibitor of apoptosis (IAP). Simulations predict a pathological state in which cells will exhibit a monostable cell survival if Bax degradation rate is above a threshold value, or if Bax expression rate is below a threshold value. Otherwise, cell death or survival occur depending on initial caspase-3 levels. We show that high expression rates of Bcl-2 can counteract the effects of Bax. Our simulations also demonstrate a monostable (pathological) apoptotic response if the number of MPTPs exceeds a threshold value. This study supports our contention, based on mathematical modeling, that cooperativity in apoptosome formation is critically important for determining the healthy responses to apoptotic stimuli, and helps define the roles of Bax, Bcl-2, and MPTP vis-a-vis apoptosome formation.
  // This model was taken from the CellML repository and automatically converted to SBML.
  // The original model was: Bagci EZ, Vodovotz Y, Billiar TR, Ermentrout GB, Bahar I. (2006) - version=1.0
  // The original CellML model was created by:
  // Wendy Kang
  // wkan014@aucklanduni.ac.nz
  // The University of Auckland
  // This model originates from BioModels Database: A Database of Annotated Published Models (http://www.ebi.ac.uk/biomodels/). It is copyright (c) 2005-2011 The BioModels.net Team.
  // To the extent possible under law, all copyright and related or neighbouring rights to this encoded model have been dedicated to the public domain worldwide. Please refer to CC0 Public Domain Dedication for more information.
  // In summary, you are entitled to use this encoded model in absolutely any manner you deem suitable, verbatim, or with modification, alone or embedded it in a larger context, redistribute it, commercially or not, in a restricted way or not..
  // To cite BioModels Database, please use: Li C, Donizelli M, Rodriguez N, Dharuri H, Endler L, Chelliah V, Li L, He E, Henry A, Stefan MI, Snoep JL, Hucka M, Le Novère N, Laibe C (2010) BioModels Database: An enhanced, curated and annotated resource for published quantitative kinetic models. BMC Syst Biol., 4:92.
  // biomodels.db:MODEL1006230056
  // isDescribedBy pubmed:16339882
  // biomodels.db:MODEL1006230056
  // isDescribedBy pubmed:16339882
  // biomodels.db:MODEL1006230056
  // biomodels.db:MODEL1006230056

  // Compartments:
  compartment COMpartment = 1 litre;

  // Parameters:
  Casp8 = 0;
  Casp8Bid = 0;
  Apaf_1 = 0.004;
  CytcApaf_1 = 0;
  Cytc = 0;
  Cytc_mito = 0.004;
  Bax_2 = 0;
  tBid_mito = 0;
  tBid = 0;
  tBidBax = 0;
  Bax = 0.004;
  Bcl_2 = 0.004;
  Casp3Bcl_2 = 0;
  Casp3Bid = 0;
  Bid = 0.004;
  Casp3 = 0;
  Casp3IAP = 0;
  Apop = 0;
  Pro9 = 0.004;
  ApopPro9 = 0;
  ApopPro9_2 = 0;
  ApopCasp9_2Pro3 = 0;
  Casp9Pro3 = 0;
  Pro3 = 0.004;
  IAP = 0.004;
  Casp9IAP = 0;
  ApopCasp9IAP = 0;
  ApopCasp9_2IAP = 0;
  ApopCasp9 = 0;
  Casp9 = 0;
  ApopCasp9_2 = 0;
  k_10 = 10;
  k_f0 = 0.1;
  k_01 = 0.5;
  k_01b = 0.5;
  k_02 = 0.5;
  k_03 = 0.5;
  k_14 = 5;
  k_14b = 5;
  k_15 = 5;
  k_15b = 5;
  k_15c = 5;
  k_16 = 10;
  k_f6 = 0.001;
  k_06b = 0.5;
  k_17 = 5;
  k_18 = 10;
  k_f8 = 0.1;
  k_09 = 0.5;
  k11 = 10;
  k12b = 10;
  k14 = 10;
  k_00 = 0.5;
  k_11 = 5;
  k_11b = 50000;
  k_12 = 10;
  k_13 = 10;
  k_f3 = 0.1;
  k_04 = 0.5;
  k_04b = 0.5;
  k_05 = 0.0035;
  k_05b = 0.0035;
  k_05c = 0.0035;
  k_06 = 0.5;
  k_16b = 10;
  k_f6b = 0.1;
  k_07 = 0.0035;
  k_08 = 0.5;
  k_19 = 10;
  k_f9 = 0.1;
  k12a = 10;
  k13 = 10;
  p53_thresh = 0.004;
  u = 0.006;
  u_Bax = 0.006;
  u_Bcl_2 = 0.006;
  P_Apaf_1 = 0.0003;
  P_IAP = 3e-5;
  P_Pro3 = 0.0003;
  P_Pro9 = 0.0003;
  P_Bid = 3e-5;
  P_oBcl_2 = 8e-5;
  P_oBax = 3e-5;
  P_Cytc_mito = 0.0003;
  p53 = 0.0066;
  p = 4;

  // Assignment rules:
  J_f0 := k_f0*Casp8Bid;
  J_Casp8 := -u*Casp8;
  J_0 := k_10*Casp8*Bid - k_00*Casp8Bid;
  J_Apaf_1 := P_Apaf_1 - u*Apaf_1;
  J_1 := k_11*Cytc*Apaf_1 - k_01*CytcApaf_1;
  J_1b := k_11b*CytcApaf_1^p - k_01b*Apop;
  J_Cytc := -u*Cytc;
  J_Cytc_mito := P_Cytc_mito - u*Cytc_mito;
  J_14 := k14*Bax_2*Cytc_mito;
  J_Bax_2 := -u*Bax_2;
  J_tBid_mito := -u*tBid_mito;
  J_12a := k12a*tBid_mito*Bax;
  J_11 := k11*tBid;
  J_tBid := -u*tBid;
  J_tBidBax := -u*tBidBax;
  J_12b := k12b*tBidBax*Bax;
  P_Bax := P_oBax*(1 + p53^4/(p53^4 + p53_thresh^4));
  J_Bax := P_Bax - u_Bax*Bax;
  J_13 := k13*Bcl_2*Bax;
  P_Bcl_2 := P_oBcl_2*p53_thresh^4/(p53^4 + p53_thresh^4);
  J_9 := k_19*Casp3*Bcl_2 - k_09*Casp3Bcl_2;
  J_Bcl_2 := P_Bcl_2 - u_Bcl_2*Bcl_2;
  J_f9 := k_f9*Casp3Bcl_2;
  J_8 := k_18*Casp3*Bid - k_08*Casp3Bid;
  J_f8 := k_f8*Casp3Bid;
  J_Bid := P_Bid - u*Bid;
  J_Casp3 := -u*Casp3;
  J_7 := k_17*Casp3*IAP - k_07*Casp3IAP;
  J_Pro9 := P_Pro9 - u*Pro9;
  J_2 := k_12*Apop*Pro9 - k_02*ApopPro9;
  J_3 := k_13*ApopPro9*Pro9 - k_03*ApopPro9_2;
  J_f3 := k_f3*ApopPro9_2;
  J_6b := k_16b*ApopCasp9_2*Pro3 - k_06b*ApopCasp9_2Pro3;
  J_f6b := k_f6b*ApopCasp9_2Pro3;
  J_f6 := k_f6*Casp9Pro3;
  J_6 := k_16*Casp9*Pro3 - k_06*Casp9Pro3;
  J_Pro3 := P_Pro3 - u*Pro3;
  J_5 := k_15*Casp9*IAP - k_05*Casp9IAP;
  J_5b := k_15b*ApopCasp9*IAP - k_05b*ApopCasp9IAP;
  J_5c := k_15c*ApopCasp9_2*IAP - k_05c*ApopCasp9_2IAP;
  J_IAP := P_IAP - u*IAP;
  J_4 := k_14*ApopCasp9_2 - k_04*ApopCasp9*Casp9;
  J_4b := k_14b*ApopCasp9 - k_04b*Apop*Casp9;
  J_Casp9 := -u*Casp9;

  // Rate rules:
  Casp8' = -J_0 + J_f0 + J_Casp8;
  Casp8Bid' = J_0 - J_f0;
  Apaf_1' = -J_1 + J_Apaf_1;
  CytcApaf_1' = J_1 - 7*J_1b;
  Cytc' = J_14 - J_1 + J_Cytc;
  Cytc_mito' = -J_14 + J_Cytc_mito;
  Bax_2' = J_12b + J_Bax_2;
  tBid_mito' = J_11 - J_12a + J_tBid_mito;
  tBid' = J_f0 + J_f8 - J_11 + J_12b + J_tBid;
  tBidBax' = J_12a - J_12b + J_tBidBax;
  Bax' = -J_12a - J_12b - J_13 + J_Bax;
  Bcl_2' = -J_9 - J_13 + J_Bcl_2;
  Casp3Bcl_2' = J_9 - J_f9;
  Casp3Bid' = J_8 - J_f8;
  Bid' = -J_0 - J_8 + J_Bid;
  Casp3IAP' = J_7;
  Casp3' = J_f6 + J_f6b - J_7 - J_8 + J_f8 - J_9 + J_f9 + J_Casp3;
  Apop' = J_1b - J_2 + J_4b;
  Pro9' = -J_2 - J_3 + J_Pro9;
  ApopPro9' = J_2 - J_3;
  ApopPro9_2' = J_3 - J_f3;
  ApopCasp9_2Pro3' = J_6b - J_f6b;
  Casp9Pro3' = J_6 - J_f6;
  Pro3' = -J_6 - J_6b + J_Pro3;
  Casp9IAP' = J_5;
  ApopCasp9IAP' = J_5b;
  ApopCasp9_2IAP' = J_5c;
  IAP' = -J_5 - J_5b - J_5c - J_7 + J_IAP;
  ApopCasp9' = J_4 - J_4b - J_5b;
  Casp9' = J_4 + J_4b - J_5 - J_6 + J_f6 + J_Casp9;
  ApopCasp9_2' = J_f3 - J_4 - J_5c - J_6b + J_f6b;

  // Unit definitions:
  unit micromolar = 1e-6 mole / litre;
  unit first_order_rate_constant = 1 / second;
  unit second_order_rate_constant = litre / (second * 1e-6 mole);
  unit flux = 1e-6 mole / (litre * second);
  unit rate = litre^3 / ((1e-6 mole)^3 * second);
end
