// SBML level 2 version 4

model Moore2004_CML_TcellInteration()
  // This a model from the article:
  // A mathematical model for chronic myelogenous leukemia (CML) and T cell interaction.
  // Moore H, Li NK. J Theor Biol 2004 Apr 21;227(4):513-23 15038986 ,
  // Abstract:
  // In this paper, we propose and analyse a mathematical model for chronic myelogenous leukemia (CML), a cancer of the blood. We model the interaction between naive T cells, effector T cells, and CML cancer cells in the body, using a system of ordinary differential equations which gives rates of change of the three cell populations. One of the difficulties in modeling CML is the scarcity of experimental data which can be used to estimate parameters values. To compensate for the resulting uncertainties, we use Latin hypercube sampling (LHS) on large ranges of possible parameter values in our analysis. A major goal of this work is the determination of parameters which play a critical role in remission or clearance of the cancer in the model. Our analysis examines 12 parameters, and identifies two of these, the growth and death rates of CML, as critical to the outcome of the system. Our results indicate that the most promising research avenues for treatments of CML should be those that affect these two significant parameters (CML growth and death rates), while altering the other parameters should have little effect on the outcome.
  // This model was taken from the CellML repository and automatically converted to SBML.
  // The original model was: Moore H, Li NK. (2004) - version=1.0
  // The original CellML model was created by:
  // Catherine Lloyd
  // c.lloyd@auckland.ac.nz
  // The University of Auckland
  // This model originates from BioModels Database: A Database of Annotated Published Models (http://www.ebi.ac.uk/biomodels/). It is copyright (c) 2005-2011 The BioModels.net Team.
  // To the extent possible under law, all copyright and related or neighbouring rights to this encoded model have been dedicated to the public domain worldwide. Please refer to CC0 Public Domain Dedication for more information.
  // In summary, you are entitled to use this encoded model in absolutely any manner you deem suitable, verbatim, or with modification, alone or embedded it in a larger context, redistribute it, commercially or not, in a restricted way or not..
  // To cite BioModels Database, please use: Li C, Donizelli M, Rodriguez N, Dharuri H, Endler L, Chelliah V, Li L, He E, Henry A, Stefan MI, Snoep JL, Hucka M, Le Novère N, Laibe C (2010) BioModels Database: An enhanced, curated and annotated resource for published quantitative kinetic models. BMC Syst Biol., 4:92.
  // biomodels.db:MODEL1006230057
  // isDescribedBy pubmed:15038986
  // biomodels.db:MODEL1006230057
  // isDescribedBy pubmed:15038986
  // biomodels.db:MODEL1006230057
  // biomodels.db:MODEL1006230057

  // Compartments:
  compartment COMpartment = 1 litre;

  // Parameters:
  time_environment has day;
  Tn = 1510 cells_per_microlitre;
  sn = 0.37 flux;
  dn = 0.23 first_order_rate_constant;
  Te = 20 cells_per_microlitre;
  alpha_n = 0.14 dimensionless;
  alpha_e = 0.98 first_order_rate_constant;
  de = 0.3 first_order_rate_constant;
  gamma_e = 0.057 microlitre_per_cells_day;
  C = 10000 cells_per_microlitre;
  Cmax = 230000 cells_per_microlitre;
  rc = 0.0057 first_order_rate_constant;
  dc = 0.024 first_order_rate_constant;
  gamma_c = 0.0034 microlitre_per_cells_day;
  kn = 0.062 first_order_rate_constant;
  eta = 720 cells_per_microlitre;

  // Rate rules:
  Tn' = sn - (dn*Tn + kn*Tn*(C/(C + eta)));
  Te' = alpha_n*kn*Tn*(C/(C + eta)) + alpha_e*Te*(C/(C + eta)) - (de*Te + gamma_e*C*Te);
  C' = rc*C*ln(Cmax/C) - (dc*C + gamma_c*C*Te);

  // Unit definitions:
  unit day = 86400 second;
  unit first_order_rate_constant = 1 / (86400 second);
  unit cells_per_microlitre = 1 / (1e-6 litre);
  unit flux = 1 / (1e-6 litre * 86400 second);
  unit microlitre_per_cells_day = 1e-6 litre / (86400 second);
  unit time = 86400 second;
end
