// SBML level 2 version 4

model Matsuoka2003_VentricularCells_SinoatrialNodePacemaker()
  // This a model from the article:
  // Role of individual ionic current systems in ventricular cells hypothesized by a model study.
  // Matsuoka S, Sarai N, Kuratomi S, Ono K, Noma A. Jpn J Physiol 2003 Apr;53(2):105-23 12877767 ,
  // Abstract:
  // Individual ion channels or exchangers are described with a common set of equations for both the sinoatrial node pacemaker and ventricular cells. New experimental data are included, such as the new kinetics of the inward rectifier K+ channel, delayed rectifier K+ channel, and sustained inward current. The gating model of Shirokov et al. (J Gen Physiol 102: 1005-1030, 1993) is used for both the fast Na+ and L-type Ca2+ channels. When combined with a contraction model (Negroni and Lascano: J Mol Cell Cardiol 28: 915-929, 1996), the experimental staircase phenomenon of contraction is reconstructed. The modulation of the action potential by varying the external Ca2+ and K+ concentrations is well simulated. The conductance of I(CaL) dominates membrane conductance during the action potential so that an artificial increase of I(to), I(Kr), I(Ks), or I(KATP) magnifies I(CaL) amplitude. Repolarizing current is provided sequentially by I(Ks), I(Kr), and I(K1). Depression of ATP production results in the shortening of action potential through the activation of I(KATP). The ratio of Ca2+ released from SR over Ca2+ entering via I(CaL) (Ca2+ gain = approximately 15) in excitation-contraction coupling well agrees with the experimental data. The model serves as a predictive tool in generating testable hypotheses.
  // This model was taken from the CellML repository and automatically converted to SBML.
  // The original model was: Matsuoka S, Sarai N, Kuratomi S, Ono K, Noma A. (2003) - version=1.0
  // The original CellML model was created by:
  // Penny Noble
  // penny.noble@dpag.ox.ac.uk
  // The University of Oxford
  // This model originates from BioModels Database: A Database of Annotated Published Models (http://www.ebi.ac.uk/biomodels/). It is copyright (c) 2005-2011 The BioModels.net Team.
  // To the extent possible under law, all copyright and related or neighbouring rights to this encoded model have been dedicated to the public domain worldwide. Please refer to CC0 Public Domain Dedication for more information.
  // In summary, you are entitled to use this encoded model in absolutely any manner you deem suitable, verbatim, or with modification, alone or embedded it in a larger context, redistribute it, commercially or not, in a restricted way or not. .
  // To cite BioModels Database, please use: Li C, Donizelli M, Rodriguez N, Dharuri H, Endler L, Chelliah V, Li L, He E, Henry A, Stefan MI, Snoep JL, Hucka M, Le Novère N, Laibe C (2010) BioModels Database: An enhanced, curated and annotated resource for published quantitative kinetic models. BMC Syst Biol., 4:92.
  // biomodels.db:MODEL1006230058
  // isDescribedBy pubmed:12877767
  // biomodels.db:MODEL1006230058
  // isDescribedBy pubmed:12877767
  // biomodels.db:MODEL1006230058
  // biomodels.db:MODEL1006230058

  // Compartments:
  compartment COMpartment = 1 litre;

  // Parameters:
  Vm_membrane = -85.95752;
  R = 8.3143;
  T = 310;
  F = 96.4867;
  Cm = 132;
  stim_start = 50;
  stim_end = 1000000;
  stim_period = 400;
  stim_duration = 2;
  stim_amplitude = -4000;
  Nao = 140;
  Cao = 1.8;
  Ko = 5.4;
  Nai = 4.925761;
  var Cai_internal_ion_concentrations;
  Ki = 143.1837;
  Vi = 8000;
  CMDN_max = 0.05;
  K_mCMDN = 0.00238;
  Ca_Total_internal_ion_concentrations = 0.0004018017;
  var b1_internal_ion_concentrations;
  var c1_internal_ion_concentrations;
  var CF_Ca_constant_field_equations;
  ATPi = 4.657103;
  ProducingRate_Max = 0.003;
  Adenosine_Total = 5;
  P_Na = 2860;
  p_AP_Na = 1.779648e-5;
  p_RP_Na = 0.3556413;
  p_AI_Na = 0.4028597;
  var k_RP_AP_sodium_current_voltage_dependent_gate;
  var k_AP_RP_sodium_current_voltage_dependent_gate;
  var k_RI_AI_sodium_current_voltage_dependent_gate;
  var k_AI_RI_sodium_current_voltage_dependent_gate;
  var k_AP_AI_sodium_current_voltage_dependent_gate;
  k_AI_AP_sodium_current_voltage_dependent_gate = 8.75e-5;
  var k_RP_RI_sodium_current_voltage_dependent_gate;
  var k_RI_RP_sodium_current_voltage_dependent_gate;
  time_sodium_current_voltage_dependent_gate = ;
  Vm_sodium_current_voltage_dependent_gate = ;
  y_sodium_current_ultra_slow_gate = 0.5861888;
  var alpha_y_sodium_current_ultra_slow_gate;
  var beta_y_sodium_current_ultra_slow_gate;
  Vm_sodium_current_ultra_slow_gate = ;
  time_sodium_current_ultra_slow_gate = ;
  P_CaL = 8712;
  p_AP_CaL = 1.5445e-6;
  p_RP_CaL = 0.9968481;
  p_AI_CaL = 0.0008773254;
  var k_RP_AP_L_type_Ca_channel_voltage_dependent_gate;
  var k_AP_RP_L_type_Ca_channel_voltage_dependent_gate;
  var k_RI_AI_L_type_Ca_channel_voltage_dependent_gate;
  var k_AI_RI_L_type_Ca_channel_voltage_dependent_gate;
  k_AP_AI_L_type_Ca_channel_voltage_dependent_gate = 0.004;
  k_AI_AP_L_type_Ca_channel_voltage_dependent_gate = 0.001;
  var k_RP_RI_L_type_Ca_channel_voltage_dependent_gate;
  var k_RI_RP_L_type_Ca_channel_voltage_dependent_gate;
  time_L_type_Ca_channel_voltage_dependent_gate = ;
  Vm_L_type_Ca_channel_voltage_dependent_gate = ;
  p_U = 0.1724648;
  p_UCa = 6.098246e-5;
  p_C = 0.4250747;
  k_CCa_UCa = 0.0003;
  k_UCa_CCa = 0.35;
  k_C_U = 0.143;
  k_U_C = 0.35;
  k_U_UCa = 6.954;
  k_CCa_C = 0.0042;
  k_C_CCa = 6.954;
  time_L_type_Ca_channel_Ca_dependent_gate = ;
  Vm_L_type_Ca_channel_Ca_dependent_gate = ;
  Cai_L_type_Ca_channel_Ca_dependent_gate = ;
  CF_Ca_L_type_Ca_channel_Ca_dependent_gate = ;
  var CaDiadic_L_type_Ca_channel_Ca_dependent_gate;
  y_L_type_Ca_channel_ultra_slow_gate = 0.9985267;
  var alpha_y_L_type_Ca_channel_ultra_slow_gate;
  var beta_y_L_type_Ca_channel_ultra_slow_gate;
  Vm_L_type_Ca_channel_ultra_slow_gate = ;
  time_L_type_Ca_channel_ultra_slow_gate = ;
  P_CaT = 612;
  y1_T_type_Ca_channel_y1_gate = 1.688272e-5;
  var alpha_y1_T_type_Ca_channel_y1_gate;
  var beta_y1_T_type_Ca_channel_y1_gate;
  Vm_T_type_Ca_channel_y1_gate = ;
  time_T_type_Ca_channel_y1_gate = ;
  y2_T_type_Ca_channel_y2_gate = 0.8585352;
  var alpha_y2_T_type_Ca_channel_y2_gate;
  var beta_y2_T_type_Ca_channel_y2_gate;
  Vm_T_type_Ca_channel_y2_gate = ;
  time_T_type_Ca_channel_y2_gate = ;
  var E_K_time_independent_potassium_current;
  P_K1_0 = 1.146;
  y_time_independent_potassium_current_y_gate = 0.6080574;
  var alpha_y_time_independent_potassium_current_y_gate;
  var beta_y_time_independent_potassium_current_y_gate;
  Vm_time_independent_potassium_current_y_gate = ;
  time_time_independent_potassium_current_y_gate = ;
  P_Kr = 0.00864;
  y1_rapid_time_dependent_potassium_current_y1_gate = 0.001833993;
  var alpha_y1_rapid_time_dependent_potassium_current_y1_gate;
  var beta_y1_rapid_time_dependent_potassium_current_y1_gate;
  Vm_rapid_time_dependent_potassium_current_y1_gate = ;
  E_K_rapid_time_dependent_potassium_current_y1_gate = ;
  time_rapid_time_dependent_potassium_current_y1_gate = ;
  y2_rapid_time_dependent_potassium_current_y2_gate = 0.2044308;
  var alpha_y2_rapid_time_dependent_potassium_current_y2_gate;
  var beta_y2_rapid_time_dependent_potassium_current_y2_gate;
  Vm_rapid_time_dependent_potassium_current_y2_gate = ;
  E_K_rapid_time_dependent_potassium_current_y2_gate = ;
  time_rapid_time_dependent_potassium_current_y2_gate = ;
  y3 = 0.9678877;
  Vm_rapid_time_dependent_potassium_current_y3_gate = ;
  E_K_rapid_time_dependent_potassium_current_y3_gate = ;
  time_rapid_time_dependent_potassium_current_y3_gate = ;
  P_Ks_K = 5.04;
  P_Ks_Na = 0.2016;
  y1_slow_time_dependent_potassium_current_y1_gate = 0.0973879;
  var alpha_y1_slow_time_dependent_potassium_current_y1_gate;
  var beta_y1_slow_time_dependent_potassium_current_y1_gate;
  Vm_slow_time_dependent_potassium_current_y1_gate = ;
  time_slow_time_dependent_potassium_current_y1_gate = ;
  y2_slow_time_dependent_potassium_current_y2_gate = 0.09745346;
  var alpha_y2_slow_time_dependent_potassium_current_y2_gate;
  beta_y2_slow_time_dependent_potassium_current_y2_gate = 0.004444;
  Cai_slow_time_dependent_potassium_current_y2_gate = ;
  Vm_slow_time_dependent_potassium_current_y2_gate = ;
  time_slow_time_dependent_potassium_current_y2_gate = ;
  P_to_K = 0.033;
  P_to_Na = 0.00297;
  y1_transient_outward_current_y1_gate = 0.0007956883;
  var alpha_y1_transient_outward_current_y1_gate;
  var beta_y1_transient_outward_current_y1_gate;
  Vm_transient_outward_current_y1_gate = ;
  time_transient_outward_current_y1_gate = ;
  y2_transient_outward_current_y2_gate = 0.9999125;
  var alpha_y2_transient_outward_current_y2_gate;
  var beta_y2_transient_outward_current_y2_gate;
  Vm_transient_outward_current_y2_gate = ;
  time_transient_outward_current_y2_gate = ;
  P_bNSC = 0.385;
  P_lCa = 0.11;
  var p_open_background_lCa_current;
  var p_open_background_KATP_current;
  P_KATP = 0.0236;
  N = 2333;
  P_Cab = 0.04;
  var p_E2Na_sodium_calcium_exchanger;
  var p_E1Na_sodium_calcium_exchanger;
  var p_E1Ca_sodium_calcium_exchanger;
  var p_E2Ca_sodium_calcium_exchanger;
  var k1_sodium_calcium_exchanger;
  var k2_sodium_calcium_exchanger;
  k3_sodium_calcium_exchanger = 1;
  k4_sodium_calcium_exchanger = 1;
  Km_Nai_sodium_calcium_exchanger = 8.75;
  Km_Nao_sodium_calcium_exchanger = 87.5;
  Km_Cai = 0.00138;
  Km_Cao = 1.38;
  P_NaCa = 6.81;
  Partition = 0.32;
  y_sodium_calcium_exchanger_y_gate = 0.9891789;
  var alpha_y_sodium_calcium_exchanger_y_gate;
  var beta_y_sodium_calcium_exchanger_y_gate;
  time_sodium_calcium_exchanger_y_gate = ;
  var p_E2Na_sodium_potassium_pump;
  var p_E1Na_sodium_potassium_pump;
  var k1_sodium_potassium_pump;
  k2_sodium_potassium_pump = 0.04;
  k3_sodium_potassium_pump = 0.01;
  k4_sodium_potassium_pump = 0.165;
  Km_Nai_sodium_potassium_pump = 4.05;
  Km_Nao_sodium_potassium_pump = 69.8;
  Km_Ki = 32.88;
  Km_Ko = 0.258;
  Km_ATP_sodium_potassium_pump = 0.094;
  P_NaK = 21;
  y_sodium_potassium_pump_y_gate = 0.5910747;
  var alpha_y_sodium_potassium_pump_y_gate;
  var beta_y_sodium_potassium_pump_y_gate;
  time_sodium_potassium_pump_y_gate = ;
  var p_E2Ca_SR_calcium_pump;
  var p_E1Ca_SR_calcium_pump;
  k1_SR_calcium_pump = 0.01;
  var k2_SR_calcium_pump;
  k3_SR_calcium_pump = 1;
  k4_SR_calcium_pump = 0.01;
  Km_CaSR = 0.08;
  Km_CaCyto = 0.0008;
  Km_ATP_SR_calcium_pump = 0.1;
  i_max = 162500;
  y_SR_calcium_pump_y_gate = 0.4610844;
  var alpha_y_SR_calcium_pump_y_gate;
  var beta_y_SR_calcium_pump_y_gate;
  time_SR_calcium_pump_y_gate = ;
  P_RyR = 62000;
  var k1_RyR_channel;
  var k2_RyR_channel;
  var k3_RyR_channel;
  k4_RyR_channel = 0.000849;
  p_open_RyR = 0.0003431436;
  p_close_RyR = 0.1913518;
  Diadid_Factor = -150;
  CaDiadic_RyR_channel = ;
  P_SR_T = 386;
  P_SR_L = 459;
  Ca_Total_Ca_concentrations_in_SR = 9.455742;
  Caup = 2.611713;
  V_rel = 160;
  V_up = 400;
  CSQN_max = 10;
  K_mCSQN = 0.8;
  var b1_Ca_concentrations_in_SR;
  var c1_Ca_concentrations_in_SR;
  pCa = 0.02490899;
  pCaCB = 0.001990154;
  pCB = 0.0004294181;
  T_t = 0.07;
  Y_1 = 39;
  Y_2 = 0.0039;
  Y_3 = 0.03;
  Y_4 = 0.12;
  Y_d = 0.027;
  Z_1 = 0.03;
  Z_2 = 0.0039;
  Z_3 = 1560;
  L_a = 1.17;
  L = 0.96238;
  X = 0.957375;
  KForceEC = 140000;
  ZeroForceEL = 0.97;
  KForceLinearEc = 200;
  ForceFactor = 1800000;
  B = 1.2;
  h_c = 0.005;

  // Assignment rules:
  i_ext := piecewise(stim_amplitude, (time >= stim_start) && (time <= stim_end) && (time - stim_start - floor((time - stim_start)/stim_period)*stim_period <= stim_duration), 0);
  b1_internal_ion_concentrations := CMDN_max - Ca_Total_internal_ion_concentrations + K_mCMDN;
  c1_internal_ion_concentrations := K_mCMDN*Ca_Total_internal_ion_concentrations;
  Cai_internal_ion_concentrations := (sqrt(b1_internal_ion_concentrations^2 + 4*c1_internal_ion_concentrations) - b1_internal_ion_concentrations)/2;
  CF_Na := piecewise(-Nao, Vm_membrane == 0, F*Vm_membrane/(R*T)*(Nai - Nao*exp(-F*Vm_membrane/(R*T)))/(1 - exp(-F*Vm_membrane/(R*T))));
  CF_Ca_constant_field_equations := piecewise(-Cao, Vm_membrane == 0, 2*F*Vm_membrane/(R*T)*(Cai_internal_ion_concentrations - Cao*exp(-2*F*Vm_membrane/(R*T)))/(1 - exp(-2*F*Vm_membrane/(R*T))));
  CF_K := piecewise(Ki, Vm_membrane == 0, F*Vm_membrane/(R*T)*(Ki - Ko*exp(-F*Vm_membrane/(R*T)))/(1 - exp(-F*Vm_membrane/(R*T))));
  i_Na := i_Na_Na + i_Na_K;
  i_Na_Na := P_Na*CF_Na*p_AP_Na*y_sodium_current_ultra_slow_gate;
  i_Na_K := 0.1*P_Na*CF_K*p_AP_Na*y_sodium_current_ultra_slow_gate;
  p_RI_Na := 1 - p_RP_Na - p_AP_Na - p_AI_Na;
  k_RP_AP_sodium_current_voltage_dependent_gate := 1/(0.1027*exp(-Vm_sodium_current_voltage_dependent_gate/8) + 0.25*exp(-Vm_sodium_current_voltage_dependent_gate/50));
  k_AP_RP_sodium_current_voltage_dependent_gate := 1/(26*exp(Vm_sodium_current_voltage_dependent_gate/17) + 0.02*exp(Vm_sodium_current_voltage_dependent_gate/800));
  k_AP_AI_sodium_current_voltage_dependent_gate := 1/(0.8*exp(-Vm_sodium_current_voltage_dependent_gate/400));
  k_AI_RI_sodium_current_voltage_dependent_gate := 1/(1300*exp(Vm_sodium_current_voltage_dependent_gate/20) + 0.04*exp(Vm_sodium_current_voltage_dependent_gate/800));
  k_RI_AI_sodium_current_voltage_dependent_gate := 1/(0.0001027*exp(-Vm_sodium_current_voltage_dependent_gate/8) + 5*exp(-Vm_sodium_current_voltage_dependent_gate/400));
  k_RP_RI_sodium_current_voltage_dependent_gate := 0.01/(1 + k_AI_AP_sodium_current_voltage_dependent_gate*k_AP_RP_sodium_current_voltage_dependent_gate*k_RI_AI_sodium_current_voltage_dependent_gate/(k_AP_AI_sodium_current_voltage_dependent_gate*k_RP_AP_sodium_current_voltage_dependent_gate*k_AI_RI_sodium_current_voltage_dependent_gate));
  k_RI_RP_sodium_current_voltage_dependent_gate := 0.01 - k_RP_RI_sodium_current_voltage_dependent_gate;
  alpha_y_sodium_current_ultra_slow_gate := 1/(9000000000*exp(Vm_sodium_current_ultra_slow_gate/5) + 8000*exp(Vm_sodium_current_ultra_slow_gate/100));
  beta_y_sodium_current_ultra_slow_gate := 1/(0.014*exp(-Vm_sodium_current_ultra_slow_gate/5) + 4000*exp(-Vm_sodium_current_ultra_slow_gate/100));
  i_Ca_L := i_CaL_Na + i_CaL_Ca + i_CaL_K;
  i_CaL_Ca := P_CaL*CF_Ca_constant_field_equations*p_open_CaL;
  i_CaL_Na := 1.85e-5*P_CaL*CF_Na*p_open_CaL;
  i_CaL_K := 0.000365*P_CaL*CF_K*p_open_CaL;
  p_open_CaL := p_AP_CaL*(p_U + p_UCa)*y_L_type_Ca_channel_ultra_slow_gate/(1 + (1.4/ATPi)^3);
  p_RI_CaL := 1 - p_AP_CaL - p_RP_CaL - p_AI_CaL;
  k_RP_AP_L_type_Ca_channel_voltage_dependent_gate := 1/(0.27*exp(-Vm_L_type_Ca_channel_voltage_dependent_gate/5.9) + 1.5*exp(-Vm_L_type_Ca_channel_voltage_dependent_gate/65));
  k_AP_RP_L_type_Ca_channel_voltage_dependent_gate := 1/(480*exp(Vm_L_type_Ca_channel_voltage_dependent_gate/7) + 2.2*exp(Vm_L_type_Ca_channel_voltage_dependent_gate/65));
  k_RI_AI_L_type_Ca_channel_voltage_dependent_gate := 1/(0.0018*exp(-Vm_L_type_Ca_channel_voltage_dependent_gate/7.4) + 2*exp(-Vm_L_type_Ca_channel_voltage_dependent_gate/100));
  k_AI_RI_L_type_Ca_channel_voltage_dependent_gate := 1/(2200000*exp(Vm_L_type_Ca_channel_voltage_dependent_gate/7.4) + 11*exp(Vm_L_type_Ca_channel_voltage_dependent_gate/100));
  k_RP_RI_L_type_Ca_channel_voltage_dependent_gate := 0.04/(1 + k_AI_AP_L_type_Ca_channel_voltage_dependent_gate*k_AP_RP_L_type_Ca_channel_voltage_dependent_gate*k_RI_AI_L_type_Ca_channel_voltage_dependent_gate/(k_AP_AI_L_type_Ca_channel_voltage_dependent_gate*k_RP_AP_L_type_Ca_channel_voltage_dependent_gate*k_AI_RI_L_type_Ca_channel_voltage_dependent_gate));
  k_RI_RP_L_type_Ca_channel_voltage_dependent_gate := 0.04 - k_RP_RI_L_type_Ca_channel_voltage_dependent_gate;
  iCaL := 0.0676*CF_Ca_L_type_Ca_channel_Ca_dependent_gate;
  CaDiadic_L_type_Ca_channel_Ca_dependent_gate := iCaL*p_open_CaL;
  Cacm := Cai_L_type_Ca_channel_Ca_dependent_gate - 0.3*iCaL;
  CaEffC := Cacm*p_AP_CaL;
  CaEffU := CaEffC + Cai_L_type_Ca_channel_Ca_dependent_gate*(1 - p_AP_CaL);
  k_UUCa_Ca := k_U_UCa*CaEffU;
  k_CCCa_Ca := k_C_CCa*CaEffC;
  p_CCa := 1 - p_C - p_U - p_UCa;
  k_UCa_U := k_CCa_C*k_C_U*k_U_UCa*k_UCa_CCa/(k_U_C*k_C_CCa*k_CCa_UCa);
  alpha_y_L_type_Ca_channel_ultra_slow_gate := 1/(250000*exp(Vm_L_type_Ca_channel_ultra_slow_gate/9) + 58*exp(Vm_L_type_Ca_channel_ultra_slow_gate/65));
  beta_y_L_type_Ca_channel_ultra_slow_gate := 1/(1800*exp(-Vm_L_type_Ca_channel_ultra_slow_gate/14) + 66*exp(-Vm_L_type_Ca_channel_ultra_slow_gate/65));
  i_Ca_T := P_CaT*CF_Ca_constant_field_equations*y1_T_type_Ca_channel_y1_gate*y2_T_type_Ca_channel_y2_gate;
  alpha_y1_T_type_Ca_channel_y1_gate := 1/(0.019*exp(-Vm_T_type_Ca_channel_y1_gate/5.6) + 0.82*exp(-Vm_T_type_Ca_channel_y1_gate/250));
  beta_y1_T_type_Ca_channel_y1_gate := 1/(40*exp(Vm_T_type_Ca_channel_y1_gate/6.3) + 1.5*exp(Vm_T_type_Ca_channel_y1_gate/10000));
  alpha_y2_T_type_Ca_channel_y2_gate := 1/(62000*exp(Vm_T_type_Ca_channel_y2_gate/10.1) + 30*exp(Vm_T_type_Ca_channel_y2_gate/3000));
  beta_y2_T_type_Ca_channel_y2_gate := 1/(0.0006*exp(-Vm_T_type_Ca_channel_y2_gate/6.7) + 1.2*exp(-Vm_T_type_Ca_channel_y2_gate/25));
  i_K1 := g_K1*(Vm_membrane - E_K_time_independent_potassium_current)*(fO4 + fO3 + fO2)*y_time_independent_potassium_current_y_gate;
  E_K_time_independent_potassium_current := R*T/F*ln(Ko/Ki);
  g_K1 := P_K1_0*Cm*(Ko/5.4)^0.4;
  fB := mu/(mu + lambda);
  fO := lambda/(mu + lambda);
  fO2 := 2*fO^2*fB^2;
  fO3 := 8/3*fO^3*fB;
  fO4 := fO^4;
  mu := 0.75*exp(0.035*(Vm_membrane - E_K_time_independent_potassium_current - 10))/(1 + exp(0.015*(Vm_membrane - E_K_time_independent_potassium_current - 140)));
  lambda := 3*exp(-0.048*(Vm_membrane - E_K_time_independent_potassium_current - 10))*(1 + exp(0.064*(Vm_membrane - E_K_time_independent_potassium_current - 38)))/(1 + exp(0.03*(Vm_membrane - E_K_time_independent_potassium_current - 70)));
  alpha_y_time_independent_potassium_current_y_gate := 1/(8000*exp((Vm_time_independent_potassium_current_y_gate - E_K_time_independent_potassium_current - 97)/8.5) + 7*exp((Vm_time_independent_potassium_current_y_gate - E_K_time_independent_potassium_current - 97)/300));
  beta_y_time_independent_potassium_current_y_gate := fO^4*1/(0.00014*exp(-(Vm_time_independent_potassium_current_y_gate - E_K_time_independent_potassium_current - 97)/9.1) + 0.2*exp(-(Vm_time_independent_potassium_current_y_gate - E_K_time_independent_potassium_current - 97)/500));
  i_Kr := g_Kr*(Vm_membrane - E_K_time_independent_potassium_current)*(0.6*y1_rapid_time_dependent_potassium_current_y1_gate + 0.4*y2_rapid_time_dependent_potassium_current_y2_gate)*y3;
  g_Kr := P_Kr*Cm*(Ko/5.4)^0.2;
  alpha_y1_rapid_time_dependent_potassium_current_y1_gate := 1/(20*exp(-Vm_rapid_time_dependent_potassium_current_y1_gate/11.5) + 5*exp(-Vm_rapid_time_dependent_potassium_current_y1_gate/300));
  beta_y1_rapid_time_dependent_potassium_current_y1_gate := 1/(160*exp(Vm_rapid_time_dependent_potassium_current_y1_gate/28) + 200*exp(Vm_rapid_time_dependent_potassium_current_y1_gate/1000)) + 1/(2500*exp(Vm_rapid_time_dependent_potassium_current_y1_gate/20));
  alpha_y2_rapid_time_dependent_potassium_current_y2_gate := 1/(200*exp(-Vm_rapid_time_dependent_potassium_current_y2_gate/13) + 20*exp(-Vm_rapid_time_dependent_potassium_current_y2_gate/300));
  beta_y2_rapid_time_dependent_potassium_current_y2_gate := 1/(1600*exp(Vm_rapid_time_dependent_potassium_current_y2_gate/28) + 2000*exp(Vm_rapid_time_dependent_potassium_current_y2_gate/1000)) + 1/(10000*exp(Vm_rapid_time_dependent_potassium_current_y2_gate/20));
  alpha_y3 := 1/(10*exp(Vm_rapid_time_dependent_potassium_current_y3_gate/17) + 2.5*exp(Vm_rapid_time_dependent_potassium_current_y3_gate/300));
  beta_y3 := 1/(0.35*exp(-Vm_rapid_time_dependent_potassium_current_y3_gate/17) + 2*exp(-Vm_rapid_time_dependent_potassium_current_y3_gate/150));
  i_Ks := i_Ks_Na + i_Ks_K;
  i_Ks_K := P_Ks_K*CF_K*y1_slow_time_dependent_potassium_current_y1_gate^2*(0.9*y2_slow_time_dependent_potassium_current_y2_gate + 0.1);
  i_Ks_Na := P_Ks_Na*CF_Na*y1_slow_time_dependent_potassium_current_y1_gate^2*(0.9*y2_slow_time_dependent_potassium_current_y2_gate + 0.1);
  alpha_y1_slow_time_dependent_potassium_current_y1_gate := 1/(85*exp(-Vm_slow_time_dependent_potassium_current_y1_gate/10.5) + 370*exp(-Vm_slow_time_dependent_potassium_current_y1_gate/62));
  beta_y1_slow_time_dependent_potassium_current_y1_gate := 1/(1450*exp(Vm_slow_time_dependent_potassium_current_y1_gate/20) + 260*exp(Vm_slow_time_dependent_potassium_current_y1_gate/100));
  alpha_y2_slow_time_dependent_potassium_current_y2_gate := 3.7*Cai_slow_time_dependent_potassium_current_y2_gate;
  i_to := i_to_Na + i_to_K;
  i_to_K := P_to_K*CF_K*y1_transient_outward_current_y1_gate^3*y2_transient_outward_current_y2_gate;
  i_to_Na := P_to_Na*CF_Na*y1_transient_outward_current_y1_gate^3*y2_transient_outward_current_y2_gate;
  alpha_y1_transient_outward_current_y1_gate := 1/(11*exp(-Vm_transient_outward_current_y1_gate/28) + 0.2*exp(-Vm_transient_outward_current_y1_gate/400));
  beta_y1_transient_outward_current_y1_gate := 1/(4.4*exp(Vm_transient_outward_current_y1_gate/16) + 0.2*exp(Vm_transient_outward_current_y1_gate/500));
  alpha_y2_transient_outward_current_y2_gate := 0.0038*exp(-(Vm_transient_outward_current_y2_gate + 13.5)/11.3)/(1 + 0.051335*exp(-(Vm_transient_outward_current_y2_gate + 13.5)/11.3));
  beta_y2_transient_outward_current_y2_gate := 0.0038*exp((Vm_transient_outward_current_y2_gate + 13.5)/11.3)/(1 + 0.067083*exp((Vm_transient_outward_current_y2_gate + 13.5)/11.3));
  i_bNSC := i_bNSC_K + i_bNSC_Na;
  i_bNSC_K := 0.4*P_bNSC*CF_K;
  i_bNSC_Na := P_bNSC*CF_Na;
  i_Kpl := piecewise(P_Kpl*CF_K*13.0077, Vm_membrane == -3, P_Kpl*CF_K*(Vm_membrane + 3)/(1 - exp(-(Vm_membrane + 3)/13)));
  P_Kpl := 0.00011*(Ko/5.4)^0.16;
  i_lCa := i_lCa_K + i_lCa_Na;
  i_lCa_K := P_lCa*CF_K*p_open_background_lCa_current;
  i_lCa_Na := P_lCa*CF_Na*p_open_background_lCa_current;
  p_open_background_lCa_current := 1/(1 + (0.0012/Cai_internal_ion_concentrations)^3);
  i_KATP := gamma*(Vm_membrane - E_K_time_independent_potassium_current)*p_open_background_KATP_current;
  gamma := P_KATP*N*(Ko/1)^0.24;
  p_open_background_KATP_current := 0.8/(1 + (ATPi/0.1)^2);
  i_Cab := P_Cab*CF_Ca_constant_field_equations;
  i_NaCa := P_NaCa*Cm*1*(k1_sodium_calcium_exchanger*p_E1Na_sodium_calcium_exchanger*y_sodium_calcium_exchanger_y_gate - k2_sodium_calcium_exchanger*p_E2Na_sodium_calcium_exchanger*(1 - y_sodium_calcium_exchanger_y_gate));
  p_E1Na_sodium_calcium_exchanger := 1/(1 + (Km_Nai_sodium_calcium_exchanger/Nai)^3*(1 + Cai_internal_ion_concentrations/Km_Cai));
  p_E2Na_sodium_calcium_exchanger := 1/(1 + (Km_Nao_sodium_calcium_exchanger/Nao)^3*(1 + Cao/Km_Cao));
  p_E1Ca_sodium_calcium_exchanger := 1/(1 + Km_Cai/Cai_internal_ion_concentrations*(1 + (Nai/Km_Nai_sodium_calcium_exchanger)^3));
  p_E2Ca_sodium_calcium_exchanger := 1/(1 + Km_Cao/Cao*(1 + (Nao/Km_Nao_sodium_calcium_exchanger)^3));
  k1_sodium_calcium_exchanger := 1*exp(Partition*F*Vm_membrane/(R*T));
  k2_sodium_calcium_exchanger := 1*exp((Partition - 1)*F*Vm_membrane/(R*T));
  alpha_y_sodium_calcium_exchanger_y_gate := k2_sodium_calcium_exchanger*p_E2Na_sodium_calcium_exchanger + k4_sodium_calcium_exchanger*p_E2Ca_sodium_calcium_exchanger;
  beta_y_sodium_calcium_exchanger_y_gate := k1_sodium_calcium_exchanger*p_E1Na_sodium_calcium_exchanger + k3_sodium_calcium_exchanger*p_E1Ca_sodium_calcium_exchanger;
  i_NaK := P_NaK*Cm*1*(k1_sodium_potassium_pump*p_E1Na_sodium_potassium_pump*y_sodium_potassium_pump_y_gate - k2_sodium_potassium_pump*p_E2Na_sodium_potassium_pump*(1 - y_sodium_potassium_pump_y_gate));
  p_E1Na_sodium_potassium_pump := 1/(1 + (Km_Nai_sodium_potassium_pump/Nai)^1.06*(1 + (Ki/Km_Ki)^1.12));
  p_E2Na_sodium_potassium_pump := 1/(1 + (Km_Nao_sodium_potassium_pump/Nao_Eff)^1.06*(1 + (Ko/Km_Ko)^1.12));
  p_E1K := 1/(1 + (Km_Ki/Ki)^1.12*(1 + (Nai/Km_Nai_sodium_potassium_pump)^1.06));
  p_E2K := 1/(1 + (Km_Ko/Ko)^1.12*(1 + (Nao_Eff/Km_Nao_sodium_potassium_pump)^1.06));
  k1_sodium_potassium_pump := 0.37/(1 + Km_ATP_sodium_potassium_pump/ATPi);
  Nao_Eff := Nao*exp(-0.82*F*Vm_membrane/(R*T));
  alpha_y_sodium_potassium_pump_y_gate := k2_sodium_potassium_pump*p_E2Na_sodium_potassium_pump + k4_sodium_potassium_pump*p_E2K;
  beta_y_sodium_potassium_pump_y_gate := k1_sodium_potassium_pump*p_E1Na_sodium_potassium_pump + k3_sodium_potassium_pump*p_E1K;
  i_SR_U := i_max*1*(k1_SR_calcium_pump*p_E1Ca_SR_calcium_pump*y_SR_calcium_pump_y_gate - k2_SR_calcium_pump*p_E2Ca_SR_calcium_pump*(1 - y_SR_calcium_pump_y_gate));
  p_E1Ca_SR_calcium_pump := 1/(1 + Km_CaSR/Caup);
  p_E2Ca_SR_calcium_pump := 1/(1 + Km_CaCyto/Cai_internal_ion_concentrations);
  p_E1 := 1 - p_E1Ca_SR_calcium_pump;
  p_E2 := 1 - p_E2Ca_SR_calcium_pump;
  k2_SR_calcium_pump := 1/(1 + Km_ATP_SR_calcium_pump/ATPi);
  alpha_y_SR_calcium_pump_y_gate := k2_SR_calcium_pump*p_E2Ca_SR_calcium_pump + k4_SR_calcium_pump*p_E2;
  beta_y_SR_calcium_pump_y_gate := k1_SR_calcium_pump*p_E1Ca_SR_calcium_pump + k3_SR_calcium_pump*p_E1;
  i_RyR := P_RyR*(Carel - Cai_internal_ion_concentrations)*p_open_RyR;
  k1_RyR_channel := 280000*(Cai_internal_ion_concentrations/1)^2 + Diadid_Factor*CaDiadic_RyR_channel;
  k2_RyR_channel := 0.08/(1 + 0.36/Carel);
  k3_RyR_channel := 0.000377*(Carel/1)^2;
  i_SR_T := P_SR_T*(Caup - Carel);
  i_SR_L := P_SR_L*(Caup - Cai_internal_ion_concentrations);
  b1_Ca_concentrations_in_SR := CSQN_max - Ca_Total_Ca_concentrations_in_SR + K_mCSQN;
  c1_Ca_concentrations_in_SR := K_mCSQN*Ca_Total_Ca_concentrations_in_SR;
  Carel := (sqrt(b1_Ca_concentrations_in_SR^2 + 4*c1_Ca_concentrations_in_SR) - b1_Ca_concentrations_in_SR)/2;
  h := L - X;
  p := 1 - pCa - pCaCB - pCB;
  Q_b := Y_1*Cai_internal_ion_concentrations*p - Z_1*pCa;
  EffFraction := exp(-20*(L - L_a)^2);
  Q_a := Y_2*pCa*EffFraction - Z_2*pCaCB;
  Q_r := Y_3*pCaCB - Z_3*pCB*Cai_internal_ion_concentrations;
  Q_d := Y_4*pCB;
  Q_d1 := Y_d*X^2*pCB;
  Q_d2 := Y_d*X^2*pCaCB;
  dCaidt := T_t*(Q_d2 + Q_r - Q_b);
  dATPdt := -0.4*pCaCB*T_t;
  CBBound := T_t*(pCaCB + pCB);
  NewCBF := ForceFactor*CBBound;
  ForceEcomp := KForceEC*(ZeroForceEL - L)^5 + KForceLinearEc*(ZeroForceEL - L);
  ForceCB := NewCBF*h;
  ForceExt := -ForceEcomp + ForceCB;
  i_tot := i_Na + i_Ca_L + i_Ca_T + i_K1 + i_Kr + i_Ks + i_to + i_I + i_NaK + i_NaCa;
  i_I := i_bNSC + i_Cab + i_Kpl + i_lCa + i_KATP;
  i_net_Na := i_Na_Na + i_Ks_Na + i_to_Na + i_CaL_Na + i_bNSC_Na + i_lCa_Na + 3*i_NaK + 3*i_NaCa;
  i_net_K := i_K1 + i_Kr + i_to_K + i_KATP + i_Ks_K + i_Na_K + i_CaL_K + i_bNSC_K + i_lCa_K + i_Kpl - 2*i_NaK;
  i_net_Ca := i_CaL_Ca + i_Ca_T + i_Cab - 2*i_NaCa;

  // Rate rules:
  Vm_membrane' = -(i_tot + i_ext)/Cm;
  Nai' = -i_net_Na/(F*Vi);
  Ki' = -(i_net_K + i_ext)/(F*Vi);
  Ca_Total_internal_ion_concentrations' = -(i_net_Ca - i_SR_U - i_RyR - i_SR_L)/(2*F*Vi) + dCaidt;
  ATPi' = ProducingRate_Max*(Adenosine_Total - ATPi) + dATPdt - i_NaK/(F*Vi) + i_SR_U/(4*F*Vi);
  p_RP_Na' = p_AP_Na*k_AP_RP_sodium_current_voltage_dependent_gate + p_RI_Na*k_RI_RP_sodium_current_voltage_dependent_gate - p_RP_Na*(k_RP_RI_sodium_current_voltage_dependent_gate + k_RP_AP_sodium_current_voltage_dependent_gate);
  p_AP_Na' = p_RP_Na*k_RP_AP_sodium_current_voltage_dependent_gate + p_AI_Na*k_AI_AP_sodium_current_voltage_dependent_gate - p_AP_Na*(k_AP_RP_sodium_current_voltage_dependent_gate + k_AP_AI_sodium_current_voltage_dependent_gate);
  p_AI_Na' = p_RI_Na*k_RI_AI_sodium_current_voltage_dependent_gate + p_AP_Na*k_AP_AI_sodium_current_voltage_dependent_gate - p_AI_Na*(k_AI_RI_sodium_current_voltage_dependent_gate + k_AI_AP_sodium_current_voltage_dependent_gate);
  y_sodium_current_ultra_slow_gate' = alpha_y_sodium_current_ultra_slow_gate*(1 - y_sodium_current_ultra_slow_gate) - beta_y_sodium_current_ultra_slow_gate*y_sodium_current_ultra_slow_gate;
  p_RP_CaL' = p_AP_CaL*k_AP_RP_L_type_Ca_channel_voltage_dependent_gate + p_RI_CaL*k_RI_RP_L_type_Ca_channel_voltage_dependent_gate - p_RP_CaL*(k_RP_RI_L_type_Ca_channel_voltage_dependent_gate + k_RP_AP_L_type_Ca_channel_voltage_dependent_gate);
  p_AP_CaL' = p_RP_CaL*k_RP_AP_L_type_Ca_channel_voltage_dependent_gate + p_AI_CaL*k_AI_AP_L_type_Ca_channel_voltage_dependent_gate - p_AP_CaL*(k_AP_RP_L_type_Ca_channel_voltage_dependent_gate + k_AP_AI_L_type_Ca_channel_voltage_dependent_gate);
  p_AI_CaL' = p_RI_CaL*k_RI_AI_L_type_Ca_channel_voltage_dependent_gate + p_AP_CaL*k_AP_AI_L_type_Ca_channel_voltage_dependent_gate - p_AI_CaL*(k_AI_RI_L_type_Ca_channel_voltage_dependent_gate + k_AI_AP_L_type_Ca_channel_voltage_dependent_gate);
  p_U' = p_C*k_C_U + p_UCa*k_UCa_U - p_U*(k_UUCa_Ca + k_U_C);
  p_UCa' = p_U*k_UUCa_Ca + p_CCa*k_CCa_UCa - p_UCa*(k_UCa_CCa + k_UCa_U);
  p_C' = p_CCa*k_CCa_C + p_U*k_U_C - p_C*(k_C_U + k_C_CCa*Cacm*p_AP_CaL);
  y_L_type_Ca_channel_ultra_slow_gate' = alpha_y_L_type_Ca_channel_ultra_slow_gate*(1 - y_L_type_Ca_channel_ultra_slow_gate) - beta_y_L_type_Ca_channel_ultra_slow_gate*y_L_type_Ca_channel_ultra_slow_gate;
  y1_T_type_Ca_channel_y1_gate' = alpha_y1_T_type_Ca_channel_y1_gate*(1 - y1_T_type_Ca_channel_y1_gate) - beta_y1_T_type_Ca_channel_y1_gate*y1_T_type_Ca_channel_y1_gate;
  y2_T_type_Ca_channel_y2_gate' = alpha_y2_T_type_Ca_channel_y2_gate*(1 - y2_T_type_Ca_channel_y2_gate) - beta_y2_T_type_Ca_channel_y2_gate*y2_T_type_Ca_channel_y2_gate;
  y_time_independent_potassium_current_y_gate' = alpha_y_time_independent_potassium_current_y_gate*(1 - y_time_independent_potassium_current_y_gate) - beta_y_time_independent_potassium_current_y_gate*y_time_independent_potassium_current_y_gate;
  y1_rapid_time_dependent_potassium_current_y1_gate' = alpha_y1_rapid_time_dependent_potassium_current_y1_gate*(1 - y1_rapid_time_dependent_potassium_current_y1_gate) - beta_y1_rapid_time_dependent_potassium_current_y1_gate*y1_rapid_time_dependent_potassium_current_y1_gate;
  y2_rapid_time_dependent_potassium_current_y2_gate' = alpha_y2_rapid_time_dependent_potassium_current_y2_gate*(1 - y2_rapid_time_dependent_potassium_current_y2_gate) - beta_y2_rapid_time_dependent_potassium_current_y2_gate*y2_rapid_time_dependent_potassium_current_y2_gate;
  y3' = alpha_y3*(1 - y3) - beta_y3*y3;
  y1_slow_time_dependent_potassium_current_y1_gate' = alpha_y1_slow_time_dependent_potassium_current_y1_gate*(1 - y1_slow_time_dependent_potassium_current_y1_gate) - beta_y1_slow_time_dependent_potassium_current_y1_gate*y1_slow_time_dependent_potassium_current_y1_gate;
  y2_slow_time_dependent_potassium_current_y2_gate' = alpha_y2_slow_time_dependent_potassium_current_y2_gate*(1 - y2_slow_time_dependent_potassium_current_y2_gate) - beta_y2_slow_time_dependent_potassium_current_y2_gate*y2_slow_time_dependent_potassium_current_y2_gate;
  y1_transient_outward_current_y1_gate' = alpha_y1_transient_outward_current_y1_gate*(1 - y1_transient_outward_current_y1_gate) - beta_y1_transient_outward_current_y1_gate*y1_transient_outward_current_y1_gate;
  y2_transient_outward_current_y2_gate' = alpha_y2_transient_outward_current_y2_gate*(1 - y2_transient_outward_current_y2_gate) - beta_y2_transient_outward_current_y2_gate*y2_transient_outward_current_y2_gate;
  y_sodium_calcium_exchanger_y_gate' = alpha_y_sodium_calcium_exchanger_y_gate*(1 - y_sodium_calcium_exchanger_y_gate) - beta_y_sodium_calcium_exchanger_y_gate*y_sodium_calcium_exchanger_y_gate;
  y_sodium_potassium_pump_y_gate' = alpha_y_sodium_potassium_pump_y_gate*(1 - y_sodium_potassium_pump_y_gate) - beta_y_sodium_potassium_pump_y_gate*y_sodium_potassium_pump_y_gate;
  y_SR_calcium_pump_y_gate' = alpha_y_SR_calcium_pump_y_gate*(1 - y_SR_calcium_pump_y_gate) - beta_y_SR_calcium_pump_y_gate*y_SR_calcium_pump_y_gate;
  p_open_RyR' = p_close_RyR*k1_RyR_channel - p_open_RyR*k2_RyR_channel;
  p_close_RyR' = k3_RyR_channel*(1 - (p_open_RyR + p_close_RyR)) - (k1_RyR_channel + k4_RyR_channel)*p_close_RyR;
  Ca_Total_Ca_concentrations_in_SR' = (i_SR_T - i_RyR)/(2*F*V_rel);
  Caup' = (-i_SR_U - i_SR_T - i_SR_L)/(2*F*V_up);
  pCa' = Q_b - Q_a;
  pCaCB' = Q_a - Q_r - Q_d2;
  pCB' = Q_r - Q_d - Q_d1;
  X' = B*(h - h_c);

  // Unit definitions:
  unit millivolt = 1e-3 volt;
  unit per_millivolt = 1 / (1e-3 volt);
  unit millimole = 1e-3 mole;
  unit millimolar = 1e-3 mole / litre;
  unit millimolar2 = (1e-3 mole)^2 / litre^2;
  unit micromolar = 1e-6 mole / litre;
  unit millimolar_per_millisecond = 1e-3 mole / (litre * 1e-3 second);
  unit millimolar_per_picoA = 1e-3 mole / (litre * 1e-12 ampere);
  unit per_millimolar = litre / (1e-3 mole);
  unit per_micromolar2 = litre^2 / (1e-6 mole)^2;
  unit second_per_micromolar2 = second * litre^2 / (1e-6 mole)^2;
  unit millisecond_per_micrometre2 = 1e-3 second / (1e-6 metre)^2;
  unit mN_per_mm2 = 1e-3 newton / (1e-3 metre)^2;
  unit mN_per_mm2_micrometre = 1e-3 newton / (1e-4 metre)^3;
  unit mN_per_mm2_micrometre5 = 1e-3 newton / (1e-5 metre)^7;
  unit mN_per_mm2_micrometre_millimolar = 1e-3 newton * litre / ((1e-4 metre)^3 * 1e-3 mole);
  unit per_micrometre2 = 1 / (1e-6 metre)^2;
  unit millisecond = 1e-3 second;
  unit micromolar_per_second = 1e-6 mole / (litre * second);
  unit per_millisecond = 1 / (1e-3 second);
  unit per_millimolar_millisecond = litre / (1e-3 mole * 1e-3 second);
  unit picoF = 1e-12 farad;
  unit picoF_per_millisecond = 1e-12 farad / (1e-3 second);
  unit picoA = 1e-12 ampere;
  unit per_picoA_millisecond = 1 / (1e-12 ampere * 1e-3 second);
  unit micrometre = 1e-6 metre;
  unit micrometre_per_millisecond = 1e-6 metre / (1e-3 second);
  unit micrometre3 = (1e-6 metre)^3;
  unit nanoS = 1e-9 siemens;
  unit nanoS_per_picoF = 1e-9 siemens / (1e-12 farad);
  unit picoA_per_picoF = 1e-12 ampere / (1e-12 farad);
  unit nanoS_per_millimolar = 1e-9 siemens * litre / (1e-3 mole);
  unit picoA_per_millimolar = 1e-12 ampere * litre / (1e-3 mole);
  unit coulomb_millivolt_per_kelvin_millimole = coulomb * 1e-3 volt / (kelvin * 1e-3 mole);
  unit coulomb_per_millimole = coulomb / (1e-3 mole);
  unit time = 1e-3 second;
end
