// SBML level 2 version 4

model Liu1999_PulsatileSecretion()
  // This a model from the article:
  // A dynamical model for the pubsatile secretion of the hypothalamo-pituitary-adrenal axis.
  // Yi-wei Liu, Zhi-Hong Hu, Jian-Hua Peng and Bing-Zheng Liu Mathematical and Computer Modelling Volume 29, Issue 4, February 1999, Pages 103-110 10.1016/S0006-3495(61)86902-6 ,
  // Abstract:
  // We propose a dynamical model for the pulsatile secretion of the hypothalamo-pituitary-adrenal axis. This model takes into account both the binding of hormone with proteins in the plasma and tissues and mutual interactions of the hormones in the system. The deductions from this model are in good agreement with experiment results.
  // This model was taken from the CellML repository and automatically converted to SBML.
  // The original model was: CellMLdetails
  // The original CellML model was created by:
  // Catherine Lloyd
  // c.lloyd@auckland.ac.nz
  // The University of Auckland
  // This model originates from BioModels Database: A Database of Annotated Published Models (http://www.ebi.ac.uk/biomodels/). It is copyright (c) 2005-2011 The BioModels.net Team.
  // To the extent possible under law, all copyright and related or neighbouring rights to this encoded model have been dedicated to the public domain worldwide. Please refer to CC0 Public Domain Dedication for more information.
  // In summary, you are entitled to use this encoded model in absolutely any manner you deem suitable, verbatim, or with modification, alone or embedded it in a larger context, redistribute it, commercially or not, in a restricted way or not..
  // To cite BioModels Database, please use: Li C, Donizelli M, Rodriguez N, Dharuri H, Endler L, Chelliah V, Li L, He E, Henry A, Stefan MI, Snoep JL, Hucka M, Le Novère N, Laibe C (2010) BioModels Database: An enhanced, curated and annotated resource for published quantitative kinetic models. BMC Syst Biol., 4:92.
  // biomodels.db:MODEL1006230060
  // isDescribedBy pubmed:7772725
  // biomodels.db:MODEL1006230060
  // isDescribedBy pubmed:7772725
  // biomodels.db:MODEL1006230060
  // biomodels.db:MODEL1006230060

  // Compartments:
  compartment COMpartment = 1 litre;

  // Parameters:
  x1 = 0.01067;
  x2 = 0.04665;
  x3 = 6.51;
  x4 = 60.61;
  x5 = 12.61;
  a1 = 1.7e-5;
  a2 = 0.0023;
  a3 = 0.6;
  a4 = 45;
  a5 = 36;
  a6 = 216;
  a7 = 0.28;
  a8 = 0.36;
  a9 = 0.0003;
  a10 = 0.18;
  a11 = 150;
  a12 = 18;
  a13 = 460;
  a14 = 0.46;
  a15 = 0.1;
  a16 = 0.04;
  a17 = 150;
  a18 = 3800;
  a19 = 57;
  a20 = 2600;
  a21 = 200;
  a22 = 9400;
  a23 = 10;
  a24 = 320;
  a25 = 0.04;
  a26 = 0.00097;
  a27 = 0.57;
  a28 = 0.0017;
  lambda_1 = 0.059;
  lambda_2 = 0.028;
  lambda_3 = 0.0986;
  lambda_4 = 0.024;
  lambda_5 = 3e-5;

  // Assignment rules:
  lambda_3_ := lambda_3 + a27 + a28;
  lambda_4_ := lambda_4 + a25;
  lambda_5_ := lambda_5 + a26;

  // Rate rules:
  x1' = a1 + (a2 + a3*x1 + a4*x1^2)/(1 + a5*x1 + a6*x1^2 + a7*x3 + a8*x3^2) - lambda_1*x1;
  x2' = (a9 + a10*x1 + a11*x1^2)/(1 + a12*x1 + a13*x1^2 + a14*x3 + a15*x3^2) - lambda_2*x2;
  x3' = a16 + (a17*x1 + a18*x1^2 + a19*x2 + a20*x2^2)/(1 + a21*x1 + a22*x1^2 + a23*x2 + a24*x2^2) + a25*x4 + a26*x5 - lambda_3_*x3;
  x4' = a27*x3 - lambda_4_*x4;
  x5' = a28*x3 - lambda_5_*x5;

  // Unit definitions:
  unit minute = 60 second;
  unit microg_l = 1e-6 gram / litre;
  unit per_microg_l = litre / (1e-6 gram);
  unit per_microg_l2 = litre^2 / (1e-6 gram)^2;
  unit flux = 1e-6 gram / (litre * 60 second);
  unit first_order_rate_constant = 1 / (60 second);
  unit second_order_rate_constant = litre / (1e-6 gram * 60 second);
  unit time = 60 second;
end
