// SBML level 2 version 4

model Wodarz2003_ImmunologicalMemory()
  // This a model from the article:
  // Evolution of immunological memory and the regulation of competition between pathogens.
  // Wodarz D. Curr Biol 2003 Sep 16;13(18):1648-52 13678598 ,
  // Abstract:
  // Memory is a central characteristic of immune responses. It is defined as an elevated number of specific immune cells that remain after resolution of infection and can protect the host against reinfection. The evolution of immunological memory is subject to debate. The advantages of memory discussed so far include protection from reinfection, control of chronic infection, and the transfer of immune function to the next generation. Mathematical models are used to identify a new force that can drive the evolution of immunological memory: the duration of memory can regulate the degree of competition between different pathogens. While a long duration of memory provides lasting protection against reinfection, it may also allow an inferior pathogen species to persist. This can be detrimental for the host if the inferior pathogen is more virulent. On the other hand, a shorter duration of memory ensures that an inferior pathogen species is excluded. This can be beneficial for the host if the inferior pathogen is more virulent. Thus, while in the absence of pathogen diversity memory is always expected to evolve to a long duration, under specific circumstances, memory can evolve toward shorter durations in the presence of pathogen diversity.
  // This model was taken from the CellML repository and automatically converted to SBML.
  // The original model was: Wodarz D. (2003) - version=1.0
  // The original CellML model was created by:
  // Catherine Lloyd
  // c.lloyd@auckland.ac.nz
  // The University of Auckland
  // This model originates from BioModels Database: A Database of Annotated Published Models (http://www.ebi.ac.uk/biomodels/). It is copyright (c) 2005-2011 The BioModels.net Team.
  // To the extent possible under law, all copyright and related or neighbouring rights to this encoded model have been dedicated to the public domain worldwide. Please refer to CC0 Public Domain Dedication for more information.
  // In summary, you are entitled to use this encoded model in absolutely any manner you deem suitable, verbatim, or with modification, alone or embedded it in a larger context, redistribute it, commercially or not, in a restricted way or not..
  // To cite BioModels Database, please use: Li C, Donizelli M, Rodriguez N, Dharuri H, Endler L, Chelliah V, Li L, He E, Henry A, Stefan MI, Snoep JL, Hucka M, Le Novère N, Laibe C (2010) BioModels Database: An enhanced, curated and annotated resource for published quantitative kinetic models. BMC Syst Biol., 4:92.
  // biomodels.db:MODEL1006230061
  // isDescribedBy pubmed:13678598
  // biomodels.db:MODEL1006230061
  // isDescribedBy pubmed:13678598
  // biomodels.db:MODEL1006230061
  // biomodels.db:MODEL1006230061

  // Compartments:
  compartment COMpartment = 1 litre;

  // Parameters:
  S = 100;
  r = 0.5;
  epsilon = 0.1;
  I_1 = 0;
  I_2 = 0;
  I_12 = 0;
  I_21 = 0;
  R_1 = 0;
  R_2 = 0;
  R_12 = 0;
  P_1 = 1;
  k_1 = 1;
  P_2 = 1;
  k_2 = 1;
  g = 0.01;
  beta_1 = 1;
  alpha_1 = 0.1;
  beta_2 = 1;
  alpha_2 = 0.1;
  a_1 = 0.03;
  a_2 = 1;
  d = 0.01;
  u = 0.5;

  // Assignment rules:
  P := P_1 + P_2;
  H := S + I_1 + R_1 + I_2 + R_2 + I_12 + I_21 + R_12;
  log_P1 := log10(P_1);
  log_P2 := log10(P_2);
  G := 1/g;

  // Rate rules:
  S' = r*H/(epsilon*H + 1) - d*S - beta_1*S*P_1 - beta_2*S*P_2 + g*(R_1 + R_2 + R_12);
  I_1' = beta_1*S*P_1 - a_1*I_1 - alpha_1*I_1;
  I_2' = beta_2*S*P_2 - a_2*I_2 - alpha_2*I_2;
  I_12' = beta_2*R_1*P_2 - a_2*I_12 - alpha_2*I_12;
  I_21' = beta_1*R_2*P_1 - a_1*I_21 - alpha_1*I_21;
  R_1' = alpha_1*I_1 - d*R_1 - g*R_1 - beta_2*R_1*P_2;
  R_2' = alpha_2*I_2 - d*R_2 - g*R_2 - beta_1*R_2*P_1;
  R_12' = alpha_2*I_12 + alpha_1*I_21 - d*R_12 - g*R_12;
  P_1' = k_1*(I_1 + I_21) - u*P_1;
  P_2' = k_2*(I_2 + I_12) - u*P_2;

  // Unit definitions:
  unit day = 86400 second;
  unit first_order_rate_constant = 1 / (86400 second);
  unit time = 86400 second;
end
