// SBML level 2 version 4

model Noble1998_VentricularCellModel_ModelC()
  // This a model from the article:
  // Improved guinea-pig ventricular cell model incorporating a diadic space, IKr and IKs, and length- and tension-dependent processes.
  // Noble D, Varghese A, Kohl P, Noble P. Can J Cardiol 1998 Jan;14(1):123-34 9487284 ,
  // Abstract:
  // The guinea-pig ventricular cell model, originally developed by Noble et al in 1991, has been greatly extended to include accumulation and depletion of calcium in a diadic space between the sarcolemma and the sarcoplasmic reticulum where, according to contempory understanding, the majority of calcium-induced calcium release is triggered. The calcium in this space is also assumed to play the major role in calcium-induced inactivation of the calcium current. Delayed potassium current equations have been developed to include the rapid (IKr) and slow (IKs) components of the delayed rectifier current based on the data of of Heath and Terrar, along with data from Sanguinetti and Jurkiewicz. Length- and tension-dependent changes in mechanical and electrophysiological processes have been incorporated as described recently by Kohl et al. Drug receptor interactions have started to be developed, using the sodium channel as the first target. The new model has been tested against experimental data on action potential clamp, and on force-interval and duration-interval relations; it has been found to reliably reproduce experimental observations.
  // This model was taken from the CellML repository and automatically converted to SBML.
  // The original model was: Noble D, Varghese A, Kohl P, Noble P. (1998) - version=1.0
  // The original CellML model was created by:
  // Penny Noble
  // penny.noble@dpag.ox.ac.uk
  // The University of Oxford
  // This model originates from BioModels Database: A Database of Annotated Published Models (http://www.ebi.ac.uk/biomodels/). It is copyright (c) 2005-2011 The BioModels.net Team.
  // To the extent possible under law, all copyright and related or neighbouring rights to this encoded model have been dedicated to the public domain worldwide. Please refer to CC0 Public Domain Dedication for more information.
  // In summary, you are entitled to use this encoded model in absolutely any manner you deem suitable, verbatim, or with modification, alone or embedded it in a larger context, redistribute it, commercially or not, in a restricted way or not. .
  // To cite BioModels Database, please use: Li C, Donizelli M, Rodriguez N, Dharuri H, Endler L, Chelliah V, Li L, He E, Henry A, Stefan MI, Snoep JL, Hucka M, Le Novère N, Laibe C (2010) BioModels Database: An enhanced, curated and annotated resource for published quantitative kinetic models. BMC Syst Biol., 4:92.
  // biomodels.db:MODEL1006230063
  // isDescribedBy pubmed:9487284
  // biomodels.db:MODEL1006230063
  // isDescribedBy pubmed:9487284
  // biomodels.db:MODEL1006230063
  // biomodels.db:MODEL1006230063

  // Compartments:
  compartment COMpartment = 1 litre;

  // Parameters:
  V_membrane = -92.849333;
  R = 8314.472;
  T = 310;
  F = 9.64853415e4;
  Cm = 9.5e-5;
  stim_start = 0.1;
  stim_end = 10000;
  stim_period = 1;
  stim_duration = 0.003;
  stim_amplitude = -3;
  P_kna = 0.03;
  K_mk1 = 10;
  g_K1 = 0.5;
  g_Kr1 = 0.0021;
  g_Kr2 = 0.0013;
  xr1 = 1.03e-5;
  V_rapid_delayed_rectifier_potassium_current_xr1_gate = ;
  time_rapid_delayed_rectifier_potassium_current_xr1_gate = ;
  xr2 = 2e-7;
  V_rapid_delayed_rectifier_potassium_current_xr2_gate = ;
  time_rapid_delayed_rectifier_potassium_current_xr2_gate = ;
  g_Ks = 0.0026;
  xs = 0.001302;
  V_slow_delayed_rectifier_potassium_current_xs_gate = ;
  time_slow_delayed_rectifier_potassium_current_xs_gate = ;
  g_K_ATP = 0;
  K_ATP = 0.1;
  ATP = 0;
  g_K_Na = 0;
  K_kna = 20;
  g_Na = 2.5;
  m = 0.0016203;
  V_fast_sodium_current_m_gate = ;
  time_fast_sodium_current_m_gate = ;
  delta_m = 1e-5;
  h = 0.9944036;
  V_fast_sodium_current_h_gate = ;
  time_fast_sodium_current_h_gate = ;
  g_pna = 0.004;
  g_bna = 0.0006;
  P_Ca_L = 0.1;
  P_CaK = 0.002;
  P_CaNa = 0.01;
  Km_f2 = 100000;
  Km_f2ds = 0.001;
  R_decay = 20;
  FrICa = 1;
  d = 0;
  V_L_type_Ca_channel_d_gate = ;
  time_L_type_Ca_channel_d_gate = ;
  speed_d = 3;
  f = 1;
  V_L_type_Ca_channel_f_gate = ;
  time_L_type_Ca_channel_f_gate = ;
  speed_f = 0.3;
  delta_f = 0.0001;
  f2 = 0.9349197;
  Ca_i_L_type_Ca_channel_f2_gate = ;
  V_L_type_Ca_channel_f2_gate = ;
  time_L_type_Ca_channel_f2_gate = ;
  f2ds = 0.9651958;
  Ca_ds_L_type_Ca_channel_f2ds_gate = ;
  V_L_type_Ca_channel_f2ds_gate = ;
  time_L_type_Ca_channel_f2ds_gate = ;
  g_bca = 0.00025;
  g_to = 0.005;
  g_tos = 0;
  s = 0.9948645;
  V_transient_outward_current_s_gate = ;
  time_transient_outward_current_s_gate = ;
  r = 0;
  V_transient_outward_current_r_gate = ;
  time_transient_outward_current_r_gate = ;
  g_KACh = 0;
  ACh = 5;
  K_D = 0.00013;
  x_ACh = 0;
  alpha_ACh = 0.5;
  beta_ACh = 0.5;
  time_ACh_dependent_potassium_current_xACh_gate = ;
  i_NaK_max = 0.7;
  K_mK = 1;
  K_mNa = 40;
  k_NaCa = 0.0005;
  n_NaCa = 3;
  d_NaCa = 0;
  gamma = 0.5;
  FRiNaCa = 0.001;
  K_cyca = 0.0003;
  K_xcs = 0.4;
  K_srca = 0.5;
  alpha_up = 0.4;
  beta_up = 0.03;
  K_leak_rate = 0.005;
  K_m_rel = 250;
  K_m_Ca_cyt = 0.0005;
  K_m_Ca_ds = 0.01;
  ActFrac = 0.001914;
  ProdFrac = 0.2854569;
  gama_SR_SL = 2.5;
  gama_SR_IT = 2.5;
  Na_o = 140;
  Na_i = 7.3321223;
  Ca_o = 2;
  K_o = 4;
  K_i = 136.5644;
  Ca_i_intracellular_calcium_concentration = 1.4e-5;
  Ca_ds_intracellular_calcium_concentration = 1.88e-5;
  Ca_up = 0.4531889;
  Ca_rel = 0.4481927;
  Ca_Calmod = 0.0005555;
  Ca_Trop = 0.0002;
  Calmod = 0.02;
  Trop = 0.05;
  alpha_Calmod = 100000;
  beta_Calmod = 50;
  beta_Trop = 200;
  gama_Trop_SL = 1.5;
  KTrop = 5000;
  radius = 12;
  length = 74;
  V_ds_ratio = 0.1;
  V_rel_ratio = 0.1;
  V_e_ratio = 0.4;
  V_up_ratio = 0.01;
  Kdecay = 10;
  light_chain = 3.32e-5;
  cross_bridge = 8.09e-5;
  KCont1 = 12000;
  KCont2 = 100;
  KCont3 = 60;
  KCont4 = 25;
  sarcomere_length = 2;
  cross_bridge_density = 0.05;
  gama_SAC_SL = 2.5;
  gama_SAC_IT = 2.5;
  SLHST = 2;
  ITHST = 1;
  g_Ca_stretch = 0.01;
  g_K_stretch = 0.01;
  g_Na_stretch = 0.01;
  g_An_stretch = 0.01;
  E_An_stretch = -20;
  g_fibro_junct = 0.00029;
  g_fibro = 0.0002;
  c_fibro = 1e-5;
  g_fibro_stretch = 0;
  E_fibro_stretch = 0;
  V_fibro = -20;

  // Assignment rules:
  i_Stim := piecewise(stim_amplitude, (time >= stim_start) && (time <= stim_end) && (time - stim_start - floor((time - stim_start)/stim_period)*stim_period <= stim_duration), 0);
  E_Na := R*T/F*ln(Na_o/Na_i);
  E_K := R*T/F*ln(K_o/K_i);
  E_Ks := R*T/F*ln((K_o + P_kna*Na_o)/(K_i + P_kna*Na_i));
  E_Ca := 0.5*R*T/F*ln(Ca_o/Ca_i_intracellular_calcium_concentration);
  E_mh := R*T/F*ln((Na_o + 0.12*K_o)/(Na_i + 0.12*K_i));
  i_K1 := g_K1*K_o/(K_o + K_mk1)*(V_membrane - E_K)/(1 + exp((V_membrane - E_K - 10)*F*1.25/(R*T)));
  i_Kr := (g_Kr1*xr1 + g_Kr2*xr2)*1/(1 + exp((V_membrane + 9)/22.4))*(V_membrane - E_K);
  alpha_xr1 := 50/(1 + exp(-(V_rapid_delayed_rectifier_potassium_current_xr1_gate - 5)/9));
  beta_xr1 := 0.05*exp(-(V_rapid_delayed_rectifier_potassium_current_xr1_gate - 20)/15);
  alpha_xr2 := 50/(1 + exp(-(V_rapid_delayed_rectifier_potassium_current_xr2_gate - 5)/9));
  beta_xr2 := 0.4*exp(-((V_rapid_delayed_rectifier_potassium_current_xr2_gate + 30)/30)^3);
  i_Ks := g_Ks*xs^2*(V_membrane - E_Ks);
  alpha_xs := 14/(1 + exp(-(V_slow_delayed_rectifier_potassium_current_xs_gate - 40)/9));
  beta_xs := 1*exp(-V_slow_delayed_rectifier_potassium_current_xs_gate/45);
  i_K_ATP := g_K_ATP*(V_membrane + 80)/(1 + (ATP/K_ATP)^2);
  i_KNa := g_K_Na*Na_i/(Na_i + K_kna)*(V_membrane - E_K);
  i_Na := g_Na*m^3*h*(V_membrane - E_mh);
  E0_m := V_fast_sodium_current_m_gate + 41;
  alpha_m := piecewise(2000, abs(E0_m) < delta_m, 200*E0_m/(1 - exp(-0.1*E0_m)));
  beta_m := 8000*exp(-0.056*(V_fast_sodium_current_m_gate + 66));
  alpha_h := 20*exp(-0.125*(V_fast_sodium_current_h_gate + 75));
  beta_h := 2000/(1 + 320*exp(-0.1*(V_fast_sodium_current_h_gate + 75)));
  i_p_Na := g_pna*1/(1 + exp(-(V_membrane + 52)/8))*(V_membrane - E_Na);
  i_b_Na := g_bna*(V_membrane - E_Na);
  i_Ca_L_Ca_cyt := (1 - FrICa)*4*P_Ca_L*d*f*f2*(V_membrane - 50)*F/(R*T)/(1 - exp(-(V_membrane - 50)*F*2/(R*T)))*(Ca_i_intracellular_calcium_concentration*exp(100*F/(R*T)) - Ca_o*exp(-(V_membrane - 50)*F*2/(R*T)));
  i_Ca_L_K_cyt := (1 - FrICa)*P_CaK*P_Ca_L*d*f*f2*(V_membrane - 50)*F/(R*T)/(1 - exp(-(V_membrane - 50)*F/(R*T)))*(K_i*exp(50*F/(R*T)) - K_o*exp(-(V_membrane - 50)*F/(R*T)));
  i_Ca_L_Na_cyt := (1 - FrICa)*P_CaNa*P_Ca_L*d*f*f2*(V_membrane - 50)*F/(R*T)/(1 - exp(-(V_membrane - 50)*F/(R*T)))*(Na_i*exp(50*F/(R*T)) - Na_o*exp(-(V_membrane - 50)*F/(R*T)));
  i_Ca_L_Ca_ds := FrICa*4*P_Ca_L*d*f*f2ds*(V_membrane - 50)*F/(R*T)/(1 - exp(-(V_membrane - 50)*F*2/(R*T)))*(Ca_i_intracellular_calcium_concentration*exp(100*F/(R*T)) - Ca_o*exp(-(V_membrane - 50)*F*2/(R*T)));
  i_Ca_L_K_ds := FrICa*P_CaK*P_Ca_L*d*f*f2ds*(V_membrane - 50)*F/(R*T)/(1 - exp(-(V_membrane - 50)*F/(R*T)))*(K_i*exp(50*F/(R*T)) - K_o*exp(-(V_membrane - 50)*F/(R*T)));
  i_Ca_L_Na_ds := FrICa*P_CaNa*P_Ca_L*d*f*f2ds*(V_membrane - 50)*F/(R*T)/(1 - exp(-(V_membrane - 50)*F/(R*T)))*(Na_i*exp(50*F/(R*T)) - Na_o*exp(-(V_membrane - 50)*F/(R*T)));
  i_Ca_L := i_Ca_L_Ca_cyt + i_Ca_L_K_cyt + i_Ca_L_Na_cyt + i_Ca_L_Ca_ds + i_Ca_L_K_ds + i_Ca_L_Na_ds;
  E0_d := V_L_type_Ca_channel_d_gate + 24 - 5;
  alpha_d := piecewise(120, abs(E0_d) < 0.0001, 30*E0_d/(1 - exp(-E0_d/4)));
  beta_d := piecewise(120, abs(E0_d) < 0.0001, 12*E0_d/(exp(E0_d/10) - 1));
  E0_f := V_L_type_Ca_channel_f_gate + 34;
  alpha_f := piecewise(25, abs(E0_f) < delta_f, 6.25*E0_f/(exp(E0_f/4) - 1));
  beta_f := 12/(1 + exp(-1*(V_L_type_Ca_channel_f_gate + 34)/4));
  i_b_Ca := g_bca*(V_membrane - E_Ca);
  i_to := g_to*(g_tos + s*(1 - g_tos))*r*(V_membrane - E_K);
  alpha_s := 0.033*exp(-V_transient_outward_current_s_gate/17);
  beta_s := 33/(1 + exp(-0.125*(V_transient_outward_current_s_gate + 10)));
  i_K_ACh := g_KACh*(K_o/(K_o + K_mk1))*x_ACh*(1/(1 + (K_D/ACh)^2))*(V_membrane - E_K)/(1 + exp(2*F*(V_membrane - (E_K + 10))/(R*T)));
  i_NaK := i_NaK_max*K_o/(K_mK + K_o)*Na_i/(K_mNa + Na_i);
  i_NaCa_cyt := (1 - FRiNaCa)*k_NaCa*(exp(gamma*(n_NaCa - 2)*V_membrane*F/(R*T))*Na_i^n_NaCa*Ca_o - exp((gamma - 1)*(n_NaCa - 2)*V_membrane*F/(R*T))*Na_o^n_NaCa*Ca_i_intracellular_calcium_concentration)/((1 + d_NaCa*(Ca_i_intracellular_calcium_concentration*Na_o^n_NaCa + Ca_o*Na_i^n_NaCa))*(1 + Ca_i_intracellular_calcium_concentration/0.0069));
  i_NaCa_ds := FRiNaCa*k_NaCa*(exp(gamma*(n_NaCa - 2)*V_membrane*F/(R*T))*Na_i^n_NaCa*Ca_o - exp((gamma - 1)*(n_NaCa - 2)*V_membrane*F/(R*T))*Na_o^n_NaCa*Ca_ds_intracellular_calcium_concentration)/((1 + d_NaCa*(Ca_ds_intracellular_calcium_concentration*Na_o^n_NaCa + Ca_o*Na_i^n_NaCa))*(1 + Ca_ds_intracellular_calcium_concentration/0.0069));
  i_NaCa := i_NaCa_cyt + i_NaCa_ds;
  K_1 := K_cyca*K_xcs/K_srca;
  K_2 := Ca_i_intracellular_calcium_concentration + Ca_up*K_1 + K_cyca*K_xcs + K_cyca;
  i_up := Ca_i_intracellular_calcium_concentration/K_2*alpha_up - Ca_up*K_1/K_2*beta_up;
  i_trans := 50*(Ca_up - Ca_rel);
  VoltDep := exp(0.08*(V_membrane - 40));
  CaiReg := Ca_i_intracellular_calcium_concentration/(Ca_i_intracellular_calcium_concentration + K_m_Ca_cyt);
  CadsReg := Ca_ds_intracellular_calcium_concentration/(Ca_ds_intracellular_calcium_concentration + K_m_Ca_ds);
  RegBindSite := CaiReg + (1 - CaiReg)*CadsReg;
  ActRate := 0*VoltDep + 500*RegBindSite^2;
  InactRate := 60 + 500*RegBindSite^2;
  SpeedRel := piecewise(5, V_membrane < -50, 1);
  SRLeak := piecewise(K_leak_rate*exp(gama_SR_IT*isometric_tension), isometric_tension > 0, K_leak_rate*exp(gama_SR_SL*sarcomere_length));
  PrecFrac := 1 - ActFrac - ProdFrac;
  i_rel := ((ActFrac/(ActFrac + 0.25))^2*K_m_rel + SRLeak)*Ca_rel;
  V_Cell := 3.141593*(radius/1000)^2*length/1000;
  V_i_ratio := 1 - V_e_ratio - V_up_ratio - V_rel_ratio;
  V_i := V_Cell*V_i_ratio;
  alpha_Trop := KTrop*exp(gama_Trop_SL*sarcomere_length);
  XCont2 := Ca_Calmod/Calmod;
  XCont1 := Ca_Trop/Trop;
  tension_rest := 0.0002*exp(2*sarcomere_length);
  tension_active := piecewise(1 - exp(-3*(sarcomere_length - 1)), sarcomere_length > 1, 0);
  overlap := piecewise(1 - 0.625*(sarcomere_length - 2), sarcomere_length > 2, 1);
  cross_bridge_availability := tension_active*overlap*cross_bridge_density;
  isometric_tension := cross_bridge*cross_bridge_availability + tension_rest;
  f_stretch := piecewise(1/(1 + exp(-2*gama_SAC_IT*(isometric_tension - ITHST))), isometric_tension > 0, 1/(1 + exp(-2*gama_SAC_SL*(sarcomere_length - SLHST))));
  i_Ca_stretch := g_Ca_stretch*f_stretch*(V_membrane - E_Ca);
  i_Na_stretch := g_Na_stretch*f_stretch*(V_membrane - E_Na);
  i_K_stretch := g_K_stretch*f_stretch*(V_membrane - E_K);
  i_An_stretch := g_An_stretch*f_stretch*(V_membrane - E_An_stretch);
  i_stretch := i_Ca_stretch + i_Na_stretch + i_K_stretch + i_An_stretch;
  i_fibro := g_fibro*(V_fibro + 20) + g_fibro_stretch*(V_fibro - E_fibro_stretch);
  i_fibro_junct := -g_fibro_junct*(V_membrane - V_fibro);

  // Rate rules:
  V_membrane' = -1/Cm*(i_Stim + i_K1 + i_to + i_Kr + i_Ks + i_K_ATP + i_K_ACh + i_NaK + i_Na + i_b_Na + i_p_Na + i_Ca_L_Na_cyt + i_Ca_L_Na_ds + i_NaCa_cyt + i_NaCa_ds + i_Ca_L_Ca_cyt + i_Ca_L_Ca_ds + i_Ca_L_K_cyt + i_Ca_L_K_ds + i_b_Ca + i_stretch);
  xr1' = alpha_xr1*(1 - xr1) - beta_xr1*xr1;
  xr2' = alpha_xr2*(1 - xr2) - beta_xr2*xr2;
  xs' = alpha_xs*(1 - xs) - beta_xs*xs;
  m' = alpha_m*(1 - m) - beta_m*m;
  h' = alpha_h*(1 - h) - beta_h*h;
  d' = speed_d*(alpha_d*(1 - d) - beta_d*d);
  f' = speed_f*(alpha_f*(1 - f) - beta_f*f);
  f2' = 1 - 1*(Ca_i_L_type_Ca_channel_f2_gate/(Km_f2 + Ca_i_L_type_Ca_channel_f2_gate) + f2);
  f2ds' = R_decay*(1 - (Ca_ds_L_type_Ca_channel_f2ds_gate/(Km_f2ds + Ca_ds_L_type_Ca_channel_f2ds_gate) + f2ds));
  s' = alpha_s*(1 - s) - beta_s*s;
  r' = 333*(1/(1 + exp(-(V_transient_outward_current_r_gate + 4)/5)) - r);
  x_ACh' = alpha_ACh*(1 - x_ACh) - beta_ACh*x_ACh;
  ActFrac' = PrecFrac*SpeedRel*ActRate - ActFrac*SpeedRel*InactRate;
  ProdFrac' = ActFrac*SpeedRel*InactRate - SpeedRel*1*ProdFrac;
  Na_i' = -1/(1*V_i*F)*(i_Na + i_p_Na + i_b_Na + 3*i_NaK + 3*i_NaCa_cyt + i_Ca_L_Na_cyt + i_Ca_L_Na_ds);
  K_i' = -1/(1*V_i*F)*(i_K1 + i_Kr + i_Ks + i_Ca_L_K_cyt + i_Ca_L_K_ds + i_to - 2*i_NaK);
  Ca_i_intracellular_calcium_concentration' = -1/(2*1*V_i*F)*(i_Ca_L_Ca_cyt + i_b_Ca - 2*i_NaCa_cyt - 2*i_NaCa_ds) + Ca_ds_intracellular_calcium_concentration*V_ds_ratio*Kdecay + i_rel*V_rel_ratio/V_i_ratio - Ca_Calmod - Ca_Trop - i_up;
  Ca_ds_intracellular_calcium_concentration' = -1*i_Ca_L_Ca_ds/(2*1*V_ds_ratio*V_i*F) - Ca_ds_intracellular_calcium_concentration*Kdecay;
  Ca_up' = V_i_ratio/V_up_ratio*i_up - i_trans;
  Ca_rel' = V_up_ratio/V_rel_ratio*i_trans - i_rel;
  Ca_Calmod' = alpha_Calmod*Ca_i_intracellular_calcium_concentration*(Calmod - Ca_Calmod) - beta_Calmod*Ca_Calmod;
  Ca_Trop' = alpha_Trop*Ca_i_intracellular_calcium_concentration*(Trop - Ca_Trop) - beta_Trop*Ca_Trop;
  light_chain' = KCont1*XCont1^2*XCont2*(1 - light_chain) - KCont2*light_chain;
  cross_bridge' = KCont3*light_chain*(1 - cross_bridge) - KCont4*cross_bridge;
  V_fibro' = -(i_fibro + i_fibro_junct)/c_fibro;

  // Unit definitions:
  unit micrometre = 1e-6 metre;
  unit per_micrometre = 1 / (1e-6 metre);
  unit per_second = 1 / second;
  unit millivolt = 1e-3 volt;
  unit per_millivolt = 1 / (1e-3 volt);
  unit per_millivolt_second = 1 / (1e-3 volt * second);
  unit microS = 1e-6 siemens;
  unit microF = 1e-6 farad;
  unit nanoA = 1e-9 ampere;
  unit nanoA_per_millimolar = 1e-9 ampere * litre / (1e-3 mole);
  unit millimolar = 1e-3 mole / litre;
  unit millimolar4 = (1e-3 mole)^4 / litre^4;
  unit millimolar_per_second = 1e-3 mole / (litre * second);
  unit per_millimolar_second = litre / (1e-3 mole * second);
  unit joule_per_kilomole_kelvin = joule / (1000 mole * kelvin);
  unit coulomb_per_mole = coulomb / mole;
  unit micrometre3 = (1e-6 metre)^3;
  unit litre_micrometre3 = litre / (1e-6 metre)^3;
end
