// SBML level 2 version 4

model Bagci2008_NO_Apoptosis_modelA()
  // This a model from the article:
  // Computational insights on the competing effects of nitric oxide in regulating apoptosis.
  // Bagci EZ, Vodovotz Y, Billiar TR, Ermentrout B, Bahar I. PLoS One 2008 May 28;3(5):e2249 18509469 ,
  // Abstract:
  // Despite the establishment of the important role of nitric oxide (NO) on apoptosis, a molecular-level understanding of the origin of its dichotomous pro- and anti-apoptotic effects has been elusive. We propose a new mathematical model for simulating the effects of nitric oxide (NO) on apoptosis. The new model integrates mitochondria-dependent apoptotic pathways with NO-related reactions, to gain insights into the regulatory effect of the reactive NO species N(2)O(3), non-heme iron nitrosyl species (FeL(n)NO), and peroxynitrite (ONOO(-)). The biochemical pathways of apoptosis coupled with NO-related reactions are described by ordinary differential equations using mass-action kinetics. In the absence of NO, the model predicts either cell survival or apoptosis (a bistable behavior) with shifts in the onset time of apoptotic response depending on the strength of extracellular stimuli. Computations demonstrate that the relative concentrations of anti- and pro-apoptotic reactive NO species, and their interplay with glutathione, determine the net anti- or pro-apoptotic effects at long time points. Interestingly, transient effects on apoptosis are also observed in these simulations, the duration of which may reach up to hours, despite the eventual convergence to an anti-apoptotic state. Our computations point to the importance of precise timing of NO production and external stimulation in determining the eventual pro- or anti-apoptotic role of NO.
  // This model was taken from the CellML repository and automatically converted to SBML.
  // The original model was: Bagci EZ, Vodovotz Y, Billiar TR, Ermentrout B, Bahar I. (2008) - version=1.0
  // The original CellML model was created by:
  // Wendy Kang
  // wkan014@aucklanduni.ac.nz
  // The University of Auckland
  // This model originates from BioModels Database: A Database of Annotated Published Models (http://www.ebi.ac.uk/biomodels/). It is copyright (c) 2005-2011 The BioModels.net Team.
  // To the extent possible under law, all copyright and related or neighbouring rights to this encoded model have been dedicated to the public domain worldwide. Please refer to CC0 Public Domain Dedication for more information.
  // In summary, you are entitled to use this encoded model in absolutely any manner you deem suitable, verbatim, or with modification, alone or embedded it in a larger context, redistribute it, commercially or not, in a restricted way or not..
  // To cite BioModels Database, please use: Li C, Donizelli M, Rodriguez N, Dharuri H, Endler L, Chelliah V, Li L, He E, Henry A, Stefan MI, Snoep JL, Hucka M, Le Novère N, Laibe C (2010) BioModels Database: An enhanced, curated and annotated resource for published quantitative kinetic models. BMC Syst Biol., 4:92.
  // biomodels.db:MODEL1006230064
  // isDescribedBy pubmed:18509469
  // biomodels.db:MODEL1006230064
  // isDescribedBy pubmed:18509469
  // biomodels.db:MODEL1006230064
  // biomodels.db:MODEL1006230064

  // Compartments:
  compartment COMpartment = 1 litre;

  // Parameters:
  NO = 0;
  O_2 = 35;
  NO_2 = 0;
  CcOX = 0.1;
  O_2m = 0;
  SOD = 10;
  ONOO_m = 0;
  GPX = 5.8;
  CO_2 = 1000;
  Cyt_c = 400;
  GSH = 10000;
  GSNO = 0;
  N2O3 = 0;
  FeLn = 0.05;
  k_1NO = 1;
  k_2NO = 0.1;
  k_4NO = 6700;
  k_5NO = 2400;
  k_6NO = 0.00135;
  k_7NO = 2;
  k_8NO = 0.058;
  k_9NO = 0.025;
  k_10NO = 0.0006;
  k_11NO = 66;
  k_12aNO = 6e-6;
  k_12bNOm = 81000;
  k_12bNOp = 1100;
  k_13NO = 1600;
  v_m = 320;
  k_m = 50;
  k_14NO = 0.0002;
  k_15NO = 100;
  k_16NO = 1.21;
  k_17NO = 66;
  k_17bNO = 0.0002;
  FeLn_0 = 0.05;
  GSH_0 = 10000;

  // Assignment rules:
  r_1NO := k_1NO;
  r_4NO := k_4NO*NO*O_2m;
  r_12aNO := k_12aNO*NO^2*O_2;
  r_12bNOp := k_12bNOp*NO_2*NO;
  r_12bNOm := k_12bNOm*N2O3;
  r_14NO := k_14NO*GSNO;
  r_15NO := k_15NO*CcOX*NO;
  r_16NO := k_16NO*FeLn*NO;
  r_2NO := k_2NO;
  r_5NO := k_5NO*SOD*O_2m;
  r_10NO := k_10NO*GSNO^2*O_2m;
  r_6NO := k_6NO*ONOO_m*GSH;
  r_7NO := k_7NO*ONOO_m*GPX;
  r_8NO := k_8NO*ONOO_m*CO_2;
  r_9NO := k_9NO*ONOO_m*Cyt_c;
  FeLnNO := FeLn_0 - FeLn;
  GSSG := (GSH_0 - GSH - GSNO)/2;
  r_11NO := k_11NO*N2O3*GSH;
  r_m := v_m*GSSG/(k_m + GSSG);
  r_17NO := k_17NO*FeLnNO*GSH;
  r_13NO := k_13NO*N2O3;

  // Rate rules:
  NO' = r_1NO - r_4NO - 2*r_12aNO - r_12bNOp + r_12bNOm + r_14NO - r_15NO - r_16NO;
  CcOX' = -r_15NO;
  NO_2' = 2*r_12aNO - r_12bNOp + r_12bNOm;
  O_2m' = r_2NO - r_4NO - r_5NO - r_10NO;
  ONOO_m' = r_4NO - r_6NO - r_7NO - r_8NO - r_9NO;
  GSH' = -r_6NO - r_11NO + 2*r_m - r_17NO;
  GSNO' = r_6NO - 2*r_10NO + r_11NO - r_14NO + r_17NO;
  N2O3' = -r_11NO + r_12bNOp - r_12bNOm - r_13NO;
  FeLn' = -r_16NO + r_17NO;

  // Unit definitions:
  unit micromolar = 1e-6 mole / litre;
  unit first_order_rate_constant = 1 / second;
  unit second_order_rate_constant = litre / (second * 1e-6 mole);
  unit flux = 1e-6 mole / (litre * second);
  unit rate2 = litre^2 / ((1e-6 mole)^2 * second);
end
