// SBML level 2 version 4

model Aslanidi2009_caninePVJ()
  // This a model from the article:
  // Optimal velocity and safety of discontinuous conduction through the heterogeneous Purkinje-ventricular junction.
  // Aslanidi OV, Stewart P, Boyett MR, Zhang H. Biophys J 2009 Jul 8;97(1):20-39 19580741 ,
  // Abstract:
  // Slow and discontinuous wave conduction through nonuniform junctions in cardiac tissues is generally considered unsafe and proarrythmogenic. However, the relationships between tissue structure, wave conduction velocity, and safety at such junctions are unknown. We have developed a structurally and electrophysiologically detailed model of the canine Purkinje-ventricular junction (PVJ) and varied its heterogeneity parameters to determine such relationships. We show that neither very fast nor very slow conduction is safe, and there exists an optimal velocity that provides the maximum safety factor for conduction through the junction. The resultant conduction time delay across the PVJ is a natural consequence of the electrophysiological and morphological differences between the Purkinje fiber and ventricular tissue. The delay allows the PVJ to accumulate and pass sufficient charge to excite the adjacent ventricular tissue, but is not long enough for the source-to-load mismatch at the junction to be enhanced over time. The observed relationships between the conduction velocity and safety factor can provide new insights into optimal conditions for wave propagation through nonuniform junctions between various cardiac tissues.
  // This model was taken from the CellML repository and automatically converted to SBML.
  // The original model was: Aslanidi OV, Stewart P, Boyett MR, Zhang H. (2009) - version=1.0
  // The original CellML model was created by:
  // Catherine Lloyd
  // c.lloyd@auckland.ac.nz
  // The University of Auckland
  // This model originates from BioModels Database: A Database of Annotated Published Models (http://www.ebi.ac.uk/biomodels/). It is copyright (c) 2005-2011 The BioModels.net Team.
  // To the extent possible under law, all copyright and related or neighbouring rights to this encoded model have been dedicated to the public domain worldwide. Please refer to CC0 Public Domain Dedication for more information.
  // In summary, you are entitled to use this encoded model in absolutely any manner you deem suitable, verbatim, or with modification, alone or embedded it in a larger context, redistribute it, commercially or not, in a restricted way or not..
  // To cite BioModels Database, please use: Li C, Donizelli M, Rodriguez N, Dharuri H, Endler L, Chelliah V, Li L, He E, Henry A, Stefan MI, Snoep JL, Hucka M, Le Novère N, Laibe C (2010) BioModels Database: An enhanced, curated and annotated resource for published quantitative kinetic models. BMC Syst Biol., 4:92.
  // biomodels.db:MODEL1006230065
  // isDescribedBy pubmed:19580741
  // biomodels.db:MODEL1006230065
  // isDescribedBy pubmed:19580741
  // biomodels.db:MODEL1006230065
  // biomodels.db:MODEL1006230065

  // Compartments:
  compartment COMpartment = 1 litre;

  // Parameters:
  V_membrane = -83.43813;
  stim_start = 0;
  stim_end = 1;
  stim_amplitude = -80;
  var E_K_equilibrium_potentials;
  r_NaK = 0.01833;
  g_Na = 8;
  m = 0.00200339;
  V_i_Na_m_gate = ;
  time_i_Na_m_gate = ;
  h = 0.9786391;
  V_i_Na_h_gate = ;
  time_i_Na_h_gate = ;
  j = 0.09866447;
  V_i_Na_j_gate = ;
  time_i_Na_j_gate = ;
  g_Na_L = 0.037375;
  m_L = 0.00200339;
  V_i_Na_L_m_L_gate = ;
  time_i_Na_L_m_L_gate = ;
  h_L = 0.8946968;
  V_i_Na_L_h_L_gate = ;
  time_i_Na_L_h_L_gate = ;
  var i_Ca_L_i_Ca_L;
  g_Ca_L = 0.3392328;
  p_Ca = 0.000243;
  d = 2.322224e-6;
  V_i_Ca_L_d_gate = ;
  time_i_Ca_L_d_gate = ;
  f = 0.9985607;
  V_i_Ca_L_f_gate = ;
  time_i_Ca_L_f_gate = ;
  f2 = 0.8173435;
  V_i_Ca_L_f2_gate = ;
  time_i_Ca_L_f2_gate = ;
  f_Ca = 0.9610551;
  Ca_r_i_Ca_L_f_Ca_gate = ;
  Ca_MK_act_i_Ca_L_f_Ca_gate = ;
  km_Ca_MK_i_Ca_L_f_Ca_gate = ;
  time_i_Ca_L_f_Ca_gate = ;
  f_Ca2 = 0.8686908;
  time_i_Ca_L_f_Ca2_gate = ;
  g_Ca_T = 0.13;
  b = 0.0002563938;
  V_i_Ca_T_b_gate = ;
  time_i_Ca_T_b_gate = ;
  g = 0.9720433;
  V_i_Ca_T_g_gate = ;
  time_i_Ca_T_g_gate = ;
  g_to_1 = 0.14135944;
  a_i_to_1_a_gate = 0.0004238729;
  var tau_a_i_to_1_a_gate;
  var a_infinity_i_to_1_a_gate;
  V_i_to_1_a_gate = ;
  time_i_to_1_a_gate = ;
  i = 0.9990936;
  V_i_to_1_i_gate = ;
  time_i_to_1_i_gate = ;
  i2 = 0.9777368;
  V_i_to_1_i2_gate = ;
  time_i_to_1_i2_gate = ;
  xr = 0.07084939;
  V_i_Kr_xr_gate = ;
  time_i_Kr_xr_gate = ;
  xs1 = 0.001173765;
  V_i_Ks_xs1_gate = ;
  time_i_Ks_xs1_gate = ;
  xs2 = 0.001179443;
  V_i_Ks_xs2_gate = ;
  time_i_Ks_xs2_gate = ;
  V_i_K1_xK1_gate = ;
  E_K_i_K1_xK1_gate = ;
  g_K_p = 0.00276;
  p_Cl = 4e-7;
  z_Cl = -1;
  a_i_to_2_a_gate = 0.001490944;
  var a_infinity_i_to_2_a_gate;
  var tau_a_i_to_2_a_gate;
  km_to_2 = 0.1502;
  Ca_r_i_to_2_a_gate = ;
  time_i_to_2_a_gate = ;
  X_NaCa = 0.4;
  i_NaCa_max = 4.5;
  km_Na_i_1 = 12.3;
  km_Na_o = 87.5;
  km_Ca_i = 0.0036;
  km_Ca_o = 1.3;
  km_Ca_act = 0.000125;
  k_sat = 0.27;
  g_NaK = 0.61875;
  km_Na_i_2 = 10;
  km_K_o = 1.5;
  i_Ca_p_max = 0.0575;
  km_Ca_p = 0.0005;
  CT_K_Cl_max = 7.0756e-6;
  CT_Na_Cl_max = 9.8443e-6;
  g_Na_b = 0.0025;
  g_K_b = 0.005;
  p_Ca_b = 1.995084e-7;
  g_Cl_b = 0.000225;
  Na_i = 9.927156;
  Cl_i = 18.90468;
  K_i = 141.9671;
  Ca_i = 0.0002235543;
  km_TRPN = 0.0005;
  km_CMDN = 0.00238;
  TRPN_max = 0.07;
  CMDN_max = 0.05;
  var Ca_MK_act_Ca_MK_act;
  km_Ca_MK_Ca_MK_act = 0.15;
  Ca_MK_trap = 8.789168e-6;
  alpha_Ca_MK = 0.05;
  beta_Ca_MK = 0.00068;
  Ca_MK_0 = 0.05;
  Ca_NSR = 1.213252;
  Ca_JSR_Ca_JSR = 1.143305;
  CSQN_max = 10;
  km_CSQN = 0.8;
  Ca_r_Ca_r = 0.0002241812;
  km_b_SR = 0.00087;
  km_b_SL = 0.0087;
  b_SR_max = 0.047;
  b_SL_max = 1.124;
  tau_ss = 0.2;
  ri = 0.780287;
  tau_Ca_MK_max = 10;
  Ca_r_q_rel_ri_gate = ;
  Ca_MK_act_q_rel_ri_gate = ;
  km_Ca_MK_q_rel_ri_gate = ;
  i_Ca_L_q_rel_ri_gate = ;
  time_q_rel_ri_gate = ;
  ro = 1.278573e-9;
  tau_ro = 3;
  Ca_r_q_rel_ro_gate = ;
  Ca_JSR_q_rel_ro_gate = ;
  i_Ca_L_q_rel_ro_gate = ;
  time_q_rel_ro_gate = ;
  q_leak_max = 0.004375;
  NSR_max = 15;
  X_q_up = 0.5;
  q_up_max = 0.004375;
  dq_up_Ca_MK_max = 0.75;
  dkm_plb_max = 0.00017;
  km_up = 0.00092;
  tau_tr = 120;
  Na_o = 140;
  Ca_o = 1.8;
  K_o = 5.4;
  Cl_o = 100;
  R = 8314;
  T = 310;
  F = 96485;
  z_Ca = 2;
  gamma_Cai = 1;
  gamma_Cao = 0.341;
  Vol_cell = 0.3454;
  radius = 0.0011;
  length = 0.01;
  rcg = 2;
  Cm = 1;

  // Assignment rules:
  i_stim := piecewise(stim_amplitude, (time >= stim_start) && (time <= stim_end), 0);
  i_Ca_T := g_Ca_T*b*g*(V_membrane - 50);
  i_to_1 := g_to_1*a_i_to_1_a_gate*(0.8*i + 0.2*i2)*(V_membrane - E_K_equilibrium_potentials);
  E_Na := R*T/F*ln(Na_o/Na_i);
  E_K_equilibrium_potentials := R*T/F*ln(K_o/K_i);
  E_Ca := R*T/(2*F)*ln(Ca_o/Ca_i);
  E_Cl := -R*T/F*ln(Cl_o/Cl_i);
  E_Ks := R*T/F*ln((K_o + r_NaK*Na_o)/(K_i + r_NaK*Na_i));
  i_Na := g_Na*m^3*(0.8*h + 0.2*j)*(V_membrane - E_Na);
  alpha_m := 0.32*(V_i_Na_m_gate + 47.13)/(1 - exp(-0.1*(V_i_Na_m_gate + 47.13)));
  beta_m := 0.08*exp(-V_i_Na_m_gate/11);
  m_infinity := alpha_m/(alpha_m + beta_m);
  tau_m := 1/(alpha_m + beta_m);
  alpha_h := piecewise(0.135*exp((V_i_Na_h_gate + 80)/(-6.8)), V_i_Na_h_gate < -40, 0);
  beta_h := piecewise(3.56*exp(0.079*V_i_Na_h_gate) + 310000*exp(0.35*V_i_Na_h_gate), V_i_Na_h_gate < -40, 1/(0.13*(1 + exp((V_i_Na_h_gate + 10.66)/(-11.1)))));
  h_infinity := alpha_h/(alpha_h + beta_h);
  tau_h := 1/(alpha_h + beta_h);
  alpha_j := piecewise((-127140*exp(0.2444*V_i_Na_j_gate) - 3.474e-5*exp(-0.04391*V_i_Na_j_gate))*(V_i_Na_j_gate + 37.78)/(1 + exp(0.311*(V_i_Na_j_gate + 79.23))), V_i_Na_j_gate < -40, 0);
  beta_j := piecewise(0.1212*exp(-0.01052*V_i_Na_j_gate)/(1 + exp(-0.1378*(V_i_Na_j_gate + 40.14))), V_i_Na_j_gate < -40, 0.3*exp(-2.535e-7*V_i_Na_j_gate)/(1 + exp(-0.1*(V_i_Na_j_gate + 32))));
  j_infinity := 0.1*alpha_j/(alpha_j + beta_j);
  tau_j := 0.1/(alpha_j + beta_j);
  i_Na_L := g_Na_L*m_L^3*h_L*(V_membrane - E_Na);
  alpha_m_L := 0.32*(V_i_Na_L_m_L_gate + 47.13)/(1 - exp(-0.1*(V_i_Na_L_m_L_gate + 47.13)));
  beta_m_L := 0.08*exp(-V_i_Na_L_m_L_gate/11);
  m_L_infinity := alpha_m_L/(alpha_m_L + beta_m_L);
  tau_m_L := 1/(alpha_m_L + beta_m_L);
  h_L_infinity := 1/(1 + exp((V_i_Na_L_h_L_gate + 69)/6.1));
  tau_h_L := 175 + 125/(1 + exp(-(V_i_Na_L_h_L_gate + 25)/6));
  i_Ca_L_i_Ca_L := g_Ca_L*d*f*f2*f_Ca*f_Ca2*i_Ca_L_max;
  i_Ca_L_max := 1*p_Ca/Cm*z_Ca^2*(V_membrane - 15)*F^2/(R*T)*(gamma_Cai*Ca_r_Ca_r*exp(z_Ca*F*(V_membrane - 15)/(R*T)) - gamma_Cao*Ca_o)/(exp(z_Ca*F*(V_membrane - 15)/(R*T)) - 1);
  d_infinity := 1/(1 + exp(-(V_i_Ca_L_d_gate - 4)/6.74));
  tau_d := 0.59 + 0.8*exp(0.052*(V_i_Ca_L_d_gate + 13))/(1 + exp(0.132*(V_i_Ca_L_d_gate + 13)));
  f_infinity := 1/(1 + exp((V_i_Ca_L_f_gate + 18)/10));
  tau_f := 4 + 0.005*(V_i_Ca_L_f_gate - 2.5)^2;
  f2_infinity := 1/(1 + exp((V_i_Ca_L_f2_gate + 18)/10));
  tau_f2 := 38 + 0.07*(V_i_Ca_L_f2_gate - 18.6)^2;
  f_Ca_infinity := 0.3/(1 - i_Ca_L_i_Ca_L/0.05) + 0.55/(1 + Ca_r_i_Ca_L_f_Ca_gate/0.003) + 0.15;
  tau_f_Ca := 0.5 + 10*1*Ca_MK_act_i_Ca_L_f_Ca_gate/(1*Ca_MK_act_i_Ca_L_f_Ca_gate + km_Ca_MK_i_Ca_L_f_Ca_gate) + 1/(1 + Ca_r_i_Ca_L_f_Ca_gate/0.003);
  f_Ca2_infinity := 1/(1 - i_Ca_L_i_Ca_L/0.01);
  tau_f_Ca2 := 125 + 300/(1 + exp((-i_Ca_L_i_Ca_L - 0.175)/0.04));
  alpha_b := 1.068*exp((V_i_Ca_T_b_gate + 16.3)/30);
  beta_b := 1.068*exp(-(V_i_Ca_T_b_gate + 16.3)/30);
  b_infinity := 1/(1 + exp(-(V_i_Ca_T_b_gate + 33)/6.1));
  tau_b := 1/(alpha_b + beta_b);
  alpha_g := 0.015*exp(-(V_i_Ca_T_g_gate + 71.7)/83.3);
  beta_g := 0.015*exp((V_i_Ca_T_g_gate + 71.7)/15.4);
  g_infinity := 1/(1 + exp((V_i_Ca_T_g_gate + 60)/6.6));
  tau_g := 1/(alpha_g + beta_g);
  alpha_a := 25*exp((V_i_to_1_a_gate - 76)/20)/(1 + exp((V_i_to_1_a_gate - 76)/20));
  beta_a := 25*exp(-(V_i_to_1_a_gate + 54)/20)/(1 + exp(-(V_i_to_1_a_gate + 54)/20));
  tau_a_i_to_1_a_gate := 1/(alpha_a + beta_a);
  a_infinity_i_to_1_a_gate := alpha_a/(alpha_a + beta_a);
  alpha_i := 0.03/(1 + exp((V_i_to_1_i_gate + 25)/15));
  beta_i := 0.1*exp((V_i_to_1_i_gate - 40)/15)/(1 + exp((V_i_to_1_i_gate - 40)/15));
  tau_i := 6 + 5/(1 + exp((V_i_to_1_i_gate - 16.5)/10));
  i_infinity := alpha_i/(alpha_i + beta_i);
  alpha_i2 := 0.00442/(1 + exp((V_i_to_1_i2_gate + 26)/15));
  beta_i2 := 0.05*exp((V_i_to_1_i2_gate - 10)/15)/(1 + exp((V_i_to_1_i2_gate - 10)/15));
  tau_i2 := 21.5 + 30/(1 + exp((V_i_to_1_i2_gate - 25)/10));
  i2_infinity := alpha_i2/(alpha_i2 + beta_i2);
  i_Kr := g_Kr*xr*rr_infinity*(V_membrane - E_K_equilibrium_potentials);
  g_Kr := 0.040008488*sqrt(K_o/5.4);
  rr_infinity := 1/(1 + exp((V_membrane - 5.4)/20.4));
  tau_xr := 900/(1 + exp(V_i_Kr_xr_gate/5)) + 100;
  xr_infinity := 1/(1 + exp(-(V_i_Kr_xr_gate + 0.085)/12.25));
  i_Ks := g_Ks*xs1*xs2*(V_membrane - E_Ks);
  g_Ks := 0.052581329*(1 + 0.6/(1 + (3.8e-5/Ca_i)^1.4));
  tau_xs1 := 1/(7.61e-5*(V_i_Ks_xs1_gate + 44.6)/(1 - exp(-9.97*(V_i_Ks_xs1_gate + 44.6))) + 0.00036*(V_i_Ks_xs1_gate - 0.55)/(exp(0.128*(V_i_Ks_xs1_gate - 0.55)) - 1));
  xs1_infinity := 1/(1 + exp(-(V_i_Ks_xs1_gate - 9)/13.7));
  tau_xs2 := 2*1/(7.61e-5*(V_i_Ks_xs2_gate + 44.6)/(1 - exp(-9.97*(V_i_Ks_xs2_gate + 44.6))) + 0.00036*(V_i_Ks_xs2_gate - 0.55)/(exp(0.128*(V_i_Ks_xs2_gate - 0.55)) - 1));
  xs2_infinity := 1/(1 + exp(-(V_i_Ks_xs2_gate - 9)/13.7));
  i_K1 := (g_K1*xK1 + 0.004)*(V_membrane - E_K_equilibrium_potentials);
  g_K1 := 0.25*sqrt(K_o/5.4);
  xK1 := alpha_xK1/(alpha_xK1 + beta_xK1);
  beta_xK1 := (0.49124*exp(0.08032*(V_i_K1_xK1_gate + 5.476 - E_K_i_K1_xK1_gate)) + exp(0.06175*(V_i_K1_xK1_gate - (594.31 + E_K_i_K1_xK1_gate))))/(1 + exp(-0.5143*(V_i_K1_xK1_gate + 4.753 - E_K_i_K1_xK1_gate)));
  alpha_xK1 := 1.02/(1 + exp(0.2385*(V_i_K1_xK1_gate - (E_K_i_K1_xK1_gate + 59.215))));
  i_K_p := g_K_p*kp*(V_membrane - E_K_equilibrium_potentials);
  kp := 1/(1 + exp((7.488 - V_membrane)/5.98));
  i_to_2 := 20*i_to_2_max*a_i_to_2_a_gate;
  i_to_2_max := 1*p_Cl/Cm*z_Cl^2*V_membrane*F^2/(R*T)*(Cl_i - Cl_o*exp(-z_Cl*V_membrane*F/(R*T)))/(1 - exp(-z_Cl*V_membrane*F/(R*T)));
  a_infinity_i_to_2_a_gate := 1/(1 + km_to_2/Ca_r_i_to_2_a_gate);
  tau_a_i_to_2_a_gate := 1;
  i_NaCa := (X_NaCa*i_NaCa_max*Na_i^3*Ca_o*exp(0.35*F*V_membrane/(R*T)) - 1.5*Na_o^3*Ca_i*exp(-0.65*F*V_membrane/(R*T)))/((1 + (km_Ca_act/(1.5*Ca_i))^2)*(1 + k_sat*exp(-0.65*V_membrane*F/(R*T)))*(dNaCa_1 + dNaCa_2));
  dNaCa_1 := km_Ca_o*Na_i^3 + 1.5*km_Na_o^3*Ca_i + km_Na_i_1^3*Ca_o*(1 + 1.5*Ca_i/km_Ca_i);
  dNaCa_2 := km_Ca_i*Na_o^3*(1 + Na_i/km_Na_i_1) + Na_i^3*Ca_o + 1.5*Na_o^3*Ca_i;
  i_NaK := g_NaK*f_NaK*1/(1 + (km_Na_i_2/Na_i)^2)*K_o/(K_o + km_K_o);
  f_NaK := 1/(1 + 0.1245*exp(-0.1*F*V_membrane/(R*T)) + 0.0365*sigma*exp(-F*V_membrane/(R*T)));
  sigma := 1/7*(exp(Na_o/67.3) - 1);
  i_Ca_p := i_Ca_p_max*Ca_i/(km_Ca_p + Ca_i);
  CT_K_Cl := CT_K_Cl_max*(E_K_equilibrium_potentials - E_Cl)/(E_K_equilibrium_potentials + 87.8251 - E_Cl);
  CT_Na_Cl := CT_Na_Cl_max*(E_Na - E_Cl)^4/((E_Na - E_Cl)^4 + 87.8251^4);
  i_Na_b := g_Na_b*(V_membrane - E_Na);
  i_K_b := g_K_b*(V_membrane - E_K_equilibrium_potentials);
  i_Cl_b := g_Cl_b*(V_membrane - E_Cl);
  i_Ca_b := 1*p_Ca_b/Cm*z_Ca^2*V_membrane*F^2/(R*T)*(gamma_Cai*Ca_i*exp(z_Ca*V_membrane*F/(R*T)) - gamma_Cao*Ca_o)/(exp(z_Ca*V_membrane*F/(R*T)) - 1);
  CMDN := 2*CMDN_max*Ca_i/(Ca_i + km_CMDN)^2;
  TRPN := 2*TRPN_max*Ca_i/(Ca_i + km_TRPN)^2;
  b_myo := 1/(1 + TRPN + CMDN);
  Ca_MK_act_Ca_MK_act := Ca_MK_bound + Ca_MK_trap;
  Ca_MK_bound := Ca_MK_0*(1 - Ca_MK_trap)/(1 + km_Ca_MK_Ca_MK_act/Ca_r_Ca_r);
  q_diff := (Ca_r_Ca_r - Ca_i)/tau_ss;
  b_SL := 2*b_SL_max*Ca_r_Ca_r/(Ca_r_Ca_r + km_b_SL)^2;
  b_SR := 2*b_SR_max*Ca_r_Ca_r/(Ca_r_Ca_r + km_b_SR)^2;
  Ca_r_tot := 1/(1 + b_SR + b_SL);
  q_rel := g_rel*ro*ri*(Ca_JSR_Ca_JSR - Ca_r_Ca_r);
  g_rel := 3000*vg;
  vg := 1/(1 + exp((g_Ca_L*i_Ca_L_max + 13)/5));
  tau_ri := (350 - tau_Ca_MK)/(1 + exp((Ca_r_q_rel_ri_gate - 0.003 + 0.003*Ca_fac)/0.0002)) + 3 + tau_Ca_MK;
  ri_infinity := 1/(1 + exp((Ca_r_q_rel_ri_gate - 0.0004 + 0.002*Ca_fac)/2.5e-5));
  Ca_fac := 1/(1 + exp((i_Ca_L_q_rel_ri_gate + 0.05)/0.015));
  tau_Ca_MK := tau_Ca_MK_max*1*Ca_MK_act_q_rel_ri_gate/(km_Ca_MK_q_rel_ri_gate + 1*Ca_MK_act_q_rel_ri_gate);
  ro_infinity := ro_infinity_JSR*i_Ca_L_q_rel_ro_gate^2/(i_Ca_L_q_rel_ro_gate^2 + 1);
  ro_infinity_JSR := Ca_JSR_q_rel_ro_gate^1.9/(Ca_JSR_q_rel_ro_gate^1.9 + (49.28*Ca_r_q_rel_ro_gate/(Ca_r_q_rel_ro_gate + 0.0028))^1.9);
  q_leak := q_leak_max*Ca_NSR/NSR_max;
  q_up := X_q_up*(dq_up_Ca_MK + 1)*q_up_max*Ca_i/(Ca_i + km_up - dkm_plb);
  dq_up_Ca_MK := dq_up_Ca_MK_max*Ca_MK_act_Ca_MK_act*1/(km_Ca_MK_Ca_MK_act + Ca_MK_act_Ca_MK_act*1);
  dkm_plb := dkm_plb_max*Ca_MK_act_Ca_MK_act*1/(km_Ca_MK_Ca_MK_act + Ca_MK_act_Ca_MK_act*1);
  q_tr := (Ca_NSR - Ca_JSR_Ca_JSR)/tau_tr;
  a_geo := 2*3.14*radius^2 + 2*3.14*radius*length;
  a_cap := rcg*a_geo;
  Vol_myo := Vol_cell*0.68;
  Vol_nsr := Vol_cell*0.0552;
  Vol_jsr := Vol_cell*0.0048;
  Vol_ss := Vol_cell*0.02;
  i_tot := i_Na + i_Na_L + i_Ca_L_i_Ca_L + i_Ca_T + i_to_1 + i_to_2 + i_Kr + i_Ks + i_K1 + i_NaCa + i_NaK + i_Na_b + i_K_b + i_Ca_b + i_Cl_b + i_Ca_p + i_K_p;

  // Rate rules:
  V_membrane' = -(i_tot + i_stim);
  m' = (m_infinity - m)/tau_m;
  h' = (h_infinity - h)/tau_h;
  j' = (j_infinity - j)/tau_j;
  m_L' = (m_L_infinity - m_L)/tau_m_L;
  h_L' = (h_L_infinity - h_L)/tau_h_L;
  d' = (d_infinity - d)/tau_d;
  f' = (f_infinity - f)/tau_f;
  f2' = (f2_infinity - f2)/tau_f2;
  f_Ca' = (f_Ca_infinity - f_Ca)/tau_f_Ca;
  f_Ca2' = (f_Ca2_infinity - f_Ca2)/tau_f_Ca2;
  b' = (b_infinity - b)/tau_b;
  g' = (g_infinity - g)/tau_g;
  a_i_to_1_a_gate' = (a_infinity_i_to_1_a_gate - a_i_to_1_a_gate)/tau_a_i_to_1_a_gate;
  i' = (i_infinity - i)/tau_i;
  i2' = (i2_infinity - i2)/tau_i2;
  xr' = (xr_infinity - xr)/tau_xr;
  xs1' = (xs1_infinity - xs1)/tau_xs1;
  xs2' = (xs2_infinity - xs2)/tau_xs2;
  a_i_to_2_a_gate' = (a_infinity_i_to_2_a_gate - a_i_to_2_a_gate)/tau_a_i_to_2_a_gate;
  Na_i' = -Cm*(i_Na + i_Na_L + i_Na_b + 3*i_NaK + 3*i_NaCa)*a_cap/(Vol_myo*F) + CT_Na_Cl;
  K_i' = -Cm*(i_to_1 + i_K1 + i_Kr + i_Ks + i_K_p + i_K_b - 2*i_NaK)*a_cap/(Vol_myo*F) + CT_K_Cl;
  Cl_i' = -Cm*(i_to_2 + i_Cl_b)*a_cap/(Vol_myo*F) + CT_Na_Cl + CT_K_Cl;
  Ca_i' = -b_myo*(Cm*(i_Ca_b + i_Ca_p - 2*i_NaCa)*a_cap/(2*Vol_myo*F) + (q_up - q_leak)*Vol_nsr/Vol_myo - q_diff*Vol_ss/Vol_myo);
  Ca_MK_trap' = alpha_Ca_MK*Ca_MK_bound*(Ca_MK_bound + Ca_MK_trap) - beta_Ca_MK*Ca_MK_trap;
  Ca_NSR' = q_up - (q_leak + q_tr*Vol_jsr/Vol_nsr);
  Ca_JSR_Ca_JSR' = (q_tr - q_rel)/(1 + CSQN_max*km_CSQN/(km_CSQN + Ca_JSR_Ca_JSR)^2);
  Ca_r_Ca_r' = Ca_r_tot*(-Cm*i_Ca_L_i_Ca_L*a_cap/(Vol_ss*z_Ca*F) + q_rel*Vol_jsr/Vol_ss - q_diff);
  ri' = (ri_infinity - ri)/tau_ri;
  ro' = (ro_infinity - ro)/tau_ro;

  // Unit definitions:
  unit millisecond = 1e-3 second;
  unit per_millisecond = 1 / (1e-3 second);
  unit millivolt = 1e-3 volt;
  unit per_millivolt = 1 / (1e-3 volt);
  unit per_millivolt_millisecond = 1 / (1e-3 volt * 1e-3 second);
  unit millimolar = 1e-3 mole / litre;
  unit millimolar2 = (1e-3 mole)^2 / litre^2;
  unit millimolar3 = (1e-3 mole)^3 / litre^3;
  unit millimolar4 = (1e-3 mole)^4 / litre^4;
  unit millimolar_per_millisecond = 1e-3 mole / (litre * 1e-3 second);
  unit millisecond_millimolar = 1e-3 second * 1e-3 mole / litre;
  unit millisecond_per_millivolt2 = 1e-3 second / (1e-3 volt)^2;
  unit milliS_per_microF = 1e-3 siemens / (1e-6 farad);
  unit microA_per_microF = 1e-6 ampere / (1e-6 farad);
  unit microA_per_microF_2 = (1e-6 ampere)^2 / (1e-6 farad)^2;
  unit microF = 1e-6 farad;
  unit microlitre = 1e-6 litre;
  unit cm_per_siemens = 0.01 metre / siemens;
  unit cm = 0.01 metre;
  unit cm2 = (0.01 metre)^2;
  unit cm_per_second = 0.01 metre / second;
  unit joule_per_kilomole_kelvin = joule / (1000 mole * kelvin);
  unit coulomb_per_mole = coulomb / mole;
  unit microF_per_cm2 = 1e-6 farad / (0.01 metre)^2;
  unit time = 1e-3 second;
end
