// SBML level 2 version 4

model Earm1990_CalciumDynamics_Cardiac()
  // This a model from the article:
  // A model of the single atrial cell: relation between calcium current and calcium release.
  // Earm YE, Noble D. Proc R Soc Lond B Biol Sci 1990 May 22;240(1297):83-96 1972993 ,
  // Abstract:
  // The hypothesis that calcium release from the sarcoplasmic reticulum in cardiac muscle is induced by rises in free cytosolic calcium (Fabiato 1983, Am. J. Physiol 245) allows the possibility that the release could be at least partly regenerative. There would then be a non-linear relation between calcium current and calcium release. We have investigated this possibility in a single-cell version of the rabbit-atrial model developed by Hilgemann & Noble (1987, Proc. R. Soc. Lond. B 230). The model predicts different voltage ranges of activation for calcium-dependent processes (like the sodium-calcium exchange current, contraction or Fura-2 signals) and the calcium current, in agreement with the experimental results obtained by Earm et al. (1990, Proc. R. Soc. Lond. B 240) on exchange current tails, Cannell et al. (1987, Science, Wash. 238) by using Fura-2 signals, and Fedida et al. (1987, J. Physiol., Lond. 385) and Talo et al. (1988, Biology of isolated adult cardiac myocytes) by using contraction. However, when the Fura-2 concentration is sufficiently high (greater than 200 microM) the activation ranges become very similar as the buffering properties of Fura-2 are sufficient to remove the regenerative effect. It is therefore important to allow for the buffering properties of calcium indicators when investigating the correlation between calcium current and calcium release.
  // This model was taken from the CellML repository and automatically converted to SBML.
  // The original model was: Earm YE, Noble D. (1990) - version=1.0
  // The original CellML model was created by:
  // Penny Noble
  // penny.noble@dpag.ox.ac.uk
  // The University of Oxford
  // This model originates from BioModels Database: A Database of Annotated Published Models (http://www.ebi.ac.uk/biomodels/). It is copyright (c) 2005-2011 The BioModels.net Team.
  // To the extent possible under law, all copyright and related or neighbouring rights to this encoded model have been dedicated to the public domain worldwide. Please refer to CC0 Public Domain Dedication for more information.
  // In summary, you are entitled to use this encoded model in absolutely any manner you deem suitable, verbatim, or with modification, alone or embedded it in a larger context, redistribute it, commercially or not, in a restricted way or not. .
  // To cite BioModels Database, please use: Li C, Donizelli M, Rodriguez N, Dharuri H, Endler L, Chelliah V, Li L, He E, Henry A, Stefan MI, Snoep JL, Hucka M, Le Novère N, Laibe C (2010) BioModels Database: An enhanced, curated and annotated resource for published quantitative kinetic models. BMC Syst Biol., 4:92.
  // biomodels.db:MODEL1006230070
  // isDescribedBy pubmed:1972993
  // biomodels.db:MODEL1006230070
  // isDescribedBy pubmed:1972993
  // biomodels.db:MODEL1006230070
  // biomodels.db:MODEL1006230070

  // Compartments:
  compartment COMpartment = 1 litre;

  // Parameters:
  V_membrane = -91.6;
  R = 8314.472;
  T = 310;
  F = 9.64853415e4;
  C_m = 4e-5;
  stim_start = 0.1;
  stim_end = 100000;
  stim_period = 1;
  stim_duration = 0.002;
  stim_amplitude = -1.3;
  g_Na = 0.5;
  m = 0.076;
  V_fast_sodium_current_m_gate = ;
  time_fast_sodium_current_m_gate = ;
  delta_m = 1e-5;
  h = 0.015;
  V_fast_sodium_current_h_gate = ;
  time_fast_sodium_current_h_gate = ;
  g_to = 0.01;
  g_to_s = 0;
  r = 0;
  V_transient_outward_current_r_gate = ;
  time_transient_outward_current_r_gate = ;
  s = 1;
  V_transient_outward_current_s_gate = ;
  time_transient_outward_current_s_gate = ;
  i_NaK_max = 0.14;
  K_mK = 1;
  K_mNa = 40;
  g_b_Na = 0.00012;
  g_b_Ca = 5e-5;
  k_NaCa = 0.0001;
  n_NaCa = 3;
  d_NaCa = 0.0001;
  gamma = 0.5;
  g_b_K = 0.0017;
  g_K1 = 0.017;
  K_m_K1 = 10;
  P_Ca_L = 0.05;
  d = 0.0011;
  V_L_type_calcium_current_d_gate = ;
  time_L_type_calcium_current_d_gate = ;
  f_Ca = 0.785;
  V_L_type_calcium_current_f_Ca_gate = ;
  time_L_type_calcium_current_f_Ca_gate = ;
  Ca_i_L_type_calcium_current_f_Ca_gate = ;
  K_cyca = 0.0003;
  K_xcs = 0.4;
  K_srca = 0.5;
  alpha_up = 3;
  beta_up = 0.23;
  K_leak_rate = 0;
  K_m_rel = 250;
  ActFrac = 0;
  ProdFrac = 0;
  ProdFracRate = 1;
  alpha_tr = 50;
  Na_o = 140;
  Na_i = 6.48;
  Ca_o = 2;
  K_c = 4;
  K_i = 140;
  Ca_i_intracellular_calcium_concentration = 1e-5;
  Ca_up = 0.3;
  Ca_rel = 0.3;
  Ca_Calmod = 0.0005;
  Ca_Trop = 0.0015;
  Calmod = 0.02;
  Trop = 0.15;
  alpha_Calmod = 100000;
  beta_Calmod = 50;
  alpha_Trop = 100000;
  beta_Trop = 200;
  radius = 0.01;
  length = 0.08;
  V_rel_ratio = 0.1;
  V_e_ratio = 0.4;
  V_up_ratio = 0.01;

  // Assignment rules:
  RTONF := R*T/F;
  i_Stim := piecewise(stim_amplitude, (time >= stim_start) && (time <= stim_end) && (time - stim_start - floor((time - stim_start)/stim_period)*stim_period <= stim_duration), 0);
  E_mh := RTONF*ln((Na_o + 0.12*K_c)/(Na_i + 0.12*K_i));
  i_Na := g_Na*m^3*h*(V_membrane - E_mh);
  E0_m := V_fast_sodium_current_m_gate + 41;
  alpha_m := piecewise(2000, abs(E0_m) < delta_m, 200*E0_m/(1 - exp(-0.1*E0_m)));
  beta_m := 8000*exp(-0.056*(V_fast_sodium_current_m_gate + 66));
  alpha_h := 20*exp(-0.125*(V_fast_sodium_current_h_gate + 75));
  beta_h := 2000/(1 + 320*exp(-0.1*(V_fast_sodium_current_h_gate + 75)));
  E_K := RTONF*ln(K_c/K_i);
  i_to := g_to*(g_to_s + s*(1 - g_to_s))*r*(V_membrane - E_K);
  alpha_s := 0.033*exp(-V_transient_outward_current_s_gate/17);
  beta_s := 33/(1 + exp(-0.125*(V_transient_outward_current_s_gate + 10)));
  i_NaK := i_NaK_max*K_c/(K_mK + K_c)*Na_i/(K_mNa + Na_i);
  E_Na := RTONF*ln(Na_o/Na_i);
  i_b_Na := g_b_Na*(V_membrane - E_Na);
  E_Ca := 0.5*RTONF*ln(Ca_o/Ca_i_intracellular_calcium_concentration);
  i_b_Ca := g_b_Ca*(V_membrane - E_Ca);
  i_NaCa := k_NaCa*(exp(gamma*(n_NaCa - 2)*V_membrane/RTONF)*Na_i^n_NaCa*Ca_o - exp((gamma - 1)*(n_NaCa - 2)*V_membrane/RTONF)*Na_o^n_NaCa*Ca_i_intracellular_calcium_concentration)/((1 + d_NaCa*(Ca_i_intracellular_calcium_concentration*Na_o^n_NaCa + Ca_o*Na_i^n_NaCa))*(1 + Ca_i_intracellular_calcium_concentration/0.0069));
  i_b_K := g_b_K*(V_membrane - E_K);
  i_K1 := g_K1*K_c/(K_c + K_m_K1)*(V_membrane - E_K)/(1 + exp((V_membrane - E_K - 10)*2/RTONF));
  i_Ca_L := i_Ca_L_Ca + i_Ca_L_K + i_Ca_L_Na;
  i_Ca_L_Ca := 4*P_Ca_L*d*CaChon*(V_membrane - 50)/RTONF/(1 - exp(-(V_membrane - 50)*2/RTONF))*(Ca_i_intracellular_calcium_concentration*exp(100/RTONF) - Ca_o*exp(-(V_membrane - 50)*2/RTONF));
  i_Ca_L_K := 0.002*P_Ca_L*d*CaChon*(V_membrane - 50)/RTONF/(1 - exp(-(V_membrane - 50)/RTONF))*(K_i*exp(50/RTONF) - K_c*exp(-(V_membrane - 50)/RTONF));
  i_Ca_L_Na := 0.01*P_Ca_L*d*CaChon*(V_membrane - 50)/RTONF/(1 - exp(-(V_membrane - 50)/RTONF))*(Na_i*exp(50/RTONF) - Na_o*exp(-(V_membrane - 50)/RTONF));
  E0_d := V_L_type_calcium_current_d_gate + 19;
  alpha_d := piecewise(120, abs(E0_d) < 0.0001, 30*E0_d/(1 - exp(-E0_d/4)));
  beta_d := piecewise(120, abs(E0_d) < 0.0001, 12*E0_d/(exp(E0_d/10) - 1));
  E0_f := V_L_type_calcium_current_f_Ca_gate + 34;
  alpha_f_Ca := piecewise(25, abs(E0_f) < 0.0001, 6.25*E0_f/(exp(E0_f/4) - 1));
  beta_f_Ca := 12/(1 + exp(-E0_f/4));
  CaChoff := Ca_i_L_type_calcium_current_f_Ca_gate/(0.001 + Ca_i_L_type_calcium_current_f_Ca_gate);
  CaChon := (1 - f_Ca)*(1 - CaChoff);
  K_1 := K_cyca*K_xcs/K_srca;
  K_2 := Ca_i_intracellular_calcium_concentration + Ca_up*K_1 + K_cyca*K_xcs + K_cyca;
  i_up := Ca_i_intracellular_calcium_concentration/K_2*alpha_up - Ca_up*K_1/K_2*beta_up;
  PrecFrac := 1 - ActFrac - ProdFrac;
  VoltDep := exp(0.08*(V_membrane - 40));
  RegBindSite := (Ca_i_intracellular_calcium_concentration/(Ca_i_intracellular_calcium_concentration + 0.0005))^2;
  ActRate := 600*VoltDep + 500*RegBindSite;
  InactRate := 60 + 500*RegBindSite;
  i_rel := ((ActFrac/(ActFrac + 0.25))^2*K_m_rel + K_leak_rate)*Ca_rel;
  i_trans := (Ca_up - Ca_rel)*alpha_tr;
  V_Cell := 3.141593*radius^2*length;
  V_i_ratio := 1 - V_e_ratio - V_up_ratio - V_rel_ratio;
  V_i := V_Cell*V_i_ratio;

  // Rate rules:
  V_membrane' = -1/C_m*(i_Stim + i_b_K + i_K1 + i_to + i_b_Na + i_b_Ca + i_NaK + i_NaCa + i_Na + i_Ca_L);
  m' = alpha_m*(1 - m) - beta_m*m;
  h' = alpha_h*(1 - h) - beta_h*h;
  r' = 333*(1/(1 + exp(-(V_transient_outward_current_r_gate + 4)/5)) - r);
  s' = alpha_s*(1 - s) - beta_s*s;
  d' = alpha_d*(1 - d) - beta_d*d;
  f_Ca' = (120*(1 - f_Ca)*CaChoff + (1 - f_Ca)*(1 - CaChoff))*beta_f_Ca - alpha_f_Ca*f_Ca;
  ActFrac' = PrecFrac*ActRate - ActFrac*InactRate;
  ProdFrac' = ActFrac*InactRate - ProdFracRate*ProdFrac;
  Na_i' = -1/(1*V_i*F)*(i_Na + i_b_Na + 3*i_NaK + 3*i_NaCa + i_Ca_L_Na);
  K_i' = -1/(1*V_i*F)*(i_K1 + i_Ca_L_K + i_to + i_b_K - 2*i_NaK);
  Ca_i_intracellular_calcium_concentration' = -1/(2*1*V_i*F)*(i_Ca_L_Ca + i_b_Ca - 2*i_NaCa) + i_rel*V_rel_ratio/V_i_ratio - Ca_Calmod - Ca_Trop - i_up;
  Ca_up' = V_i_ratio/V_up_ratio*i_up - i_trans;
  Ca_rel' = V_up_ratio/V_rel_ratio*i_trans - i_rel;
  Ca_Calmod' = alpha_Calmod*Ca_i_intracellular_calcium_concentration*(Calmod - Ca_Calmod) - beta_Calmod*Ca_Calmod;
  Ca_Trop' = alpha_Trop*Ca_i_intracellular_calcium_concentration*(Trop - Ca_Trop) - beta_Trop*Ca_Trop;

  // Unit definitions:
  unit per_second = 1 / second;
  unit millivolt = 1e-3 volt;
  unit per_millivolt = 1 / (1e-3 volt);
  unit per_millivolt_second = 1 / (1e-3 volt * second);
  unit microS = 1e-6 siemens;
  unit microF = 1e-6 farad;
  unit nanoA = 1e-9 ampere;
  unit millimolar = 1e-3 mole / litre;
  unit millimolar4 = (1e-3 mole)^4 / litre^4;
  unit nanoA_per_millimolar = 1e-9 ampere * litre / (1e-3 mole);
  unit millimolar_per_second = 1e-3 mole / (litre * second);
  unit per_millimolar_second = litre / (1e-3 mole * second);
  unit micrometre = 1e-6 metre;
  unit joule_per_kilomole_kelvin = joule / (1000 mole * kelvin);
  unit coulomb_per_mole = coulomb / mole;
  unit micrometre3 = (1e-6 metre)^3;
  unit litre_micrometre3 = litre / (1e-6 metre)^3;
end
