// SBML level 2 version 4

model Bertram2004_PancreaticBetaCell_modelA()
  // This a model from the article:
  // Calcium and glycolysis mediate multiple bursting modes in pancreatic islets.
  // Bertram R, Satin L, Zhang M, Smolen P, Sherman A. Biophys J 2004 Nov;87(5):3074-87 15347584 ,
  // Abstract:
  // Pancreatic islets of Langerhans produce bursts of electrical activity when exposed to stimulatory glucose levels. These bursts often have a regular repeating pattern, with a period of 10-60 s. In some cases, however, the bursts are episodic, clustered into bursts of bursts, which we call compound bursting. Consistent with this are recordings of free Ca2+ concentration, oxygen consumption, mitochondrial membrane potential, and intraislet glucose levels that exhibit very slow oscillations, with faster oscillations superimposed. We describe a new mathematical model of the pancreatic beta-cell that can account for these multimodal patterns. The model includes the feedback of cytosolic Ca2+ onto ion channels that can account for bursting, and a metabolic subsystem that is capable of producing slow oscillations driven by oscillations in glycolysis. This slow rhythm is responsible for the slow mode of compound bursting in the model. We also show that it is possible for glycolytic oscillations alone to drive a very slow form of bursting, which we call "glycolytic bursting." Finally, the model predicts that there is bistability between stationary and oscillatory glycolysis for a range of parameter values. We provide experimental support for this model prediction. Overall, the model can account for a diversity of islet behaviors described in the literature over the past 20 years.
  // This model was taken from the CellML repository and automatically converted to SBML.
  // The original model was: Bertram R, Satin L, Zhang M, Smolen P, Sherman A. (2004) - version=1.0
  // The original CellML model was created by:
  // Catherine Lloyd
  // c.lloyd@auckland.ac.nz
  // The University of Auckland
  // This model originates from BioModels Database: A Database of Annotated Published Models (http://www.ebi.ac.uk/biomodels/). It is copyright (c) 2005-2011 The BioModels.net Team.
  // To the extent possible under law, all copyright and related or neighbouring rights to this encoded model have been dedicated to the public domain worldwide. Please refer to CC0 Public Domain Dedication for more information.
  // In summary, you are entitled to use this encoded model in absolutely any manner you deem suitable, verbatim, or with modification, alone or embedded it in a larger context, redistribute it, commercially or not, in a restricted way or not..
  // To cite BioModels Database, please use: Li C, Donizelli M, Rodriguez N, Dharuri H, Endler L, Chelliah V, Li L, He E, Henry A, Stefan MI, Snoep JL, Hucka M, Le Novère N, Laibe C (2010) BioModels Database: An enhanced, curated and annotated resource for published quantitative kinetic models. BMC Syst Biol., 4:92.
  // biomodels.db:MODEL1006230071
  // isDescribedBy pubmed:15347584
  // biomodels.db:MODEL1006230071
  // isDescribedBy pubmed:15347584
  // biomodels.db:MODEL1006230071
  // biomodels.db:MODEL1006230071

  // Compartments:
  compartment COMpartment = 1 litre;

  // Parameters:
  V = -60;
  Cm = 5300;
  gK = 2700;
  n = 0;
  gKCa = 100;
  kd = 0.5;
  gCa = 1000;
  VCa = 25;
  taun = 20;
  c = 0.1;
  cer = 185;
  fcyt = 0.01;
  fer = 0.01;
  sigmaV = 31;
  pleak = 0.0002;
  Kserca = 0.4;
  lambdaer = 1;
  epser = 1;
  alpha = 4.5e-6;
  kpmca = 0.2;
  Rgk = 0.2;
  atot = 3000;
  pfkbas = 0.06;
  lambda = 0.005;
  g6p = 200;
  fbp = 40;
  bottom1 = 1;
  topa1 = 0;
  k1 = 30;
  k2 = 1;
  k3 = 50000;
  k4 = 1000;
  cat = 2;
  famp = 0.02;
  fatp = 20;
  ffbp = 0.2;
  fbt = 20;
  fmt = 20;
  VK = -75;
  gkatpbar = 27000;
  kdd = 17;
  ktd = 26;
  ktt = 1;
  adp = 780;
  taua = 300000;
  r1 = 0.35;
  r = 1;
  vg = 2.2;
  kg = 10;

  // Assignment rules:
  IK := gK*n*(V - VK);
  IKCa := gKCa/(1 + (kd/c)^2)*(V - VK);
  ICa := gCa*minf*(V - VCa);
  minf := 1/(1 + exp(-(20 + V)/12));
  ninf := 1/(1 + exp(-(16 + V)/5));
  Jserca := Kserca*c;
  Jleak := pleak*(cer - c);
  Jer := epser*(Jleak - Jserca)/lambdaer;
  Jmem := -(alpha*ICa + kpmca*c);
  f6p := 0.3*g6p;
  rgpdh := 0.2*sqrt(fbp/1);
  rad := sqrt((adp - atot)^2 - 4*adp^2)/1;
  atp := 0.5*(atot - adp + rad*1);
  amp := adp*adp/atp;
  weight2 := atp^2/(k4*1);
  topa2 := topa1;
  bottom2 := bottom1 + weight2;
  weight3 := f6p^2/(k3*1);
  topa3 := topa2 + weight3;
  bottom3 := bottom2 + weight3;
  weight4 := (f6p*atp)^2/(fatp*k3*k4*1^2);
  topa4 := topa3 + weight4;
  bottom4 := bottom3 + weight4;
  weight5 := fbp/k2;
  topa5 := topa4;
  bottom5 := bottom4 + weight5;
  weight6 := fbp*atp^2/(k2*k4*fbt*1);
  topa6 := topa5;
  bottom6 := bottom5 + weight6;
  weight7 := fbp*f6p^2/(k2*k3*ffbp*1);
  topa7 := topa6 + weight7;
  bottom7 := bottom6 + weight7;
  weight8 := fbp*f6p^2*atp^2/(k2*k3*k4*ffbp*fbt*fatp*1^2);
  topa8 := topa7 + weight8;
  bottom8 := bottom7 + weight8;
  weight9 := amp/k1;
  topa9 := topa8;
  bottom9 := bottom8 + weight9;
  weight10 := amp*atp^2/(k1*k4*fmt*1);
  topa10 := topa9;
  bottom10 := bottom9 + weight10;
  weight11 := amp*f6p^2/(k1*k3*famp*1);
  topa11 := topa10 + weight11;
  bottom11 := bottom10 + weight11;
  weight12 := amp*f6p^2*atp^2/(k1*k3*k4*famp*fmt*fatp*1^2);
  topa12 := topa11 + weight12;
  bottom12 := bottom11 + weight12;
  weight13 := amp*fbp/(k1*k2);
  topa13 := topa12;
  bottom13 := bottom12 + weight13;
  weight14 := amp*fbp*atp^2/(k1*k2*k4*fbt*fmt*1);
  topa14 := topa13;
  bottom14 := bottom13 + weight14;
  weight15 := amp*fbp*f6p^2/(k1*k2*k3*ffbp*famp*1);
  topa15 := topa14;
  bottom15 := bottom14 + weight15;
  topb := weight15;
  weight16 := amp*fbp*f6p^2*atp^2/(k1*k2*k3*k4*ffbp*famp*fbt*fmt*fatp*1^2);
  topa16 := topa15 + weight16;
  bottom16 := bottom15 + weight16;
  mgadp := 0.165*adp;
  adp3m := 0.135*adp;
  atp4m := 0.05*atp;
  topo := 0.08*(1 + 2*mgadp/(kdd*1)) + 0.89*(mgadp/(kdd*1))^2;
  bottomo := (1 + mgadp/(kdd*1))^2*(1 + adp3m/(ktd*1) + atp4m/(ktt*1));
  katpo := topo/bottomo;
  IKATP := gkatpbar*katpo*(V - VK);
  fback := r + y;
  y := vg*(rgpdh/(kg + rgpdh));
  ratio := atp/adp;
  pfk := 1*((pfkbas*cat*topa16 + cat*topb)/bottom16);

  // Rate rules:
  V' = -(IK + ICa + IKCa + IKATP)/Cm;
  n' = (ninf - n)/taun;
  c' = fcyt*(Jmem + Jer);
  cer' = -fer*sigmaV*Jer;
  fbp' = lambda*(pfk/1 - 0.5*rgpdh);
  g6p' = lambda*(Rgk*1 - pfk/1);
  adp' = (atp - adp*exp(fback*(1 - c/r1)))/(taua*1);

  // Unit definitions:
  unit millisecond = 1e-3 second;
  unit minute = 60 second;
  unit millivolt = 1e-3 volt;
  unit micromolar = 1e-6 mole / litre;
  unit nanoS = 1e-9 siemens;
  unit picoS = 1e-12 siemens;
  unit femtoF = 1e-15 farad;
  unit femtoA = 1e-15 ampere;
  unit per_second = 1 / second;
  unit first_order_rate_constant = 1 / (1e-3 second);
  unit micromolar_per_femtoA_millisecond = 1e-6 mole / (litre * 1e-15 ampere * 1e-3 second);
  unit flux = 1e-6 mole / (litre * second);
  unit time = 1e-3 second;
end
