// SBML level 2 version 4

model Yanagihara1980_PacemakerActivity()
  // This a model from the article:
  // Reconstruction of sino-atrial node pacemaker potential based on the voltage clamp experiments.
  // Yanagihara K, Noma A, Irisawa H. Jpn J Physiol 1980;30(6):841-57 7265560 ,
  // Abstract:
  // The pacemaker activity of the S-A node cell was explained by reconstructing the pacemaker potential using a Hodgkin-Huxley type mathematical model which was based on the reported voltage clamp data. In this model four dynamic currents, the sodium current iNa, the slow inward current, is, the potassium current, iK, and the hyperpolarization-activated current, ih, in addition to a time-dependent leak current, i1 were included. The model simulated the spontaneous action potential the current voltage relationship, and the voltage clamp experiment in normal Tyrode solution of the rabbit S-A node. Furthermore, the changes of activity induced by the potassium current blocker Ba2+, by applying constant current, acetylcholine, and epinephrine were also reconstructed. It was strongly suggested that the pacemaker depolarization in the S-A node cell is mainly due to a gradual increase of iS during diastole, and that the contribution of iK is much less compared to the potassium current iK2 in the Purkinje fiber pacemaker depolarization. The rising phase of the action potential was due to iS and the plateau phase is determined by both the inactivation of iS and activation of iK.
  // This model was taken from the CellML repository and automatically converted to SBML.
  // The original model was: Yanagihara K, Noma A, Irisawa H. (1980) - version=1.0
  // The original CellML model was created by:
  // Penny Noble
  // penny.noble@dpag.ox.ac.uk
  // The University of Oxford
  // This model originates from BioModels Database: A Database of Annotated Published Models (http://www.ebi.ac.uk/biomodels/). It is copyright (c) 2005-2011 The BioModels.net Team.
  // To the extent possible under law, all copyright and related or neighbouring rights to this encoded model have been dedicated to the public domain worldwide. Please refer to CC0 Public Domain Dedication for more information.
  // In summary, you are entitled to use this encoded model in absolutely any manner you deem suitable, verbatim, or with modification, alone or embedded it in a larger context, redistribute it, commercially or not, in a restricted way or not. .
  // To cite BioModels Database, please use: Li C, Donizelli M, Rodriguez N, Dharuri H, Endler L, Chelliah V, Li L, He E, Henry A, Stefan MI, Snoep JL, Hucka M, Le Novère N, Laibe C (2010) BioModels Database: An enhanced, curated and annotated resource for published quantitative kinetic models. BMC Syst Biol., 4:92.
  // biomodels.db:MODEL1006230072
  // isDescribedBy pubmed:7265560
  // biomodels.db:MODEL1006230072
  // isDescribedBy pubmed:7265560
  // biomodels.db:MODEL1006230072
  // biomodels.db:MODEL1006230072

  // Compartments:
  compartment COMpartment = 1 litre;

  // Parameters:
  V_membrane = -62.83;
  Cm = 1;
  m = 0.047938;
  V_sodium_channel_m_gate = ;
  time_sodium_channel_m_gate = ;
  h = 0.95994;
  V_sodium_channel_h_gate = ;
  time_sodium_channel_h_gate = ;
  n = 0.509494;
  V_potassium_channel_n_gate = ;
  time_potassium_channel_n_gate = ;
  d = 3.2e-5;
  V_calcium_channel_d_gate = ;
  time_calcium_channel_d_gate = ;
  f = 1;
  V_calcium_channel_f_gate = ;
  time_calcium_channel_f_gate = ;
  q = 0.010759;
  V_hyperpolarization_activated_channel_q_gate = ;
  time_hyperpolarization_activated_channel_q_gate = ;

  // Assignment rules:
  i_Na := 0.5*m^3*h*(V_membrane - 30);
  alpha_m := 1*(V_sodium_channel_m_gate + 37)/(-exp((V_sodium_channel_m_gate + 37)/(-10)) + 1);
  beta_m := 40*exp((V_sodium_channel_m_gate + 62)/(-17.8));
  alpha_h := 1.209*exp((V_sodium_channel_h_gate + 20)/(-6.534));
  beta_h := 1/(1 + exp((V_sodium_channel_h_gate + 30)/(-10)));
  i_K := 0.7*n*(exp(0.0277*(V_membrane + 90)) - 1)/exp(0.0277*(V_membrane + 40));
  alpha_n := 0.009*1/(1 + exp(-(V_potassium_channel_n_gate + 3.8)/9.71)) + 0.0006;
  beta_n := -2.25*(V_potassium_channel_n_gate + 40)/(1 - exp((V_potassium_channel_n_gate + 40)/13.3));
  i_Leak := 0.8*(1 - exp(-(V_membrane + 60)/20));
  i_s := 12.5*(0.95*d + 0.05)*(0.95*f + 0.05)*(exp((V_membrane - 10)/15) - 1);
  alpha_d := 0.0145*(V_calcium_channel_d_gate + 35)/(1 - exp(-(V_calcium_channel_d_gate + 35)/2.5)) + 0.03125*V_calcium_channel_d_gate/(1 - exp(-V_calcium_channel_d_gate/4.8));
  beta_d := -4.21*(V_calcium_channel_d_gate - 5)/(-exp((V_calcium_channel_d_gate - 5)/2.5) + 1);
  alpha_f := -3.55*(V_calcium_channel_f_gate + 20)/(-exp((V_calcium_channel_f_gate + 20)/5.633) + 1);
  beta_f := 0.000944*(V_calcium_channel_f_gate + 60)/(1 + exp(-(V_calcium_channel_f_gate + 29.5)/4.16));
  i_h := 0.4*q*(V_membrane + 45);
  alpha_q := 0.00034*(V_hyperpolarization_activated_channel_q_gate + 100)/(exp((V_hyperpolarization_activated_channel_q_gate + 100)/4.4) - 1) + 4.95e-5;
  beta_q := 0.0005*(V_hyperpolarization_activated_channel_q_gate + 40)/(1 - exp(-(V_hyperpolarization_activated_channel_q_gate + 40)/6)) + 8.45e-5;

  // Rate rules:
  V_membrane' = -(i_Na + i_K + i_Leak + i_s + i_h)/Cm;
  m' = alpha_m*(1 - m) - beta_m*m;
  h' = alpha_h*(1 - h) - beta_h*h;
  n' = alpha_n*(1 - n) - beta_n*n;
  d' = alpha_d*(1 - d) - beta_d*d;
  f' = alpha_f*(1 - f) - beta_f*f;
  q' = alpha_q*(1 - q) - beta_q*q;

  // Unit definitions:
  unit millisecond = 1e-3 second;
  unit per_second = 1 / second;
  unit per_millisecond = 1 / (1e-3 second);
  unit millivolt = 1e-3 volt;
  unit per_millivolt = 1 / (1e-3 volt);
  unit per_millivolt_second = 1 / (1e-3 volt * second);
  unit per_millivolt_millisecond = 1 / (1e-3 volt * 1e-3 second);
  unit microS = 1e-6 siemens;
  unit microF = 1e-6 farad;
  unit nanoA = 1e-9 ampere;
  unit milliS_per_cm2 = 1e-3 siemens / (0.01 metre)^2;
  unit microF_per_cm2 = 1e-6 farad / (0.01 metre)^2;
  unit microA_per_cm2 = 1e-6 ampere / (0.01 metre)^2;
  unit time = 1e-3 second;
end
