// SBML level 2 version 4

model Noble1991_CardiacActionPotential_SodiumCalciumExchange()
  // This a model from the article:
  // The role of sodium-calcium exchange during the cardiac action potential.
  // Noble D, Noble SJ, Bett GC, Earm YE, Ho WK, So IK. Ann N Y Acad Sci 1991;639:334-53 1785860 ,
  // Abstract:
  // Publication Types: Research Support, Non-U.S. Gov't Review
  // This model was taken from the CellML repository and automatically converted to SBML.
  // The original model was: Noble D, Noble SJ, Bett GC, Earm YE, Ho WK, So IK. (1991) - version=1.0
  // The original CellML model was created by:
  // Penny Noble
  // penny.noble@dpag.ox.ac.uk
  // The University of Oxford
  // This model originates from BioModels Database: A Database of Annotated Published Models (http://www.ebi.ac.uk/biomodels/). It is copyright (c) 2005-2011 The BioModels.net Team.
  // To the extent possible under law, all copyright and related or neighbouring rights to this encoded model have been dedicated to the public domain worldwide. Please refer to CC0 Public Domain Dedication for more information.
  // In summary, you are entitled to use this encoded model in absolutely any manner you deem suitable, verbatim, or with modification, alone or embedded it in a larger context, redistribute it, commercially or not, in a restricted way or not. .
  // To cite BioModels Database, please use: Li C, Donizelli M, Rodriguez N, Dharuri H, Endler L, Chelliah V, Li L, He E, Henry A, Stefan MI, Snoep JL, Hucka M, Le Novère N, Laibe C (2010) BioModels Database: An enhanced, curated and annotated resource for published quantitative kinetic models. BMC Syst Biol., 4:92.
  // biomodels.db:MODEL1006230073
  // isDescribedBy pubmed:1785860
  // biomodels.db:MODEL1006230073
  // isDescribedBy pubmed:1785860
  // biomodels.db:MODEL1006230073
  // biomodels.db:MODEL1006230073

  // Compartments:
  compartment COMpartment = 1 litre;

  // Parameters:
  V_membrane = -93;
  R = 8314.472;
  T = 310;
  F = 9.64853415e4;
  Cm = 9.5e-5;
  stim_start = 0.1;
  stim_end = 10000;
  stim_period = 1;
  stim_duration = 0.002;
  stim_amplitude = -6;
  K_mk1 = 10;
  g_K1 = 1;
  i_K_max = 1;
  x = 0.001;
  time_time_dependent_potassium_current_x_gate = ;
  V_time_dependent_potassium_current_x_gate = ;
  g_bk = 0.0006;
  g_Na = 2.5;
  m = 0.000105;
  V_fast_sodium_current_m_gate = ;
  time_fast_sodium_current_m_gate = ;
  delta_m = 1e-5;
  h = 0.99816539;
  V_fast_sodium_current_h_gate = ;
  time_fast_sodium_current_h_gate = ;
  g_bna = 0.0006;
  P_Ca_L = 0.25;
  P_CaK = 0.002;
  P_CaNa = 0.01;
  d = 0;
  V_L_type_Ca_channel_d_gate = ;
  time_L_type_Ca_channel_d_gate = ;
  speed_d = 3;
  f = 1;
  V_L_type_Ca_channel_f_gate = ;
  time_L_type_Ca_channel_f_gate = ;
  speed_f = 0.5;
  delta_f = 0.0001;
  g_bca = 0.00025;
  g_to = 0.005;
  g_tos = 0;
  s = 1;
  V_transient_outward_current_s_gate = ;
  time_transient_outward_current_s_gate = ;
  r = 0;
  V_transient_outward_current_r_gate = ;
  time_transient_outward_current_r_gate = ;
  i_NaK_max = 0.7;
  K_mK = 1;
  K_mNa = 40;
  k_NaCa = 0.0005;
  n_NaCa = 3;
  d_NaCa = 0;
  gamma = 0.5;
  K_cyca = 0.0003;
  K_xcs = 0.4;
  K_srca = 0.5;
  alpha_up = 0.4;
  beta_up = 0.03;
  K_leak_rate = 0;
  K_m_rel = 250;
  ActFrac = 0;
  ProdFrac = 0;
  Na_o = 140;
  Na_i = 5;
  Ca_o = 2;
  K_o = 4;
  K_i = 140;
  Ca_i = 7.63e-6;
  Ca_up = 0.3013;
  Ca_rel = 0.2989;
  Ca_Calmod = 0.0003;
  Ca_Trop = 0.0002;
  Calmod = 0.02;
  Trop = 0.05;
  alpha_Calmod = 100000;
  beta_Calmod = 50;
  alpha_Trop = 100000;
  beta_Trop = 200;
  radius = 0.012;
  length = 0.074;
  V_rel_ratio = 0.1;
  V_e_ratio = 0.4;
  V_up_ratio = 0.01;

  // Assignment rules:
  i_Stim := piecewise(stim_amplitude, (time >= stim_start) && (time <= stim_end) && (time - stim_start - floor((time - stim_start)/stim_period)*stim_period <= stim_duration), 0);
  E_Na := R*T/F*ln(Na_o/Na_i);
  E_K := R*T/F*ln(K_o/K_i);
  E_Ca := 0.5*R*T/F*ln(Ca_o/Ca_i);
  E_mh := R*T/F*ln((Na_o + 0.12*K_o)/(Na_i + 0.12*K_i));
  i_K1 := g_K1*K_o/(K_o + K_mk1)*(V_membrane - E_K)/(1 + exp((V_membrane - E_K - 10)*F*2/(R*T)));
  I_K := i_K_max*(K_i - K_o*exp(-V_membrane*F/(R*T)))/140;
  i_K := x*I_K;
  E0xa := V_time_dependent_potassium_current_x_gate + 50;
  alpha_x := 0.5*exp(0.0826*E0xa)/(1 + exp(0.057*E0xa));
  E0xb := V_time_dependent_potassium_current_x_gate + 20;
  beta_x := 1.3*exp(-0.06*E0xb)/(1 + exp(-0.04*E0xb));
  i_b_K := g_bk*(V_membrane - E_K);
  i_Na := g_Na*m^3*h*(V_membrane - E_mh);
  E0_m := V_fast_sodium_current_m_gate + 41;
  alpha_m := piecewise(2000, abs(E0_m) < delta_m, 200*E0_m/(1 - exp(-0.1*E0_m)));
  beta_m := 8000*exp(-0.056*(V_fast_sodium_current_m_gate + 66));
  alpha_h := 20*exp(-0.125*(V_fast_sodium_current_h_gate + 75));
  beta_h := 2000/(1 + 320*exp(-0.1*(V_fast_sodium_current_h_gate + 75)));
  i_b_Na := g_bna*(V_membrane - E_Na);
  i_Ca_L_Ca := 4*P_Ca_L*d*f*(V_membrane - 50)*F/(R*T)/(1 - exp(-(V_membrane - 50)*F*2/(R*T)))*(Ca_i*exp(100*F/(R*T)) - Ca_o*exp(-(V_membrane - 50)*F*2/(R*T)));
  i_Ca_L_K := P_CaK*P_Ca_L*d*f*(V_membrane - 50)*F/(R*T)/(1 - exp(-(V_membrane - 50)*F/(R*T)))*(K_i*exp(50*F/(R*T)) - K_o*exp(-(V_membrane - 50)*F/(R*T)));
  i_Ca_L_Na := P_CaNa*P_Ca_L*d*f*(V_membrane - 50)*F/(R*T)/(1 - exp(-(V_membrane - 50)*F/(R*T)))*(Na_i*exp(50*F/(R*T)) - Na_o*exp(-(V_membrane - 50)*F/(R*T)));
  i_Ca_L := i_Ca_L_Ca + i_Ca_L_K + i_Ca_L_Na;
  E0_d := V_L_type_Ca_channel_d_gate + 24 - 5;
  alpha_d := piecewise(120, abs(E0_d) < 0.0001, 30*E0_d/(1 - exp(-E0_d/4)));
  beta_d := piecewise(120, abs(E0_d) < 0.0001, 12*E0_d/(exp(E0_d/10) - 1));
  E0_f := V_L_type_Ca_channel_f_gate + 34;
  alpha_f := piecewise(25, abs(E0_f) < delta_f, 6.25*E0_f/(exp(E0_f/4) - 1));
  beta_f := 50/(1 + exp(-1*(V_L_type_Ca_channel_f_gate + 34)/4));
  i_b_Ca := g_bca*(V_membrane - E_Ca);
  i_to := g_to*(g_tos + s*(1 - g_tos))*r*(V_membrane - E_K);
  alpha_s := 0.033*exp(-V_transient_outward_current_s_gate/17);
  beta_s := 33/(1 + exp(-0.125*(V_transient_outward_current_s_gate + 10)));
  i_NaK := i_NaK_max*K_o/(K_mK + K_o)*Na_i/(K_mNa + Na_i);
  i_NaCa := k_NaCa*(exp(gamma*(n_NaCa - 2)*V_membrane*F/(R*T))*Na_i^n_NaCa*Ca_o - exp((gamma - 1)*(n_NaCa - 2)*V_membrane*F/(R*T))*Na_o^n_NaCa*Ca_i)/((1 + d_NaCa*(Ca_i*Na_o^n_NaCa + Ca_o*Na_i^n_NaCa))*(1 + Ca_i/0.0069));
  K_1 := K_cyca*K_xcs/K_srca;
  K_2 := Ca_i + Ca_up*K_1 + K_cyca*K_xcs + K_cyca;
  i_up := Ca_i/K_2*alpha_up - Ca_up*K_1/K_2*beta_up;
  i_trans := 50*(Ca_up - Ca_rel);
  VoltDep := exp(0.08*(V_membrane - 40));
  RegBindSite := (Ca_i/(Ca_i + 0.0005))^2;
  ActRate := 500*RegBindSite;
  InactRate := 60 + 500*RegBindSite;
  PrecFrac := 1 - ActFrac - ProdFrac;
  i_rel := ((ActFrac/(ActFrac + 0.25))^2*K_m_rel + K_leak_rate)*Ca_rel;
  V_Cell := 3.141593*radius^2*length;
  V_i_ratio := 1 - V_e_ratio - V_up_ratio - V_rel_ratio;
  V_i := V_Cell*V_i_ratio;

  // Rate rules:
  V_membrane' = -1/Cm*(i_Stim + i_K1 + i_to + i_K + i_b_K + i_NaK + i_Na + i_b_Na + i_Ca_L_Na + i_NaCa + i_Ca_L_Ca + i_Ca_L_K + i_b_Ca);
  x' = alpha_x*(1 - x) - beta_x*x;
  m' = alpha_m*(1 - m) - beta_m*m;
  h' = alpha_h*(1 - h) - beta_h*h;
  d' = speed_d*(alpha_d*(1 - d) - beta_d*d);
  f' = speed_f*(alpha_f*(1 - f) - beta_f*f);
  s' = alpha_s*(1 - s) - beta_s*s;
  r' = 333*(1/(1 + exp(-(V_transient_outward_current_r_gate + 4)/5)) - r);
  ActFrac' = PrecFrac*ActRate - ActFrac*InactRate;
  ProdFrac' = ActFrac*InactRate - 1*ProdFrac;
  Na_i' = -1/(1*V_i*F)*(i_Na + i_b_Na + 3*i_NaK + 3*i_NaCa + i_Ca_L_Na);
  K_i' = -1/(1*V_i*F)*(i_K1 + i_K + i_Ca_L_K + i_to + i_b_K - 2*i_NaK);
  Ca_i' = -1/(2*1*V_i*F)*(i_Ca_L_Ca + i_b_Ca - 2*i_NaCa) + i_rel*V_rel_ratio/V_i_ratio - Ca_Calmod - Ca_Trop - i_up;
  Ca_up' = V_i_ratio/V_up_ratio*i_up - i_trans;
  Ca_rel' = V_up_ratio/V_rel_ratio*i_trans - i_rel;
  Ca_Calmod' = alpha_Calmod*Ca_i*(Calmod - Ca_Calmod) - beta_Calmod*Ca_Calmod;
  Ca_Trop' = alpha_Trop*Ca_i*(Trop - Ca_Trop) - beta_Trop*Ca_Trop;

  // Unit definitions:
  unit micrometre = 1e-6 metre;
  unit per_second = 1 / second;
  unit millivolt = 1e-3 volt;
  unit per_millivolt = 1 / (1e-3 volt);
  unit per_millivolt_second = 1 / (1e-3 volt * second);
  unit microS = 1e-6 siemens;
  unit microF = 1e-6 farad;
  unit nanoA = 1e-9 ampere;
  unit nanoA_per_millimolar = 1e-9 ampere * litre / (1e-3 mole);
  unit millimolar = 1e-3 mole / litre;
  unit millimolar4 = (1e-3 mole)^4 / litre^4;
  unit millimolar_per_second = 1e-3 mole / (litre * second);
  unit per_millimolar_second = litre / (1e-3 mole * second);
  unit joule_per_kilomole_kelvin = joule / (1000 mole * kelvin);
  unit coulomb_per_mole = coulomb / mole;
  unit micrometre3 = (1e-6 metre)^3;
  unit litre_micrometre3 = litre / (1e-6 metre)^3;
end
