// SBML level 2 version 4

model Mackenzie1996_NaGlucoseCotransporter_Kidney()
  // This a model from the article:
  // Biophysical characteristics of the pig kidney Na+/glucose cotransporter SGLT2 reveal a common mechanism for SGLT1 and SGLT2.
  // Mackenzie B, Loo DD, Panayotova-Heiermann M, Wright EM. J Biol Chem 1996 Dec 20;271(51):32678-83 8955098 ,
  // Abstract:
  // The Na+-dependent, low affinity glucose transporter SGLT2 cloned from pig kidney is 76% identical (at the amino acid level) to its high affinity homologue SGLT1. Using two-microelectrode voltage clamp, we have characterized the presteady-state and steady-state kinetics of SGLT2 expressed in Xenopus oocytes. The kinetic properties of the steady-state sugar-evoked currents as a function of external Na+ and alpha-methyl-D-glucopyranoside (alphaMG) concentrations were consistent with an ordered, simultaneous transport model in which Na+ binds first. Na+ binding was voltage-dependent and saturated with hyperpolarizing voltages. Phlorizin was a potent inhibitor of the sugar-evoked currents (KiPz approximately 10 microM) and blocked an inward Na+ current in the absence of sugar. SGLT2 exhibited Na+-dependent presteady-state currents with time constants 3-7 ms. Charge movements were described by Boltzmann relations with apparent valence approximately 1 and maximal charge transfer approximately 11 nC, and were reduced by the addition of sugar or phlorizin. The differences between SGLT1 and SGLT2 were that (i) the apparent affinity constant (K0.5) for alphaMG (approximately 3 mM) was an order of magnitude higher for SGLT2; (ii) SGLT2 excluded galactose, suggesting discrete sugar binding; (iii) K0.5 for Na+ was lower in SGLT2; and (iv) the Hill coefficient for Na+ was 1 for SGLT2 but 2 for SGLT1. Simulations of the six-state kinetic model previously proposed for SGLT1 indicated that many of the kinetic properties observed in SGLT2 are expected by simply reducing the Na+/glucose coupling from 2 to 1.
  // This model was taken from the CellML repository and automatically converted to SBML.
  // The original model was: Mackenzie B, Loo DD, Panayotova-Heiermann M, Wright EM. () - version=1.0
  // The original CellML model was created by:
  // Jonna Terkildsen
  // j.terkildsen@auckland.ac.nz
  // The University of Auckland
  // This model originates from BioModels Database: A Database of Annotated Published Models (http://www.ebi.ac.uk/biomodels/). It is copyright (c) 2005-2011 The BioModels.net Team.
  // To the extent possible under law, all copyright and related or neighbouring rights to this encoded model have been dedicated to the public domain worldwide. Please refer to CC0 Public Domain Dedication for more information.
  // In summary, you are entitled to use this encoded model in absolutely any manner you deem suitable, verbatim, or with modification, alone or embedded it in a larger context, redistribute it, commercially or not, in a restricted way or not..
  // To cite BioModels Database, please use: Li C, Donizelli M, Rodriguez N, Dharuri H, Endler L, Chelliah V, Li L, He E, Henry A, Stefan MI, Snoep JL, Hucka M, Le Novère N, Laibe C (2010) BioModels Database: An enhanced, curated and annotated resource for published quantitative kinetic models. BMC Syst Biol., 4:92.
  // biomodels.db:MODEL1006230076
  // isDescribedBy pubmed:8955098
  // biomodels.db:MODEL1006230076
  // isDescribedBy pubmed:8955098
  // biomodels.db:MODEL1006230076
  // biomodels.db:MODEL1006230076

  // Compartments:
  compartment COMpartment = 1 litre;

  // Parameters:
  k0_12 = 20000;
  k0_21 = 400;
  k0_23 = 10000;
  k0_32 = 20;
  k0_34 = 50;
  k0_43 = 50;
  k0_45 = 800;
  k0_54 = 6700000;
  k0_25 = 0.01;
  k0_52 = 0.17;
  k0_56 = 48;
  k0_65 = 50;
  k0_61 = 35;
  k0_16 = 100;
  delta = 0.7;
  alpha_pp = 0;
  N_C = 8.4e10;
  N_Avo = 6.022e23;
  area = 1000000;
  n = 1;
  z_c = -1;
  z_Na = 1;
  F = 9.648534e4;
  R = 8.314;
  T = 310;
  V = -0.15;
  Na_i = 0.01;
  Na_o = 0.1;
  glucose_i = 0;
  glucose_o = 0.001;
  C_1 = 3.923e-9;
  C_2 = 1.016e-7;
  C_3 = 1.515e-8;
  C_4 = 8.912e-10;
  C_5 = 1.485e-8;
  C_6_temp = 3.06798e-9;

  // Assignment rules:
  alpha_p := 1 - delta - alpha_pp;
  C_T := 1*N_C/N_Avo;
  mu := F*V/(R*T);
  ks_12 := k0_12*exp(-n*alpha_p*mu/2);
  k_12 := ks_12*Na_o^n;
  k_21 := k0_21*exp(n*z_Na*alpha_p*mu/2);
  k_23 := k0_23*glucose_o;
  k_32 := k0_32;
  k_34 := k0_34*exp(-(z_c + n)*delta*mu/2);
  k_43 := k0_43*exp((z_c + n)*delta*mu/2);
  k_45 := k0_45;
  k_25 := k0_25*exp(-(z_c + n)*delta*mu/2);
  k_52_temp := k0_52*exp((z_c + n)*delta*mu/2);
  k_56 := k0_56*exp(-n*z_Na*alpha_pp*mu/2);
  k_65 := k0_65*Na_i^n*exp(n*z_Na*alpha_pp*mu/2);
  k_61 := k0_61*exp(z_c*delta*mu/2);
  k_16 := k0_16*exp(-z_c*delta*mu/2);
  k_52 := k0_12*k_25*k0_56*k0_61/(k0_21*k0_16*k0_65);
  k0_54_temp := k0_23*k_34*k_45*k_52/(k_43*k_32*k_25);
  k_54 := k0_54_temp*glucose_i;
  C_6 := C_T - (C_1 + C_2 + C_3 + C_4 + C_5);
  C1_sum := k_21*k_32*k_43*k_54*k_65 + k_21*k_34*k_45*k_52*k_65 + k_21*k_32*k_45*k_52*k_65 + k_21*k_32*k_43*k_52*k_65 + k_25*k_34*k_45*k_56*k_61 + k_23*k_34*k_45*k_56*k_61 + k_21*k_34*k_45*k_56*k_61 + k_25*k_32*k_45*k_56*k_61 + k_21*k_32*k_45*k_56*k_61 + k_25*k_32*k_43*k_56*k_61 + k_21*k_32*k_43*k_56*k_61 + k_21*k_32*k_43*k_54*k_61 + k_21*k_34*k_45*k_52*k_61 + k_21*k_32*k_45*k_52*k_61 + k_21*k_32*k_43*k_52*k_61;
  C2_sum := k_16*k_32*k_43*k_54*k_65 + k_12*k_32*k_43*k_54*k_65 + k_16*k_34*k_45*k_52*k_65 + k_12*k_34*k_45*k_52*k_65 + k_16*k_32*k_45*k_52*k_65 + k_12*k_32*k_45*k_52*k_65 + k_16*k_32*k_43*k_52*k_65 + k_12*k_32*k_43*k_52*k_65 + k_12*k_34*k_45*k_56*k_61 + k_12*k_32*k_45*k_56*k_61 + k_12*k_32*k_43*k_56*k_61 + k_12*k_32*k_43*k_54*k_61 + k_12*k_34*k_45*k_52*k_61 + k_12*k_32*k_45*k_52*k_61 + k_12*k_32*k_43*k_52*k_61;
  C3_sum := k_16*k_25*k_43*k_54*k_65 + k_12*k_25*k_43*k_54*k_65 + k_16*k_23*k_43*k_54*k_65 + k_12*k_23*k_43*k_54*k_65 + k_16*k_21*k_43*k_54*k_65 + k_16*k_23*k_45*k_52*k_65 + k_12*k_23*k_45*k_52*k_65 + k_16*k_23*k_43*k_52*k_65 + k_12*k_23*k_43*k_52*k_65 + k_12*k_23*k_45*k_56*k_61 + k_12*k_23*k_43*k_56*k_61 + k_12*k_25*k_43*k_54*k_61 + k_12*k_23*k_43*k_54*k_61 + k_12*k_23*k_45*k_52*k_61 + k_12*k_23*k_43*k_52*k_61;
  C4_sum := k_16*k_25*k_34*k_54*k_65 + k_12*k_25*k_34*k_54*k_65 + k_16*k_23*k_34*k_54*k_65 + k_12*k_23*k_34*k_54*k_65 + k_16*k_21*k_34*k_54*k_65 + k_16*k_25*k_32*k_54*k_65 + k_12*k_25*k_32*k_54*k_65 + k_16*k_21*k_32*k_54*k_65 + k_16*k_23*k_34*k_52*k_65 + k_12*k_23*k_34*k_52*k_65 + k_12*k_23*k_34*k_56*k_61 + k_12*k_25*k_34*k_54*k_61 + k_12*k_23*k_34*k_54*k_61 + k_12*k_25*k_32*k_54*k_61 + k_12*k_23*k_34*k_52*k_61;
  C5_sum := k_16*k_25*k_34*k_45*k_65 + k_12*k_25*k_34*k_45*k_65 + k_16*k_23*k_34*k_45*k_65 + k_12*k_23*k_34*k_45*k_65 + k_16*k_21*k_34*k_45*k_65 + k_16*k_25*k_32*k_45*k_65 + k_12*k_25*k_32*k_45*k_65 + k_16*k_21*k_32*k_45*k_65 + k_16*k_25*k_32*k_43*k_65 + k_12*k_25*k_32*k_43*k_65 + k_16*k_21*k_32*k_43*k_65 + k_12*k_25*k_34*k_45*k_61 + k_12*k_23*k_34*k_45*k_61 + k_12*k_25*k_32*k_45*k_61 + k_12*k_25*k_32*k_43*k_61;
  C6_sum := k_16*k_25*k_34*k_45*k_56 + k_12*k_25*k_34*k_45*k_56 + k_16*k_23*k_34*k_45*k_56 + k_12*k_23*k_34*k_45*k_56 + k_16*k_21*k_34*k_45*k_56 + k_16*k_25*k_32*k_45*k_56 + k_12*k_25*k_32*k_45*k_56 + k_16*k_21*k_32*k_45*k_56 + k_16*k_25*k_32*k_43*k_56 + k_12*k_25*k_32*k_43*k_56 + k_16*k_21*k_32*k_43*k_56 + k_16*k_21*k_32*k_43*k_54 + k_16*k_21*k_34*k_45*k_52 + k_16*k_21*k_32*k_45*k_52 + k_16*k_21*k_32*k_43*k_52;
  C_sum := C1_sum + C2_sum + C3_sum + C4_sum + C5_sum + C6_sum;
  C1 := C_T*C1_sum/C_sum;
  C2 := C_T*C2_sum/C_sum;
  C3 := C_T*C3_sum/C_sum;
  C4 := C_T*C4_sum/C_sum;
  C5 := C_T*C5_sum/C_sum;
  C6 := C_T*C6_sum/C_sum;
  I_NaGl_pSS := -F*(n*z_Na*alpha_p*(k_12*C_1 - k_21*C_2) + z_c*delta*(k_16*C_1 - k_61*C_6) + n*z_Na*alpha_pp*(k_56*C_5 - k_65*C_6));
  I_NaGl_SS := -F*(z_c*(k_16*C1 - k_61*C6) + (z_c + z_Na*n)*(k_25*C2 - k_52*C5) + (z_c + z_Na*n)*(k_34*C3 - k_43*C4));
  J_Na := k_25*C2 - k_52*C5 + (k_34*C3 - k_43*C4);
  lambda := ks_12*k0_23*k_43*k_54*k_65 + ks_12*k0_23*k_34*k_54*k_65 + ks_12*k0_23*k_45*k_52*k_65 + ks_12*k0_23*k_43*k_52*k_65 + ks_12*k0_23*k_34*k_52*k_65 + ks_12*k0_23*k_34*k_45*k_65 + ks_12*k0_23*k_45*k_56*k_61 + ks_12*k0_23*k_43*k_56*k_61 + ks_12*k0_23*k_34*k_56*k_61 + ks_12*k0_23*k_43*k_54*k_61 + ks_12*k0_23*k_34*k_54*k_61 + ks_12*k0_23*k_45*k_52*k_61 + ks_12*k0_23*k_43*k_52*k_61 + ks_12*k0_23*k_34*k_52*k_61 + ks_12*k0_23*k_34*k_45*k_61 + ks_12*k0_23*k_34*k_45*k_56;
  chi := 1/lambda*(ks_12*k_32*k_43*k_54*k_65 + ks_12*k_25*k_43*k_54*k_65 + ks_12*k_25*k_34*k_54*k_65 + ks_12*k_25*k_32*k_54*k_65 + ks_12*k_34*k_45*k_52*k_65 + ks_12*k_32*k_45*k_52*k_65 + ks_12*k_32*k_43*k_52*k_65 + ks_12*k_25*k_34*k_45*k_65 + ks_12*k_25*k_32*k_45*k_65 + ks_12*k_25*k_32*k_43*k_65 + ks_12*k_34*k_45*k_56*k_61 + ks_12*k_32*k_45*k_56*k_61 + ks_12*k_32*k_43*k_56*k_61 + ks_12*k_32*k_43*k_54*k_61 + ks_12*k_25*k_43*k_54*k_61 + ks_12*k_25*k_34*k_54*k_61 + ks_12*k_25*k_32*k_54*k_61 + ks_12*k_34*k_45*k_52*k_61 + ks_12*k_32*k_45*k_52*k_61 + ks_12*k_32*k_43*k_52*k_61 + ks_12*k_25*k_34*k_45*k_61 + ks_12*k_25*k_32*k_45*k_61 + ks_12*k_25*k_32*k_43*k_61 + ks_12*k_25*k_34*k_45*k_56 + ks_12*k_25*k_32*k_45*k_56 + ks_12*k_25*k_32*k_43*k_56);
  beta := 1/lambda*(k0_23*k_16*k_43*k_54*k_65 + k0_23*k_16*k_34*k_54*k_65 + k0_23*k_16*k_45*k_52*k_65 + k0_23*k_16*k_43*k_52*k_65 + k0_23*k_16*k_34*k_52*k_65 + k0_23*k_16*k_34*k_45*k_65 + k0_23*k_34*k_45*k_56*k_61 + k0_23*k_16*k_34*k_45*k_56);
  alpha := 1/lambda*(k_21*k_32*k_43*k_54*k_65 + k_16*k_32*k_43*k_54*k_65 + k_16*k_25*k_43*k_54*k_65 + k_16*k_21*k_43*k_54*k_65 + k_16*k_25*k_34*k_54*k_65 + k_16*k_21*k_34*k_54*k_65 + k_16*k_25*k_32*k_54*k_65 + k_16*k_21*k_32*k_54*k_65 + k_21*k_34*k_45*k_52*k_65 + k_16*k_34*k_45*k_52*k_65 + k_21*k_32*k_45*k_52*k_65 + k_16*k_32*k_45*k_52*k_65 + k_21*k_32*k_43*k_52*k_65 + k_16*k_32*k_43*k_52*k_65 + k_16*k_25*k_34*k_45*k_65 + k_16*k_21*k_34*k_45*k_65 + k_16*k_25*k_32*k_45*k_65 + k_16*k_21*k_32*k_45*k_65 + k_16*k_25*k_32*k_43*k_65 + k_16*k_21*k_32*k_43*k_65 + k_25*k_34*k_45*k_56*k_61 + k_21*k_34*k_45*k_56*k_61 + k_25*k_32*k_45*k_56*k_61 + k_21*k_32*k_45*k_56*k_61 + k_25*k_32*k_43*k_56*k_61 + k_21*k_32*k_43*k_56*k_61 + k_21*k_32*k_43*k_54*k_61 + k_21*k_34*k_45*k_52*k_61 + k_21*k_32*k_45*k_52*k_61 + k_21*k_32*k_43*k_52*k_61 + k_16*k_25*k_34*k_45*k_56 + k_16*k_21*k_34*k_45*k_56 + k_16*k_25*k_32*k_45*k_56 + k_16*k_21*k_32*k_45*k_56 + k_16*k_25*k_32*k_43*k_56 + k_16*k_21*k_32*k_43*k_56 + k_16*k_21*k_32*k_43*k_54 + k_16*k_21*k_34*k_45*k_52 + k_16*k_21*k_32*k_45*k_52 + k_16*k_21*k_32*k_43*k_52);
  gamma := 1/lambda*(k_16*k_21*k_32*k_43*k_54*k_65 + k_16*k_21*k_34*k_45*k_52*k_65 + k_16*k_21*k_32*k_45*k_52*k_65 + k_16*k_21*k_32*k_43*k_52*k_65);
  phi := 1/lambda*(-ks_12*k_25*k_34*k_45*k_56*k_61 - ks_12*k_25*k_32*k_45*k_56*k_61 - ks_12*k_25*k_32*k_43*k_56*k_61);
  epsilon := 1/lambda*(-ks_12)*k0_23*k_34*k_45*k_56*k_61;
  Imax_gluc := 2*F*C_T*epsilon*Na_o/(beta + Na_o);
  Imax_Na := 2*F*C_T*(phi + epsilon*glucose_o)/(chi + glucose_o);
  Khalf_gluc := (alpha + chi*Na_o)/(beta + Na_o);
  Khalf_Na := (alpha + beta*glucose_o)/(chi + glucose_o);

  // Rate rules:
  V' = 100;
  C_1' = k_21*C_2 + k_61*C_6 - (k_12 + k_16)*C_1;
  C_2' = k_12*C_1 + k_32*C_3 + k_52*C_5 - (k_21 + k_23 + k_25)*C_2;
  C_3' = k_23*C_2 + k_43*C_4 - (k_32 + k_34)*C_3;
  C_4' = k_34*C_3 + k_54*C_5 - (k_45 + k_43)*C_4;
  C_5' = k_45*C_4 + k_65*C_6 + k_25*C_2 - (k_54 + k_52 + k_56)*C_5;
  C_6_temp' = k_16*C_1 + k_56*C_5 - (k_61 + k_65)*C_6_temp;

  // Unit definitions:
  unit per_second = 1 / second;
  unit per_second5 = 1 / second^5;
  unit per_mol = 1 / mole;
  unit umol = 1e-6 mole;
  unit M = mole / litre;
  unit um2 = (1e-6 metre)^2;
  unit mol_per_um2 = mole / (1e-6 metre)^2;
  unit mM = 1e-3 mole / litre;
  unit mV = 1e-3 volt;
  unit J_per_K_per_mol = joule / (mole * kelvin);
  unit pA_per_cm2 = 1e-12 ampere / (0.01 metre)^2;
  unit uA = 1e-6 ampere;
  unit uA_per_um2 = 1e-6 ampere / (1e-6 metre)^2;
  unit umol_per_second = 1e-6 mole / second;
  unit C_per_mol = coulomb / mole;
  unit per_M2_per_second = litre^2 / (mole^2 * second);
  unit M2 = mole^2 / litre^2;
  unit M3 = mole^3 / litre^3;
  unit M2_per_second = mole^2 / (litre^2 * second);
  unit per_M2_per_second5 = litre^2 / (mole^2 * second^5);
  unit M_per_second = mole / (litre * second);
  unit per_M_per_second = litre / (mole * second);
  unit volt_per_second = volt / second;
end
