// SBML level 2 version 4

model Benson2008_Arrhythmogenesis_Endocardial()
  // This a model from the article:
  // The canine virtual ventricular wall: a platform for dissecting pharmacological effects on propagation and arrhythmogenesis.
  // Benson AP, Aslanidi OV, Zhang H, Holden AV. Prog Biophys Mol Biol 2008 Jan-Apr;96(1-3):187-208 17915298 ,
  // Abstract:
  // We have constructed computational models of canine ventricular cells and tissues, ultimately combining detailed tissue architecture and heterogeneous transmural electrophysiology. The heterogeneity is introduced by modifying the Hund-Rudy canine cell model in order to reproduce experimentally reported electrophysiological properties of endocardial, midmyocardial (M) and epicardial cells. These models are validated against experimental data for individual ionic current and action potential characteristics, and their rate dependencies. 1D and 3D heterogeneous virtual tissues are constructed, with detailed tissue architecture (anisotropy and orthotropy, due to fibre orientation and sheet structure) of the left ventricular wall wedge extracted from a diffusion tensor imaging data set. The models are used to study the effects of tissue heterogeneity and class III drugs on transmural propagation and tissue vulnerability to re-entry. We have determined relationships between the transmural dispersion of action potential duration (APD) and the vulnerable window in the 1D virtual ventricular wall, and demonstrated how changes in the transmural heterogeneity, and hence tissue vulnerability, can lead to generation of re-entry in the 3D ventricular wedge. Two class III drugs with opposite qualitative effects on transmural APD heterogeneity are considered: d-sotalol that increases transmural APD dispersion, and amiodarone that decreases it. Simulations with the 1D virtual ventricular wall show that under d-sotalol conditions the vulnerable window is substantially wider compared to amiodarone conditions, primarily in the epicardial region where unidirectional conduction block persists until the adjacent M cells are fully repolarised. Further simulations with the 3D ventricular wedge have shown that ectopic stimulation of the epicardial region results in generation of sustained re-entry under d-sotalol conditions, but not under amiodarone conditions or in control. Again, APD increase in M cells was identified as the major contributor to tissue vulnerability--re-entry was initiated primarily due to ectopic excitation propagating around the unidirectional conduction block in the M cell region. This suggests an electrophysiological mechanism for the anti- and proarrhythmic effects of the class III drugs: the relative safety of amiodarone in comparison to d-sotalol can be explained by relatively low transmural APD dispersion, and hence, a narrow vulnerable window and low probability of re-entry in the tissue.
  // This model was taken from the CellML repository and automatically converted to SBML.
  // The original model was: Benson AP, Aslanidi OV, Zhang H, Holden AV. (2008) - version=1.0
  // The original CellML model was created by:
  // Catherine Lloyd
  // c.lloyd@auckland.ac.nz
  // The University of Auckland
  // This model originates from BioModels Database: A Database of Annotated Published Models (http://www.ebi.ac.uk/biomodels/). It is copyright (c) 2005-2011 The BioModels.net Team.
  // To the extent possible under law, all copyright and related or neighbouring rights to this encoded model have been dedicated to the public domain worldwide. Please refer to CC0 Public Domain Dedication for more information.
  // In summary, you are entitled to use this encoded model in absolutely any manner you deem suitable, verbatim, or with modification, alone or embedded it in a larger context, redistribute it, commercially or not, in a restricted way or not..
  // To cite BioModels Database, please use: Li C, Donizelli M, Rodriguez N, Dharuri H, Endler L, Chelliah V, Li L, He E, Henry A, Stefan MI, Snoep JL, Hucka M, Le Novère N, Laibe C (2010) BioModels Database: An enhanced, curated and annotated resource for published quantitative kinetic models. BMC Syst Biol., 4:92.
  // biomodels.db:MODEL1006230078
  // isDescribedBy pubmed:17915298
  // biomodels.db:MODEL1006230078
  // isDescribedBy pubmed:17915298
  // biomodels.db:MODEL1006230078
  // biomodels.db:MODEL1006230078

  // Compartments:
  compartment COMpartment = 1 litre;

  // Parameters:
  time_Environment = ;
  F = 96485;
  K_o = 5.4;
  Ca_o = 1.8;
  Na_o = 140;
  Cl_o = 100;
  FonRT = 0.03743588;
  tissue = 0;
  V = -85.78184;
  l = 0.01;
  a = 0.0011;
  stim_offset = 0;
  stim_period = 1000;
  stim_duration = 3;
  stim_amplitude = -20;
  H = 0.9873178;
  m = 0.001356538;
  J = 0.991925;
  d = 1.64013e-6;
  dp = 8.982307;
  f = 0.9999615;
  fca = 0.9783662;
  fca2 = 0.8930529;
  f2 = 0.9922345;
  pca = 0.000243;
  gacai = 1;
  gacao = 0.341;
  xr = 7.24074e-6;
  xs1 = 0.01988314;
  xs2 = 0.01989065;
  gitodv = 0.095;
  ydv = 0.01397079;
  ydv2 = 0.9999647;
  zdv = 0.8292061;
  kmnai = 10;
  kmko = 1.5;
  ibarnak = 0.61875;
  KmCa = 0.000125;
  NCXmax = 4.05;
  ksat = 0.27;
  eta = 0.35;
  KmNai = 12.3;
  KmNao = 87.5;
  KmCai = 0.0036;
  KmCao = 1.3;
  ibarpca = 0.0575;
  kmpca = 0.0005;
  PCl = 4e-7;
  AA = 0.000816605172;
  Kmto2 = 0.1502;
  GClb = 0.000225;
  GNaL = 0.0065;
  mL = 0.001356538;
  hL = 0.2613071;
  prnak = 0.01833;
  dtau_rel_max = 10;
  CaMK0 = 0.05;
  Km = 0.0015;
  KmCaMK = 0.15;
  CaMKtrap = 0.0211237;
  ro = 0;
  ri = 0.8626667;
  dKmPLBmax = 0.00017;
  dJupmax = 0.75;
  iupmax = 0.004375;
  Kmup = 0.00092;
  nsrmax = 15;
  Na_i = 12.97243;
  CTNaClmax = 9.8443e-6;
  K_i = 135.4695;
  CTKClmax = 7.0756e-6;
  Cl_i = 15.59207;
  Ca_i = 0.00012131666;
  Ca_jsr = 1.737581;
  Ca_nsr = 1.832822;
  Ca_ss = 0.00012271265;
  kmt = 0.0005;
  kmc = 0.00238;
  tbar = 0.07;
  cbar = 0.05;
  kmcsqn = 0.8;
  csqnbar = 10;
  BSRmax = 0.047;
  KmBSR = 0.00087;
  BSLmax = 1.124;
  KmBSL = 0.0087;

  // Assignment rules:
  vcell := 1000*pi*a*a*l;
  ageo := 2*pi*a*a + 2*pi*a*l;
  Acap := ageo*2;
  vmyo := vcell*0.68;
  vmito := vcell*0.26;
  vsr := vcell*0.06;
  vnsr := vcell*0.0552;
  vjsr := vcell*0.0048;
  vss := vcell*0.02;
  AF := Acap/F;
  past := floor(time_Environment/stim_period)*stim_period;
  i_Stim := piecewise(stim_amplitude, (time_Environment - past >= stim_offset) && (time_Environment - past <= stim_offset + stim_duration), 0);
  GNa := piecewise(11.5, tissue == 0, 4*11.5);
  gNa := GNa*m*m*m*H*J;
  ah := piecewise(0, V >= -40, 0.135*exp((80 + V)/(-6.8)));
  aj := piecewise(0, V >= -40, (-1.2714*exp(0.2444*V) - 3.474*exp(-0.04391*V))*1*(V + 37.78)/(1 + exp(0.311*(V + 79.23))));
  bh := piecewise(1/(0.13*(1 + exp((V + 10.66)/(-11.1)))), V >= -40, 3.56*exp(0.079*V) + 3.1*exp(0.35*V));
  bj := piecewise(0.3*exp(-2.535*V)/(1 + exp(-0.1*(V + 32))), V >= -40, 0.1212*exp(-0.01052*V)/(1 + exp(-0.1378*(V + 40.14))));
  am := 0.32*1*(V + 47.13)/(1 - exp(-0.1*(V + 47.13)));
  bm := 0.08*exp(-V/11);
  ibarca := pca*4*(V - 15)*F*FonRT*(gacai*Ca_ss*exp(2*(V - 15)*FonRT) - gacao*Ca_o)/(exp(2*(V - 15)*FonRT) - 1);
  ICaL := piecewise(d^dp*f*f2*fca*fca2*ibarca, tissue == 0, d*f*f2*fca*fca2*ibarca);
  dss := 1/(1 + exp(-(V - 4)/6.74));
  taud := 0.59 + 0.8*exp(0.052*(V + 13))/(1 + exp(0.132*(V + 13)));
  fss := 0.7/(1 + exp((V + 17.12)/7)) + 0.3;
  f2ss := 0.77/(1 + exp((V + 17.12)/7)) + 0.23;
  tauf := 1/(0.2411*exp(-(0.045*(V - 9.6914))^2) + 0.0529);
  tauf2 := 1/(0.0423*exp(-(0.059*(V - 18.5726))^2) + 0.0054);
  dpss := 9 - 8/(1 + exp(-(V + 65)/3.4));
  fcass := 0.3/(1 - ICaL/0.05) + 0.55/(1 + Ca_ss/0.003) + 0.15;
  fca2ss := 1/(1 - ICaL/0.01);
  taufca2 := 300/(1 + exp((-ICaL - 0.175)/0.04)) + 125;
  gkr := 0.0138542*sqrt(K_o/5.4);
  r := 1/(1 + exp((V + 10)/15.4));
  xrss := 1/(1 + exp(-(V + 10.085)/4.25));
  tauxr := 1/(6*(V - 1.7384)/(1 - exp(-0.136*(V - 1.7384))) + 3*(V + 38.3608)/(exp(0.1522*(V + 38.3608)) - 1));
  gks := 0.0224077*(1 + 0.6/(1 + (3.8/Ca_i)^1.4));
  xss := 1/(1 + exp(-(V - 10.5)/24.7));
  tauxs := 1/(7.61*(V + 44.6)/(1 - exp(-9.97*(V + 44.6))) + 3.6*(V - 0.55)/(exp(0.128*(V - 0.55)) - 1));
  rv := exp(V/300);
  ay := 25*exp((V - 40)/25)/(1 + exp((V - 40)/25));
  by := 25*exp(-(V + 90)/25)/(1 + exp(-(V + 90)/25));
  ay2 := 0.03/(1 + exp((V + 60)/5));
  by2 := 0.2*exp((V + 25)/5)/(1 + exp((V + 25)/5));
  ay3 := 0.0026/(1 + exp((V + 61)/5));
  by3 := 0.1*exp((V + 25)/5)/(1 + exp((V + 25)/5));
  Ito := gitodv*ydv^3*ydv2*zdv*rv*(V - EK);
  sigma := (exp(Na_o/67.3) - 1)/7;
  fnak := 1/(1 + 0.1245*exp(-0.1*V*FonRT) + 0.0365*sigma*exp(-V*FonRT));
  INaK := ibarnak*fnak*1/(1 + (kmnai/Na_i)^2)*K_o/(K_o + kmko);
  ca_i_NaCa := 1.5*Ca_i;
  allo := 1/(1 + (KmCa/ca_i_NaCa)^2);
  num := Na_i^3*Ca_o*exp(eta*V*FonRT) - Na_o^3*ca_i_NaCa*exp((eta - 1)*V*FonRT);
  denom1 := 1 + ksat*exp((eta - 1)*V*FonRT);
  denom2 := KmCao*Na_i^3 + KmNao^3*ca_i_NaCa + KmNai^3*Ca_o*(1 + ca_i_NaCa/KmCai);
  denom3 := KmCai*Na_o^3*(1 + (Na_i/KmNai)^3) + Na_i^3*Ca_o + Na_o^3*ca_i_NaCa;
  INaCa := NCXmax*allo*num/(denom1*(denom2 + denom3));
  IKp := 0.00276*(V - EK)/(1 + exp((7.488 - V)/5.98));
  IpCa := ibarpca*Ca_i/(kmpca + Ca_i);
  ICab := 1.995084*4*V*F*FonRT*(Ca_i*exp(2*V*FonRT) - 0.341*Ca_o)/(exp(2*V*FonRT) - 1);
  Ito2_max := PCl*V*F*FonRT*(Cl_i - Cl_o*exp(V*FonRT))/(1 - exp(V*FonRT));
  AAss := 1/(1 + Kmto2/Ca_ss);
  Ito2 := Ito2_max*AA;
  IClb := GClb*(V - ECl);
  INal := GNaL*mL^3*hL*(V - ENa);
  amL := 0.32*1*(V + 47.13)/(1 - exp(-0.1*(V + 47.13)));
  bmL := 0.08*exp(-V/11);
  hLss := 1/(1 + exp((V + 91)/6.1));
  ENa := ln(Na_o/Na_i)/FonRT;
  INa := gNa*(V - ENa);
  EK := ln(K_o/K_i)/FonRT;
  EKs := ln((K_o + prnak*Na_o)/(K_i + prnak*Na_i))/FonRT;
  ak1 := 1.02/(1 + exp(0.2385*(V - EK - 59.215)));
  bk1 := (0.49124*exp(0.08032*(V - EK + 5.476)) + 1*exp(0.06175*(V - EK - 594.31)))/(1 + exp(-0.5143*(V - EK + 4.753)));
  IK1 := 0.5*sqrt(K_o/5.4)*ak1/(ak1 + bk1)*(V - EK);
  IKr := gkr*xr*r*(V - EK);
  IKs := gks*xs1*xs2*(V - EKs);
  ECl := -ln(Cl_o/Cl_i)/FonRT;
  CaMKbound := CaMK0*(1 - CaMKtrap)/(1 + Km/Ca_ss);
  CaMKactive := CaMKbound + CaMKtrap;
  taufca := 10*CaMKactive/(0.15 + CaMKactive) + 1/(1 + Ca_ss/0.003) + 0.5;
  Grel := 3000*vg;
  vg := piecewise(1/(1 + exp((ibarca + 13)/5)), tissue == 0, 1);
  cafac := 1/(1 + exp((ICaL + 0.05)/0.015));
  dro_inf := Ca_jsr^1.9/(Ca_jsr^1.9 + (49.28*Ca_ss/(Ca_ss + 0.0028))^1.9);
  dtau_rel := dtau_rel_max*CaMKactive/(KmCaMK + CaMKactive);
  ross := dro_inf/((1/ICaL)^2 + 1);
  riss := 1/(1 + exp((Ca_ss - 4 + 0.002*cafac)/2.5));
  tauri := 3 + dtau_rel + (350 - dtau_rel)/(1 + exp((Ca_ss - 0.003 + 0.003*cafac)/2));
  irelcicr := Grel*ro*ri*(Ca_jsr - Ca_ss);
  dKmPLB := dKmPLBmax*CaMKactive/(KmCaMK + CaMKactive);
  dJup := dJupmax*CaMKactive/(KmCaMK + CaMKactive);
  iup := (dJup + 1)*iupmax*Ca_i/(Ca_i + Kmup - dKmPLB);
  ileak := iupmax*Ca_nsr/nsrmax;
  idiff := (Ca_ss - Ca_i)/0.2;
  itr := (Ca_nsr - Ca_jsr)/120;
  CTNaCl := CTNaClmax*(ENa - ECl)^4/((ENa - ECl)^4 + 87.8251^4);
  CTKCl := CTKClmax*(EK - ECl)/(EK - ECl + 87.8251);
  bcsqn := 1/(1 + kmcsqn*csqnbar/(Ca_jsr + kmcsqn)^2);
  bmyo := 1/(1 + cbar*kmc/(Ca_i + kmc)^2 + kmt*tbar/(Ca_i + kmt)^2);
  bss := 1/(1 + BSRmax*KmBSR/(KmBSR + Ca_ss)^2 + BSLmax*KmBSL/(KmBSL + Ca_ss)^2);
  caiont := ICaL + ICab + IpCa - 2*INaCa;
  naiont := INa + 3*INaCa + 3*INaK + INal;
  kiont := IKr + IKs + IK1 + IKp - 2*INaK + Ito + 0.5*i_Stim;
  clont := IClb + Ito2 + 0.5*i_Stim;

  // Rate rules:
  V' = -(naiont + kiont + caiont + clont);
  H' = ah*(1 - H) - bh*H;
  m' = am*(1 - m) - bm*m;
  J' = aj*(1 - J) - bj*J;
  d' = (dss - d)/taud;
  dp' = (dpss - dp)/10;
  f' = (fss - f)/tauf;
  f2' = (f2ss - f2)/tauf2;
  fca' = (fcass - fca)/taufca;
  fca2' = (fca2ss - fca2)/taufca2;
  xr' = (xrss - xr)/tauxr;
  xs1' = (xss - xs1)/tauxs;
  xs2' = (xss - xs2)/tauxs/2;
  ydv' = ay*(1 - ydv) - by*ydv;
  ydv2' = ay2*(1 - ydv2) - by2*ydv2;
  zdv' = ay3*(1 - zdv) - by3*zdv;
  AA' = (AAss - AA)/1;
  mL' = amL*(1 - mL) - bmL*mL;
  hL' = (hLss - hL)/600;
  ro' = (ross - ro)/3;
  ri' = (riss - ri)/tauri;
  CaMKtrap' = 0.05*CaMKactive*(CaMKactive - CaMKtrap) - 6.8*CaMKtrap;
  Na_i' = -naiont*AF/vmyo + CTNaCl;
  K_i' = -kiont*AF/vmyo + CTKCl;
  Cl_i' = clont*AF/vmyo + CTNaCl + CTKCl;
  Ca_i' = bmyo*(-(ICab + IpCa - 2*INaCa)*AF/(vmyo*2) + (ileak - iup)*vnsr/vmyo + idiff*vss/vmyo);
  Ca_ss' = bss*(-ICaL*AF/(vss*2) + irelcicr*vjsr/vss - idiff);
  Ca_nsr' = iup - itr*vjsr/vnsr - ileak;
  Ca_jsr' = bcsqn*(itr - irelcicr);

  // Unit definitions:
  unit ms = 1e-3 second;
  unit per_ms = 1 / (1e-3 second);
  unit uA_per_uF = 1e-6 ampere / (1e-6 farad);
  unit mS_per_uF = 1e-3 siemens / (1e-6 farad);
  unit uL = 1e-6 litre;
  unit mV = 1e-3 volt;
  unit per_mV = 1 / (1e-3 volt);
  unit uF = 1e-6 farad;
  unit cm = 0.01 metre;
  unit cm2 = (0.01 metre)^2;
  unit mJ_per_mole_K = 1e-3 joule / (mole * kelvin);
  unit C_per_mole = coulomb / mole;
  unit mM = 1e-3 mole / litre;
  unit mM_per_ms = 1e-3 mole / (litre * 1e-3 second);
  unit mM4 = (1e-3 mole)^4 / litre^4;
  unit uF_per_cm2 = 1e-6 farad / (0.01 metre)^2;
  unit uF_mole_per_C = 1e-6 farad * mole / coulomb;
  unit L_per_F_ms = litre / (farad * 1e-3 second);
  unit time = 1e-3 second;
end
