// SBML level 2 version 4

model Inada2009_AtrioventricularNode_AtrioNodalCell()
  // This a model from the article:
  // One-dimensional mathematical model of the atrioventricular node including atrio-nodal, nodal, and nodal-his cells.
  // Inada S, Hancox JC, Zhang H, Boyett MR. Biophys J 2009 Oct 21;97(8):2117-27 19843444 ,
  // Abstract:
  // Mathematical models are a repository of knowledge as well as research and teaching tools. Although action potential models have been developed for most regions of the heart, there is no model for the atrioventricular node (AVN). We have developed action potential models for single atrio-nodal, nodal, and nodal-His cells. The models have the same action potential shapes and refractoriness as observed in experiments. Using these models, together with models for the sinoatrial node (SAN) and atrial muscle, we have developed a one-dimensional (1D) multicellular model including the SAN and AVN. The multicellular model has slow and fast pathways into the AVN and using it we have analyzed the rich behavior of the AVN. Under normal conditions, action potentials were initiated in the SAN center and then propagated through the atrium and AVN. The relationship between the AVN conduction time and the timing of a premature stimulus (conduction curve) is consistent with experimental data. After premature stimulation, atrioventricular nodal reentry could occur. After slow pathway ablation or block of the L-type Ca(2+) current, atrioventricular nodal reentry was abolished. During atrial fibrillation, the AVN limited the number of action potentials transmitted to the ventricle. In the absence of SAN pacemaking, the inferior nodal extension acted as the pacemaker. In conclusion, we have developed what we believe is the first detailed mathematical model of the AVN and it shows the typical physiological and pathophysiological characteristics of the tissue. The model can be used as a tool to analyze the complex structure and behavior of the AVN.
  // This model was taken from the CellML repository and automatically converted to SBML.
  // The original model was: Inada S, Hancox JC, Zhang H, Boyett MR. (2009) - version=1.0
  // The original CellML model was created by:
  // Penny Noble
  // penny.noble@dpag.ox.ac.uk
  // The University of Oxford
  // This model originates from BioModels Database: A Database of Annotated Published Models (http://www.ebi.ac.uk/biomodels/). It is copyright (c) 2005-2011 The BioModels.net Team.
  // To the extent possible under law, all copyright and related or neighbouring rights to this encoded model have been dedicated to the public domain worldwide. Please refer to CC0 Public Domain Dedication for more information.
  // In summary, you are entitled to use this encoded model in absolutely any manner you deem suitable, verbatim, or with modification, alone or embedded it in a larger context, redistribute it, commercially or not, in a restricted way or not. .
  // To cite BioModels Database, please use: Li C, Donizelli M, Rodriguez N, Dharuri H, Endler L, Chelliah V, Li L, He E, Henry A, Stefan MI, Snoep JL, Hucka M, Le Novère N, Laibe C (2010) BioModels Database: An enhanced, curated and annotated resource for published quantitative kinetic models. BMC Syst Biol., 4:92.
  // biomodels.db:MODEL1006230082
  // isDescribedBy pubmed:19843444
  // biomodels.db:MODEL1006230082
  // isDescribedBy pubmed:19843444
  // biomodels.db:MODEL1006230082
  // biomodels.db:MODEL1006230082

  // Compartments:
  compartment COMpartment = 1 litre;

  // Parameters:
  V_membrane = -71.55355;
  R = 8314.472;
  T = 310;
  F = 9.64853415e4;
  C = 4e-5;
  stim_start = 0.1;
  stim_end = 99999;
  stim_period = 1;
  stim_duration = 0.001;
  stim_amplitude = -2;
  g_f = 0;
  y = 0.231893;
  V_hyperpolarising_activated_current_y_gate = ;
  time_hyperpolarising_activated_current_y_gate = ;
  ACh_hyperpolarising_activated_current_y_gate = ;
  g_Kr = 0.0015;
  var E_K_rapid_delayed_rectifier_potassium_current;
  paf = 0.0009078274;
  time_rapid_delayed_rectifier_potassium_current_paf_gate = ;
  V_rapid_delayed_rectifier_potassium_current_paf_gate = ;
  pas = 0.002899013;
  time_rapid_delayed_rectifier_potassium_current_pas_gate = ;
  V_rapid_delayed_rectifier_potassium_current_pas_gate = ;
  pik = 0.98789;
  time_rapid_delayed_rectifier_potassium_current_pik_gate = ;
  V_rapid_delayed_rectifier_potassium_current_pik_gate = ;
  g_K1 = 0.0125;
  g_b = 0.0018;
  E_b = -52.5;
  I_p = 0.0246;
  kNaCa = 5.916;
  Qci = 0.1369;
  Qn = 0.4315;
  Qco = 0;
  Kci = 0.0207;
  K1ni = 395.3;
  K2ni = 2.289;
  K3ni = 26.44;
  Kcni = 26.44;
  K3no = 4.663;
  K1no = 1628;
  K2no = 561.4;
  Kco = 3.663;
  g_Na = 5e-7;
  m = 0.0104794;
  V_fast_sodium_current_m_gate = ;
  time_fast_sodium_current_m_gate = ;
  delta_m = 1e-5;
  h1 = 0.792211;
  V_fast_sodium_current_h1_gate = ;
  time_fast_sodium_current_h1_gate = ;
  h2 = 0.7883484;
  V_fast_sodium_current_h2_gate = ;
  time_fast_sodium_current_h2_gate = ;
  g_CaL = 0.0185;
  E_CaL = 62.5;
  d = 3.228673e-5;
  V_L_type_calcium_current_d_gate = ;
  time_L_type_calcium_current_d_gate = ;
  act_shift = 0;
  slope_factor_act = -6.61;
  f = 0.9988221;
  V_L_type_calcium_current_f_gate = ;
  time_L_type_calcium_current_f_gate = ;
  inact_shift_L_type_calcium_current_f_gate = -5;
  f2 = 0.9988155;
  V_L_type_calcium_current_f2_gate = ;
  time_L_type_calcium_current_f2_gate = ;
  inact_shift_L_type_calcium_current_f2_gate = -5;
  var E_K_transient_outward_potassium_current;
  g_to = 0.02;
  r = 0.008028809;
  V_transient_outward_potassium_current_r_gate = ;
  time_transient_outward_potassium_current_r_gate = ;
  q_fast = 0.9954944;
  V_transient_outward_potassium_current_qfast_gate = ;
  time_transient_outward_potassium_current_qfast_gate = ;
  q_slow = 0.5479669;
  V_transient_outward_potassium_current_qslow_gate = ;
  time_transient_outward_potassium_current_qslow_gate = ;
  E_st = -37.4;
  g_st = 0;
  qa = 0.0758461;
  V_sustained_outward_potassium_current_qa_gate = ;
  time_sustained_outward_potassium_current_qa_gate = ;
  qi = 0.9433456;
  V_sustained_outward_potassium_current_qi_gate = ;
  time_sustained_outward_potassium_current_qi_gate = ;
  g_ACh_max = 0.0198;
  ACh_acetylcholine_sensitive_current = 0;
  K_ACh = 0.00035;
  achf = 0.7602656;
  alpha_achf = 73.1;
  time_acetylcholine_sensitive_current_achf_gate = ;
  V_acetylcholine_sensitive_current_achf_gate = ;
  achs = 0.7646649;
  alpha_achs = 3.7;
  time_acetylcholine_sensitive_current_achs_gate = ;
  V_acetylcholine_sensitive_current_achs_gate = ;
  Nao = 140;
  Nai = 8;
  Cao = 2;
  Cai = 3.104304e-5;
  Casub = 2.869628e-5;
  V_cell = 4.39823e-6;
  Ca_up = 0.6672209;
  Ca_rel = 0.557459;
  P_rel = 1805.6;
  K_up = 0.0006;
  tau_tr = 0.06;
  f_TC = 0.006155782;
  f_TMC = 0.1122009;
  f_TMM = 0.7843095;
  f_CMi = 0.01289569;
  f_CMs = 0.01192018;
  f_CQ = 0.400684;
  f_CSL = 8.911243e-6;
  Kc = 5.4;
  Ki = 140;

  // Assignment rules:
  i_Stim := piecewise(stim_amplitude, (time >= stim_start) && (time <= stim_end) && (time - stim_start - floor((time - stim_start)/stim_period)*stim_period <= stim_duration), 0);
  RTONF := R*T/F;
  i_f := y*g_f*(V_membrane - (-30));
  y_inf := 1/(1 + exp((V_hyperpolarising_activated_current_y_gate + 83.19 - (-7.2*ACh_hyperpolarising_activated_current_y_gate^0.69/(1.26^0.69 + ACh_hyperpolarising_activated_current_y_gate^0.69)))/13.56));
  tau_y := 0.25 + 2*exp(-(V_hyperpolarising_activated_current_y_gate + 70)^2/500);
  E_K_rapid_delayed_rectifier_potassium_current := RTONF*ln(Kc/Ki);
  i_Kr := g_Kr*(0.9*paf + 0.1*pas)*pik*(V_membrane - E_K_rapid_delayed_rectifier_potassium_current);
  paf_infinity := 1/(1 + exp((V_rapid_delayed_rectifier_potassium_current_paf_gate + 10.22)/(-8.5)));
  tau_paf := 1/(17*exp(0.0398*V_rapid_delayed_rectifier_potassium_current_paf_gate) + 0.211*exp(-0.051*V_rapid_delayed_rectifier_potassium_current_paf_gate));
  pas_infinity := 1/(1 + exp((V_rapid_delayed_rectifier_potassium_current_pas_gate + 10.22)/(-8.5)));
  tau_pas := 0.33581 + 0.90673*exp(-(V_rapid_delayed_rectifier_potassium_current_pas_gate + 10)^2/988.05);
  pik_infinity := 1/(1 + exp((V_rapid_delayed_rectifier_potassium_current_pik_gate + 4.9)/15.14))*(1 - 0.3*exp(-V_rapid_delayed_rectifier_potassium_current_pik_gate^2/500));
  alpha_pik := 92.01*exp(-0.0183*V_rapid_delayed_rectifier_potassium_current_pik_gate);
  beta_pik := 603.6*exp(0.00942*V_rapid_delayed_rectifier_potassium_current_pik_gate);
  tau_pik := 1/(alpha_pik + beta_pik);
  g_K1_prime := g_K1*(0.5 + 0.5/(1 + exp((V_membrane + 30)/5)));
  i_K1 := g_K1_prime*(Kc/(Kc + 0.59))^3*(V_membrane + 81.9)/(1 + exp(1.393*(V_membrane + 81.9 + 3.6)/RTONF));
  i_b := g_b*(V_membrane - E_b);
  i_p := I_p*(Nai/(5.64 + Nai))^3*(Kc/(0.621 + Kc))^2*1.6/(1.5 + exp(-(V_membrane + 60)/40));
  do := 1 + Cao/Kco*(1 + exp(Qco*V_membrane/RTONF)) + Nao/K1no + Nao^2/(K1no*K2no) + Nao^3/(K1no*K2no*K3no);
  k32 := exp(Qn*V_membrane/(2*RTONF));
  k23 := (Nao^2/(K1no*K2no) + Nao^3/(K1no*K2no*K3no))*exp(-Qn*V_membrane/(2*RTONF))/do;
  k21 := Cao/Kco*exp(-Qco*V_membrane/RTONF)/do;
  k34 := Nao/(K3no + Nao);
  di := 1 + Casub/Kci*(1 + exp(-Qci*V_membrane/RTONF) + Nai/Kcni) + Nai/K1ni + Nai^2/(K1ni*K2ni) + Nai^3/(K1ni*K2ni*K3ni);
  k41 := exp(-Qn*V_membrane/(2*RTONF));
  k14 := (Nai^2/(K1ni*K2ni) + Nai^3/(K1ni*K2ni*K3ni))*exp(Qn*V_membrane/(2*RTONF))/di;
  k12 := Casub/Kci*exp(-Qci*V_membrane/RTONF)/di;
  k43 := Nai/(K3ni + Nai);
  x1 := k41*k34*(k23 + k21) + k21*k32*(k43 + k41);
  x2 := k32*k43*(k14 + k12) + k41*k12*(k34 + k32);
  x3 := k14*k43*(k23 + k21) + k12*k23*(k43 + k41);
  x4 := k23*k34*(k14 + k12) + k14*k21*(k34 + k32);
  i_NaCa := kNaCa*(x2*k21 - x1*k12)/(x1 + x2 + x3 + x4);
  E_Na := RTONF*ln(Nao/Nai);
  i_Na := g_Na*m^3*(0.635*h1 + 0.365*h2)*Nao*V_membrane*F/RTONF*(exp((V_membrane - E_Na)/RTONF) - 1)/(exp(V_membrane/RTONF) - 1);
  E0_m := V_fast_sodium_current_m_gate + 44.4;
  alpha_m := piecewise(-460*(-12.673)/exp(E0_m/(-12.673)), abs(E0_m) < delta_m, -460*E0_m/(exp(E0_m/(-12.673)) - 1));
  beta_m := 18400*exp(E0_m/(-12.673));
  alpha_h1 := 44.9*exp((V_fast_sodium_current_h1_gate + 66.9)/(-5.57));
  beta_h1 := 1491/(1 + 323.3*exp((V_fast_sodium_current_h1_gate + 94.6)/(-12.9)));
  h1_inf := alpha_h1/(alpha_h1 + beta_h1);
  tau_h1 := 0.03/(1 + exp((V_fast_sodium_current_h1_gate + 40)/6)) + 0.00035;
  alpha_h2 := 44.9*exp((V_fast_sodium_current_h2_gate + 66.9)/(-5.57));
  beta_h2 := 1491/(1 + 323.3*exp((V_fast_sodium_current_h2_gate + 94.6)/(-12.9)));
  h2_inf := alpha_h2/(alpha_h2 + beta_h2);
  tau_h2 := 0.12/(1 + exp((V_fast_sodium_current_h2_gate + 60)/2)) + 0.00295;
  i_CaL := g_CaL*d*(0.675*f + 0.325*f2)*(V_membrane - E_CaL)*(1 - i_ACh*ACh_acetylcholine_sensitive_current/(0.9 + ACh_acetylcholine_sensitive_current)/1);
  alpha_d := -26.12*(V_L_type_calcium_current_d_gate + 35)/(exp((V_L_type_calcium_current_d_gate + 35)/(-2.5)) - 1) + (-78.11*V_L_type_calcium_current_d_gate/(exp(-0.208*V_L_type_calcium_current_d_gate) - 1));
  beta_d := 10.52*(V_L_type_calcium_current_d_gate - 5)/(exp(0.4*(V_L_type_calcium_current_d_gate - 5)) - 1);
  d_inf := 1/(1 + exp((V_L_type_calcium_current_d_gate - (-3.2 + act_shift))/slope_factor_act));
  tau_d := 1/(alpha_d + beta_d);
  f_inf := 1/(1 + exp((V_L_type_calcium_current_f_gate - (-24 + inact_shift_L_type_calcium_current_f_gate))/6.31));
  tau_f := 0.01 + 0.1539*exp(-(V_L_type_calcium_current_f_gate + 40)^2/185.67);
  f2_inf := 1/(1 + exp((V_L_type_calcium_current_f2_gate - (-24 + inact_shift_L_type_calcium_current_f2_gate))/6.31));
  tau_f2 := 0.06 + 0.48076*2.25*exp(-(V_L_type_calcium_current_f2_gate - (-40))^2/138.04);
  i_to := g_to*r*(0.45*q_fast + 0.55*q_slow)*(V_membrane - E_K_transient_outward_potassium_current);
  E_K_transient_outward_potassium_current := RTONF*ln(Kc/Ki);
  r_infinity := 1/(1 + exp((V_transient_outward_potassium_current_r_gate - 7.44)/(-16.4)));
  tau_r := 0.596 + 3.118/(1.037*exp(0.09*(V_transient_outward_potassium_current_r_gate + 30.61)) + 0.396*exp(-0.12*(V_transient_outward_potassium_current_r_gate + 23.84)));
  qfast_infinity := 1/(1 + exp((V_transient_outward_potassium_current_qfast_gate + 33.8)/6.12));
  tau_qfast := 12.66 + 4.72716/(1 + exp((V_transient_outward_potassium_current_qfast_gate + 154.5)/23.96));
  qslow_infinity := 1/(1 + exp((V_transient_outward_potassium_current_qslow_gate + 33.8)/6.12));
  tau_qslow := 0.1 + 4*exp(-(V_transient_outward_potassium_current_qslow_gate + 65)^2/500);
  i_st := g_st*qa*qi*(V_membrane - E_st);
  qa_infinity := 1/(1 + exp((V_sustained_outward_potassium_current_qa_gate - (-49.1))/(-8.98)));
  alpha_qa := 1/(0.15*exp(-V_sustained_outward_potassium_current_qa_gate/11) + 0.2*exp(-V_sustained_outward_potassium_current_qa_gate/700));
  beta_qa := 1/(16*exp(V_sustained_outward_potassium_current_qa_gate/8) + 15*exp(V_sustained_outward_potassium_current_qa_gate/50));
  tau_qa := 0.001/(alpha_qa + beta_qa);
  alpha_qi := 0.1504/(3100*exp(V_sustained_outward_potassium_current_qi_gate/13) + 700*exp(V_sustained_outward_potassium_current_qi_gate/70));
  beta_qi := 0.1504/(95*exp(-V_sustained_outward_potassium_current_qi_gate/10) + 50*exp(-V_sustained_outward_potassium_current_qi_gate/700)) + 0.000229/(1 + exp(-V_sustained_outward_potassium_current_qi_gate/5));
  qi_infinity := alpha_qi/(alpha_qi + beta_qi);
  tau_qi := 0.001/(alpha_qi + beta_qi);
  g_ACh := g_ACh_max*achf*achs*ACh_acetylcholine_sensitive_current^1.5/(K_ACh^1.5 + ACh_acetylcholine_sensitive_current^1.5);
  i_ACh := g_ACh*Kc/(10 + Kc)*(V_membrane - E_K_rapid_delayed_rectifier_potassium_current)/(1 + exp((V_membrane - E_K_rapid_delayed_rectifier_potassium_current - 140)/(2.5*RTONF)));
  beta_achf := 120/(1 + exp(-(V_acetylcholine_sensitive_current_achf_gate + 50)/15));
  beta_achs := 5.82/(1 + exp(-(V_acetylcholine_sensitive_current_achs_gate + 50)/15));
  i_diff := (Casub - Cai)/0.04;
  i_up := 5/(1 + K_up/Cai);
  i_tr := (Ca_up - Ca_rel)/tau_tr;
  i_rel := P_rel*(Ca_rel - Casub)/(1 + (0.0012/Casub)^2);
  V_up := 0.0116*V_cell;
  V_rel := 0.0012*V_cell;
  Vi := 0.46*V_cell - V_sub;
  V_sub := 0.01*V_cell;
  diff_f_TC := 88.8*Cai*(1 - f_TC) - 0.446*f_TC;
  diff_f_TMC := 227.7*Cai*(1 - f_TMC - f_TMM) - 0.00751*f_TMC;
  diff_f_TMM := 2.277*2.5*(1 - f_TMC - f_TMM) - 0.751*f_TMM;
  diff_f_CMi := 227.7*Cai*(1 - f_CMi) - 0.542*f_CMi;
  diff_f_CMs := 227.7*Casub*(1 - f_CMs) - 0.542*f_CMs;
  diff_f_CQ := 0.534*Ca_rel*(1 - f_CQ) - 0.445*f_CQ;
  diff_f_CSL := 0.001*(115*Casub*(1 - f_CSL) - 1000*f_CSL);

  // Rate rules:
  V_membrane' = -(i_Na + i_CaL + i_to + i_Kr + i_f + i_st + i_K1 + i_NaCa + i_p + i_b + i_ACh + i_Stim)/C;
  y' = (y_inf - y)/tau_y;
  paf' = (paf_infinity - paf)/tau_paf;
  pas' = (pas_infinity - pas)/tau_pas;
  pik' = (pik_infinity - pik)/tau_pik;
  m' = alpha_m*(1 - m) - beta_m*m;
  h1' = (h1_inf - h1)/tau_h1;
  h2' = (h2_inf - h2)/tau_h2;
  d' = (d_inf - d)/tau_d;
  f' = (f_inf - f)/tau_f;
  f2' = (f2_inf - f2)/tau_f2;
  r' = (r_infinity - r)/tau_r;
  q_fast' = (qfast_infinity - q_fast)/tau_qfast;
  q_slow' = (qslow_infinity - q_slow)/tau_qslow;
  qa' = (qa_infinity - qa)/tau_qa;
  qi' = (qi_infinity - qi)/tau_qi;
  achf' = alpha_achf*(1 - achf) - beta_achf*achf;
  achs' = alpha_achs*(1 - achs) - beta_achs*achs;
  Ca_up' = i_up - i_tr*V_rel/V_up;
  Ca_rel' = i_tr - i_rel - 10*diff_f_CQ;
  Cai' = (i_diff*V_sub - i_up*V_up)/Vi - (0.045*diff_f_CMi + 0.031*diff_f_TC + 0.062*diff_f_TMC);
  Casub' = (-(i_CaL - 2*i_NaCa)/(2*F) + i_rel*V_rel)/V_sub - i_diff - 0.045*diff_f_CMs - 0.031/1.2*diff_f_CSL;
  f_TC' = diff_f_TC;
  f_TMC' = diff_f_TMC;
  f_TMM' = diff_f_TMM;
  f_CMi' = diff_f_CMi;
  f_CMs' = diff_f_CMs;
  f_CQ' = diff_f_CQ;
  f_CSL' = diff_f_CSL;

  // Unit definitions:
  unit per_second = 1 / second;
  unit millivolt = 1e-3 volt;
  unit millivolt2 = (1e-3 volt)^2;
  unit per_millivolt = 1 / (1e-3 volt);
  unit per_millivolt_second = 1 / (1e-3 volt * second);
  unit microS = 1e-6 siemens;
  unit microF = 1e-6 farad;
  unit nanoA = 1e-9 ampere;
  unit millimolar = 1e-3 mole / litre;
  unit millimolar_per_second = 1e-3 mole / (litre * second);
  unit per_millimolar_per_second = litre / (1e-3 mole * second);
  unit joule_per_kilomole_kelvin = joule / (1000 mole * kelvin);
  unit coulomb_per_mole = coulomb / mole;
  unit micrometre3 = (1e-6 metre)^3;
  unit microlitre_micrometre3 = 1e-6 litre / (1e-6 metre)^3;
  unit microlitre_per_second = 1e-6 litre / second;
end
