// SBML level 2 version 4

model Heldt2002_OrthostaticStress_circpbpk()
  // This a model from the article:
  // Computational modeling of cardiovascular response to orthostatic stress.
  // Heldt T, Shim EB, Kamm RD, Mark RG. J Appl Physiol 2002 Mar;92(3):1239-54 11842064 ,
  // Abstract:
  // The objective of this study is to develop a model of the cardiovascular system capable of simulating the short-term (< or = 5 min) transient and steady-state hemodynamic responses to head-up tilt and lower body negative pressure. The model consists of a closed-loop lumped-parameter representation of the circulation connected to set-point models of the arterial and cardiopulmonary baroreflexes. Model parameters are largely based on literature values. Model verification was performed by comparing the simulation output under baseline conditions and at different levels of orthostatic stress to sets of population-averaged hemodynamic data reported in the literature. On the basis of experimental evidence, we adjusted some model parameters to simulate experimental data. Orthostatic stress simulations are not statistically different from experimental data (two-sided test of significance with Bonferroni adjustment for multiple comparisons). Transient response characteristics of heart rate to tilt also compare well with reported data. A case study is presented on how the model is intended to be used in the future to investigate the effects of post-spaceflight orthostatic intolerance.
  // This model was taken from the CellML repository and automatically converted to SBML.
  // The original model was: Heldt T, Shim EB, Kamm RD, Mark RG. (2002) - version=1.0
  // The original CellML model was created by:
  // David Cumin
  // d.cumin@auckland.ac.nz
  // The University of Auckland
  // This model originates from BioModels Database: A Database of Annotated Published Models (http://www.ebi.ac.uk/biomodels/). It is copyright (c) 2005-2011 The BioModels.net Team.
  // To the extent possible under law, all copyright and related or neighbouring rights to this encoded model have been dedicated to the public domain worldwide. Please refer to CC0 Public Domain Dedication for more information.
  // In summary, you are entitled to use this encoded model in absolutely any manner you deem suitable, verbatim, or with modification, alone or embedded it in a larger context, redistribute it, commercially or not, in a restricted way or not..
  // To cite BioModels Database, please use: Li C, Donizelli M, Rodriguez N, Dharuri H, Endler L, Chelliah V, Li L, He E, Henry A, Stefan MI, Snoep JL, Hucka M, Le Novère N, Laibe C (2010) BioModels Database: An enhanced, curated and annotated resource for published quantitative kinetic models. BMC Syst Biol., 4:92.
  // biomodels.db:MODEL1006230084
  // isDescribedBy pubmed:11842064
  // biomodels.db:MODEL1006230084
  // isDescribedBy pubmed:11842064
  // biomodels.db:MODEL1006230084
  // biomodels.db:MODEL1006230084

  // Compartments:
  compartment COMpartment = 1 litre;

  // Parameters:
  time_Circ_Environment = ;
  HR = 77;
  var beattime_LATiming;
  Esys_LAElastanceFunction = 0.145;
  Edia_LAElastanceFunction = 0.131;
  TsK_LAElastanceFunction = 0.2;
  var Ts_LAElastanceFunction;
  P_LA_ext = 0;
  V_LA = 144.0389;
  V_LA_0 = 15;
  R_LA = 0.01;
  sub_X_LA = 0;
  PRint = 0.12;
  var beattime_LVTiming;
  Esys_LVElastanceFunction = 5.6;
  Edia_LVElastanceFunction = 0.19;
  TsK_LVElastanceFunction = 0.35;
  var Ts_LVElastanceFunction;
  pLVPext = 0;
  V_LV = 118.7532;
  V_LV_0 = 30;
  R_LV = 0.001;
  sub_X_LV = 0;
  C_AO = 1.2;
  L_AO = 5e-5;
  R_AO = 0.01;
  V_AO_0 = 200;
  V_AO = 302.7145;
  F_AOalways = -6898.979;
  sub_X_AO = 0;
  R_CO = 1;
  R_COV = 0.2;
  V_CO_0 = 10;
  C_CO = 0.1;
  V_CO = 11.40122;
  sub_X_CO = 0;
  R_CR = 5;
  R_CRV = 0.02;
  V_CR_0 = 10;
  C_CR = 1;
  V_CR = 27.21479;
  sub_X_CR = 0;
  D_CRtissue = 1;
  V_CRtissue = 1;
  sub_X_CRtissue = 0;
  R_AR = 1.5;
  C_AR = 0.5;
  V_AR_0 = 370;
  V_AR = 383.5571;
  sub_X_AR = 0;
  C_AD = 1.81;
  R_AD = 1;
  R_ADV = 0.33;
  V_AD_0 = 75;
  V_AD = 111.6391;
  sub_X_AD = 0;
  C_MU = 1.81;
  R_MU = 1;
  R_MUV = 0.33;
  V_MU_0 = 75;
  V_MU = 111.6391;
  sub_X_MU = 0;
  C_GI = 1.81;
  R_GI = 1;
  R_GIV = 0.33;
  V_GI_0 = 75;
  V_GI = 111.6391;
  sub_X_GI = 0;
  C_LI = 1.81;
  R_LI = 1;
  R_LIV = 0.33;
  V_LI_0 = 75;
  V_LI = 111.6391;
  sub_X_LI = 0;
  metabolism = 0;
  C_KI = 1.81;
  R_KI = 1;
  V_KI_0 = 75;
  R_KIV = 0.33;
  V_KI = 111.6391;
  sub_X_KI = 0;
  C_SK = 1.81;
  R_SK = 1;
  R_SKV = 0.33;
  V_SK_0 = 75;
  V_SK = 111.6391;
  sub_X_SK = 0;
  C_OT = 1.81;
  R_OT = 1;
  R_OTV = 0.33;
  V_OT_0 = 75;
  V_OT = 111.6391;
  sub_X_OT = 0;
  R_VEV = 0.0223;
  V_VE = 833.2917;
  C_VE = 13.24;
  V_VE_0 = 596;
  sub_X_VE = 5;
  R_VCV = 0.0267;
  V_VC = 1849.938;
  V_VC_0 = 600;
  C_VC = 73.88;
  sub_X_VC = 0;
  var beattime_RATiming;
  Esys_RAElastanceFunction = 0.11;
  Edia_RAElastanceFunction = 0.099;
  TsK_RAElastanceFunction = 0.2;
  var Ts_RAElastanceFunction;
  P_RA_ext = 0;
  V_RA = 152.1508;
  V_RA_0 = 15;
  sub_X_RA = 0;
  PRinterval = 0.12;
  var beattime_RVTiming;
  Esys_RVElastanceFunction = 0.67;
  Edia_RVElastanceFunction = 0.104;
  TsK_RVElastanceFunction = 0.35;
  var Ts_RVElastanceFunction;
  P_RV_ext = 0;
  V_RV = 154.3379;
  V_RV_0 = 25;
  R_RV = 0.002;
  sub_X_RV = 0;
  R_PA = 0.0227;
  C_PA = 2.222;
  V_PA_0 = 50;
  V_PA = 112.059;
  sub_X_PA = 0;
  V_Pa = 66.99105;
  C_Pa = 1.481;
  R_Pa = 0.053;
  V_Pa_0 = 30;
  sub_X_Pa = 0;
  R_SH = 2;
  C_PC = 1.778;
  R_PC = 0.0379;
  R_PCV = 0.0379;
  V_PC_0 = 53;
  V_PC = 91.77842;
  sub_X_PC = 0;
  C_PV = 5;
  V_PV_0 = 150;
  V_PV = 239.259;
  sub_X_PV = 0;

  // Assignment rules:
  hrf := HR/0.06;
  beattime_LATiming := (time_Circ_Environment - floor(time_Circ_Environment/hrf)*hrf)/1000;
  Ts_LAElastanceFunction := TsK_LAElastanceFunction*sqrt(hrf/1000);
  E_LA := piecewise(Edia_LAElastanceFunction + (Esys_LAElastanceFunction - Edia_LAElastanceFunction)*(1 - cos(pi*beattime_LATiming/Ts_LAElastanceFunction))/2, (beattime_LATiming >= 0) && (beattime_LATiming <= Ts_LAElastanceFunction), Edia_LAElastanceFunction + (Esys_LAElastanceFunction - Edia_LAElastanceFunction)*(1 + cos(2*pi*(beattime_LATiming - Ts_LAElastanceFunction)/Ts_LAElastanceFunction))/2, (beattime_LATiming < 1.5*Ts_LAElastanceFunction) && (beattime_LATiming >= Ts_LAElastanceFunction), Edia_LAElastanceFunction);
  conc_X_LA := sub_X_LA/V_LA;
  P_LA := E_LA*(V_LA - V_LA_0) + P_LA_ext;
  beattime_LVTiming := (time_Circ_Environment - floor(time_Circ_Environment/hrf)*hrf)/1000 - PRint;
  Ts_LVElastanceFunction := TsK_LVElastanceFunction*sqrt(hrf/1000);
  E_LV := piecewise(Edia_LVElastanceFunction + (Esys_LVElastanceFunction - Edia_LVElastanceFunction)*(1 - cos(pi*beattime_LVTiming/Ts_LVElastanceFunction))/2, (beattime_LVTiming >= 0) && (beattime_LVTiming <= Ts_LVElastanceFunction), Edia_LVElastanceFunction + (Esys_LVElastanceFunction - Edia_LVElastanceFunction)*(1 + cos(2*pi*(beattime_LVTiming - Ts_LVElastanceFunction)/Ts_LVElastanceFunction))/2, (beattime_LVTiming < 1.5*Ts_LVElastanceFunction) && (beattime_LVTiming >= Ts_LVElastanceFunction), Edia_LVElastanceFunction);
  fiber_stress := P_LV*(1 + 3*V_LV/200);
  conc_X_LV := sub_X_LV/V_LV;
  P_LV := E_LV*(V_LV - V_LV_0) + pLVPext;
  F_LV := piecewise((P_LA - P_LV)/R_LV, P_LA > P_LV, 0);
  conc_X_AO := sub_X_AO/V_AO;
  F_AO := piecewise(F_AOalways, P_LV > P_AO, 0);
  P_AO := 1/C_AO*(V_AO - V_AO_0);
  conc_X_CO := sub_X_CO/V_CO;
  P_CO := 1/C_CO*(V_CO - V_CO_0);
  F_CO := piecewise((P_LV - P_CO)/R_CO, P_LV > P_CO, 0);
  conc_X_CRtissue := sub_X_CRtissue/V_CRtissue;
  conc_X_CR := sub_X_CR/V_CR;
  P_CR := 1/C_CR*(V_CR - V_CR_0);
  F_CR := (P_AO - P_CR)/R_CR;
  F_CRV := (P_CR - P_VC)/R_CRV;
  conc_X_AR := sub_X_AR/V_AR;
  P_AR := 1/C_AR*(V_AR - V_AR_0);
  F_AR := (P_AO - P_AR)/R_AR;
  conc_X_AD := sub_X_AD/V_AD;
  F_ADV := (P_AD - P_VE)/R_ADV;
  P_AD := 1/C_AD*(V_AD - V_AD_0);
  F_AD := (P_AR - P_AD)/R_AD;
  conc_X_MU := sub_X_MU/V_MU;
  F_MUV := (P_MU - P_VE)/R_MUV;
  P_MU := 1/C_MU*(V_MU - V_MU_0);
  F_MU := (P_AR - P_MU)/R_MU;
  conc_X_GI := sub_X_GI/V_GI;
  F_GIV := (P_GI - P_LI)/R_GIV;
  P_GI := 1/C_GI*(V_GI - V_GI_0);
  F_GI := (P_AR - P_GI)/R_GI;
  conc_X_LI := sub_X_LI/V_LI;
  F_LIV := (P_LI - P_VE)/R_LIV;
  P_LI := 1/C_LI*(V_LI - V_LI_0);
  F_LI := (P_AR - P_LI)/R_LI;
  conc_X_KI := sub_X_KI/V_KI;
  F_KIV := (P_KI - P_VE)/R_KIV;
  P_KI := 1/C_KI*(V_KI - V_KI_0);
  F_KI := (P_AR - P_KI)/R_KI;
  conc_X_SK := sub_X_SK/V_SK;
  F_SKV := (P_SK - P_VE)/R_SKV;
  P_SK := 1/C_SK*(V_SK - V_SK_0);
  F_SK := (P_AR - P_SK)/R_SK;
  conc_X_OT := sub_X_OT/V_OT;
  F_OTV := (P_OT - P_VE)/R_OTV;
  P_OT := 1/C_OT*(V_OT - V_OT_0);
  F_OT := (P_AR - P_OT)/R_OT;
  conc_X_VE := sub_X_VE/V_VE;
  F_VE := F_SKV + F_ADV + F_MUV + F_LIV + F_KIV + F_OTV;
  P_VE := 1/C_VE*(V_VE - V_VE_0);
  F_VEV := (P_VE - P_VC)/R_VEV;
  conc_X_VC := sub_X_VC/V_VC;
  F_VC := F_CRV + F_VEV;
  F_VCV := (P_VC - P_RA)/R_VCV;
  P_VC := 1/C_VC*(V_VC - V_VC_0);
  beattime_RATiming := (time_Circ_Environment - floor(time_Circ_Environment/hrf)*hrf)/1000;
  Ts_RAElastanceFunction := TsK_RAElastanceFunction*sqrt(hrf/1000);
  E_RA := piecewise(Edia_RAElastanceFunction + (Esys_RAElastanceFunction - Edia_RAElastanceFunction)*(1 - cos(pi*beattime_RATiming/Ts_RAElastanceFunction))/2, (beattime_RATiming >= 0) && (beattime_RATiming <= Ts_RAElastanceFunction), Edia_RAElastanceFunction + (Esys_RAElastanceFunction - Edia_RAElastanceFunction)*(1 + cos(2*pi*(beattime_RATiming - Ts_RAElastanceFunction)/Ts_RAElastanceFunction))/2, (beattime_RATiming < 1.5*Ts_RAElastanceFunction) && (beattime_RATiming >= Ts_RAElastanceFunction), Edia_RAElastanceFunction);
  conc_X_RA := sub_X_RA/V_RA;
  P_RA := E_RA*(V_RA - V_RA_0) + P_RA_ext;
  F_RA := F_VCV + F_COV;
  F_COV := (P_CO - P_RA)/R_COV;
  beattime_RVTiming := (time_Circ_Environment - floor(time_Circ_Environment/hrf)*hrf)/1000 - PRinterval;
  Ts_RVElastanceFunction := TsK_RVElastanceFunction*sqrt(hrf/1000);
  E_RV := piecewise(Edia_RVElastanceFunction + (Esys_RVElastanceFunction - Edia_RVElastanceFunction)*(1 - cos(pi*beattime_RVTiming/Ts_RVElastanceFunction))/2, (beattime_RVTiming >= 0) && (beattime_RVTiming <= Ts_RVElastanceFunction), Edia_RVElastanceFunction + (Esys_RVElastanceFunction - Edia_RVElastanceFunction)*(1 + cos(2*pi*(beattime_RVTiming - Ts_RVElastanceFunction)/Ts_RVElastanceFunction))/2, (beattime_RVTiming < 1.5*Ts_RVElastanceFunction) && (beattime_RVTiming >= Ts_RVElastanceFunction), Edia_RVElastanceFunction);
  conc_X_RV := sub_X_RV/V_RV;
  P_RV := E_RV*(V_RV - V_RV_0) + P_RV_ext;
  F_RV := piecewise((P_RA - P_RV)/R_RV, P_RA > P_RV, 0);
  conc_X_PA := sub_X_PA/V_PA;
  F_PA := piecewise((P_RV - P_PA)/R_PA, P_RV > P_PA, 0);
  P_PA := 1/C_PA*(V_PA - V_PA_0);
  conc_X_Pa := sub_X_Pa/V_Pa;
  P_Pa := 1/C_Pa*(V_Pa - V_Pa_0);
  F_Pa := (P_PA - P_Pa)/R_Pa;
  F_SH := (P_Pa - P_PC)/R_SH;
  conc_X_PC := sub_X_PC/V_PC;
  P_PC := 1/C_PC*(V_PC - V_PC_0);
  F_PC := (P_Pa - P_PC)/R_PC;
  F_PCV := (P_PC - P_PV)/R_PCV;
  conc_X_PV := sub_X_PV/V_PV;
  F_PV := F_PCV + F_SH;
  P_PV := 1/C_PV*(V_PV - V_PV_0);
  F_LA := (P_PV - P_LA)/R_LA;

  // Rate rules:
  sub_X_LA' = (conc_X_PV*F_LA - conc_X_LA*F_LV)/1000;
  V_LA' = (F_LA - F_LV)/1000;
  sub_X_LV' = (conc_X_LA*F_LV - conc_X_LV*(F_AO + F_CO))/1000;
  V_LV' = (F_LV - F_AO - F_CO)/1000;
  sub_X_AO' = (conc_X_LV*F_AO - conc_X_AO*(F_CR + F_AR))/1000;
  F_AOalways' = (1/L_AO*(P_LV - P_AO) - R_AO/L_AO*F_AOalways)/1000;
  V_AO' = (F_AO - F_AR - F_CR)/1000;
  sub_X_CO' = (conc_X_LV*F_CO - conc_X_CO*F_COV)/1000;
  V_CO' = (F_CO - F_COV)/1000;
  sub_X_CRtissue' = (conc_X_CR - conc_X_CRtissue)*D_CRtissue/1000;
  sub_X_CR' = (conc_X_AO*F_CR - conc_X_CR*F_CRV - (conc_X_CR - conc_X_CRtissue)*D_CRtissue)/1000;
  V_CR' = (F_CR - F_CRV)/1000;
  sub_X_AR' = (conc_X_AO*F_AR - conc_X_AR*(F_SK + F_AD + F_MU + F_GI + F_LI + F_KI + F_OT))/1000;
  V_AR' = (F_AR - F_AD - F_MU - F_GI - F_LI - F_KI - F_OT - F_SK)/1000;
  sub_X_AD' = (conc_X_AR*F_AD - conc_X_AD*F_ADV)/1000;
  V_AD' = (F_AD - F_ADV)/1000;
  sub_X_MU' = (conc_X_AR*F_MU - conc_X_MU*F_MUV)/1000;
  V_MU' = (F_MU - F_MUV)/1000;
  sub_X_GI' = (conc_X_AR*F_GI - conc_X_GI*F_GIV)/1000;
  V_GI' = (F_GI - F_GIV)/1000;
  sub_X_LI' = (conc_X_GI*F_GIV + conc_X_AR*F_LI - conc_X_LI*F_LIV + conc_X_LI*metabolism)/1000;
  V_LI' = (F_GIV + F_LI - F_LIV)/1000;
  sub_X_KI' = (conc_X_AR*F_KI - conc_X_KI*F_KIV)/1000;
  V_KI' = (F_KI - F_KIV)/1000;
  sub_X_SK' = (conc_X_AR*F_SK - conc_X_SK*F_SKV)/1000;
  V_SK' = (F_SK - F_SKV)/1000;
  sub_X_OT' = (conc_X_AR*F_OT - conc_X_OT*F_OTV)/1000;
  V_OT' = (F_OT - F_OTV)/1000;
  sub_X_VE' = (conc_X_SK*F_SKV + conc_X_AD*F_ADV + conc_X_MU*F_MUV + conc_X_LI*F_LIV + conc_X_KI*F_KIV + conc_X_OT*F_OTV - conc_X_VE*F_VEV)/1000;
  V_VE' = (F_VE - F_VEV)/1000;
  sub_X_VC' = (conc_X_VE*F_VEV + conc_X_CR*F_CRV - conc_X_VC*F_VCV)/1000;
  V_VC' = (F_VC - F_VCV)/1000;
  sub_X_RA' = (conc_X_VC*F_VCV + conc_X_CO*F_COV - conc_X_RA*F_RV)/1000;
  V_RA' = (F_RA - F_RV)/1000;
  sub_X_RV' = (conc_X_RA*F_RV - conc_X_RV*F_PA)/1000;
  V_RV' = (F_RV - F_PA)/1000;
  sub_X_PA' = (conc_X_RV*F_PA - conc_X_PA*F_Pa)/1000;
  V_PA' = (F_PA - F_Pa)/1000;
  sub_X_Pa' = (conc_X_PA*F_Pa - conc_X_Pa*(F_PC + F_SH))/1000;
  V_Pa' = (F_Pa - F_PC - F_SH)/1000;
  sub_X_PC' = (conc_X_Pa*F_PC - conc_X_PC*F_PCV)/1000;
  V_PC' = (F_PC - F_PCV)/1000;
  sub_X_PV' = (conc_X_PC*F_PCV + conc_X_Pa*F_SH - conc_X_PV*F_LA)/1000;
  V_PV' = (F_PV - F_LA)/1000;

  // Unit definitions:
  unit mmHg = 133.322 pascal;
  unit elastance = 133.322 pascal / (1e-3 litre);
  unit mL = 1e-3 litre;
  unit s = second;
  unit Hz = 1 / second;
  unit flow = 1e-3 litre / second;
  unit inductance = 133.322 pascal * second^2 / (1e-3 litre);
  unit resistance = 133.322 pascal * second / (1e-3 litre);
  unit capacitance = 1e-3 litre / (133.322 pascal);
  unit ratepm = 1 / (60 second);
  unit ms = 1e-3 second;
  unit time = 1e-3 second;
end
