// SBML level 2 version 4

model Iribe2006_CaMKIIkineticsModel()
  // This a model from the article:
  // Modulatory effect of calmodulin-dependent kinase II (CaMKII) on sarcoplasmic reticulum Ca2+ handling and interval-force relations: a modelling study.
  // Iribe G, Kohl P, Noble D. Philos Transact A Math Phys Eng Sci 2006 May 15;364(1842):1107-33 16608699 ,
  // Abstract:
  // We hypothesize that slow inactivation of Ca2+/calmodulin-dependent kinase II (CaMKII) and its modulatory effect on sarcoplasmic reticulum (SR) Ca2+ handling are important for various interval-force (I-F) relations, in particular for the beat interval dependency in transient alternans during the decay of post-extrasystolic potentiation. We have developed a mathematical model of a single cardiomyocyte to integrate various I-F relations, including alternans, by incorporating a conceptual CaMKII kinetics model into the SR Ca2+ handling model. Our model integrates I-F relations, such as the beat interval-dependent twitch force duration, restitution and potentiation, positive staircase phenomenon and alternans. We found that CaMKII affects more or less all I-F relations, and it is a key factor for integration of the various I-F relations in our model. Alternans arises, in the model, out of a steep relation between SR Ca2+ load and release, owing to SR load-dependent changes in the releasability of Ca2+ via the ryanodine receptor. Beat interval-dependent CaMKII activity, owing to its kinetic properties and amplifying effect on SR Ca2+ load dependency of Ca2+ release, replicated the beat interval dependency of alternans, as observed experimentally. Additionally, our model enabled reproduction of the effects of various interventions on alternans, such as the slowing or accelerating of Ca2+ release and/or uptake. We conclude that a slow time-dependent factor, represented in the model by CaMKII, is important for the integration of I-F relations, including alternans, and that our model offers a useful tool for further analysis of the roles of integrative Ca2+ handling in myocardial I-F relations.
  // This model was taken from the CellML repository and automatically converted to SBML.
  // The original model was: Iribe G, Kohl P, Noble D. (2006) - version=1.0
  // The original CellML model was created by:
  // Penny Noble
  // penny.noble@dpag.ox.ac.uk
  // The University of Oxford
  // This model originates from BioModels Database: A Database of Annotated Published Models (http://www.ebi.ac.uk/biomodels/). It is copyright (c) 2005-2011 The BioModels.net Team.
  // To the extent possible under law, all copyright and related or neighbouring rights to this encoded model have been dedicated to the public domain worldwide. Please refer to CC0 Public Domain Dedication for more information.
  // In summary, you are entitled to use this encoded model in absolutely any manner you deem suitable, verbatim, or with modification, alone or embedded it in a larger context, redistribute it, commercially or not, in a restricted way or not. .
  // To cite BioModels Database, please use: Li C, Donizelli M, Rodriguez N, Dharuri H, Endler L, Chelliah V, Li L, He E, Henry A, Stefan MI, Snoep JL, Hucka M, Le Novère N, Laibe C (2010) BioModels Database: An enhanced, curated and annotated resource for published quantitative kinetic models. BMC Syst Biol., 4:92.
  // biomodels.db:MODEL1006230085
  // isDescribedBy pubmed:16608699
  // biomodels.db:MODEL1006230085
  // isDescribedBy pubmed:16608699
  // biomodels.db:MODEL1006230085
  // biomodels.db:MODEL1006230085

  // Compartments:
  compartment COMpartment = 1 litre;

  // Parameters:
  time_environment has second;
  R = 8314.472 millijoule_per_mole_kelvin;
  T = 310 kelvin;
  F = 9.64853415e4 coulomb_per_mole;
  Cm = 9.5e-5 microF;
  v_i = 1.6404e-5 microlitre;
  v_SR = 3.3477e-6 microlitre;
  Na_o = 140 millimolar;
  K_o = 4 millimolar;
  Ca_o = 2 millimolar;
  V_membrane_potential = -92.849333 millivolt;
  i_Stim has nanoA;
  stim_start = 0 second;
  stim_end = 1000 second;
  stim_period = 0.5 second;
  stim_duration = 0.002 second;
  stim_amplitude = -4 nanoA;
  E_Na has millivolt;
  E_K has millivolt;
  E_Ca has millivolt;
  E_mh has millivolt;
  i_Na has nanoA;
  g_Na = 2.5 microS;
  m = 0.0013809 dimensionless;
  alpha_m has per_second;
  beta_m has per_second;
  V_fast_sodium_current_m_gate has millivolt;
  delta_m = 1e-5 millivolt;
  E0_m has millivolt;
  time_fast_sodium_current_m_gate has second;
  h = 0.99569 dimensionless;
  alpha_h has per_second;
  beta_h has per_second;
  V_fast_sodium_current_h_gate has millivolt;
  time_fast_sodium_current_h_gate has second;
  i_K has nanoA;
  i_Kmax = 1 nanoA;
  x = 0.051127 dimensionless;
  V_time_dependent_rectifier_potassium_current_x_gate has millivolt;
  alpha_x has per_second;
  beta_x has per_second;
  time_time_dependent_rectifier_potassium_current_x_gate has second;
  i_K1 has nanoA;
  K_mk1 = 10 millimolar;
  g_K1 = 1 microS;
  i_to has nanoA;
  g_to = 0.005 microS;
  s = 0.95854 dimensionless;
  alpha_s has per_second;
  beta_s has per_second;
  V_transient_outward_current_s_gate has millivolt;
  time_transient_outward_current_s_gate has second;
  r = 1.5185e-8 dimensionless;
  V_transient_outward_current_r_gate has millivolt;
  time_transient_outward_current_r_gate has second;
  i_Ca_L has nanoA;
  i_Ca_L_Na has nanoA;
  i_Ca_L_K has nanoA;
  i_Ca_L_Ca has nanoA;
  P_Ca_L_Ca = 0.25 nanoA_per_millimolar;
  d = 1.7908e-8 dimensionless;
  alpha_d has per_second;
  beta_d has per_second;
  V_L_type_Ca_channel_d_gate has millivolt;
  time_L_type_Ca_channel_d_gate has second;
  E0_d has millivolt;
  speed_d = 3 dimensionless;
  f = 1 dimensionless;
  alpha_f has per_second;
  beta_f has per_second;
  V_L_type_Ca_channel_f_gate has millivolt;
  speed_f = 0.5 dimensionless;
  E0_f has millivolt;
  time_L_type_Ca_channel_f_gate has second;
  i_NaCa has nanoA;
  i_NaCa_max = 0.0005 nanoA_per_millimolar4;
  gamma = 0.5 dimensionless;
  i_NaK has nanoA;
  i_NaK_max = 1.36 nanoA;
  K_mK = 1 millimolar;
  K_mNa = 21.7 millimolar;
  i_b_Ca has nanoA;
  g_b_Ca = 0.00025 microS;
  i_b_K has nanoA;
  g_b_K = 0.0006 microS;
  i_b_Na has nanoA;
  g_b_Na = 0.0006 microS;
  F_CaMK = 1.028 dimensionless;
  Inf_CaMK has dimensionless;
  Tau_CaMK = 0.8 second;
  j_rel has millimolar_per_second;
  K_rel has per_second;
  F_rel has dimensionless;
  K_rel_max = 500 per_second;
  F_SRCa_RyR = 0.25089 millimolar;
  Tau_SRCa_RyR = 0.05 second;
  N_CaMK has dimensionless;
  gain_k1 = 1 dimensionless;
  gain_k2 = 1 dimensionless;
  gain_k3 = 1 dimensionless;
  gain_k4 = 1 dimensionless;
  k_1 has per_second;
  k_2 has per_second;
  k_3 has per_second;
  k_4 has per_second;
  F_1 = 0.5268 dimensionless;
  F_2 = 8.7508e-6 dimensionless;
  F_3 has dimensionless;
  K_leak_rate = 0 per_second;
  j_up has millimolar_per_second;
  V_max_f = 0.292 millimolar_per_second;
  V_max_r = 0.391 millimolar_per_second;
  f_b has dimensionless;
  r_b has dimensionless;
  Cmdn_Ca = 3.9636e-6 millimolar;
  Cmdn_tot = 0.02 millimolar;
  alpha_cmdn = 10000 per_millimolar_per_second;
  beta_cmdn = 500 per_second;
  dCmdn_Ca_dtime has millimolar_per_second;
  Trpn_Ca = 0.00027661 millimolar;
  Trpn_tot = 0.07 millimolar;
  alpha_trpn = 80000 per_millimolar_per_second;
  beta_trpn = 200 per_second;
  dTrpn_Ca_dtime has millimolar_per_second;
  Ca_i = 9.91e-6 millimolar;
  Ca_SR = 0.24886 millimolar;
  Na_i = 5.8041 millimolar;
  K_i = 138.22 millimolar;
  Force has N_per_mm2;
  zeta = 0.1 N_per_mm2;
  Force_max has dimensionless;
  phi_SL has dimensionless;
  P_1_max has dimensionless;
  P_2_max has dimensionless;
  P_3_max has dimensionless;
  sigma_paths has dimensionless;
  N_0 = 0.99917 dimensionless;
  P_0 = 9.8593e-5 dimensionless;
  P_1 = 0.00013331 dimensionless;
  P_2 = 0.00023505 dimensionless;
  P_3 = 0.00015349 dimensionless;
  N_1 has dimensionless;
  alpha_tm has per_second;
  beta_tm = 40 per_second;
  K_tm has dimensionless;
  N_tm has dimensionless;
  SL = 2.15 micrometre;
  SL_norm has dimensionless;
  f_01 has per_second;
  f_12 has per_second;
  f_23 has per_second;
  g_01 has per_second;
  g_12 has per_second;
  g_23 has per_second;
  f_XB = 10 per_second;
  g_XB = 30 per_second;
  Force_norm has dimensionless;

  // Assignment rules:
  i_Stim := piecewise(stim_amplitude, (time_environment >= stim_start) && (time_environment <= stim_end) && (time_environment - stim_start - floor((time_environment - stim_start)/stim_period)*stim_period <= stim_duration), 0);
  E_Na := R*T/F*ln(Na_o/Na_i);
  E_K := R*T/F*ln(K_o/K_i);
  E_Ca := 0.5*R*T/F*ln(Ca_o/Ca_i);
  E_mh := R*T/F*ln((Na_o + 0.12*K_o)/(Na_i + 0.12*K_i));
  i_Na := g_Na*m^3*h*(V_membrane_potential - E_mh);
  E0_m := V_fast_sodium_current_m_gate + 41;
  alpha_m := piecewise(2000, abs(E0_m) < delta_m, 200*E0_m/(1 - exp(-0.1*E0_m)));
  beta_m := 8000*exp(-0.056*(V_fast_sodium_current_m_gate + 66));
  alpha_h := 20*exp(-0.125*(V_fast_sodium_current_h_gate + 75));
  beta_h := 2000/(1 + 320*exp(-0.1*(V_fast_sodium_current_h_gate + 75)));
  i_K := i_Kmax*x*(K_i - K_o*exp(-V_membrane_potential*F/(R*T)))/140;
  alpha_x := 0.5*exp(0.0826*(V_time_dependent_rectifier_potassium_current_x_gate + 50))/(1 + exp(0.057*(V_time_dependent_rectifier_potassium_current_x_gate + 50)));
  beta_x := 1.3*exp(-0.06*(V_time_dependent_rectifier_potassium_current_x_gate + 20))/(1 + exp(-0.04*(V_time_dependent_rectifier_potassium_current_x_gate + 20)));
  i_K1 := g_K1*K_o/(K_o + K_mk1)*(V_membrane_potential - E_K)/(1 + exp(2*F*(V_membrane_potential - E_K - 10)/(R*T)));
  i_to := g_to*s*r*(V_membrane_potential - E_K);
  alpha_s := 0.033*exp(-V_transient_outward_current_s_gate/17);
  beta_s := 33/(1 + exp(-0.125*(V_transient_outward_current_s_gate + 10)));
  i_Ca_L_Ca := 4*d*f*P_Ca_L_Ca*(V_membrane_potential - 50)*F/(R*T*(1 - exp(-2*(V_membrane_potential - 50)*F/(R*T))))*(Ca_i*exp(100*F/(R*T)) - Ca_o*exp(-2*(V_membrane_potential - 50)*F/(R*T)));
  i_Ca_L_K := 0.002*d*f*P_Ca_L_Ca*(V_membrane_potential - 50)*F/(R*T*(1 - exp(-(V_membrane_potential - 50)*F/(R*T))))*(K_i*exp(50*F/(R*T)) - K_o*exp(-(V_membrane_potential - 50)*F/(R*T)));
  i_Ca_L_Na := 0.01*d*f*P_Ca_L_Ca*(V_membrane_potential - 50)*F/(R*T*(1 - exp(-(V_membrane_potential - 50)*F/(R*T))))*(Na_i*exp(50*F/(R*T)) - Na_o*exp(-(V_membrane_potential - 50)*F/(R*T)));
  i_Ca_L := i_Ca_L_Ca + i_Ca_L_K + i_Ca_L_Na;
  E0_d := V_L_type_Ca_channel_d_gate + 24 - 5;
  alpha_d := piecewise(speed_d*120, abs(E0_d) < 1e-5, speed_d*30*E0_d/(1 - exp(-E0_d/4)));
  beta_d := piecewise(speed_d*120, abs(E0_d) < 1e-5, speed_d*(-12)*E0_d/(1 - exp(E0_d/10)));
  E0_f := V_L_type_Ca_channel_f_gate + 34;
  alpha_f := piecewise(speed_f*25, abs(E0_f) < 1e-5, speed_f*6.25*E0_f/(-1 + exp(E0_f/4)));
  beta_f := speed_f*50/(1 + exp(-E0_f/4));
  i_NaCa := i_NaCa_max*(exp(gamma*V_membrane_potential*F/(R*T))*Na_i^3*Ca_o - exp((gamma - 1)*V_membrane_potential*F/(R*T))*Na_o^3*Ca_i)/(1 + Ca_i/0.0069);
  i_NaK := i_NaK_max*K_o/(K_mK + K_o)*Na_i/(K_mNa + Na_i)*1/(1 + 0.1245*exp(-0.1*V_membrane_potential*F/(R*T)) + 0.0353*exp(-V_membrane_potential*F/(R*T)));
  i_b_Ca := g_b_Ca*(V_membrane_potential - E_Ca);
  i_b_K := g_b_K*(V_membrane_potential - E_K);
  i_b_Na := g_b_Na*(V_membrane_potential - E_Na);
  Inf_CaMK := Cmdn_Ca/5e-5;
  N_CaMK := (F_CaMK/0.7)^2;
  k_1 := gain_k1*(30625000*Ca_i^2 - 245*i_Ca_L);
  k_2 := gain_k2*450/(1 + 0.36/Ca_SR);
  k_3 := gain_k3*1.885*(F_SRCa_RyR/0.22)^N_CaMK;
  k_4 := gain_k4*1.8;
  F_3 := 1 - (F_1 + F_2);
  F_rel := (F_2/(F_2 + 0.25))^2;
  K_rel := K_rel_max*F_SRCa_RyR/(F_SRCa_RyR + 0.2);
  j_rel := (K_rel*F_rel + K_leak_rate)*(Ca_SR - Ca_i);
  f_b := (Ca_i/0.00024)^2;
  r_b := (Ca_SR/1.64)^2;
  j_up := (F_CaMK*V_max_f*f_b - V_max_r*r_b)/(1 + f_b + r_b);
  dCmdn_Ca_dtime := alpha_cmdn*(Cmdn_tot - Cmdn_Ca)*Ca_i - beta_cmdn*Cmdn_Ca;
  dTrpn_Ca_dtime := alpha_trpn*(Trpn_tot - Trpn_Ca)*Ca_i - beta_trpn*(1 + 2*(1 - Force_norm))/3*Trpn_Ca;
  f_01 := 3*f_XB;
  f_12 := 10*f_XB;
  f_23 := 7*f_XB;
  g_01 := g_XB*(2 - SL_norm);
  g_12 := 2*g_XB*(2 - SL_norm);
  g_23 := 3*g_XB*(2 - SL_norm);
  SL_norm := (SL - 1.7)/0.7;
  N_tm := 3.5 + 2.5*SL_norm;
  K_tm := 1/(1 + beta_trpn/alpha_trpn/(0.0017 - 0.0009*SL_norm));
  alpha_tm := beta_tm*(Trpn_Ca/(Trpn_tot*K_tm))^N_tm;
  N_1 := 1 - (N_0 + P_0 + P_1 + P_2 + P_3);
  sigma_paths := 1*g_XB*2*g_XB*3*g_XB + 1*f_01*2*g_XB*3*g_XB + 1*f_01*1*f_12*3*g_XB + 1*f_01*1*f_12*1*f_23;
  P_1_max := 1*f_01*2*g_XB*3*g_XB/sigma_paths;
  P_2_max := 1*f_01*1*f_12*3*g_XB/sigma_paths;
  P_3_max := 1*f_01*1*f_12*1*f_23/sigma_paths;
  Force_max := P_1_max + 2*P_2_max + 3*P_3_max;
  phi_SL := piecewise((SL - 0.6)/1.4, (SL >= 1.7) && (SL <= 2), 1, (SL > 2) && (SL <= 2.2), (3.6 - SL)/1.4, (SL > 2.2) && (SL <= 2.3));
  Force_norm := phi_SL*(P_1 + N_1 + 2*P_2 + 3*P_3)/Force_max;
  Force := zeta*Force_norm;

  // Rate rules:
  V_membrane_potential' = -1/Cm*(i_Na + i_b_Na + i_K1 + i_K + i_to + i_b_K + i_Ca_L + i_b_Ca + i_NaCa + i_NaK + i_Stim);
  m' = alpha_m*(1 - m) - beta_m*m;
  h' = alpha_h*(1 - h) - beta_h*h;
  x' = alpha_x*(1 - x) - beta_x*x;
  s' = alpha_s*(1 - s) - beta_s*s;
  r' = 333*(1/(1 + exp(-(V_transient_outward_current_r_gate + 4)/5)) - r);
  d' = alpha_d*(1 - d) - beta_d*d;
  f' = alpha_f*(1 - f) - beta_f*f;
  F_CaMK' = (Inf_CaMK - F_CaMK)/Tau_CaMK;
  F_1' = k_3*F_3 - k_4*F_1 - k_1*F_1;
  F_2' = k_1*F_1 - k_2*F_2;
  F_SRCa_RyR' = (Ca_SR - F_SRCa_RyR)/Tau_SRCa_RyR;
  Cmdn_Ca' = alpha_cmdn*(Cmdn_tot - Cmdn_Ca)*Ca_i - beta_cmdn*Cmdn_Ca;
  Trpn_Ca' = alpha_trpn*(Trpn_tot - Trpn_Ca)*Ca_i - beta_trpn*(1 + 2*(1 - Force_norm))/3*Trpn_Ca;
  Ca_i' = -(i_Ca_L_Ca + i_b_Ca - 2*i_NaCa)/(2*v_i*F) - j_up + j_rel*v_SR/v_i - dCmdn_Ca_dtime - dTrpn_Ca_dtime;
  Ca_SR' = j_up*v_i/v_SR - j_rel;
  Na_i' = -(i_Na + i_b_Na + i_Ca_L_Na + 3*i_NaCa + 3*i_NaK)/(v_i*F);
  K_i' = -(i_K1 + i_K + i_to + i_b_K + i_Ca_L_K - 2*i_NaK)/(v_i*F);
  N_0' = beta_tm*P_0 - alpha_tm*N_0 + g_01*N_1;
  P_0' = -(beta_tm + f_01)*P_0 + alpha_tm*N_0 + g_01*P_1;
  P_1' = -(beta_tm + f_12 + g_01)*P_1 + alpha_tm*N_1 + f_01*P_0 + g_12*P_2;
  P_2' = -(f_23 + g_12)*P_2 + f_12*P_1 + g_23*P_3;
  P_3' = -g_23*P_3 + f_23*P_2;

  // Unit definitions:
  unit micrometre = 1e-6 metre;
  unit per_second = 1 / second;
  unit millivolt = 1e-3 volt;
  unit per_millivolt = 1 / (1e-3 volt);
  unit per_millivolt_second = 1 / (1e-3 volt * second);
  unit microS = 1e-6 siemens;
  unit nanoS_per_cm2 = 1e-9 siemens / (0.01 metre)^2;
  unit microF = 1e-6 farad;
  unit nanoA = 1e-9 ampere;
  unit nanoA_per_millimolar = 1e-9 ampere * litre / (1e-3 mole);
  unit nanoA_per_millimolar4 = 1e-9 ampere * litre^4 / (1e-3 mole)^4;
  unit millimolar = 1e-3 mole / litre;
  unit micromolar = 1e-6 mole / litre;
  unit millimolar_per_second = 1e-3 mole / (litre * second);
  unit per_millimolar_per_second = litre / (1e-3 mole * second);
  unit per_millimolar2_per_second = litre^2 / ((1e-3 mole)^2 * second);
  unit millijoule_per_mole_kelvin = 1e-3 joule / (mole * kelvin);
  unit coulomb_per_mole = coulomb / mole;
  unit per_nanocoulomb = 1 / (1e-9 coulomb);
  unit cm_per_second = 0.01 metre / second;
  unit cm2 = (0.01 metre)^2;
  unit microlitre = 1e-6 litre;
  unit N_per_mm2 = newton / (1e-3 metre)^2;
end
