// SBML level 2 version 4

model Wodarz2007_CTLinflation_ModelA()
  // This a model from the article:
  // Dynamics of killer T cell inflation in viral infections.
  // Wodarz D, Sierro S, Klenerman P. J R Soc Interface 2007 Jun 22;4(14):533-43 17251133 ,
  // Abstract:
  // Upon acute viral infection, a typical cytotoxic T lymphocyte (CTL) response is characterized by a phase of expansion and contraction after which it settles at a relatively stable memory level. Recently, experimental data from mice infected with murine cytomegalovirus (MCMV) showed different and unusual dynamics. After acute infection had resolved, some antigen specific CTL started to expand over time despite the fact that no replicative virus was detectable. This phenomenon has been termed as "CTL memory inflation". In order to examine the dynamics of this system further, we developed a mathematical model analysing the impact of innate and adaptive immune responses. According to this model, a potentially important contributor to CTL inflation is competition between the specific CTL response and an innate natural killer (NK) cell response. Inflation occurs most readily if the NK cell response is more efficient than the CTL at reducing virus load during acute infection, but thereafter maintains a chronic virus load which is sufficient to induce CTL proliferation. The model further suggests that weaker NK cell mediated protection can correlate with more pronounced CTL inflation dynamics over time. We present experimental data from mice infected with MCMV which are consistent with the theoretical predictions. This model provides valuable information and may help to explain the inflation of CMV specific CD8+T cells seen in humans as they age.
  // This model was taken from the CellML repository and automatically converted to SBML.
  // The original model was: Wodarz D, Sierro S, Klenerman P. (2007) - version=1.0
  // The original CellML model was created by:
  // Catherine Lloyd
  // c.lloyd@auckland.ac.nz
  // The University of Auckland
  // This model originates from BioModels Database: A Database of Annotated Published Models (http://www.ebi.ac.uk/biomodels/). It is copyright (c) 2005-2011 The BioModels.net Team.
  // To the extent possible under law, all copyright and related or neighbouring rights to this encoded model have been dedicated to the public domain worldwide. Please refer to CC0 Public Domain Dedication for more information.
  // In summary, you are entitled to use this encoded model in absolutely any manner you deem suitable, verbatim, or with modification, alone or embedded it in a larger context, redistribute it, commercially or not, in a restricted way or not..
  // To cite BioModels Database, please use: Li C, Donizelli M, Rodriguez N, Dharuri H, Endler L, Chelliah V, Li L, He E, Henry A, Stefan MI, Snoep JL, Hucka M, Le Novère N, Laibe C (2010) BioModels Database: An enhanced, curated and annotated resource for published quantitative kinetic models. BMC Syst Biol., 4:92.
  // biomodels.db:MODEL1006230086
  // isDescribedBy pubmed:17251133
  // biomodels.db:MODEL1006230086
  // isDescribedBy pubmed:17251133
  // biomodels.db:MODEL1006230086
  // biomodels.db:MODEL1006230086

  // Compartments:
  compartment COMpartment = 1 litre;

  // Parameters:
  time_environment has hour;
  x = 1 dimensionless;
  y0 = 0 dimensionless;
  y1 = 0 dimensionless;
  L = 0 dimensionless;
  v = 1 dimensionless;
  R0 has dimensionless;
  a0 = 0.1 first_order_rate_constant;
  a1 = 0.2 first_order_rate_constant;
  k = 1 first_order_rate_constant;
  u = 1 first_order_rate_constant;
  lambda = 10 first_order_rate_constant;
  d = 0.1 first_order_rate_constant;
  beta = 0.1 first_order_rate_constant;
  gamma = 0.5 first_order_rate_constant;
  phi = 0.1 first_order_rate_constant;
  eta = 0.01 first_order_rate_constant;

  // Assignment rules:
  R0 := lambda*eta/(d*a1*(a0 + eta))*(beta + gamma*phi/(phi + d));

  // Rate rules:
  x' = lambda - (d*x + beta*x*v + gamma*x*v);
  y0' = beta*x*v - (a0*y0 + eta*y0) + phi*L;
  y1' = eta*y0 - a1*y1;
  L' = gamma*x*v - (phi*L + d*L);
  v' = k*y1 - u*v;

  // Unit definitions:
  unit hour = 3600 second;
  unit first_order_rate_constant = dimensionless / (3600 second);
  unit time = 3600 second;
end
