// SBML level 2 version 4

model Wu2007_MitochondrialTCAcycle()
  // This a model from the article:
  // Computer modeling of mitochondrial tricarboxylic acid cycle, oxidative phosphorylation, metabolite transport, and electrophysiology.
  // Wu F, Yang F, Vinnakota KC, Beard DA. J Biol Chem 2007 Aug 24;282(34):24525-37 17591785 ,
  // Abstract:
  // A computational model of mitochondrial metabolism and electrophysiology is introduced and applied to analysis of data from isolated cardiac mitochondria and data on phosphate metabolites in striated muscle in vivo. This model is constructed based on detailed kinetics and thermodynamically balanced reaction mechanisms and a strict accounting of rapidly equilibrating biochemical species. Since building such a model requires introducing a large number of adjustable kinetic parameters, a correspondingly large amount of independent data from isolated mitochondria respiring on different substrates and subject to a variety of protocols is used to parameterize the model and ensure that it is challenged by a wide range of data corresponding to diverse conditions. The developed model is further validated by both in vitro data on isolated cardiac mitochondria and in vivo experimental measurements on human skeletal muscle. The validated model is used to predict the roles of NAD and ADP in regulating the tricarboxylic acid cycle dehydrogenase fluxes, demonstrating that NAD is the more important regulator. Further model predictions reveal that a decrease of cytosolic pH value results in decreases in mitochondrial membrane potential and a corresponding drop in the ability of the mitochondria to synthesize ATP at the hydrolysis potential required for cellular function.
  // This model was taken from the CellML repository and automatically converted to SBML.
  // The original model was: Wu F, Yang F, Vinnakota KC, Beard DA. (2007) - version=1.0
  // The original CellML model was created by:
  // Geoffrey Nunns
  // gnunns1@jhu.edu
  // The University of Auckland
  // This model originates from BioModels Database: A Database of Annotated Published Models (http://www.ebi.ac.uk/biomodels/). It is copyright (c) 2005-2011 The BioModels.net Team.
  // To the extent possible under law, all copyright and related or neighbouring rights to this encoded model have been dedicated to the public domain worldwide. Please refer to CC0 Public Domain Dedication for more information.
  // In summary, you are entitled to use this encoded model in absolutely any manner you deem suitable, verbatim, or with modification, alone or embedded it in a larger context, redistribute it, commercially or not, in a restricted way or not..
  // To cite BioModels Database, please use: Li C, Donizelli M, Rodriguez N, Dharuri H, Endler L, Chelliah V, Li L, He E, Henry A, Stefan MI, Snoep JL, Hucka M, Le Novère N, Laibe C (2010) BioModels Database: An enhanced, curated and annotated resource for published quantitative kinetic models. BMC Syst Biol., 4:92.
  // biomodels.db:MODEL1006230090
  // isDescribedBy pubmed:17591785
  // biomodels.db:MODEL1006230090
  // isDescribedBy pubmed:17591785
  // biomodels.db:MODEL1006230090
  // biomodels.db:MODEL1006230090

  // Compartments:
  compartment COMpartment = 1 litre;

  // Parameters:
  time_Environment has second;
  ExpType = 1 dimensionless;
  StateType = 2 dimensionless;
  F = 0.096484 kilojoule_per_mole_per_millivolt;
  W_x = 0.651384;
  W_i = 0.072376;
  gamma = 5.99 per_micrometer;
  rho_m = 272500 mg_per_mitochondria;
  n_A = 3 dimensionless;
  p_PI = 327 micrometer_per_second;
  p_A = 85 micrometer_per_second;
  p_TI = 85 micrometer_per_second;
  k_mADP = 3.5e-6 molar;
  theta = 0.6 dimensionless;
  k_O2 = 0.00012 molar;
  NAD_tot = 0.00297 molar;
  Q_tot = 0.00135 molar;
  cytC_tot = 0.0027 molar;
  A_tot = 0.01 molar;
  CR_tot = 0.0427 molar;
  CO2_tot_x_parameters = 0.0214 molar;
  FAD_tot = 0.0001 molar;
  C_IM = 6.75e-6 mole_per_l_mito_volume_per_mv;
  X_pdh = 0.2050936 mole_per_second_per_l_mito_volume;
  X_cits = 9.825308 mole_per_second_per_l_mito_volume;
  X_acon = 0.02766541 mole_per_second_per_l_mito_volume;
  X_isod = 0.4920476 mole_per_second_per_l_mito_volume;
  X_akgd = 0.08763 mole_per_second_per_l_mito_volume;
  K_ir_akgd = 6.04e-7 molar;
  X_scoas = 0.4485205 mole_per_second_per_l_mito_volume;
  X_sdh = 0.08578868 mole_per_second_per_l_mito_volume;
  X_fum = 0.00707728 mole_per_second_per_l_mito_volume;
  X_mdh = 0.07706 mole_per_second_per_l_mito_volume;
  X_ndk = 0.02554352 mole_per_second_per_l_mito_volume;
  X_got = 4.551392 mole_per_second_per_l_mito_volume;
  X_PYRH = 2.996779e8 mole_per_second_per_l_mito_volume_per_molar_per_molar;
  X_GLUH = 2.725114e8 mole_per_second_per_l_mito_volume_per_molar_per_molar;
  X_CITMAL = 80.43211 mole_per_second_per_l_mito_volume_per_molar_per_molar;
  X_AKGMAL = 0.2820915 mole_per_second_per_l_mito_volume;
  X_SUCMAL = 96.99562 mole_per_second_per_l_mito_volume_per_molar_per_molar;
  X_MALPI = 16.06244 mole_per_second_per_l_mito_volume_per_molar_per_molar;
  X_ASPGLU = 5.865622e-5 mole_per_second_per_l_mito_volume;
  X_C1 = 32364.82 mole_per_second_per_l_mito_volume_per_molar_per_molar;
  X_C3 = 0.7908137;
  k_PI_1 = 3.248914e-5 molar;
  k_PI_2 = 0.003474543 molar;
  X_C4 = 0.0001076089 mole_per_second_per_l_mito_volume_per_molar;
  X_F1 = 8120.393 mole_per_second_per_l_mito_volume_per_molar;
  X_ANT = 0.007522124 mole_per_second_per_l_mito_volume;
  X_PiHt = 3.335569e7 mole_per_second_per_l_mito_volume_per_molar;
  k_PiHt = 0.001612517 molar;
  X_KH = 4758023 mole_per_second_per_l_mito_volume_per_molar_per_molar;
  X_Hle = 302.0928 mole_per_second_per_l_mito_volume_per_molar_per_mv;
  X_HK has mole_per_second_per_l_cyto_volume;
  J_AtC = 0 mole_per_second_per_l_cyto_volume;
  RT has kilojoule_per_mole;
  dGf1_H2O = -235.74 kilojoule_per_mole;
  dGf1_O2 = 16.4 kilojoule_per_mole;
  dGf1_NADH = 39.31 kilojoule_per_mole;
  dGf1_NAD = 18.1 kilojoule_per_mole;
  dGf1_QH2 = -23.3 kilojoule_per_mole;
  dGf1_COQ = 65.17 kilojoule_per_mole;
  dGf1_ATP = -2771 kilojoule_per_mole;
  dGf1_ADP = -1903.96 kilojoule_per_mole;
  dGf1_AMP = -1034.66 kilojoule_per_mole;
  dGf1_GTP = -2771 kilojoule_per_mole;
  dGf1_GDP = -1903.96 kilojoule_per_mole;
  dGf1_Cred = -27.41 kilojoule_per_mole;
  dGf1_Cox = -6.52 kilojoule_per_mole;
  dGf1_Pi = -1098.27 kilojoule_per_mole;
  dGf1_PCr = 0 kilojoule_per_mole;
  dGf1_Cr = -252.68 kilojoule_per_mole;
  dGf1_FADH2 = -67.6 kilojoule_per_mole;
  dGf1_FAD = 19.55 kilojoule_per_mole;
  dGf1_COASH = -0.72 kilojoule_per_mole;
  dGf1_ACCOA = -178.19 kilojoule_per_mole;
  dGf1_OAA = -794.74 kilojoule_per_mole;
  dGf1_CIT = -1165.59 kilojoule_per_mole;
  dGf1_ICIT = -1158.94 kilojoule_per_mole;
  dGf1_AKG = -793.41 kilojoule_per_mole;
  dGf1_SCOA = -507.55 kilojoule_per_mole;
  dGf1_SUC = -690.44 kilojoule_per_mole;
  dGf1_FUM = -603.32 kilojoule_per_mole;
  dGf1_MAL = -842.66 kilojoule_per_mole;
  dGf1_ASP = -692.26 kilojoule_per_mole;
  dGf1_GLU = -692.4 kilojoule_per_mole;
  dGf1_CO2_tot = -530.71 kilojoule_per_mole;
  dGf1_PYR = -470.82 kilojoule_per_mole;
  dGf1_GLC = -907.21 kilojoule_per_mole;
  dGf1_G6P = -1758.87 kilojoule_per_mole;
  P_ATP_x has dimensionless;
  P_ATP_i has dimensionless;
  P_ATP_c has dimensionless;
  uATP_x has molar;
  mATP_c has molar;
  K_H_P_ATP has molar;
  K_Mg_P_ATP has molar;
  K_K_P_ATP has molar;
  P_ADP_x has dimensionless;
  P_ADP_i has dimensionless;
  P_ADP_c has dimensionless;
  uADP_x has molar;
  mADP_c has molar;
  K_H_P_ADP has molar;
  K_Mg_P_ADP has molar;
  K_K_P_ADP has molar;
  P_AMP_x has dimensionless;
  P_AMP_i has dimensionless;
  P_AMP_c has dimensionless;
  uAMP_x has molar;
  K_H_P_AMP has molar;
  K_Mg_P_AMP has molar;
  K_K_P_AMP has molar;
  P_GTP_x has dimensionless;
  P_GTP_i has dimensionless;
  P_GTP_c has dimensionless;
  uGTP_x has molar;
  K_H_P_GTP has molar;
  K_Mg_P_GTP has molar;
  K_K_P_GTP has molar;
  P_GDP_x has dimensionless;
  P_GDP_i has dimensionless;
  P_GDP_c has dimensionless;
  uGDP_x has molar;
  K_H_P_GDP has molar;
  K_Mg_P_GDP has molar;
  K_K_P_GDP has molar;
  P_PI_x has dimensionless;
  P_PI_i has dimensionless;
  P_PI_c has dimensionless;
  hPI_x has molar;
  hPI_i has molar;
  K_H_P_PI has molar;
  K_Mg_P_PI has molar;
  K_K_P_PI has molar;
  P_COASH_x has dimensionless;
  P_COASH_i has dimensionless;
  P_COASH_c has dimensionless;
  K_H_P_COASH has molar;
  K_Mg_P_COASH = 1e20 molar;
  K_K_P_COASH = 1e20 molar;
  P_OAA_x has dimensionless;
  P_OAA_i has dimensionless;
  P_OAA_c has dimensionless;
  K_Mg_P_OAA has molar;
  K_H_P_OAA = 1e20 molar;
  K_K_P_OAA = 1e20 molar;
  P_CIT_x has dimensionless;
  P_CIT_i has dimensionless;
  P_CIT_c has dimensionless;
  uCIT_x has molar;
  uCIT_i has molar;
  hCIT_x has molar;
  hCIT_i has molar;
  K_H_P_CIT has molar;
  K_Mg_P_CIT has molar;
  K_K_P_CIT has molar;
  P_ICIT_x has dimensionless;
  P_ICIT_i has dimensionless;
  P_ICIT_c has dimensionless;
  K_H_P_ICIT has molar;
  K_Mg_P_ICIT has molar;
  K_K_P_ICIT = 1e20 molar;
  P_SCOA_x has dimensionless;
  P_SCOA_i has dimensionless;
  P_SCOA_c has dimensionless;
  K_H_P_SCOA has molar;
  K_Mg_P_SCOA = 1e20 molar;
  K_K_P_SCOA = 1e20 molar;
  P_SUC_x has dimensionless;
  P_SUC_i has dimensionless;
  P_SUC_c has dimensionless;
  K_H_P_SUC has molar;
  K_Mg_P_SUC has molar;
  K_K_P_SUC has molar;
  P_FUM_x has dimensionless;
  P_FUM_i has dimensionless;
  P_FUM_c has dimensionless;
  K_H_P_FUM has molar;
  K_Mg_P_FUM = 1e20 molar;
  K_K_P_FUM = 1e20 molar;
  P_MAL_x has dimensionless;
  P_MAL_i has dimensionless;
  P_MAL_c has dimensionless;
  K_H_P_MAL has molar;
  K_Mg_P_MAL has molar;
  K_K_P_MAL has molar;
  P_CO2_tot_x has dimensionless;
  P_CO2_tot_i has dimensionless;
  P_CO2_tot_c has dimensionless;
  K_H_P_CO2_tot has molar;
  K_Mg_P_CO2_tot = 1e20 molar;
  K_K_P_CO2_tot = 1e20 molar;
  P_PYR_x has dimensionless;
  P_PYR_i has dimensionless;
  P_PYR_c has dimensionless;
  K_Mg_P_PYR has molar;
  K_H_P_PYR = 1e20 molar;
  K_K_P_PYR = 1e20 molar;
  P_G6P_x has dimensionless;
  P_G6P_i has dimensionless;
  P_G6P_c has dimensionless;
  K_H_P_G6P has molar;
  K_Mg_P_G6P = 1e20 molar;
  K_K_P_G6P = 1e20 molar;
  P_GLU_x has dimensionless;
  P_GLU_i has dimensionless;
  P_GLU_c has dimensionless;
  K_H_P_GLU has molar;
  K_Mg_P_GLU has molar;
  K_K_P_GLU = 1e20 molar;
  P_ASP_x has dimensionless;
  P_ASP_i has dimensionless;
  P_ASP_c has dimensionless;
  K_H_P_ASP has molar;
  K_Mg_P_ASP has molar;
  K_K_P_ASP = 1e20 molar;
  P_GLC_c has dimensionless;
  K_H_P_GLC = 1e20 molar;
  K_Mg_P_GLC = 1e20 molar;
  K_K_P_GLC = 1e20 molar;
  P_NAD_x has dimensionless;
  K_H_P_NAD = 1e20 molar;
  K_Mg_P_NAD = 1e20 molar;
  K_K_P_NAD = 1e20 molar;
  P_NADH_x has dimensionless;
  K_H_P_NADH = 1e20 molar;
  K_Mg_P_NADH = 1e20 molar;
  K_K_P_NADH = 1e20 molar;
  P_QH2_x has dimensionless;
  K_H_P_QH2 = 1e20 molar;
  K_Mg_P_QH2 = 1e20 molar;
  K_K_P_QH2 = 1e20 molar;
  P_COQ_x has dimensionless;
  K_H_P_COQ = 1e20 molar;
  K_Mg_P_COQ = 1e20 molar;
  K_K_P_COQ = 1e20 molar;
  P_ACCOA_x has dimensionless;
  K_H_P_ACCOA = 1e20 molar;
  K_Mg_P_ACCOA = 1e20 molar;
  K_K_P_ACCOA = 1e20 molar;
  P_AKG_x has dimensionless;
  K_H_P_AKG = 1e20 molar;
  K_Mg_P_AKG = 1e20 molar;
  K_K_P_AKG = 1e20 molar;
  P_O2_x has dimensionless;
  K_H_P_O2 = 1e20 molar;
  K_Mg_P_O2 = 1e20 molar;
  K_K_P_O2 = 1e20 molar;
  P_FADH2_x has dimensionless;
  K_H_P_FADH2 = 1e20 molar;
  K_Mg_P_FADH2 = 1e20 molar;
  K_K_P_FADH2 = 1e20 molar;
  P_FAD_x has dimensionless;
  K_H_P_FAD = 1e20 molar;
  K_Mg_P_FAD = 1e20 molar;
  K_K_P_FAD = 1e20 molar;
  P_H_x has dimensionless;
  K_H_P_H = 1e20 molar;
  K_Mg_P_H = 1e20 molar;
  K_K_P_H = 1e20 molar;
  P_Mg_x has dimensionless;
  K_H_P_Mg = 1e20 molar;
  K_Mg_P_Mg = 1e20 molar;
  K_K_P_Mg = 1e20 molar;
  P_K_x has dimensionless;
  K_H_P_K = 1e20 molar;
  K_Mg_P_K = 1e20 molar;
  K_K_P_K = 1e20 molar;
  J_pdh has mole_per_second_per_l_mito_volume;
  K_eq_pdh has dimensionless;
  K0_eq_pdh has molar;
  dGr0_pdh has kilojoule_per_mole;
  K_mA_J_pdh = 3.83e-5 molar;
  K_mB_J_pdh = 9.9e-6 molar;
  K_mC_J_pdh = 6.07e-5 molar;
  alpha_i1_J_pdh has dimensionless;
  alpha_i2_J_pdh has dimensionless;
  K_iACCOA = 4.02e-5 molar;
  K_iNADH = 4e-5 molar;
  minCon_J_pdh = 1e-32 molar;
  J_cits has mole_per_second_per_l_mito_volume;
  K_eq_cits has dimensionless;
  K0_eq_cits has molar_squared;
  dGr0_cits has kilojoule_per_mole;
  K_mA_J_cits = 4e-6 molar;
  K_mB_J_cits = 1.4e-5 molar;
  K_ia_J_cits = 3.33e-6 molar;
  K_iCIT_J_cits = 0.0016 molar;
  K_iATP_J_cits = 0.0009 molar;
  K_iADP_J_cits = 0.0018 molar;
  K_iAMP_J_cits = 0.006 molar;
  K_iCOASH = 6.7e-5 molar;
  K_iSCOA = 0.00014 molar;
  alpha_i1_J_cits has dimensionless;
  alpha_i2_J_cits has dimensionless;
  J_acon has mole_per_second_per_l_mito_volume;
  V_mr_J_acon has mole_per_second_per_l_mito_volume;
  K_eq_acon has dimensionless;
  K0_eq_acon has dimensionless;
  dGr0_acon has kilojoule_per_mole;
  K_mA_J_acon = 0.001161 molar;
  K_mP_J_acon = 0.000434 molar;
  J_isod has mole_per_second_per_l_mito_volume;
  K_eq_isod has molar;
  K0_eq_isod has molar_cubed;
  dGr0_isod has kilojoule_per_mole;
  K_mA_J_isod = 7.4e-5 molar;
  K_mB_J_isod = 0.000183 molar;
  K_ib_J_isod = 2.38e-5 molar;
  K_iq_J_isod = 2.9e-5 molar;
  alpha_i_J_isod has dimensionless;
  n_H = 3 dimensionless;
  K_iATP_J_isod = 9.1e-5 molar;
  K_aADP_J_isod = 5e-5 molar;
  minCon_J_isod = 1e-32 molar;
  J_akgd has mole_per_second_per_l_mito_volume;
  K_eq_akgd has dimensionless;
  K0_eq_akgd has molar;
  dGr0_akgd has kilojoule_per_mole;
  K_mA_J_akgd = 8e-5 molar;
  K_mB_J_akgd = 5.5e-5 molar;
  K_mC_J_akgd = 2.1e-5 molar;
  K_iq_J_akgd = 6.9e-6 molar;
  K_ir1 = 6.010527e-7 molar;
  K_ir2 = 1000 molar;
  K_iATP_J_akgd = 5e-5 molar;
  K_aADP_J_akgd = 0.0001 molar;
  alpha_i_J_akgd has dimensionless;
  minCon_J_akgd = 1e-32 molar;
  J_scoas has mole_per_second_per_l_mito_volume;
  K_eq_scoas has dimensionless;
  K0_eq_scoas has molar;
  dGr0_scoas has kilojoule_per_mole;
  V_mr_J_scoas has mole_per_second_per_l_mito_volume;
  K_ia_J_scoas = 5.5e-6 molar;
  K_ib_J_scoas = 0.0001 molar;
  K_ic = 0.002 molar;
  K_ip_J_scoas = 2e-5 molar;
  K_iq_J_scoas = 0.003 molar;
  K_ir = 1.11e-5 molar;
  K_mA_J_scoas = 1.6e-5 molar;
  K_mB_J_scoas = 5.5e-5 molar;
  K_mC_J_scoas = 0.00066 molar;
  K_mP_J_scoas = 2e-5 molar;
  K_mQ_J_scoas = 0.00088 molar;
  K_mR = 1.11e-5 molar;
  J_sdh has mole_per_second_per_l_mito_volume;
  K_eq_sdh has dimensionless;
  K0_eq_sdh has dimensionless;
  dGr0_sdh has kilojoule_per_mole;
  V_mr_J_sdh has mole_per_second_per_l_mito_volume;
  K_ia_J_sdh = 0.00012 molar;
  K_iq_J_sdh = 0.001275 molar;
  K_mSUC = 0.000467 molar;
  K_mCOQ = 0.00048 molar;
  K_mQH2 = 2.45e-6 molar;
  K_mFUM_J_sdh = 0.0012 molar;
  alpha_i_J_sdh has dimensionless;
  K_iOAA = 1.5e-6 molar;
  K_aSUC = 0.00045 molar;
  K_aFUM = 0.000375 molar;
  J_fum has mole_per_second_per_l_mito_volume;
  K_eq_fum has dimensionless;
  K0_eq_fum has dimensionless;
  dGr0_fum has kilojoule_per_mole;
  V_mr_J_fum has mole_per_second_per_l_mito_volume;
  K_mFUM_J_fum = 4.47e-5 molar;
  K_mMAL_J_fum = 0.0001977 molar;
  alpha_i_J_fum has dimensionless;
  K_iCIT_J_fum = 0.0035 molar;
  K_iATP_J_fum = 4e-5 molar;
  K_iADP_J_fum = 0.0004 molar;
  K_iGTP = 8e-5 molar;
  K_iGDP = 0.00033 molar;
  J_mdh has mole_per_second_per_l_mito_volume;
  K_eq_mdh has dimensionless;
  K0_eq_mdh has molar;
  dGr0_mdh has kilojoule_per_mole;
  V_mr_J_mdh has mole_per_second_per_l_mito_volume;
  K_ia_J_mdh = 0.000279 molar;
  K_ib_J_mdh = 0.00036 molar;
  K_ip_J_mdh = 5.5e-6 molar;
  K_iq_J_mdh = 3.18e-6 molar;
  K_mNAD = 9.055e-5 molar;
  K_mMAL_J_mdh = 0.00025 molar;
  K_mOAA = 6.128e-6 molar;
  K_mNADH = 2.58e-6 molar;
  alpha_i_J_mdh has dimensionless;
  K_iATP_J_mdh = 0.0001832 molar;
  K_iADP_J_mdh = 0.0003944 molar;
  K_iAMP_J_mdh = 0.00042 molar;
  J_ndk_f has mole_per_second_per_l_mito_volume;
  J_ndk has mole_per_second_per_l_mito_volume;
  K_eq_ndk has dimensionless;
  K0_eq_ndk has dimensionless;
  dGr0_ndk has kilojoule_per_mole;
  V_mr_J_ndk has mole_per_second_per_l_mito_volume;
  K_ia_J_ndk = 0.00017 molar;
  K_ib_J_ndk = 0.0001436 molar;
  K_ip_J_ndk = 0.0001466 molar;
  K_iq_J_ndk = 0.0001565 molar;
  K_mA_J_ndk = 0.000111 molar;
  K_mB_J_ndk = 0.0001 molar;
  K_mP_J_ndk = 0.00026 molar;
  K_mQ_J_ndk = 0.000278 molar;
  alpha_i_J_ndk has dimensionless;
  K_iAMP_J_ndk = 0.00065 molar;
  minCon_J_ndk = 1e-32 molar;
  J_got_f has mole_per_second_per_l_mito_volume;
  J_got has mole_per_second_per_l_mito_volume;
  K_eq_got has dimensionless;
  K0_eq_got has dimensionless;
  dGr0_got has kilojoule_per_mole;
  V_mr_J_got has mole_per_second_per_l_mito_volume;
  K_ia_J_got = 0.00348 molar;
  K_ib_J_got = 0.00071 molar;
  K_ip_J_got = 5e-5 molar;
  K_iq_J_got = 0.0084 molar;
  K_mA_J_got = 0.0039 molar;
  K_mB_J_got = 0.00043 molar;
  K_mP_J_got = 8.8e-5 molar;
  K_mQ_J_got = 0.0089 molar;
  alpha_i_J_got has dimensionless;
  K_iAKG = 0.0166 molar;
  minCon_J_got = 1e-32 molar;
  J_PYRH has mole_per_second_per_l_mito_volume;
  J_GLUH has mole_per_second_per_l_mito_volume;
  J_CITMAL has mole_per_second_per_l_mito_volume;
  J_AKGMAL has mole_per_second_per_l_mito_volume;
  K_mAKGi = 0.0003 molar;
  K_mAKGx = 0.00017 molar;
  K_mMALi = 0.0014 molar;
  K_mMALx = 0.0007 molar;
  J_MALPI has mole_per_second_per_l_mito_volume;
  J_ASPGLU has mole_per_second_per_l_mito_volume;
  K_eqASPGLU has dimensionless;
  K_hASPGLU has molar;
  K_iASPi = 2.8e-5 molar;
  K_iASPx = 0.0028 molar;
  K_iGLUi = 0.00018 molar;
  K_iGLUx = 0.0016 molar;
  m = 1.8 dimensionless;
  pKa_ASPGLU = 6.5 dimensionless;
  J_SUCMAL has mole_per_second_per_l_mito_volume;
  J_PYRt has mole_per_second_per_l_mito_volume;
  J_CITt has mole_per_second_per_l_mito_volume;
  J_MALt has mole_per_second_per_l_mito_volume;
  J_AKGt has mole_per_second_per_l_mito_volume;
  J_SUCt has mole_per_second_per_l_mito_volume;
  J_GLUt has mole_per_second_per_l_mito_volume;
  J_ASPt has mole_per_second_per_l_mito_volume;
  J_FUMt has mole_per_second_per_l_mito_volume;
  zero = 0 micrometer_per_second;
  J_ICITt has mole_per_second_per_l_mito_volume;
  J_ADPt has mole_per_second_per_l_mito_volume;
  J_ATPt has mole_per_second_per_l_mito_volume;
  J_AMPt has mole_per_second_per_l_mito_volume;
  J_PIt has mole_per_second_per_l_mito_volume;
  J_C1 has mole_per_second_per_l_mito_volume;
  dGr0_C1 has kilojoule_per_mole;
  K_eq_C1 has per_molar;
  K_app_C1 has dimensionless;
  J_C3 has mole_per_second_per_l_mito_volume;
  dGr0_C3 has kilojoule_per_mole;
  K_eq_C3 has molar_squared;
  K_app_C3 has dimensionless;
  QH2_x_J_C3 has molar;
  COQ_x_J_C3 has molar;
  minCon_J_C3 = 1e-32 molar;
  J_C4 has mole_per_second_per_l_mito_volume;
  dGr0_C4 has kilojoule_per_mole;
  K_eq_C4 has dimensionless;
  K_app_C4 has dimensionless;
  O2_x_J_C4 has molar;
  minCon_J_C4 = 1e-32 molar;
  J_F1 has mole_per_second_per_l_mito_volume;
  dGr0_F1 has kilojoule_per_mole;
  K_eq_F1 has per_molar_squared;
  K_app_F1 has per_molar;
  J_ANT has mole_per_second_per_l_mito_volume;
  minCond_J_ANT = 1e-9 molar;
  J_PIHt has mole_per_second_per_l_mito_volume;
  J_Hle has mole_per_second_per_l_mito_volume;
  minCond_J_Hle = 1e-9 millivolt;
  J_KH has mole_per_second_per_l_mito_volume;
  J_HK has mole_per_second_per_l_cyto_volume;
  dGr0_HK has kilojoule_per_mole;
  K_ia_J_HK = 0.001 molar;
  K_ib_J_HK = 4.7e-5 molar;
  K_ip_J_HK = 4.7e-5 molar;
  K_iq_J_HK = 0.001 molar;
  K_mA_J_HK = 0.001 molar;
  K_mB_J_HK = 4.7e-5 molar;
  K_mP_J_HK = 4.7e-5 molar;
  K_mQ_J_HK = 0.001 molar;
  Ki_G6P = 1e-5 molar;
  K_eq_HK has molar;
  Kapp_HK has dimensionless;
  Kapp_HK_m has dimensionless;
  J_CKc has mole_per_second_per_l_cyto_volume;
  X_CK = 10000000 mole_per_second_per_l_cyto_volume_per_molar_per_molar;
  K_CK has per_molar;
  Cr_c has molar;
  J_AKi has mole_per_second_per_l_mito_volume;
  J_AKc has mole_per_second_per_l_mito_volume;
  X_AK = 10000000 mole_per_second_per_l_mito_volume_per_molar_per_molar;
  dGr0_AK has kilojoule_per_mole;
  K_eq_AK has dimensionless;
  Kapp_AKi has dimensionless;
  Kapp_AKc has dimensionless;
  dPsi = -14.087 millivolt;
  NAD_x has molar;
  dNAD_x_dt has molar_per_second;
  COQ_x_dCOQ_x_dt has molar;
  dCOQ_x_dt has molar_per_second;
  Cox_i has molar;
  ATP_x = 1.025e-11 molar;
  dATP_x_dt has molar_per_second;
  ADP_x = 0.01 molar;
  dADP_x_dt has molar_per_second;
  AMP_x = 1e-6 molar;
  dAMP_x_dt = 0 molar_per_second;
  GTP_x = 2.7157e-10 molar;
  dGTP_x_dt has molar_per_second;
  GDP_x = 0.005 molar;
  dGDP_x_dt has molar_per_second;
  PI_x = 0.00029918 molar;
  dPI_x_dt has molar_per_second;
  NADH_x = 8.4842e-21 molar;
  dNADH_x_dt has molar_per_second;
  QH2_x_dQH2_x_dt = 0 molar;
  dQH2_x_dt has molar_per_second;
  PYR_x = 1.2076e-11 molar;
  dPYR_x_dt has molar_per_second;
  ACCOA_x = 2.5507e-12 molar;
  dACCOA_x_dt has molar_per_second;
  CIT_x = 6.8151e-5 molar;
  dCIT_x_dt has molar_per_second;
  ICIT_x = 9.3558e-7 molar;
  dICIT_x_dt has molar_per_second;
  AKG_x = 4.7979e-11 molar;
  dAKG_x_dt has molar_per_second;
  SCOA_x = 6.9627e-10 molar;
  dSCOA_x_dt has molar_per_second;
  COASH_x = 0.0030107 molar;
  dCOASH_x_dt has molar_per_second;
  SUC_x = 2.1681e-7 molar;
  dSUC_x_dt has molar_per_second;
  FUM_x = 7.8476e-9 molar;
  dFUM_x_dt has molar_per_second;
  MAL_x = 3.2191e-8 molar;
  dMAL_x_dt has molar_per_second;
  OAA_x = 0.00089236 molar;
  dOAA_x_dt has molar_per_second;
  GLU_x = 9.9311e-12 molar;
  dGLU_x_dt has molar_per_second;
  ASP_x = 0.00010217 molar;
  dASP_x_dt has molar_per_second;
  O2_x_dO2_x_dt = 6.5e-5 molar;
  dO2_x_dt = 0 molar_per_second;
  CO2_tot_x_dCO2_tot_x_dt = 0.0214 molar;
  dCO2_tot_x_dt = 0 molar_per_second;
  Cred_i = 9.6996e-8 molar;
  ATP_i = 1e-9 molar;
  ADP_i = 1e-9 molar;
  AMP_i = 1e-9 molar;
  PI_i = 0.00011574 molar;
  PYR_i = 9.1804e-10 molar;
  CIT_i = 1e-9 molar;
  ICIT_i = 1e-9 molar;
  AKG_i = 9.9995e-10 molar;
  SUC_i = 1e-9 molar;
  FUM_i = 1e-9 molar;
  MAL_i = 1e-9 molar;
  GLU_i = 5.7539e-12 molar;
  ASP_i = 4.4404e-9 molar;
  H_i has molar;
  Mg_i has molar;
  K_i has molar;
  PYR_c = 1e-9 molar;
  var Rm_cyto_dPYR_c_dt;
  CIT_c = 1e-9 molar;
  var Rm_cyto_dCIT_c_dt;
  ICIT_c = 1e-9 molar;
  var Rm_cyto_dICIT_c_dt;
  AKG_c = 1e-9 molar;
  var Rm_cyto_dAKG_c_dt;
  SUC_c = 1e-9 molar;
  var Rm_cyto_dSUC_c_dt;
  FUM_c = 1e-9 molar;
  var Rm_cyto_dFUM_c_dt;
  MAL_c = 1e-9 molar;
  var Rm_cyto_dMAL_c_dt;
  GLU_c = 5.754e-12 molar;
  var Rm_cyto_dGLU_c_dt;
  ASP_c = 4.4404e-9 molar;
  var Rm_cyto_dASP_c_dt;
  H_c = 1e-7 molar;
  Mg_c = 0.005 molar;
  K_c = 0.15 molar;
  PI_c = 0.00011574 molar;
  var Rm_cyto_dPI_c_dt;
  conversion_factor_dPI_c_dt = 1;
  ATP_c = 1e-9 molar;
  var Rm_cyto_dATP_c_dt;
  conversion_factor_dATP_c_dt = 1;
  ADP_c = 1e-9 molar;
  var Rm_cyto_dADP_c_dt;
  conversion_factor_dADP_c_dt = 1;
  GLC_c = 1e-9 molar;
  G6P_c = 1e-9 molar;
  PCr_c = 1e-9 molar;
  AMP_c = 1e-9 molar;
  var Rm_cyto_dAMP_c_dt;
  conversion_factor_dAMP_c_dt = 1;
  FAD_x has molar;
  dFAD_x_dt = 0 molar_per_second;
  dFADH2_x_dt = 0 molar_per_second;
  FADH2_x has molar;
  H_x = 5.7919e-8 molar;
  dH_x_dt has molar_per_second;
  Mg_x = 0.0046388 molar;
  dMg_x_dt has molar_per_second;
  K_x = 0.086878 molar;
  dK_x_dt has molar_per_second;
  dHB_dMg has dimensionless;
  dHB_dK has dimensionless;
  dHB_dH has dimensionless;
  dMgB_dH has dimensionless;
  dMgB_dK has dimensionless;
  dMgB_dMg has dimensionless;
  dKB_dH has dimensionless;
  dKB_dMg has dimensionless;
  dKB_dK has dimensionless;
  J_H_t has molar_per_second;
  J_Mg_t has molar_per_second;
  J_K_t has molar_per_second;
  phi_H has molar_per_second;
  phi_Mg has molar_per_second;
  phi_K has molar_per_second;
  alpha_H has dimensionless;
  alpha_Mg has dimensionless;
  alpha_K has dimensionless;
  D has dimensionless;
  B_x = 0.02 molar;
  K_BX = 1e-7 molar;

  // Assignment rules:
  P_GLC_c := 1;
  P_NAD_x := 1;
  P_NADH_x := 1;
  P_QH2_x := 1;
  P_COQ_x := 1;
  P_ACCOA_x := 1;
  P_AKG_x := 1;
  P_O2_x := 1;
  P_FADH2_x := 1;
  P_FAD_x := 1;
  P_H_x := 1;
  P_Mg_x := 1;
  P_K_x := 1;
  W_c := piecewise(80, ExpType == 1, 800, ExpType == 2, 0.807*1.044, (ExpType == 3) || (ExpType == 4), 80);
  V_mito := piecewise(0.2882, ExpType == 3, 0.056, ExpType == 4, 0);
  V_cyto := piecewise(0.6801, ExpType == 3, 0.894, ExpType == 4, 1);
  X_HK := piecewise(0.1071081, (ExpType == 1) && (StateType == 3), 0);
  RT := piecewise(8.314*(28 + 273.15)/1, ExpType == 1, 8.314*(37 + 273.15)/1);
  K_H_P_ATP := 1*10^(-6.59);
  K_Mg_P_ATP := 1*10^(-3.82);
  K_K_P_ATP := 1*10^(-1.013);
  P_ATP_x := 1 + H_x/K_H_P_ATP + Mg_x/K_Mg_P_ATP + K_x/K_K_P_ATP;
  H_i := H_c;
  Mg_i := Mg_c;
  K_i := K_c;
  P_ATP_i := 1 + H_i/K_H_P_ATP + Mg_i/K_Mg_P_ATP + K_i/K_K_P_ATP;
  P_ATP_c := 1 + H_c/K_H_P_ATP + Mg_c/K_Mg_P_ATP + K_c/K_K_P_ATP;
  uATP_x := ATP_x*(1 + H_x/K_H_P_ATP)/P_ATP_x;
  mATP_c := ATP_c*Mg_c/K_Mg_P_ATP/P_ATP_c;
  K_H_P_ADP := 1*10^(-6.42);
  K_Mg_P_ADP := 1*10^(-2.79);
  K_K_P_ADP := 1*10^(-0.882);
  P_ADP_x := 1 + H_x/K_H_P_ADP + Mg_x/K_Mg_P_ADP + K_x/K_K_P_ADP;
  P_ADP_i := 1 + H_i/K_H_P_ADP + Mg_i/K_Mg_P_ADP + K_i/K_K_P_ADP;
  P_ADP_c := 1 + H_c/K_H_P_ADP + Mg_c/K_Mg_P_ADP + K_c/K_K_P_ADP;
  uADP_x := ADP_x*(1 + H_x/K_H_P_ADP)/P_ADP_x;
  mADP_c := ADP_c*Mg_c/K_Mg_P_ADP/P_ADP_c;
  K_H_P_AMP := 1*10^(-6.22);
  K_Mg_P_AMP := 1*10^(-1.86);
  K_K_P_AMP := 1*10^(-0.6215);
  P_AMP_x := 1 + H_x/K_H_P_AMP + Mg_x/K_Mg_P_AMP + K_x/K_K_P_AMP;
  P_AMP_i := 1 + H_i/K_H_P_AMP + Mg_i/K_Mg_P_AMP + K_i/K_K_P_AMP;
  P_AMP_c := 1 + H_c/K_H_P_AMP + Mg_c/K_Mg_P_AMP + K_c/K_K_P_AMP;
  uAMP_x := AMP_x*(1 + H_x/K_H_P_AMP)/P_AMP_x;
  P_GTP_x := P_ATP_x;
  P_GTP_i := P_ATP_i;
  P_GTP_c := P_ATP_c;
  K_H_P_GTP := K_H_P_ATP;
  K_Mg_P_GTP := K_Mg_P_ATP;
  K_K_P_GTP := K_K_P_ATP;
  uGTP_x := GTP_x*(1 + H_x/K_H_P_GTP)/P_GTP_x;
  P_GDP_x := P_ADP_x;
  P_GDP_i := P_ADP_i;
  P_GDP_c := P_ADP_c;
  K_H_P_GDP := K_H_P_ADP;
  K_Mg_P_GDP := K_Mg_P_ADP;
  K_K_P_GDP := K_K_P_ADP;
  uGDP_x := GDP_x*(1 + H_x/K_H_P_GDP)/P_GDP_x;
  K_H_P_PI := 1*10^(-6.71);
  K_Mg_P_PI := 1*10^(-1.69);
  K_K_P_PI := 1*10^0.0074;
  P_PI_x := 1 + H_x/K_H_P_PI + Mg_x/K_Mg_P_PI + K_x/K_K_P_PI;
  P_PI_i := 1 + H_i/K_H_P_PI + Mg_i/K_Mg_P_PI + K_i/K_K_P_PI;
  P_PI_c := 1 + H_c/K_H_P_PI + Mg_c/K_Mg_P_PI + K_c/K_K_P_PI;
  hPI_x := PI_x*H_x/K_H_P_PI/P_PI_x;
  hPI_i := PI_i*H_i/K_H_P_PI/P_PI_i;
  K_H_P_COASH := 1*10^(-8.13);
  P_COASH_x := 1 + H_x/K_H_P_COASH;
  P_COASH_i := 1 + H_i/K_H_P_COASH;
  P_COASH_c := 1 + H_c/K_H_P_COASH;
  K_Mg_P_OAA := 1*10^(-0.8629);
  P_OAA_x := 1 + Mg_x/K_Mg_P_OAA;
  P_OAA_i := 1 + Mg_i/K_Mg_P_OAA;
  P_OAA_c := 1 + Mg_c/K_Mg_P_OAA;
  K_H_P_CIT := 1*10^(-5.63);
  K_Mg_P_CIT := 1*10^(-3.37);
  K_K_P_CIT := 1*10^(-0.339);
  P_CIT_x := 1 + H_x/K_H_P_CIT + Mg_x/K_Mg_P_CIT + K_x/K_K_P_CIT;
  P_CIT_i := 1 + H_i/K_H_P_CIT + Mg_i/K_Mg_P_CIT + K_i/K_K_P_CIT;
  P_CIT_c := 1 + H_c/K_H_P_CIT + Mg_c/K_Mg_P_CIT + K_c/K_K_P_CIT;
  uCIT_x := CIT_x*(1 + H_x/K_H_P_CIT)/P_CIT_x;
  uCIT_i := CIT_i*(1 + H_i/K_H_P_CIT)/P_CIT_i;
  hCIT_x := CIT_x*H_x/K_H_P_CIT/P_CIT_x;
  hCIT_i := CIT_i*H_i/K_H_P_CIT/P_CIT_i;
  K_H_P_ICIT := 1*10^(-5.64);
  K_Mg_P_ICIT := 1*10^(-2.46);
  P_ICIT_x := 1 + H_x/K_H_P_ICIT + Mg_x/K_Mg_P_ICIT;
  P_ICIT_i := 1 + H_i/K_H_P_ICIT + Mg_i/K_Mg_P_ICIT;
  P_ICIT_c := 1 + H_c/K_H_P_ICIT + Mg_c/K_Mg_P_ICIT;
  K_H_P_SCOA := 1*10^(-3.96);
  P_SCOA_x := 1 + H_x/K_H_P_SCOA;
  P_SCOA_i := 1 + H_i/K_H_P_SCOA;
  P_SCOA_c := 1 + H_c/K_H_P_SCOA;
  K_H_P_SUC := 1*10^(-5.13);
  K_Mg_P_SUC := 1*10^(-1.17);
  K_K_P_SUC := 1*10^(-0.3525);
  P_SUC_x := 1 + H_x/K_H_P_SUC + Mg_x/K_Mg_P_SUC + K_x/K_K_P_SUC;
  P_SUC_i := 1 + H_i/K_H_P_SUC + Mg_i/K_Mg_P_SUC + K_i/K_K_P_SUC;
  P_SUC_c := 1 + H_c/K_H_P_SUC + Mg_c/K_Mg_P_SUC + K_c/K_K_P_SUC;
  K_H_P_FUM := 1*10^(-4.1);
  P_FUM_x := 1 + H_x/K_H_P_FUM;
  P_FUM_i := 1 + H_i/K_H_P_FUM;
  P_FUM_c := 1 + H_c/K_H_P_FUM;
  K_H_P_MAL := 1*10^(-4.75);
  K_Mg_P_MAL := 1*10^(-1.55);
  K_K_P_MAL := 1*10^0.107;
  P_MAL_x := 1 + H_x/K_H_P_MAL + Mg_x/K_Mg_P_MAL + K_x/K_K_P_MAL;
  P_MAL_i := 1 + H_i/K_H_P_MAL + Mg_i/K_Mg_P_MAL + K_i/K_K_P_MAL;
  P_MAL_c := 1 + H_c/K_H_P_MAL + Mg_c/K_Mg_P_MAL + K_c/K_K_P_MAL;
  K_H_P_CO2_tot := 1*10^(-9.82);
  P_CO2_tot_x := 1 + H_x/K_H_P_CO2_tot;
  P_CO2_tot_i := 1 + H_i/K_H_P_CO2_tot;
  P_CO2_tot_c := 1 + H_c/K_H_P_CO2_tot;
  K_Mg_P_PYR := 1*10^(-1.02);
  P_PYR_x := 1 + Mg_x/K_Mg_P_PYR;
  P_PYR_i := 1 + Mg_i/K_Mg_P_PYR;
  P_PYR_c := 1 + Mg_c/K_Mg_P_PYR;
  K_H_P_G6P := 1*10^(-5.91);
  P_G6P_x := 1 + H_x/K_H_P_G6P;
  P_G6P_i := 1 + H_i/K_H_P_G6P;
  P_G6P_c := 1 + H_c/K_H_P_G6P;
  K_H_P_GLU := 1*10^(-4.06);
  K_Mg_P_GLU := 1*10^(-1.82);
  P_GLU_x := 1 + H_x/K_H_P_GLU + Mg_x/K_Mg_P_GLU;
  P_GLU_i := 1 + H_i/K_H_P_GLU + Mg_i/K_Mg_P_GLU;
  P_GLU_c := 1 + H_c/K_H_P_GLU + Mg_c/K_Mg_P_GLU;
  K_H_P_ASP := 1*10^(-3.65);
  K_Mg_P_ASP := 1*10^(-2.32);
  P_ASP_x := 1 + H_x/K_H_P_ASP + Mg_x/K_Mg_P_ASP;
  P_ASP_i := 1 + H_i/K_H_P_ASP + Mg_i/K_Mg_P_ASP;
  P_ASP_c := 1 + H_c/K_H_P_ASP + Mg_c/K_Mg_P_ASP;
  dGr0_pdh := dGf1_CO2_tot + dGf1_ACCOA + dGf1_NADH - dGf1_PYR - dGf1_COASH - dGf1_NAD - dGf1_H2O;
  K0_eq_pdh := 1*exp(-dGr0_pdh/RT);
  K_eq_pdh := K0_eq_pdh*P_CO2_tot_x*P_ACCOA_x*P_NADH_x/(H_x*P_PYR_x*P_COASH_x*P_NAD_x);
  alpha_i1_J_pdh := 1 + ACCOA_x/K_iACCOA;
  alpha_i2_J_pdh := 1 + NADH_x/K_iNADH;
  NAD_x := NAD_tot - NADH_x;
  J_pdh := piecewise(X_pdh*(PYR_x*COASH_x*NAD_x - CO2_tot_x_dCO2_tot_x_dt*ACCOA_x*NADH_x/K_eq_pdh)/(K_mC_J_pdh*alpha_i2_J_pdh*PYR_x*COASH_x + K_mB_J_pdh*alpha_i1_J_pdh*PYR_x*NAD_x + K_mA_J_pdh*COASH_x*NAD_x + PYR_x*COASH_x*NAD_x), (PYR_x > minCon_J_pdh) && (COASH_x > minCon_J_pdh) && (NAD_x > minCon_J_pdh), 0);
  dGr0_cits := dGf1_COASH + dGf1_CIT - dGf1_ACCOA - dGf1_OAA - dGf1_H2O;
  K0_eq_cits := 1*exp(-dGr0_cits/RT);
  K_eq_cits := K0_eq_cits*P_CIT_x*P_COASH_x/(H_x^2*P_ACCOA_x*P_OAA_x);
  alpha_i1_J_cits := 1 + uCIT_x/K_iCIT_J_cits;
  alpha_i2_J_cits := 1 + uATP_x/K_iATP_J_cits + uADP_x/K_iADP_J_cits + uAMP_x/K_iAMP_J_cits + COASH_x/K_iCOASH + SCOA_x/K_iSCOA;
  J_cits := X_cits*(ACCOA_x*OAA_x - COASH_x*CIT_x/K_eq_cits)/(K_ia_J_cits*K_mB_J_cits*alpha_i1_J_cits + K_mA_J_cits*alpha_i1_J_cits*ACCOA_x + K_mB_J_cits*alpha_i2_J_cits*OAA_x + OAA_x*ACCOA_x);
  dGr0_acon := dGf1_ICIT - dGf1_CIT;
  K0_eq_acon := exp(-dGr0_acon/RT);
  K_eq_acon := K0_eq_acon*P_ICIT_x/P_CIT_x;
  V_mr_J_acon := X_acon*K_mP_J_acon/(K_mA_J_acon*K_eq_acon);
  J_acon := X_acon*V_mr_J_acon*(CIT_x - ICIT_x/K_eq_acon)/(K_mA_J_acon*V_mr_J_acon + V_mr_J_acon*CIT_x + X_acon*ICIT_x/K_eq_acon);
  dGr0_isod := dGf1_AKG + dGf1_NADH + dGf1_CO2_tot - dGf1_ICIT - dGf1_NAD - dGf1_H2O;
  K0_eq_isod := 1*exp(-dGr0_isod/RT);
  K_eq_isod := K0_eq_isod*P_CO2_tot_x*P_AKG_x*P_NADH_x/(H_x^2*P_NAD_x*P_ICIT_x);
  alpha_i_J_isod := 1 + K_aADP_J_isod/uADP_x*(1 + uATP_x/K_iATP_J_isod);
  J_isod := piecewise(X_isod*(1 - CO2_tot_x_dCO2_tot_x_dt*AKG_x*NADH_x/(K_eq_isod*NAD_x*ICIT_x))/(1 + (K_mB_J_isod/ICIT_x)^n_H*alpha_i_J_isod + K_mA_J_isod/NAD_x*(1 + (K_ib_J_isod/ICIT_x)^n_H*alpha_i_J_isod + NADH_x*alpha_i_J_isod/K_iq_J_isod)), (NAD_x > minCon_J_isod) && (ICIT_x > minCon_J_isod), 0);
  dGr0_akgd := dGf1_CO2_tot + dGf1_SCOA + dGf1_NADH - dGf1_AKG - dGf1_COASH - dGf1_NAD - dGf1_H2O;
  K0_eq_akgd := 1*exp(-dGr0_akgd/RT);
  K_eq_akgd := K0_eq_akgd*P_CO2_tot_x*P_SCOA_x*P_NADH_x/(H_x*P_COASH_x*P_AKG_x*P_NAD_x);
  alpha_i_J_akgd := 1 + K_aADP_J_akgd/uADP_x*(1 + uATP_x/K_iATP_J_akgd);
  J_akgd := piecewise(X_akgd*(1 - CO2_tot_x_dCO2_tot_x_dt*SCOA_x*NADH_x/(K_eq_akgd*AKG_x*COASH_x*NAD_x))/(1 + K_mA_J_akgd/AKG_x*alpha_i_J_akgd + K_mB_J_akgd/COASH_x*(1 + SCOA_x/K_iq_J_akgd) + K_mC_J_akgd/NAD_x*(1 + NADH_x/K_ir1))/(1 + NADH_x/K_ir2), (AKG_x > minCon_J_akgd) && (COASH_x > minCon_J_akgd) && (NAD_x > minCon_J_akgd), 0);
  dGr0_scoas := dGf1_COASH + dGf1_SUC + dGf1_GTP - dGf1_GDP - dGf1_SCOA - dGf1_Pi;
  K0_eq_scoas := 1*exp(-dGr0_scoas/RT);
  K_eq_scoas := K0_eq_scoas*P_COASH_x*P_SUC_x*P_GTP_x/(H_x*P_GDP_x*P_SCOA_x*P_PI_x);
  V_mr_J_scoas := X_scoas*K_mP_J_scoas*K_iq_J_scoas*K_ir/(K_eq_scoas*K_ia_J_scoas*K_ib_J_scoas*K_mC_J_scoas);
  J_scoas := X_scoas*V_mr_J_scoas*(GDP_x*SCOA_x*PI_x - COASH_x*SUC_x*GTP_x/K_eq_scoas)/(V_mr_J_scoas*K_ia_J_scoas*K_ib_J_scoas*K_mC_J_scoas + V_mr_J_scoas*K_ib_J_scoas*K_mC_J_scoas*GDP_x + V_mr_J_scoas*K_ia_J_scoas*K_mB_J_scoas*PI_x + V_mr_J_scoas*K_mC_J_scoas*GDP_x*SCOA_x + V_mr_J_scoas*K_mB_J_scoas*GDP_x*PI_x + V_mr_J_scoas*K_mA_J_scoas*SCOA_x*PI_x + V_mr_J_scoas*GDP_x*SCOA_x*PI_x + X_scoas*K_ir*K_mQ_J_scoas*COASH_x/K_eq_scoas + X_scoas*K_iq_J_scoas*K_mP_J_scoas*GTP_x/K_eq_scoas + X_scoas*K_mR*COASH_x*SUC_x/K_eq_scoas + X_scoas*K_mQ_J_scoas*COASH_x*GTP_x/K_eq_scoas + X_scoas*K_mP_J_scoas*SUC_x*GTP_x/K_eq_scoas + X_scoas*COASH_x*SUC_x*GTP_x/K_eq_scoas + X_scoas*K_mQ_J_scoas*K_ir*GDP_x*COASH_x/(K_ia_J_scoas*K_eq_scoas) + V_mr_J_scoas*K_ia_J_scoas*K_mB_J_scoas*PI_x*GTP_x/K_ir + X_scoas*K_mQ_J_scoas*K_ir*GDP_x*SCOA_x*COASH_x/(K_ia_J_scoas*K_ib_J_scoas*K_eq_scoas) + V_mr_J_scoas*K_mA_J_scoas*SCOA_x*PI_x*GTP_x/K_ir + X_scoas*K_mR*GDP_x*COASH_x*SUC_x/(K_ia_J_scoas*K_eq_scoas) + V_mr_J_scoas*K_ia_J_scoas*K_mB_J_scoas*PI_x*SUC_x*GTP_x/(K_iq_J_scoas*K_ir) + X_scoas*K_ir*K_mQ_J_scoas*GDP_x*SCOA_x*PI_x*COASH_x/(K_ia_J_scoas*K_ib_J_scoas*K_ic*K_eq_scoas) + X_scoas*K_ip_J_scoas*K_mR*GDP_x*SCOA_x*PI_x*SUC_x/(K_ia_J_scoas*K_ib_J_scoas*K_ic*K_eq_scoas) + X_scoas*K_mR*GDP_x*SCOA_x*COASH_x*SUC_x/(K_ia_J_scoas*K_ib_J_scoas*K_eq_scoas) + V_mr_J_scoas*K_mA_J_scoas*SCOA_x*PI_x*SUC_x*GTP_x/(K_iq_J_scoas*K_ir) + V_mr_J_scoas*K_mA_J_scoas*K_ic*SCOA_x*COASH_x*SUC_x*GTP_x/(K_ip_J_scoas*K_iq_J_scoas*K_ir) + V_mr_J_scoas*K_ia_J_scoas*K_mB_J_scoas*PI_x*COASH_x*SUC_x*GTP_x/(K_ip_J_scoas*K_iq_J_scoas*K_ir) + X_scoas*K_mR*GDP_x*SCOA_x*PI_x*COASH_x*SUC_x/(K_ia_J_scoas*K_ib_J_scoas*K_ic*K_eq_scoas) + V_mr_J_scoas*K_mA_J_scoas*SCOA_x*PI_x*COASH_x*SUC_x*GTP_x/(K_ip_J_scoas*K_iq_J_scoas*K_ir));
  dGr0_sdh := dGf1_QH2 + dGf1_FUM - dGf1_SUC - dGf1_COQ;
  K0_eq_sdh := exp(-dGr0_sdh/RT);
  K_eq_sdh := K0_eq_sdh*P_FUM_x*P_QH2_x/(P_SUC_x*P_COQ_x);
  V_mr_J_sdh := X_sdh*K_mQH2*K_iq_J_sdh/(K_eq_sdh*K_ia_J_sdh*K_mCOQ);
  alpha_i_J_sdh := (1 + OAA_x/K_iOAA + SUC_x/K_aSUC + FUM_x/K_aFUM)/(1 + SUC_x/K_aSUC + FUM_x/K_aFUM);
  COQ_x_dCOQ_x_dt := Q_tot - QH2_x_dQH2_x_dt;
  J_sdh := X_sdh*V_mr_J_sdh*(SUC_x*COQ_x_dCOQ_x_dt - QH2_x_dQH2_x_dt*FUM_x/K_eq_sdh)/(V_mr_J_sdh*K_ia_J_sdh*K_mCOQ*alpha_i_J_sdh + V_mr_J_sdh*K_mCOQ*SUC_x + V_mr_J_sdh*K_mSUC*alpha_i_J_sdh*COQ_x_dCOQ_x_dt + X_sdh*K_mFUM_J_sdh*alpha_i_J_sdh*QH2_x_dQH2_x_dt/K_eq_sdh + X_sdh*K_mQH2*FUM_x/K_eq_sdh + V_mr_J_sdh*SUC_x*COQ_x_dCOQ_x_dt + X_sdh*K_mFUM_J_sdh*SUC_x*QH2_x_dQH2_x_dt/(K_eq_sdh*K_ia_J_sdh) + V_mr_J_sdh*K_mSUC*COQ_x_dCOQ_x_dt*FUM_x/K_iq_J_sdh + X_sdh*QH2_x_dQH2_x_dt*FUM_x/K_eq_sdh);
  dGr0_fum := dGf1_MAL - dGf1_FUM - dGf1_H2O;
  K0_eq_fum := exp(-dGr0_fum/RT);
  K_eq_fum := K0_eq_fum*P_MAL_x/P_FUM_x;
  V_mr_J_fum := X_fum*K_mMAL_J_fum/(K_eq_fum*K_mFUM_J_fum);
  alpha_i_J_fum := 1 + CIT_x/K_iCIT_J_fum + uATP_x/K_iATP_J_fum + uADP_x/K_iADP_J_fum + uGTP_x/K_iGTP + uGDP_x/K_iGDP;
  J_fum := V_mr_J_fum*X_fum*(FUM_x - MAL_x/K_eq_fum)/(K_mFUM_J_fum*V_mr_J_fum*alpha_i_J_fum + V_mr_J_fum*FUM_x + X_fum*MAL_x/K_eq_fum);
  dGr0_mdh := dGf1_OAA + dGf1_NADH - dGf1_NAD - dGf1_MAL;
  K0_eq_mdh := 1*exp(-dGr0_mdh/RT);
  K_eq_mdh := K0_eq_mdh*P_OAA_x*P_NADH_x/(H_x*P_MAL_x*P_NAD_x);
  V_mr_J_mdh := X_mdh*K_iq_J_mdh*K_mOAA/(K_eq_mdh*K_ia_J_mdh*K_mMAL_J_mdh);
  alpha_i_J_mdh := 1 + uATP_x/K_iATP_J_mdh + uADP_x/K_iADP_J_mdh + uAMP_x/K_iAMP_J_mdh;
  J_mdh := X_mdh*V_mr_J_mdh*(NAD_x*MAL_x - OAA_x*NADH_x/K_eq_mdh)/(V_mr_J_mdh*K_ia_J_mdh*K_mMAL_J_mdh*alpha_i_J_mdh + V_mr_J_mdh*K_mMAL_J_mdh*NAD_x + V_mr_J_mdh*K_mNAD*alpha_i_J_mdh*MAL_x + X_mdh*K_mNADH*alpha_i_J_mdh*OAA_x/K_eq_mdh + X_mdh*K_mOAA*NADH_x/K_eq_mdh + V_mr_J_mdh*NAD_x*MAL_x + X_mdh*K_mNADH*NAD_x*OAA_x/(K_eq_mdh*K_ia_J_mdh) + X_mdh*OAA_x*NADH_x/K_eq_mdh + V_mr_J_mdh*K_mNAD*MAL_x*NADH_x/K_iq_J_mdh + V_mr_J_mdh*NAD_x*MAL_x*OAA_x/K_ip_J_mdh + X_mdh*MAL_x*OAA_x*NADH_x/(K_ib_J_mdh*K_eq_mdh));
  dGr0_ndk := dGf1_GDP + dGf1_ATP - dGf1_GTP - dGf1_ADP;
  K0_eq_ndk := exp(-dGr0_ndk/RT);
  K_eq_ndk := K0_eq_ndk*P_GDP_x*P_ATP_x/(P_GTP_x*P_ADP_x);
  V_mr_J_ndk := X_ndk*K_mQ_J_ndk*K_ip_J_ndk/(K_eq_ndk*K_ia_J_ndk*K_mB_J_ndk);
  alpha_i_J_ndk := 1 + uAMP_x/K_iAMP_J_ndk;
  J_ndk_f := piecewise(X_ndk*V_mr_J_ndk/alpha_i_J_ndk*GTP_x*ADP_x/(V_mr_J_ndk*K_mB_J_ndk*GTP_x + V_mr_J_ndk*K_mA_J_ndk*ADP_x + X_ndk*K_mQ_J_ndk*GDP_x/K_eq_ndk + X_ndk*K_mP_J_ndk*ATP_x/K_eq_ndk + V_mr_J_ndk*GTP_x*ADP_x + X_ndk*K_mQ_J_ndk*GTP_x*GDP_x/(K_eq_ndk*K_ia_J_ndk) + X_ndk*GDP_x*ATP_x/K_eq_ndk + V_mr_J_ndk*K_mA_J_ndk*ADP_x*ATP_x/K_iq_J_ndk), (GTP_x > minCon_J_ndk) && (ADP_x > minCon_J_ndk), 0);
  J_ndk := piecewise(J_ndk_f - X_ndk*V_mr_J_ndk/alpha_i_J_ndk*GDP_x*ATP_x/K_eq_ndk/(V_mr_J_ndk*K_mB_J_ndk*GTP_x + V_mr_J_ndk*K_mA_J_ndk*ADP_x + X_ndk*K_mQ_J_ndk*GDP_x/K_eq_ndk + X_ndk*K_mP_J_ndk*ATP_x/K_eq_ndk + V_mr_J_ndk*GTP_x*ADP_x + X_ndk*K_mQ_J_ndk*GTP_x*GDP_x/(K_eq_ndk*K_ia_J_ndk) + X_ndk*GDP_x*ATP_x/K_eq_ndk + V_mr_J_ndk*K_mA_J_ndk*ADP_x*ATP_x/K_iq_J_ndk), (GDP_x > minCon_J_ndk) && (ATP_x > minCon_J_ndk), J_ndk_f);
  dGr0_got := dGf1_OAA + dGf1_GLU - dGf1_ASP - dGf1_AKG;
  K0_eq_got := exp(-dGr0_got/RT);
  K_eq_got := K0_eq_got*P_GLU_x*P_OAA_x/(P_ASP_x*P_AKG_x);
  V_mr_J_got := X_got*K_mQ_J_got*K_ip_J_got/(K_eq_got*K_ia_J_got*K_mB_J_got);
  alpha_i_J_got := 1 + AKG_x/K_iAKG;
  J_got_f := piecewise(X_got*V_mr_J_got*ASP_x*AKG_x/(V_mr_J_got*K_mB_J_got*ASP_x + V_mr_J_got*K_mA_J_got*alpha_i_J_got*AKG_x + X_got*K_mQ_J_got*alpha_i_J_got*OAA_x/K_eq_got + X_got*K_mP_J_got*GLU_x/K_eq_got + V_mr_J_got*ASP_x*AKG_x + X_got*K_mQ_J_got*ASP_x*OAA_x/(K_eq_got*K_ia_J_got) + X_got*OAA_x*GLU_x/K_eq_got + V_mr_J_got*K_mA_J_got*AKG_x*GLU_x/K_iq_J_got), (ASP_x > minCon_J_got) && (AKG_x > minCon_J_got), 0);
  J_got := piecewise(J_got_f - X_got*V_mr_J_got*OAA_x*GLU_x/K_eq_got/(V_mr_J_got*K_mB_J_got*ASP_x + V_mr_J_got*K_mA_J_got*alpha_i_J_got*AKG_x + X_got*K_mQ_J_got*alpha_i_J_got*OAA_x/K_eq_got + X_got*K_mP_J_got*GLU_x/K_eq_got + V_mr_J_got*ASP_x*AKG_x + X_got*K_mQ_J_got*ASP_x*OAA_x/(K_eq_got*K_ia_J_got) + X_got*OAA_x*GLU_x/K_eq_got + V_mr_J_got*K_mA_J_got*AKG_x*GLU_x/K_iq_J_got), (OAA_x > minCon_J_got) && (GLU_x > minCon_J_got), J_got_f);
  J_PYRH := X_PYRH*(PYR_i/P_PYR_i*H_i - PYR_x/P_PYR_x*H_x);
  J_GLUH := X_GLUH*(GLU_i/P_GLU_i*H_i - GLU_x/P_GLU_x*H_x);
  J_CITMAL := X_CITMAL*(hCIT_i*MAL_x/P_MAL_x - hCIT_x*MAL_i/P_MAL_i);
  J_AKGMAL := X_AKGMAL*(AKG_i*MAL_x - AKG_x*MAL_i)/(K_mAKGi*K_mMALx*(2 + MAL_i/K_mMALi + MAL_x/K_mMALx + AKG_i/K_mAKGi + AKG_x/K_mAKGx + MAL_i*AKG_x/(K_mMALi*K_mAKGx) + MAL_x*AKG_i/(K_mMALx*K_mAKGi)));
  J_MALPI := X_MALPI*(MAL_i/P_MAL_i*PI_x/P_PI_x - MAL_x/P_MAL_x*PI_i/P_PI_i);
  K_eqASPGLU := exp(-F*dPsi/RT)*P_ASP_x*P_GLU_i/(P_ASP_i*P_GLU_x);
  K_hASPGLU := 1*10^(-pKa_ASPGLU);
  J_ASPGLU := X_ASPGLU*(K_eqASPGLU*ASP_i*GLU_x*H_x - ASP_x*GLU_i*H_i)/(K_eqASPGLU*K_iASPi*K_iGLUx*K_hASPGLU*(2*m + m*ASP_i/K_iASPi + ASP_i*GLU_x*H_x/(K_iASPi*K_iGLUx*K_hASPGLU) + m*ASP_x*H_i/(K_iASPx*K_hASPGLU) + ASP_x*GLU_i*H_i/(K_iASPx*K_iGLUi*K_hASPGLU) + m*ASP_x/K_iASPx + m*ASP_i*H_x/(K_iASPi*K_hASPGLU) + m*H_x/K_hASPGLU + m*GLU_i*H_i/(K_iGLUi*K_hASPGLU) + m*H_i/K_hASPGLU + m*GLU_x*H_x/(K_iGLUx*K_hASPGLU)));
  J_SUCMAL := X_SUCMAL*(SUC_i/P_SUC_i*MAL_x/P_MAL_x - SUC_x/P_SUC_x*MAL_i/P_MAL_i);
  J_PYRt := gamma*p_TI*(PYR_c - PYR_i);
  J_CITt := gamma*p_TI*(CIT_c - CIT_i);
  J_MALt := gamma*p_TI*(MAL_c - MAL_i);
  J_AKGt := gamma*p_TI*(AKG_c - AKG_i);
  J_SUCt := gamma*p_TI*(SUC_c - SUC_i);
  J_GLUt := gamma*p_TI*(GLU_c - GLU_i);
  J_ASPt := gamma*p_TI*(ASP_c - ASP_i);
  J_FUMt := gamma*zero*(FUM_c - FUM_i);
  J_ICITt := gamma*p_TI*(ICIT_c - ICIT_i);
  J_ADPt := gamma*p_A*(ADP_c - ADP_i);
  J_ATPt := gamma*p_A*(ATP_c - ATP_i);
  J_AMPt := gamma*p_A*(AMP_c - AMP_i);
  J_PIt := gamma*p_PI*(PI_c - PI_i);
  dGr0_C1 := dGf1_NAD + dGf1_QH2 - dGf1_NADH - dGf1_COQ;
  K_eq_C1 := 1*exp(-(dGr0_C1 + 4*F*dPsi)/RT);
  K_app_C1 := K_eq_C1*H_x^5/H_i^4;
  J_C1 := X_C1*(K_app_C1*NADH_x*COQ_x_dCOQ_x_dt - NAD_x*QH2_x_dQH2_x_dt);
  dGr0_C3 := dGf1_COQ + 2*dGf1_Cred - dGf1_QH2 - 2*dGf1_Cox;
  K_eq_C3 := 1*exp(-(dGr0_C3 + 2*F*dPsi)/RT);
  K_app_C3 := K_eq_C3*H_x^2/H_x^4;
  QH2_x_J_C3 := piecewise(QH2_x_dQH2_x_dt, QH2_x_dQH2_x_dt > minCon_J_C3, minCon_J_C3);
  COQ_x_J_C3 := piecewise(COQ_x_dCOQ_x_dt, COQ_x_dCOQ_x_dt > minCon_J_C3, minCon_J_C3);
  J_C3 := X_C3*(1 + PI_x/k_PI_1)/(1 + PI_x/k_PI_2)*(sqrt(K_app_C3)*Cox_i*sqrt(QH2_x_J_C3) - Cred_i*sqrt(COQ_x_J_C3));
  dGr0_C4 := 2*dGf1_Cox + dGf1_H2O - 2*dGf1_Cred - 0.5*dGf1_O2;
  K_eq_C4 := exp(-(dGr0_C4 + 4*F*dPsi)/RT);
  K_app_C4 := K_eq_C4*H_x^4/(H_i^2*1^2);
  O2_x_J_C4 := piecewise(O2_x_dO2_x_dt, O2_x_dO2_x_dt > minCon_J_C4, minCon_J_C4);
  J_C4 := X_C4*(O2_x_J_C4/(O2_x_J_C4 + k_O2))*exp(F*dPsi/RT)*(Cred_i/cytC_tot)*(K_app_C4^(1/2)*Cred_i*(O2_x_J_C4/1)^(1/4) - Cox_i);
  dGr0_F1 := dGf1_ATP + dGf1_H2O - dGf1_ADP - dGf1_Pi;
  K_eq_F1 := exp(-(dGr0_F1 - n_A*F*dPsi)/RT)/1;
  K_app_F1 := K_eq_F1*H_i^n_A/H_x^(n_A - 1)*P_ATP_x/(P_ADP_x*P_PI_x);
  J_F1 := X_F1*(K_app_F1*ADP_x*PI_x - ATP_x);
  J_ANT := piecewise(X_ANT*(ADP_i/P_ADP_i/(ADP_i/P_ADP_i + ATP_i/P_ATP_i*exp(theta*F*dPsi/RT)) - ADP_x/P_ADP_x/(ADP_x/P_ADP_x + ATP_x/P_ATP_x*exp(theta*(F - 1)*dPsi/RT)))*(ADP_i/P_ADP_i/(ADP_i/P_ADP_i + k_mADP)), (ADP_i > minCond_J_ANT) && (ATP_x > minCond_J_ANT), 0);
  J_PIHt := X_PiHt*(hPI_i*H_i - hPI_x*H_x)/(k_PiHt*(1 + hPI_i/k_PiHt)*(1 + hPI_x/k_PiHt));
  J_Hle := piecewise(X_Hle*dPsi*(H_i*exp(F*dPsi/RT) - H_x)/(exp(F*dPsi/RT) - 1), abs(dPsi) > minCond_J_Hle, X_Hle*RT*(H_i - H_x)/F);
  J_KH := X_KH*(K_i*H_x - K_x*H_i);
  dGr0_HK := dGf1_G6P + dGf1_ADP - dGf1_GLC - dGf1_ATP;
  K_eq_HK := 1*exp(-dGr0_HK/RT);
  Kapp_HK := K_eq_HK*P_G6P_c*P_ADP_c/(H_c*P_ATP_c*P_GLC_c);
  Kapp_HK_m := Kapp_HK*K_Mg_P_ATP*P_ATP_c/(K_Mg_P_ADP*P_ADP_c);
  J_HK := X_HK/(K_ib_J_HK*K_mA_J_HK)*(mATP_c*GLC_c - G6P_c*mADP_c/Kapp_HK_m)/(1 + mATP_c/K_ia_J_HK + GLC_c/K_ib_J_HK + mATP_c*GLC_c/(K_ib_J_HK*K_mA_J_HK) + G6P_c/K_ip_J_HK + mADP_c/K_iq_J_HK + G6P_c*mADP_c/(K_iq_J_HK*K_mP_J_HK) + G6P_c*GLC_c/(Ki_G6P*K_ib_J_HK));
  Cr_c := CR_tot - PCr_c;
  K_CK := exp(50.78/RT)/1;
  J_CKc := piecewise(0, (ExpType == 1) || (ExpType == 2) || (ExpType == 5), X_CK*(K_CK*ADP_c/P_ADP_c*PCr_c*H_c - ATP_c/P_ATP_c*Cr_c));
  dGr0_AK := dGf1_ATP + dGf1_AMP - 2*dGf1_ADP;
  K_eq_AK := exp(-dGr0_AK/RT);
  Kapp_AKi := K_eq_AK*P_ATP_i*P_AMP_i/(P_ADP_i*P_ADP_i);
  Kapp_AKc := K_eq_AK*P_ATP_c*P_AMP_c/(P_ADP_c*P_ADP_c);
  J_AKi := piecewise(0, (ExpType == 1) || (ExpType == 2) || (ExpType == 5), X_AK*(Kapp_AKi*ADP_i*ADP_i - AMP_i*ATP_i));
  J_AKc := piecewise(0, (ExpType == 1) || (ExpType == 2) || (ExpType == 5), X_AK*(Kapp_AKc*ADP_c*ADP_c - AMP_c*ATP_c));
  dNAD_x_dt := -dNADH_x_dt;
  dCOQ_x_dt := -dQH2_x_dt;
  Cox_i := cytC_tot - Cred_i;
  dATP_x_dt := (J_ndk + J_F1 - J_ANT)/W_x;
  dADP_x_dt := (-J_ndk - J_F1 + J_ANT)/W_x;
  dGTP_x_dt := (J_scoas - J_ndk)/W_x;
  dGDP_x_dt := (-J_scoas + J_ndk)/W_x;
  dPI_x_dt := (-J_scoas - J_F1 + J_PIHt - J_MALPI)/W_x;
  dNADH_x_dt := (J_pdh + J_isod + J_akgd + J_mdh - J_C1)/W_x;
  dQH2_x_dt := (J_sdh + J_C1 - J_C3)/W_x;
  dPYR_x_dt := (-J_pdh + J_PYRH)/W_x;
  dACCOA_x_dt := (J_pdh - J_cits)/W_x;
  dCIT_x_dt := (-J_acon + J_CITMAL + J_cits)/W_x;
  dICIT_x_dt := (J_acon - J_isod)/W_x;
  dAKG_x_dt := (J_isod - J_akgd - J_got + J_AKGMAL)/W_x;
  dSCOA_x_dt := (J_akgd - J_scoas)/W_x;
  dCOASH_x_dt := (-J_pdh - J_akgd + J_scoas + J_cits)/W_x;
  dSUC_x_dt := (J_scoas - J_sdh + J_SUCMAL)/W_x;
  dFUM_x_dt := (J_sdh - J_fum)/W_x;
  dMAL_x_dt := (J_fum - J_mdh + J_MALPI - J_AKGMAL - J_CITMAL - J_SUCMAL)/W_x;
  dOAA_x_dt := (-J_cits + J_mdh + J_got)/W_x;
  dGLU_x_dt := (J_got + J_GLUH - J_ASPGLU)/W_x;
  dASP_x_dt := (-J_got + J_ASPGLU)/W_x;
  Rm_cyto_dPYR_c_dt := piecewise(0, (StateType == 0) || (ExpType == 3) || (ExpType == 4) || (ExpType == 5), 1, (ExpType == 1) || (ExpType == 2) || (ExpType == 6), V_mito/V_cyto);
  Rm_cyto_dCIT_c_dt := piecewise(0, (StateType == 0) || (ExpType == 5), 1, (ExpType == 1) || (ExpType == 2) || (ExpType == 6), V_mito/V_cyto);
  Rm_cyto_dICIT_c_dt := piecewise(0, (StateType == 0) || (ExpType == 5), 1, (ExpType == 1) || (ExpType == 2) || (ExpType == 6), V_mito/V_cyto);
  Rm_cyto_dAKG_c_dt := piecewise(0, (StateType == 0) || (ExpType == 5), 1, (ExpType == 1) || (ExpType == 2) || (ExpType == 6), V_mito/V_cyto);
  Rm_cyto_dSUC_c_dt := piecewise(0, (StateType == 0) || (ExpType == 5), 1, (ExpType == 1) || (ExpType == 2) || (ExpType == 6), V_mito/V_cyto);
  Rm_cyto_dFUM_c_dt := piecewise(0, (StateType == 0) || (ExpType == 5), 1, (ExpType == 1) || (ExpType == 2) || (ExpType == 6), V_mito/V_cyto);
  Rm_cyto_dMAL_c_dt := piecewise(0, (StateType == 0) || (ExpType == 5), 1, (ExpType == 1) || (ExpType == 2) || (ExpType == 6), V_mito/V_cyto);
  Rm_cyto_dGLU_c_dt := piecewise(1, (ExpType == 1) || (ExpType == 2) || (ExpType == 5) || (ExpType == 6), V_mito/V_cyto);
  Rm_cyto_dASP_c_dt := piecewise(1, (ExpType == 1) || (ExpType == 2) || (ExpType == 5) || (ExpType == 6), V_mito/V_cyto);
  Rm_cyto_dPI_c_dt := V_mito/V_cyto;
  Rm_cyto_dATP_c_dt := V_mito/V_cyto;
  Rm_cyto_dADP_c_dt := V_mito/V_cyto;
  Rm_cyto_dAMP_c_dt := V_mito/V_cyto;
  FAD_x := FAD_tot - FADH2_x;
  FADH2_x := FAD_tot/2;
  dH_x_dt := 0;
  dMg_x_dt := 0;
  dK_x_dt := 0;
  dHB_dMg := -(H_x*H_x/(K_H_P_H*K_Mg_P_H*P_H_x^2) + H_x*ATP_x/(K_H_P_ATP*K_Mg_P_ATP*P_ATP_x^2) + H_x*ADP_x/(K_H_P_ADP*K_Mg_P_ADP*P_ADP_x^2) + H_x*AMP_x/(K_H_P_AMP*K_Mg_P_AMP*P_AMP_x^2) + H_x*GTP_x/(K_H_P_ATP*K_Mg_P_ATP*P_GTP_x^2) + H_x*GDP_x/(K_H_P_ADP*K_Mg_P_ADP*P_GDP_x^2) + H_x*PI_x/(K_H_P_PI*K_Mg_P_PI*P_PI_x^2) + H_x*NADH_x/(K_H_P_NADH*K_Mg_P_NADH*P_NADH_x^2) + H_x*NAD_x/(K_H_P_NAD*K_Mg_P_NAD*P_NAD_x^2) + H_x*QH2_x_dQH2_x_dt/(K_H_P_QH2*K_Mg_P_QH2*P_QH2_x^2) + H_x*COQ_x_dCOQ_x_dt/(K_H_P_COQ*K_Mg_P_COQ*P_COQ_x^2) + H_x*PYR_x/(K_H_P_PYR*K_Mg_P_PYR*P_PYR_x^2) + H_x*OAA_x/(K_H_P_OAA*K_Mg_P_OAA*P_OAA_x^2) + H_x*ACCOA_x/(K_H_P_ACCOA*K_Mg_P_ACCOA*P_ACCOA_x^2) + H_x*CIT_x/(K_H_P_CIT*K_Mg_P_CIT*P_CIT_x^2) + H_x*ICIT_x/(K_H_P_ICIT*K_Mg_P_ICIT*P_ICIT_x^2) + H_x*AKG_x/(K_H_P_AKG*K_Mg_P_AKG*P_AKG_x^2) + H_x*SCOA_x/(K_H_P_SCOA*K_Mg_P_SCOA*P_SCOA_x^2) + H_x*COASH_x/(K_H_P_COASH*K_Mg_P_COASH*P_COASH_x^2) + H_x*SUC_x/(K_H_P_SUC*K_Mg_P_SUC*P_SUC_x^2) + H_x*FUM_x/(K_H_P_FUM*K_Mg_P_FUM*P_FUM_x^2) + H_x*MAL_x/(K_H_P_MAL*K_Mg_P_MAL*P_MAL_x^2) + H_x*GLU_x/(K_H_P_GLU*K_Mg_P_GLU*P_GLU_x^2) + H_x*ASP_x/(K_H_P_ASP*K_Mg_P_ASP*P_ASP_x^2) + H_x*K_x/(K_H_P_K*K_Mg_P_K*P_K_x^2) + H_x*Mg_x/(K_H_P_Mg*K_Mg_P_Mg*P_Mg_x^2) + H_x*O2_x_dO2_x_dt/(K_H_P_O2*K_Mg_P_O2*P_O2_x^2) + H_x*FADH2_x/(K_H_P_FADH2*K_Mg_P_FADH2*P_FADH2_x^2) + H_x*FAD_x/(K_H_P_FAD*K_Mg_P_FAD*P_FAD_x^2) + H_x*CO2_tot_x_dCO2_tot_x_dt/(K_H_P_CO2_tot*K_Mg_P_CO2_tot*P_CO2_tot_x^2));
  dHB_dK := -(H_x*H_x/(K_H_P_H*K_K_P_H*P_H_x^2) + H_x*ATP_x/(K_H_P_ATP*K_K_P_ATP*P_ATP_x^2) + H_x*ADP_x/(K_H_P_ADP*K_K_P_ADP*P_ADP_x^2) + H_x*AMP_x/(K_H_P_AMP*K_K_P_AMP*P_AMP_x^2) + H_x*GTP_x/(K_H_P_ATP*K_K_P_ATP*P_GTP_x^2) + H_x*GDP_x/(K_H_P_ADP*K_K_P_ADP*P_GDP_x^2) + H_x*PI_x/(K_H_P_PI*K_K_P_PI*P_PI_x^2) + H_x*NADH_x/(K_H_P_NADH*K_K_P_NADH*P_NADH_x^2) + H_x*NAD_x/(K_H_P_NAD*K_K_P_NAD*P_NAD_x^2) + H_x*QH2_x_dQH2_x_dt/(K_H_P_QH2*K_K_P_QH2*P_QH2_x^2) + H_x*COQ_x_dCOQ_x_dt/(K_H_P_COQ*K_K_P_COQ*P_COQ_x^2) + H_x*PYR_x/(K_H_P_PYR*K_K_P_PYR*P_PYR_x^2) + H_x*OAA_x/(K_H_P_OAA*K_K_P_OAA*P_OAA_x^2) + H_x*ACCOA_x/(K_H_P_ACCOA*K_K_P_ACCOA*P_ACCOA_x^2) + H_x*CIT_x/(K_H_P_CIT*K_K_P_CIT*P_CIT_x^2) + H_x*ICIT_x/(K_H_P_ICIT*K_K_P_ICIT*P_ICIT_x^2) + H_x*AKG_x/(K_H_P_AKG*K_K_P_AKG*P_AKG_x^2) + H_x*SCOA_x/(K_H_P_SCOA*K_K_P_SCOA*P_SCOA_x^2) + H_x*COASH_x/(K_H_P_COASH*K_K_P_COASH*P_COASH_x^2) + H_x*SUC_x/(K_H_P_SUC*K_K_P_SUC*P_SUC_x^2) + H_x*FUM_x/(K_H_P_FUM*K_K_P_FUM*P_FUM_x^2) + H_x*MAL_x/(K_H_P_MAL*K_K_P_MAL*P_MAL_x^2) + H_x*GLU_x/(K_H_P_GLU*K_K_P_GLU*P_GLU_x^2) + H_x*ASP_x/(K_H_P_ASP*K_K_P_ASP*P_ASP_x^2) + H_x*K_x/(K_H_P_K*K_K_P_K*P_K_x^2) + H_x*Mg_x/(K_H_P_Mg*K_K_P_Mg*P_Mg_x^2) + H_x*O2_x_dO2_x_dt/(K_H_P_O2*K_K_P_O2*P_O2_x^2) + H_x*FADH2_x/(K_H_P_FADH2*K_K_P_FADH2*P_FADH2_x^2) + H_x*FAD_x/(K_H_P_FAD*K_K_P_FAD*P_FAD_x^2) + H_x*CO2_tot_x_dCO2_tot_x_dt/(K_H_P_CO2_tot*K_K_P_CO2_tot*P_CO2_tot_x^2));
  dHB_dH := (1 + Mg_x/K_Mg_P_H + K_x/K_K_P_H)*H_x/(K_H_P_H*P_H_x^2) + (1 + Mg_x/K_Mg_P_ATP + K_x/K_K_P_ATP)*ATP_x/(K_H_P_ATP*P_ATP_x^2) + (1 + Mg_x/K_Mg_P_ADP + K_x/K_K_P_ADP)*ADP_x/(K_H_P_ADP*P_ADP_x^2) + (1 + Mg_x/K_Mg_P_AMP + K_x/K_K_P_AMP)*AMP_x/(K_H_P_AMP*P_AMP_x^2) + (1 + Mg_x/K_Mg_P_ATP + K_x/K_K_P_ATP)*GTP_x/(K_H_P_ATP*P_GTP_x^2) + (1 + Mg_x/K_Mg_P_ADP + K_x/K_K_P_ADP)*GDP_x/(K_H_P_ADP*P_GDP_x^2) + (1 + Mg_x/K_Mg_P_PI + K_x/K_K_P_PI)*PI_x/(K_H_P_PI*P_PI_x^2) + (1 + Mg_x/K_Mg_P_NADH + K_x/K_K_P_NADH)*NADH_x/(K_H_P_NADH*P_NADH_x^2) + (1 + Mg_x/K_Mg_P_NAD + K_x/K_K_P_NAD)*NAD_x/(K_H_P_NAD*P_NAD_x^2) + (1 + Mg_x/K_Mg_P_QH2 + K_x/K_K_P_QH2)*QH2_x_dQH2_x_dt/(K_H_P_QH2*P_QH2_x^2) + (1 + Mg_x/K_Mg_P_COQ + K_x/K_K_P_COQ)*COQ_x_dCOQ_x_dt/(K_H_P_COQ*P_COQ_x^2) + (1 + Mg_x/K_Mg_P_PYR + K_x/K_K_P_PYR)*PYR_x/(K_H_P_PYR*P_PYR_x^2) + (1 + Mg_x/K_Mg_P_OAA + K_x/K_K_P_OAA)*OAA_x/(K_H_P_OAA*P_OAA_x^2) + (1 + Mg_x/K_Mg_P_ACCOA + K_x/K_K_P_ACCOA)*ACCOA_x/(K_H_P_ACCOA*P_ACCOA_x^2) + (1 + Mg_x/K_Mg_P_CIT + K_x/K_K_P_CIT)*CIT_x/(K_H_P_CIT*P_CIT_x^2) + (1 + Mg_x/K_Mg_P_ICIT + K_x/K_K_P_ICIT)*ICIT_x/(K_H_P_ICIT*P_ICIT_x^2) + (1 + Mg_x/K_Mg_P_AKG + K_x/K_K_P_AKG)*AKG_x/(K_H_P_AKG*P_AKG_x^2) + (1 + Mg_x/K_Mg_P_SCOA + K_x/K_K_P_SCOA)*SCOA_x/(K_H_P_SCOA*P_SCOA_x^2) + (1 + Mg_x/K_Mg_P_COASH + K_x/K_K_P_COASH)*COASH_x/(K_H_P_COASH*P_COASH_x^2) + (1 + Mg_x/K_Mg_P_SUC + K_x/K_K_P_SUC)*SUC_x/(K_H_P_SUC*P_SUC_x^2) + (1 + Mg_x/K_Mg_P_FUM + K_x/K_K_P_FUM)*FUM_x/(K_H_P_FUM*P_FUM_x^2) + (1 + Mg_x/K_Mg_P_MAL + K_x/K_K_P_MAL)*MAL_x/(K_H_P_MAL*P_MAL_x^2) + (1 + Mg_x/K_Mg_P_GLU + K_x/K_K_P_GLU)*GLU_x/(K_H_P_GLU*P_GLU_x^2) + (1 + Mg_x/K_Mg_P_ASP + K_x/K_K_P_ASP)*ASP_x/(K_H_P_ASP*P_ASP_x^2) + (1 + Mg_x/K_Mg_P_K + K_x/K_K_P_K)*K_x/(K_H_P_K*P_K_x^2) + (1 + Mg_x/K_Mg_P_Mg + K_x/K_K_P_Mg)*Mg_x/(K_H_P_Mg*P_Mg_x^2) + (1 + Mg_x/K_Mg_P_O2 + K_x/K_K_P_O2)*O2_x_dO2_x_dt/(K_H_P_O2*P_O2_x^2) + (1 + Mg_x/K_Mg_P_FADH2 + K_x/K_K_P_FADH2)*FADH2_x/(K_H_P_FADH2*P_FADH2_x^2) + (1 + Mg_x/K_Mg_P_FAD + K_x/K_K_P_FAD)*FAD_x/(K_H_P_FAD*P_FAD_x^2) + (1 + Mg_x/K_Mg_P_CO2_tot + K_x/K_K_P_CO2_tot)*CO2_tot_x_dCO2_tot_x_dt/(K_H_P_CO2_tot*P_CO2_tot_x^2);
  dMgB_dH := -(Mg_x*H_x/(K_Mg_P_H*K_H_P_H*P_H_x^2) + Mg_x*ATP_x/(K_Mg_P_ATP*K_H_P_ATP*P_ATP_x^2) + Mg_x*ADP_x/(K_Mg_P_ADP*K_H_P_ADP*P_ADP_x^2) + Mg_x*AMP_x/(K_Mg_P_AMP*K_H_P_AMP*P_AMP_x^2) + Mg_x*GTP_x/(K_Mg_P_ATP*K_H_P_ATP*P_GTP_x^2) + Mg_x*GDP_x/(K_Mg_P_ADP*K_H_P_ADP*P_GDP_x^2) + Mg_x*PI_x/(K_Mg_P_PI*K_H_P_PI*P_PI_x^2) + Mg_x*NADH_x/(K_Mg_P_NADH*K_H_P_NADH*P_NADH_x^2) + Mg_x*NAD_x/(K_Mg_P_NAD*K_H_P_NAD*P_NAD_x^2) + Mg_x*QH2_x_dQH2_x_dt/(K_Mg_P_QH2*K_H_P_QH2*P_QH2_x^2) + Mg_x*COQ_x_dCOQ_x_dt/(K_Mg_P_COQ*K_H_P_COQ*P_COQ_x^2) + Mg_x*PYR_x/(K_Mg_P_PYR*K_H_P_PYR*P_PYR_x^2) + Mg_x*OAA_x/(K_Mg_P_OAA*K_H_P_OAA*P_OAA_x^2) + Mg_x*ACCOA_x/(K_Mg_P_ACCOA*K_H_P_ACCOA*P_ACCOA_x^2) + Mg_x*CIT_x/(K_Mg_P_CIT*K_H_P_CIT*P_CIT_x^2) + Mg_x*ICIT_x/(K_Mg_P_ICIT*K_H_P_ICIT*P_ICIT_x^2) + Mg_x*AKG_x/(K_Mg_P_AKG*K_H_P_AKG*P_AKG_x^2) + Mg_x*SCOA_x/(K_Mg_P_SCOA*K_H_P_SCOA*P_SCOA_x^2) + Mg_x*COASH_x/(K_Mg_P_COASH*K_H_P_COASH*P_COASH_x^2) + Mg_x*SUC_x/(K_Mg_P_SUC*K_H_P_SUC*P_SUC_x^2) + Mg_x*FUM_x/(K_Mg_P_FUM*K_H_P_FUM*P_FUM_x^2) + Mg_x*MAL_x/(K_Mg_P_MAL*K_H_P_MAL*P_MAL_x^2) + Mg_x*GLU_x/(K_Mg_P_GLU*K_H_P_GLU*P_GLU_x^2) + Mg_x*ASP_x/(K_Mg_P_ASP*K_H_P_ASP*P_ASP_x^2) + Mg_x*K_x/(K_Mg_P_K*K_H_P_K*P_K_x^2) + Mg_x*Mg_x/(K_Mg_P_Mg*K_H_P_Mg*P_Mg_x^2) + Mg_x*O2_x_dO2_x_dt/(K_Mg_P_O2*K_H_P_O2*P_O2_x^2) + Mg_x*FADH2_x/(K_Mg_P_FADH2*K_H_P_FADH2*P_FADH2_x^2) + Mg_x*FAD_x/(K_Mg_P_FAD*K_H_P_FAD*P_FAD_x^2) + Mg_x*CO2_tot_x_dCO2_tot_x_dt/(K_Mg_P_CO2_tot*K_H_P_CO2_tot*P_CO2_tot_x^2));
  dMgB_dK := -(Mg_x*H_x/(K_Mg_P_H*K_K_P_H*P_H_x^2) + Mg_x*ATP_x/(K_Mg_P_ATP*K_K_P_ATP*P_ATP_x^2) + Mg_x*ADP_x/(K_Mg_P_ADP*K_K_P_ADP*P_ADP_x^2) + Mg_x*AMP_x/(K_Mg_P_AMP*K_K_P_AMP*P_AMP_x^2) + Mg_x*GTP_x/(K_Mg_P_ATP*K_K_P_ATP*P_GTP_x^2) + Mg_x*GDP_x/(K_Mg_P_ADP*K_K_P_ADP*P_GDP_x^2) + Mg_x*PI_x/(K_Mg_P_PI*K_K_P_PI*P_PI_x^2) + Mg_x*NADH_x/(K_Mg_P_NADH*K_K_P_NADH*P_NADH_x^2) + Mg_x*NAD_x/(K_Mg_P_NAD*K_K_P_NAD*P_NAD_x^2) + Mg_x*QH2_x_dQH2_x_dt/(K_Mg_P_QH2*K_K_P_QH2*P_QH2_x^2) + Mg_x*COQ_x_dCOQ_x_dt/(K_Mg_P_COQ*K_K_P_COQ*P_COQ_x^2) + Mg_x*PYR_x/(K_Mg_P_PYR*K_K_P_PYR*P_PYR_x^2) + Mg_x*OAA_x/(K_Mg_P_OAA*K_K_P_OAA*P_OAA_x^2) + Mg_x*ACCOA_x/(K_Mg_P_ACCOA*K_K_P_ACCOA*P_ACCOA_x^2) + Mg_x*CIT_x/(K_Mg_P_CIT*K_K_P_CIT*P_CIT_x^2) + Mg_x*ICIT_x/(K_Mg_P_ICIT*K_K_P_ICIT*P_ICIT_x^2) + Mg_x*AKG_x/(K_Mg_P_AKG*K_K_P_AKG*P_AKG_x^2) + Mg_x*SCOA_x/(K_Mg_P_SCOA*K_K_P_SCOA*P_SCOA_x^2) + Mg_x*COASH_x/(K_Mg_P_COASH*K_K_P_COASH*P_COASH_x^2) + Mg_x*SUC_x/(K_Mg_P_SUC*K_K_P_SUC*P_SUC_x^2) + Mg_x*FUM_x/(K_Mg_P_FUM*K_K_P_FUM*P_FUM_x^2) + Mg_x*MAL_x/(K_Mg_P_MAL*K_K_P_MAL*P_MAL_x^2) + Mg_x*GLU_x/(K_Mg_P_GLU*K_K_P_GLU*P_GLU_x^2) + Mg_x*ASP_x/(K_Mg_P_ASP*K_K_P_ASP*P_ASP_x^2) + Mg_x*K_x/(K_Mg_P_K*K_K_P_K*P_K_x^2) + Mg_x*Mg_x/(K_Mg_P_Mg*K_K_P_Mg*P_Mg_x^2) + Mg_x*O2_x_dO2_x_dt/(K_Mg_P_O2*K_K_P_O2*P_O2_x^2) + Mg_x*FADH2_x/(K_Mg_P_FADH2*K_K_P_FADH2*P_FADH2_x^2) + Mg_x*FAD_x/(K_Mg_P_FAD*K_K_P_FAD*P_FAD_x^2) + Mg_x*CO2_tot_x_dCO2_tot_x_dt/(K_Mg_P_CO2_tot*K_K_P_CO2_tot*P_CO2_tot_x^2));
  dMgB_dMg := (1 + H_x/K_H_P_H + K_x/K_K_P_H)*H_x/(K_Mg_P_H*P_H_x^2) + (1 + H_x/K_H_P_ATP + K_x/K_K_P_ATP)*ATP_x/(K_Mg_P_ATP*P_ATP_x^2) + (1 + H_x/K_H_P_ADP + K_x/K_K_P_ADP)*ADP_x/(K_Mg_P_ADP*P_ADP_x^2) + (1 + H_x/K_H_P_AMP + K_x/K_K_P_AMP)*AMP_x/(K_Mg_P_AMP*P_AMP_x^2) + (1 + H_x/K_H_P_ATP + K_x/K_K_P_ATP)*GTP_x/(K_Mg_P_ATP*P_GTP_x^2) + (1 + H_x/K_H_P_ADP + K_x/K_K_P_ADP)*GDP_x/(K_Mg_P_ADP*P_GDP_x^2) + (1 + H_x/K_H_P_PI + K_x/K_K_P_PI)*PI_x/(K_Mg_P_PI*P_PI_x^2) + (1 + H_x/K_H_P_NADH + K_x/K_K_P_NADH)*NADH_x/(K_Mg_P_NADH*P_NADH_x^2) + (1 + H_x/K_H_P_NAD + K_x/K_K_P_NAD)*NAD_x/(K_Mg_P_NAD*P_NAD_x^2) + (1 + H_x/K_H_P_QH2 + K_x/K_K_P_QH2)*QH2_x_dQH2_x_dt/(K_Mg_P_QH2*P_QH2_x^2) + (1 + H_x/K_H_P_COQ + K_x/K_K_P_COQ)*COQ_x_dCOQ_x_dt/(K_Mg_P_COQ*P_COQ_x^2) + (1 + H_x/K_H_P_PYR + K_x/K_K_P_PYR)*PYR_x/(K_Mg_P_PYR*P_PYR_x^2) + (1 + H_x/K_H_P_OAA + K_x/K_K_P_OAA)*OAA_x/(K_Mg_P_OAA*P_OAA_x^2) + (1 + H_x/K_H_P_ACCOA + K_x/K_K_P_ACCOA)*ACCOA_x/(K_Mg_P_ACCOA*P_ACCOA_x^2) + (1 + H_x/K_H_P_CIT + K_x/K_K_P_CIT)*CIT_x/(K_Mg_P_CIT*P_CIT_x^2) + (1 + H_x/K_H_P_ICIT + K_x/K_K_P_ICIT)*ICIT_x/(K_Mg_P_ICIT*P_ICIT_x^2) + (1 + H_x/K_H_P_AKG + K_x/K_K_P_AKG)*AKG_x/(K_Mg_P_AKG*P_AKG_x^2) + (1 + H_x/K_H_P_SCOA + K_x/K_K_P_SCOA)*SCOA_x/(K_Mg_P_SCOA*P_SCOA_x^2) + (1 + H_x/K_H_P_COASH + K_x/K_K_P_COASH)*COASH_x/(K_Mg_P_COASH*P_COASH_x^2) + (1 + H_x/K_H_P_SUC + K_x/K_K_P_SUC)*SUC_x/(K_Mg_P_SUC*P_SUC_x^2) + (1 + H_x/K_H_P_FUM + K_x/K_K_P_FUM)*FUM_x/(K_Mg_P_FUM*P_FUM_x^2) + (1 + H_x/K_H_P_MAL + K_x/K_K_P_MAL)*MAL_x/(K_Mg_P_MAL*P_MAL_x^2) + (1 + H_x/K_H_P_GLU + K_x/K_K_P_GLU)*GLU_x/(K_Mg_P_GLU*P_GLU_x^2) + (1 + H_x/K_H_P_ASP + K_x/K_K_P_ASP)*ASP_x/(K_Mg_P_ASP*P_ASP_x^2) + (1 + H_x/K_H_P_K + K_x/K_K_P_K)*K_x/(K_Mg_P_K*P_K_x^2) + (1 + H_x/K_H_P_Mg + K_x/K_K_P_Mg)*Mg_x/(K_Mg_P_Mg*P_Mg_x^2) + (1 + H_x/K_H_P_O2 + K_x/K_K_P_O2)*O2_x_dO2_x_dt/(K_Mg_P_O2*P_O2_x^2) + (1 + H_x/K_H_P_FADH2 + K_x/K_K_P_FADH2)*FADH2_x/(K_Mg_P_FADH2*P_FADH2_x^2) + (1 + H_x/K_H_P_FAD + K_x/K_K_P_FAD)*FAD_x/(K_Mg_P_FAD*P_FAD_x^2) + (1 + H_x/K_H_P_CO2_tot + K_x/K_K_P_CO2_tot)*CO2_tot_x_dCO2_tot_x_dt/(K_Mg_P_CO2_tot*P_CO2_tot_x^2);
  dKB_dH := -(K_x*H_x/(K_K_P_H*K_H_P_H*P_H_x^2) + K_x*ATP_x/(K_K_P_ATP*K_H_P_ATP*P_ATP_x^2) + K_x*ADP_x/(K_K_P_ADP*K_H_P_ADP*P_ADP_x^2) + K_x*AMP_x/(K_K_P_AMP*K_H_P_AMP*P_AMP_x^2) + K_x*GTP_x/(K_K_P_ATP*K_H_P_ATP*P_GTP_x^2) + K_x*GDP_x/(K_K_P_ADP*K_H_P_ADP*P_GDP_x^2) + K_x*PI_x/(K_K_P_PI*K_H_P_PI*P_PI_x^2) + K_x*NADH_x/(K_K_P_NADH*K_H_P_NADH*P_NADH_x^2) + K_x*NAD_x/(K_K_P_NAD*K_H_P_NAD*P_NAD_x^2) + K_x*QH2_x_dQH2_x_dt/(K_K_P_QH2*K_H_P_QH2*P_QH2_x^2) + K_x*COQ_x_dCOQ_x_dt/(K_K_P_COQ*K_H_P_COQ*P_COQ_x^2) + K_x*PYR_x/(K_K_P_PYR*K_H_P_PYR*P_PYR_x^2) + K_x*OAA_x/(K_K_P_OAA*K_H_P_OAA*P_OAA_x^2) + K_x*ACCOA_x/(K_K_P_ACCOA*K_H_P_ACCOA*P_ACCOA_x^2) + K_x*CIT_x/(K_K_P_CIT*K_H_P_CIT*P_CIT_x^2) + K_x*ICIT_x/(K_K_P_ICIT*K_H_P_ICIT*P_ICIT_x^2) + K_x*AKG_x/(K_K_P_AKG*K_H_P_AKG*P_AKG_x^2) + K_x*SCOA_x/(K_K_P_SCOA*K_H_P_SCOA*P_SCOA_x^2) + K_x*COASH_x/(K_K_P_COASH*K_H_P_COASH*P_COASH_x^2) + K_x*SUC_x/(K_K_P_SUC*K_H_P_SUC*P_SUC_x^2) + K_x*FUM_x/(K_K_P_FUM*K_H_P_FUM*P_FUM_x^2) + K_x*MAL_x/(K_K_P_MAL*K_H_P_MAL*P_MAL_x^2) + K_x*GLU_x/(K_K_P_GLU*K_H_P_GLU*P_GLU_x^2) + K_x*ASP_x/(K_K_P_ASP*K_H_P_ASP*P_ASP_x^2) + K_x*K_x/(K_K_P_K*K_H_P_K*P_K_x^2) + K_x*Mg_x/(K_K_P_Mg*K_H_P_Mg*P_Mg_x^2) + K_x*O2_x_dO2_x_dt/(K_K_P_O2*K_H_P_O2*P_O2_x^2) + K_x*FADH2_x/(K_K_P_FADH2*K_H_P_FADH2*P_FADH2_x^2) + K_x*FAD_x/(K_K_P_FAD*K_H_P_FAD*P_FAD_x^2) + K_x*CO2_tot_x_dCO2_tot_x_dt/(K_K_P_CO2_tot*K_H_P_CO2_tot*P_CO2_tot_x^2));
  dKB_dMg := -(K_x*H_x/(K_K_P_H*K_Mg_P_H*P_H_x^2) + K_x*ATP_x/(K_K_P_ATP*K_Mg_P_ATP*P_ATP_x^2) + K_x*ADP_x/(K_K_P_ADP*K_Mg_P_ADP*P_ADP_x^2) + K_x*AMP_x/(K_K_P_AMP*K_Mg_P_AMP*P_AMP_x^2) + K_x*GTP_x/(K_K_P_ATP*K_Mg_P_ATP*P_GTP_x^2) + K_x*GDP_x/(K_K_P_ADP*K_Mg_P_ADP*P_GDP_x^2) + K_x*PI_x/(K_K_P_PI*K_Mg_P_PI*P_PI_x^2) + K_x*NADH_x/(K_K_P_NADH*K_Mg_P_NADH*P_NADH_x^2) + K_x*NAD_x/(K_K_P_NAD*K_Mg_P_NAD*P_NAD_x^2) + K_x*QH2_x_dQH2_x_dt/(K_K_P_QH2*K_Mg_P_QH2*P_QH2_x^2) + K_x*COQ_x_dCOQ_x_dt/(K_K_P_COQ*K_Mg_P_COQ*P_COQ_x^2) + K_x*PYR_x/(K_K_P_PYR*K_Mg_P_PYR*P_PYR_x^2) + K_x*OAA_x/(K_K_P_OAA*K_Mg_P_OAA*P_OAA_x^2) + K_x*ACCOA_x/(K_K_P_ACCOA*K_Mg_P_ACCOA*P_ACCOA_x^2) + K_x*CIT_x/(K_K_P_CIT*K_Mg_P_CIT*P_CIT_x^2) + K_x*ICIT_x/(K_K_P_ICIT*K_Mg_P_ICIT*P_ICIT_x^2) + K_x*AKG_x/(K_K_P_AKG*K_Mg_P_AKG*P_AKG_x^2) + K_x*SCOA_x/(K_K_P_SCOA*K_Mg_P_SCOA*P_SCOA_x^2) + K_x*COASH_x/(K_K_P_COASH*K_Mg_P_COASH*P_COASH_x^2) + K_x*SUC_x/(K_K_P_SUC*K_Mg_P_SUC*P_SUC_x^2) + K_x*FUM_x/(K_K_P_FUM*K_Mg_P_FUM*P_FUM_x^2) + K_x*MAL_x/(K_K_P_MAL*K_Mg_P_MAL*P_MAL_x^2) + K_x*GLU_x/(K_K_P_GLU*K_Mg_P_GLU*P_GLU_x^2) + K_x*ASP_x/(K_K_P_ASP*K_Mg_P_ASP*P_ASP_x^2) + K_x*K_x/(K_K_P_K*K_Mg_P_K*P_K_x^2) + K_x*Mg_x/(K_K_P_Mg*K_Mg_P_Mg*P_Mg_x^2) + K_x*O2_x_dO2_x_dt/(K_K_P_O2*K_Mg_P_O2*P_O2_x^2) + K_x*FADH2_x/(K_K_P_FADH2*K_Mg_P_FADH2*P_FADH2_x^2) + K_x*FAD_x/(K_K_P_FAD*K_Mg_P_FAD*P_FAD_x^2) + K_x*CO2_tot_x_dCO2_tot_x_dt/(K_K_P_CO2_tot*K_Mg_P_CO2_tot*P_CO2_tot_x^2));
  dKB_dK := (1 + H_x/K_H_P_H + Mg_x/K_Mg_P_H)*H_x/(K_K_P_H*P_H_x^2) + (1 + H_x/K_H_P_ATP + Mg_x/K_Mg_P_ATP)*ATP_x/(K_K_P_ATP*P_ATP_x^2) + (1 + H_x/K_H_P_ADP + Mg_x/K_Mg_P_ADP)*ADP_x/(K_K_P_ADP*P_ADP_x^2) + (1 + H_x/K_H_P_AMP + Mg_x/K_Mg_P_AMP)*AMP_x/(K_K_P_AMP*P_AMP_x^2) + (1 + H_x/K_H_P_ATP + Mg_x/K_Mg_P_ATP)*GTP_x/(K_K_P_ATP*P_GTP_x^2) + (1 + H_x/K_H_P_ADP + Mg_x/K_Mg_P_ADP)*GDP_x/(K_K_P_ADP*P_GDP_x^2) + (1 + H_x/K_H_P_PI + Mg_x/K_Mg_P_PI)*PI_x/(K_K_P_PI*P_PI_x^2) + (1 + H_x/K_H_P_NADH + Mg_x/K_Mg_P_NADH)*NADH_x/(K_K_P_NADH*P_NADH_x^2) + (1 + H_x/K_H_P_NAD + Mg_x/K_Mg_P_NAD)*NAD_x/(K_K_P_NAD*P_NAD_x^2) + (1 + H_x/K_H_P_QH2 + Mg_x/K_Mg_P_QH2)*QH2_x_dQH2_x_dt/(K_K_P_QH2*P_QH2_x^2) + (1 + H_x/K_H_P_COQ + Mg_x/K_Mg_P_COQ)*COQ_x_dCOQ_x_dt/(K_K_P_COQ*P_COQ_x^2) + (1 + H_x/K_H_P_PYR + Mg_x/K_Mg_P_PYR)*PYR_x/(K_K_P_PYR*P_PYR_x^2) + (1 + H_x/K_H_P_OAA + Mg_x/K_Mg_P_OAA)*OAA_x/(K_K_P_OAA*P_OAA_x^2) + (1 + H_x/K_H_P_ACCOA + Mg_x/K_Mg_P_ACCOA)*ACCOA_x/(K_K_P_ACCOA*P_ACCOA_x^2) + (1 + H_x/K_H_P_CIT + Mg_x/K_Mg_P_CIT)*CIT_x/(K_K_P_CIT*P_CIT_x^2) + (1 + H_x/K_H_P_ICIT + Mg_x/K_Mg_P_ICIT)*ICIT_x/(K_K_P_ICIT*P_ICIT_x^2) + (1 + H_x/K_H_P_AKG + Mg_x/K_Mg_P_AKG)*AKG_x/(K_K_P_AKG*P_AKG_x^2) + (1 + H_x/K_H_P_SCOA + Mg_x/K_Mg_P_SCOA)*SCOA_x/(K_K_P_SCOA*P_SCOA_x^2) + (1 + H_x/K_H_P_COASH + Mg_x/K_Mg_P_COASH)*COASH_x/(K_K_P_COASH*P_COASH_x^2) + (1 + H_x/K_H_P_SUC + Mg_x/K_Mg_P_SUC)*SUC_x/(K_K_P_SUC*P_SUC_x^2) + (1 + H_x/K_H_P_FUM + Mg_x/K_Mg_P_FUM)*FUM_x/(K_K_P_FUM*P_FUM_x^2) + (1 + H_x/K_H_P_MAL + Mg_x/K_Mg_P_MAL)*MAL_x/(K_K_P_MAL*P_MAL_x^2) + (1 + H_x/K_H_P_GLU + Mg_x/K_Mg_P_GLU)*GLU_x/(K_K_P_GLU*P_GLU_x^2) + (1 + H_x/K_H_P_ASP + Mg_x/K_Mg_P_ASP)*ASP_x/(K_K_P_ASP*P_ASP_x^2) + (1 + H_x/K_H_P_K + Mg_x/K_Mg_P_K)*K_x/(K_K_P_K*P_K_x^2) + (1 + H_x/K_H_P_Mg + Mg_x/K_Mg_P_Mg)*Mg_x/(K_K_P_Mg*P_Mg_x^2) + (1 + H_x/K_H_P_O2 + Mg_x/K_Mg_P_O2)*O2_x_dO2_x_dt/(K_K_P_O2*P_O2_x^2) + (1 + H_x/K_H_P_FADH2 + Mg_x/K_Mg_P_FADH2)*FADH2_x/(K_K_P_FADH2*P_FADH2_x^2) + (1 + H_x/K_H_P_FAD + Mg_x/K_Mg_P_FAD)*FAD_x/(K_K_P_FAD*P_FAD_x^2) + (1 + H_x/K_H_P_CO2_tot + Mg_x/K_Mg_P_CO2_tot)*CO2_tot_x_dCO2_tot_x_dt/(K_K_P_CO2_tot*P_CO2_tot_x^2);
  J_H_t := (-J_pdh + 2*J_cits - J_akgd + J_scoas + J_mdh + J_PYRH + J_GLUH + J_CITMAL - J_ASPGLU - 5*J_C1 - 2*J_C3 - 4*J_C4 + (n_A - 1)*J_F1 + 2*J_PIHt + J_Hle - J_KH)/W_x;
  J_Mg_t := 0;
  J_K_t := J_KH/W_x;
  phi_H := -(H_x*dH_x_dt/(K_H_P_H*P_H_x) + H_x*dATP_x_dt/(K_H_P_ATP*P_ATP_x) + H_x*dADP_x_dt/(K_H_P_ADP*P_ADP_x) + H_x*dAMP_x_dt/(K_H_P_AMP*P_AMP_x) + H_x*dGTP_x_dt/(K_H_P_ATP*P_GTP_x) + H_x*dGDP_x_dt/(K_H_P_ADP*P_GDP_x) + H_x*dPI_x_dt/(K_H_P_PI*P_PI_x) + H_x*dNADH_x_dt/(K_H_P_NADH*P_NADH_x) + H_x*dNAD_x_dt/(K_H_P_NAD*P_NAD_x) + H_x*dQH2_x_dt/(K_H_P_QH2*P_QH2_x) + H_x*dCOQ_x_dt/(K_H_P_COQ*P_COQ_x) + H_x*dPYR_x_dt/(K_H_P_PYR*P_PYR_x) + H_x*dOAA_x_dt/(K_H_P_OAA*P_OAA_x) + H_x*dACCOA_x_dt/(K_H_P_ACCOA*P_ACCOA_x) + H_x*dCIT_x_dt/(K_H_P_CIT*P_CIT_x) + H_x*dICIT_x_dt/(K_H_P_ICIT*P_ICIT_x) + H_x*dAKG_x_dt/(K_H_P_AKG*P_AKG_x) + H_x*dSCOA_x_dt/(K_H_P_SCOA*P_SCOA_x) + H_x*dCOASH_x_dt/(K_H_P_COASH*P_COASH_x) + H_x*dSUC_x_dt/(K_H_P_SUC*P_SUC_x) + H_x*dFUM_x_dt/(K_H_P_FUM*P_FUM_x) + H_x*dMAL_x_dt/(K_H_P_MAL*P_MAL_x) + H_x*dGLU_x_dt/(K_H_P_GLU*P_GLU_x) + H_x*dASP_x_dt/(K_H_P_ASP*P_ASP_x) + H_x*dK_x_dt/(K_H_P_K*P_K_x) + H_x*dMg_x_dt/(K_H_P_Mg*P_Mg_x) + H_x*dO2_x_dt/(K_H_P_O2*P_O2_x) + H_x*dFADH2_x_dt/(K_H_P_FADH2*P_FADH2_x) + H_x*dFAD_x_dt/(K_H_P_FAD*P_FAD_x) + H_x*dCO2_tot_x_dt/(K_H_P_CO2_tot*P_CO2_tot_x)) + J_H_t;
  phi_Mg := -(Mg_x*dH_x_dt/(K_Mg_P_H*P_H_x) + Mg_x*dATP_x_dt/(K_Mg_P_ATP*P_ATP_x) + Mg_x*dADP_x_dt/(K_Mg_P_ADP*P_ADP_x) + Mg_x*dAMP_x_dt/(K_Mg_P_AMP*P_AMP_x) + Mg_x*dGTP_x_dt/(K_Mg_P_ATP*P_GTP_x) + Mg_x*dGDP_x_dt/(K_Mg_P_ADP*P_GDP_x) + Mg_x*dPI_x_dt/(K_Mg_P_PI*P_PI_x) + Mg_x*dNADH_x_dt/(K_Mg_P_NADH*P_NADH_x) + Mg_x*dNAD_x_dt/(K_Mg_P_NAD*P_NAD_x) + Mg_x*dQH2_x_dt/(K_Mg_P_QH2*P_QH2_x) + Mg_x*dCOQ_x_dt/(K_Mg_P_COQ*P_COQ_x) + Mg_x*dPYR_x_dt/(K_Mg_P_PYR*P_PYR_x) + Mg_x*dOAA_x_dt/(K_Mg_P_OAA*P_OAA_x) + Mg_x*dACCOA_x_dt/(K_Mg_P_ACCOA*P_ACCOA_x) + Mg_x*dCIT_x_dt/(K_Mg_P_CIT*P_CIT_x) + Mg_x*dICIT_x_dt/(K_Mg_P_ICIT*P_ICIT_x) + Mg_x*dAKG_x_dt/(K_Mg_P_AKG*P_AKG_x) + Mg_x*dSCOA_x_dt/(K_Mg_P_SCOA*P_SCOA_x) + Mg_x*dCOASH_x_dt/(K_Mg_P_COASH*P_COASH_x) + Mg_x*dSUC_x_dt/(K_Mg_P_SUC*P_SUC_x) + Mg_x*dFUM_x_dt/(K_Mg_P_FUM*P_FUM_x) + Mg_x*dMAL_x_dt/(K_Mg_P_MAL*P_MAL_x) + Mg_x*dGLU_x_dt/(K_Mg_P_GLU*P_GLU_x) + Mg_x*dASP_x_dt/(K_Mg_P_ASP*P_ASP_x) + Mg_x*dK_x_dt/(K_Mg_P_K*P_K_x) + Mg_x*dMg_x_dt/(K_Mg_P_Mg*P_Mg_x) + Mg_x*dO2_x_dt/(K_Mg_P_O2*P_O2_x) + Mg_x*dFADH2_x_dt/(K_Mg_P_FADH2*P_FADH2_x) + Mg_x*dFAD_x_dt/(K_Mg_P_FAD*P_FAD_x) + Mg_x*dCO2_tot_x_dt/(K_Mg_P_CO2_tot*P_CO2_tot_x)) + J_Mg_t;
  phi_K := -(K_x*dH_x_dt/(K_K_P_H*P_H_x) + K_x*dATP_x_dt/(K_K_P_ATP*P_ATP_x) + K_x*dADP_x_dt/(K_K_P_ADP*P_ADP_x) + K_x*dAMP_x_dt/(K_K_P_AMP*P_AMP_x) + K_x*dGTP_x_dt/(K_K_P_ATP*P_GTP_x) + K_x*dGDP_x_dt/(K_K_P_ADP*P_GDP_x) + K_x*dPI_x_dt/(K_K_P_PI*P_PI_x) + K_x*dNADH_x_dt/(K_K_P_NADH*P_NADH_x) + K_x*dNAD_x_dt/(K_K_P_NAD*P_NAD_x) + K_x*dQH2_x_dt/(K_K_P_QH2*P_QH2_x) + K_x*dCOQ_x_dt/(K_K_P_COQ*P_COQ_x) + K_x*dPYR_x_dt/(K_K_P_PYR*P_PYR_x) + K_x*dOAA_x_dt/(K_K_P_OAA*P_OAA_x) + K_x*dACCOA_x_dt/(K_K_P_ACCOA*P_ACCOA_x) + K_x*dCIT_x_dt/(K_K_P_CIT*P_CIT_x) + K_x*dICIT_x_dt/(K_K_P_ICIT*P_ICIT_x) + K_x*dAKG_x_dt/(K_K_P_AKG*P_AKG_x) + K_x*dSCOA_x_dt/(K_K_P_SCOA*P_SCOA_x) + K_x*dCOASH_x_dt/(K_K_P_COASH*P_COASH_x) + K_x*dSUC_x_dt/(K_K_P_SUC*P_SUC_x) + K_x*dFUM_x_dt/(K_K_P_FUM*P_FUM_x) + K_x*dMAL_x_dt/(K_K_P_MAL*P_MAL_x) + K_x*dGLU_x_dt/(K_K_P_GLU*P_GLU_x) + K_x*dASP_x_dt/(K_K_P_ASP*P_ASP_x) + K_x*dK_x_dt/(K_K_P_K*P_K_x) + K_x*dMg_x_dt/(K_K_P_Mg*P_Mg_x) + K_x*dO2_x_dt/(K_K_P_O2*P_O2_x) + K_x*dFADH2_x_dt/(K_K_P_FADH2*P_FADH2_x) + K_x*dFAD_x_dt/(K_K_P_FAD*P_FAD_x) + K_x*dCO2_tot_x_dt/(K_K_P_CO2_tot*P_CO2_tot_x)) + J_K_t;
  alpha_H := 1 + dHB_dH + B_x/(K_BX*(1 + H_x/K_BX)^2);
  alpha_Mg := 1 + dMgB_dMg;
  alpha_K := 1 + dKB_dK;
  D := alpha_H*dKB_dMg*dMgB_dK + alpha_K*dHB_dMg*dMgB_dH + alpha_Mg*dHB_dK*dKB_dH - alpha_Mg*alpha_K*alpha_H - dHB_dK*dKB_dMg*dMgB_dH - dHB_dMg*dMgB_dK*dKB_dH;

  // Rate rules:
  dPsi' = (4*J_C1 + 2*J_C3 + 4*J_C4 - n_A*J_F1 - J_ANT - J_Hle + J_ASPGLU)/C_IM;
  ATP_x' = (J_ndk + J_F1 - J_ANT)/W_x;
  ADP_x' = (-J_ndk - J_F1 + J_ANT)/W_x;
  AMP_x' = 0;
  GTP_x' = (J_scoas - J_ndk)/W_x;
  GDP_x' = (-J_scoas + J_ndk)/W_x;
  PI_x' = (-J_scoas - J_F1 + J_PIHt - J_MALPI)/W_x;
  NADH_x' = (J_pdh + J_isod + J_akgd + J_mdh - J_C1)/W_x;
  QH2_x_dQH2_x_dt' = (J_sdh + J_C1 - J_C3)/W_x;
  PYR_x' = (-J_pdh + J_PYRH)/W_x;
  ACCOA_x' = (J_pdh - J_cits)/W_x;
  CIT_x' = (-J_acon + J_CITMAL + J_cits)/W_x;
  ICIT_x' = (J_acon - J_isod)/W_x;
  AKG_x' = (J_isod - J_akgd - J_got + J_AKGMAL)/W_x;
  SCOA_x' = (J_akgd - J_scoas)/W_x;
  COASH_x' = (-J_pdh - J_akgd + J_scoas + J_cits)/W_x;
  SUC_x' = (J_scoas - J_sdh + J_SUCMAL)/W_x;
  FUM_x' = (J_sdh - J_fum)/W_x;
  MAL_x' = (J_fum - J_mdh + J_MALPI - J_AKGMAL - J_CITMAL - J_SUCMAL)/W_x;
  OAA_x' = (-J_cits + J_mdh + J_got)/W_x;
  GLU_x' = (J_got + J_GLUH - J_ASPGLU)/W_x;
  ASP_x' = (-J_got + J_ASPGLU)/W_x;
  O2_x_dO2_x_dt' = 0;
  CO2_tot_x_dCO2_tot_x_dt' = 0;
  Cred_i' = (2*J_C3 - 2*J_C4)/W_i;
  ATP_i' = (J_ATPt + J_ANT + J_AKi)/W_i;
  ADP_i' = (J_ADPt - J_ANT - 2*J_AKi)/W_i;
  AMP_i' = (J_AMPt + J_AKi)/W_i;
  PI_i' = (-J_PIHt + J_PIt + J_MALPI)/W_i;
  PYR_i' = (-J_PYRH + J_PYRt)/W_i;
  CIT_i' = (-J_CITMAL + J_CITt)/W_i;
  ICIT_i' = J_ICITt/W_i;
  AKG_i' = (-J_AKGMAL + J_AKGt)/W_i;
  SUC_i' = (J_SUCt - J_SUCMAL)/W_i;
  FUM_i' = J_FUMt/W_i;
  MAL_i' = (-J_MALPI + J_MALt + J_AKGMAL + J_CITMAL + J_SUCMAL)/W_i;
  GLU_i' = (-J_GLUH + J_ASPGLU + J_GLUt)/W_i;
  ASP_i' = (-J_ASPGLU + J_ASPt)/W_i;
  PYR_c' = -Rm_cyto_dPYR_c_dt*J_PYRt/W_c;
  CIT_c' = -Rm_cyto_dCIT_c_dt*J_CITt/W_c;
  ICIT_c' = -Rm_cyto_dICIT_c_dt*J_ICITt/W_c;
  AKG_c' = -Rm_cyto_dAKG_c_dt*J_AKGt/W_c;
  SUC_c' = -Rm_cyto_dSUC_c_dt*J_SUCt/W_c;
  FUM_c' = -Rm_cyto_dFUM_c_dt*J_FUMt/W_c;
  MAL_c' = -Rm_cyto_dMAL_c_dt*J_MALt/W_c;
  GLU_c' = -Rm_cyto_dGLU_c_dt*J_GLUt/W_c;
  ASP_c' = -Rm_cyto_dASP_c_dt*J_ASPt/W_c;
  H_c' = 0;
  Mg_c' = 0;
  K_c' = 0;
  PI_c' = piecewise(-J_PIt*conversion_factor_dPI_c_dt/W_c, (ExpType == 1) || (ExpType == 2) || (ExpType == 5) || (ExpType == 6), (Rm_cyto_dPI_c_dt*J_PIt + J_AtC)/W_c);
  ATP_c' = piecewise((-(1 + W_c/1)*J_HK - conversion_factor_dATP_c_dt*J_ATPt)/W_c, (ExpType == 1) || (ExpType == 2) || (ExpType == 5) || (ExpType == 6), (-Rm_cyto_dATP_c_dt*J_ATPt + J_CKc + conversion_factor_dATP_c_dt*J_AKc - J_AtC)/W_c);
  ADP_c' = piecewise(((1 + W_c/1)*J_HK - conversion_factor_dADP_c_dt*J_ADPt)/W_c, (ExpType == 1) || (ExpType == 2) || (ExpType == 5) || (ExpType == 6), (-Rm_cyto_dADP_c_dt*J_ADPt - J_CKc - 2*conversion_factor_dADP_c_dt*J_AKc + J_AtC)/W_c);
  GLC_c' = piecewise(-(1 + W_c/1)*J_HK/W_c, (ExpType == 1) || (ExpType == 2) || (ExpType == 5) || (ExpType == 6), 0);
  G6P_c' = piecewise((1 + W_c/1)*J_HK/W_c, (ExpType == 1) || (ExpType == 2) || (ExpType == 5) || (ExpType == 6), 0);
  PCr_c' = piecewise(0, (ExpType == 1) || (ExpType == 2) || (ExpType == 5) || (ExpType == 6), -J_CKc/W_c);
  AMP_c' = piecewise(0, (ExpType == 1) || (ExpType == 2) || (ExpType == 5) || (ExpType == 6), (-Rm_cyto_dAMP_c_dt*J_AMPt + conversion_factor_dAMP_c_dt*J_AKc)/W_c);
  H_x' = ((dKB_dMg*dMgB_dK - alpha_Mg*alpha_K)*phi_H + (alpha_K*dHB_dMg - dHB_dK*dKB_dMg)*phi_Mg + (alpha_Mg*dHB_dK - dHB_dMg*dMgB_dK)*phi_K)/D;
  Mg_x' = ((alpha_K*dMgB_dH - dKB_dH*dMgB_dK)*phi_H + (dKB_dH*dHB_dK - alpha_H*alpha_K)*phi_Mg + (alpha_H*dMgB_dK - dHB_dK*dMgB_dH)*phi_K)/D;
  K_x' = ((alpha_Mg*dKB_dH - dKB_dMg*dMgB_dH)*phi_H + (alpha_H*dKB_dMg - dKB_dH*dHB_dMg)*phi_Mg + (dMgB_dH*dHB_dMg - alpha_H*alpha_Mg)*phi_K)/D;

  // Unit definitions:
  unit mg_per_mitochondria = 1e-3 gram;
  unit molar = mole / litre;
  unit molar_per_second = mole / (litre * second);
  unit molar_squared = mole^2 / litre^2;
  unit molar_cubed = mole^3 / litre^3;
  unit per_molar = litre / mole;
  unit per_molar_squared = litre^2 / mole^2;
  unit micrometer_per_second = 1e-6 metre / second;
  unit per_micrometer = 1 / (1e-6 metre);
  unit kilojoule_per_mole = 1000 joule / mole;
  unit millivolt = 1e-3 volt;
  unit kilojoule_per_mole_per_millivolt = 1000 joule / (mole * 1e-3 volt);
  unit molar_per_cyto = mole / litre;
  unit molar_per_mito = mole / litre;
  unit mole_per_second_per_l_cyto_volume = mole / (litre * second);
  unit mole_per_second_per_l_cyto_volume_per_molar_per_molar = litre / (mole * second);
  unit mole_per_second_per_l_mito_volume = mole / (litre * second);
  unit mole_per_second_per_l_mito_volume_per_molar = mole * litre / (litre * second * mole);
  unit mole_per_second_per_l_mito_volume_per_molar_per_molar = mole * litre * litre / (litre * second * mole * mole);
  unit mole_per_l_mito_volume_per_mv = mole / (litre * 1e-3 volt);
  unit mole_per_second_per_l_mito_volume_per_molar_per_mv = mole * litre / (litre * second * mole * 1e-3 volt);
  unit joule_per_kelvin_per_mole = joule / (kelvin * mole);
  unit joule_per_kilojoule = joule / joule^3;
end
