// SBML level 2 version 4

model Reed2004_MethionineCycle()
  // This a model from the article:
  // A mathematical model of the methionine cycle.
  // Reed MC, Nijhout HF, Sparks R, Ulrich CM. J Theor Biol 2004 Jan 7;226(1):33-43 14637052 ,
  // Abstract:
  // Building on the work of Martinov et al. (2000), a mathematical model is developed for the methionine cycle. A large amount of information is available about the enzymes that catalyse individual reaction steps in the cycle, from methionine to S-adenosylmethionine to S-adenosylhomocysteine to homocysteine, and the removal of mass from the cycle by the conversion of homocysteine to cystathionine. Nevertheless, the behavior of the cycle is very complicated since many substrates alter the activities of the enzymes in the reactions that produce them, and some can also alter the activities of other enzymes in the cycle. The model consists of four differential equations, based on known reaction kinetics, that can be solved to give the time course of the concentrations of the four main substrates in the cycle under various circumstances. We show that the behavior of the model in response to genetic abnormalities and dietary deficiencies is similar to the changes seen in a wide variety of experimental studies. We conduct computational "experiments" that give understanding of the regulatory behavior of the methionine cycle under normal conditions and the behavior in the presence of genetic variation and dietary deficiencies.
  // This model was taken from the CellML repository and automatically converted to SBML.
  // The original model was: Reed MC, Nijhout HF, Sparks R, Ulrich CM. (2004) - version=1.0
  // The original CellML model was created by:
  // Catherine Lloyd
  // c.lloyd@auckland.ac.nz
  // The University of Auckland
  // This model originates from BioModels Database: A Database of Annotated Published Models (http://www.ebi.ac.uk/biomodels/). It is copyright (c) 2005-2011 The BioModels.net Team.
  // To the extent possible under law, all copyright and related or neighbouring rights to this encoded model have been dedicated to the public domain worldwide. Please refer to CC0 Public Domain Dedication for more information.
  // In summary, you are entitled to use this encoded model in absolutely any manner you deem suitable, verbatim, or with modification, alone or embedded it in a larger context, redistribute it, commercially or not, in a restricted way or not..
  // To cite BioModels Database, please use: Li C, Donizelli M, Rodriguez N, Dharuri H, Endler L, Chelliah V, Li L, He E, Henry A, Stefan MI, Snoep JL, Hucka M, Le Novère N, Laibe C (2010) BioModels Database: An enhanced, curated and annotated resource for published quantitative kinetic models. BMC Syst Biol., 4:92.
  // biomodels.db:MODEL1006230091
  // isDescribedBy pubmed:14637052
  // biomodels.db:MODEL1006230091
  // isDescribedBy pubmed:14637052
  // biomodels.db:MODEL1006230091
  // biomodels.db:MODEL1006230091

  // Compartments:
  compartment COMpartment = 1 litre;

  // Parameters:
  Met = 53.5;
  AdoMet = 137.6;
  AdoHcy = 13.2;
  Hcy = 0.88;
  V_MATImax = 561;
  Km_MATI = 41;
  Ki_MATI = 50;
  V_MATIIImax = 22870;
  Km2_MATIII = 21.1;
  V_GNMTmax = 10600;
  Km_GNMT = 4500;
  Ki_GNMT = 20;
  V_METHmax = 4521;
  Km2_METH_A = 10;
  five_mTHF = 5.2;
  V_MSmax = 500;
  Kd_MS = 1;
  Km_Hcy_MS = 0.1;
  Km_five_mTHF_MS = 25;
  alpha1 = 100;
  alpha2 = 10;
  beta1 = 1.7;
  beta2 = 30;
  V_BHMTmax = 2500;
  Km_BHMT = 12;

  // Assignment rules:
  Metin := piecewise(200, (time < 2) || (time >= 8), 300, (time >= 2) && (time < 5), 100, (time >= 5) && (time < 8), 200);
  V_MATI := V_MATImax/(1 + Km_MATI/Met*(1 + AdoMet/Ki_MATI));
  V_MATIII := V_MATIIImax/(1 + Km1_MATIII*Km2_MATIII/(Met^2 + Met*Km2_MATIII));
  Km1_MATIII := 20000/(1 + 5.7*(AdoMet/(AdoMet + 600))^2);
  V_GNMT := V_GNMTmax/(1 + (Km_GNMT/AdoMet)^2.3)*1/(1 + AdoHcy/Ki_GNMT);
  V_METH := V_METHmax/(1 + Km1_METH/AdoMet + Km2_METH_A + Km2_METH_A*Km1_METH/AdoMet);
  Km1_METH := 1*(1 + AdoHcy/4);
  V_MS := V_MSmax*five_mTHF*Hcy/(Kd_MS*Km_Hcy_MS + Km_Hcy_MS*five_mTHF + Km_five_mTHF_MS*Hcy + five_mTHF*Hcy);
  V_AH := alpha1*(AdoHcy - alpha2*Hcy);
  V_CBS := (beta1*(AdoMet + AdoHcy) - beta2)*Hcy;
  V_BHMT := (0.7 - 0.025*(AdoMet + AdoHcy - 150))*V_BHMTmax*Hcy/(Km_BHMT + Hcy);

  // Rate rules:
  Met' = V_MS + V_BHMT + Metin - (V_MATI + V_MATIII);
  AdoMet' = V_MATI + V_MATIII - (V_METH + V_GNMT);
  AdoHcy' = V_METH + V_GNMT - V_AH;
  Hcy' = V_AH - (V_CBS + V_MS + V_BHMT);

  // Unit definitions:
  unit micromolar = 1e-6 mole / litre;
  unit per_micromolar = litre / (1e-6 mole);
  unit hour = 3600 second;
  unit flux = 1e-6 mole / (litre * 3600 second);
  unit first_order_rate_constant = 1 / (3600 second);
  unit second_order_rate_constant = litre / (1e-6 mole * 3600 second);
  unit time = 3600 second;
end
