// SBML level 2 version 4

model Grandi2009_VentricularMyocyte()
  // This a model from the article:
  // A novel computational model of the human ventricular action potential and Ca transient.
  // Grandi E, Pasqualini FS, Bers DM. J Mol Cell Cardiol 2010 Jan;48(1):112-21 19835882 ,
  // Abstract:
  // We have developed a detailed mathematical model for Ca handling and ionic currents in the human ventricular myocyte. Our aims were to: (1) simulate basic excitation-contraction coupling phenomena; (2) use realistic repolarizing K current densities; (3) reach steady-state. The model relies on the framework of the rabbit myocyte model previously developed by our group, with subsarcolemmal and junctional compartments where ion channels sense higher [Ca] vs. bulk cytosol. Ion channels and transporters have been modeled on the basis of the most recent experimental data from human ventricular myocytes. Rapidly and slowly inactivating components of I(to) have been formulated to differentiate between endocardial and epicardial myocytes. Transmural gradients of Ca handling proteins and Na pump were also simulated. The model has been validated against a wide set of experimental data including action potential duration (APD) adaptation and restitution, frequency-dependent increase in Ca transient peak and [Na](i). Interestingly, Na accumulation at fast heart rate is a major determinant of APD shortening, via outward shifts in Na pump and Na-Ca exchange currents. We investigated the effects of blocking K currents on APD and repolarization reserve: I(Ks) block does not affect the former and slightly reduces the latter; I(K1) blockade modestly increases APD and more strongly reduces repolarization reserve; I(Kr) blockers significantly prolong APD, an effect exacerbated as pacing frequency is decreased, in good agreement with experimental results in human myocytes. We conclude that this model provides a useful framework to explore excitation-contraction coupling mechanisms and repolarization abnormalities at the single myocyte level. Copyright 2009 Elsevier Inc. All rights reserved.
  // This model was taken from the CellML repository and automatically converted to SBML.
  // The original model was: Grandi E, Pasqualini FS, Bers DM. (2009) - version=1.0
  // The original CellML model was created by:
  // Geoffrey Nunns
  // gnunns1@jhu.edu
  // The University of Auckland
  // This model originates from BioModels Database: A Database of Annotated Published Models (http://www.ebi.ac.uk/biomodels/). It is copyright (c) 2005-2011 The BioModels.net Team.
  // To the extent possible under law, all copyright and related or neighbouring rights to this encoded model have been dedicated to the public domain worldwide. Please refer to CC0 Public Domain Dedication for more information.
  // In summary, you are entitled to use this encoded model in absolutely any manner you deem suitable, verbatim, or with modification, alone or embedded it in a larger context, redistribute it, commercially or not, in a restricted way or not..
  // To cite BioModels Database, please use: Li C, Donizelli M, Rodriguez N, Dharuri H, Endler L, Chelliah V, Li L, He E, Henry A, Stefan MI, Snoep JL, Hucka M, Le Novère N, Laibe C (2010) BioModels Database: An enhanced, curated and annotated resource for published quantitative kinetic models. BMC Syst Biol., 4:92.
  // biomodels.db:MODEL1006230092
  // isDescribedBy pubmed:19835882
  // biomodels.db:MODEL1006230092
  // isDescribedBy pubmed:19835882
  // biomodels.db:MODEL1006230092
  // biomodels.db:MODEL1006230092

  // Compartments:
  compartment COMpartment = 1 litre;

  // Parameters:
  I_app_interface = ;
  m = 0.001405627;
  h = 0.9867005;
  j = 0.991562;
  x_kr = 0.008641386;
  x_ks = 0.005412034;
  x_to_s = 0.004051574;
  y_to_s = 0.9945511;
  x_to_f = 0.004051574;
  y_to_f = 0.9945511;
  d = 7.175662e-6;
  f = 1.000681;
  f_Ca_Bj = 0.02421991;
  f_Ca_Bsl = 0.01452605;
  Ry_Rr = 0.8884332;
  Ry_Ro = 8.156628e-7;
  Ry_Ri = 1.024274e-7;
  Na_Bj = 3.539892;
  Na_Bsl = 0.7720854;
  Tn_CL = 0.008773191;
  Tn_CHc = 0.1078283;
  Tn_CHm = 0.01524002;
  CaM = 0.0002911916;
  Myo_c = 0.001298754;
  Myo_m = 0.1381982;
  SRB = 0.002143165;
  SLL_j = 0.009566355;
  SLL_sl = 0.1110363;
  SLH_j = 0.007347888;
  SLH_sl = 0.07297378;
  Csqn_b = 1.242988;
  Ca_sr = 0.01;
  Na_j = 9.06;
  Na_sl = 9.06;
  Na_i = 9.06;
  K_i = 120;
  Ca_j = 0.0001737475;
  Ca_sl = 0.0001031812;
  Ca_i = 8.597401e-5;
  V_m = -80.9763;
  I_app_membrane_potential = ;

  // Assignment rules:
  epi := 1;
  R := 8314;
  Frdy := 96485;
  Temp := 310;
  FoRT := Frdy/(R*Temp);
  Cmem := 1.381;
  Qpow := (Temp - 310)/10;
  cellLength := 100;
  cellRadius := 10.25;
  junctionLength := 160;
  junctionRadius := 15;
  distSLcyto := 0.45;
  distJuncSL := 0.5;
  DcaJuncSL := 1.64;
  DcaSLcyto := 1.22;
  DnaJuncSL := 1.09;
  DnaSLcyto := 1.79;
  Vcell := pi*cellRadius^2*cellLength*1;
  Vmyo := 0.65*Vcell;
  Vsr := 0.035*Vcell;
  Vsl := 0.02*Vcell;
  Vjunc := 0.0539*0.01*Vcell;
  SAjunc := 20150*pi*2*junctionLength*junctionRadius;
  SAsl := pi*2*cellRadius*cellLength;
  J_ca_juncsl := 8.2413;
  J_ca_slmyo := 3.2743;
  J_na_juncsl := 1.8313;
  J_na_slmyo := 1.6386;
  Fjunc := 0.11;
  Fsl := 1 - Fjunc;
  Fjunc_CaL := 0.9;
  Fsl_CaL := 1 - Fjunc_CaL;
  Cli := 15;
  Clo := 150;
  Ko := 5.4;
  Nao := 140;
  Cao := 1.8;
  Mgi := 1;
  ena_junc := 1/FoRT*ln(Nao/Na_j);
  ena_sl := 1/FoRT*ln(Nao/Na_sl);
  ek := 1/FoRT*ln(Ko/K_i);
  eca_junc := 1/FoRT/2*ln(Cao/Ca_j);
  eca_sl := 1/FoRT/2*ln(Cao/Ca_sl);
  ecl := 1/FoRT*ln(Cli/Clo);
  GNa := 23;
  GNaB := 0.597;
  IbarNaK := 1*1.8;
  KmNaip := 11;
  KmKo := 1.5;
  Q10NaK := 1.63;
  Q10KmNai := 1.39;
  pNaK := 0.01833;
  gkp := 2*0.001;
  GClCa := 0.5*0.109625;
  GClB := 1*9;
  KdClCa := 100;
  pNa := 0.5*1.5;
  pCa := 0.5*5.4;
  pK := 0.5*2.7;
  Q10CaL := 1.8;
  IbarNCX := 1*4.5;
  KmCai := 3.59;
  KmCao := 1.3;
  KmNai := 12.29;
  KmNao := 87.5;
  ksat := 0.32;
  nu := 0.27;
  Kdact := 0.15;
  Q10NCX := 1.57;
  IbarSLCaP := 0.0673;
  KmPCa := 0.5;
  GCaB := 5.513;
  Q10SLCaP := 2.35;
  Q10SRCaP := 2.6;
  Vmax_SRCaP := 5.3114;
  Kmf := 0.246;
  Kmr := 1.7;
  hillSRCaP := 1.787;
  ks := 25;
  koCa := 10;
  kom := 0.06;
  kiCa := 0.5;
  kim := 0.005;
  ec50SR := 0.45;
  Bmax_Naj := 7.561;
  Bmax_Nasl := 1.65;
  koff_na := 1;
  kon_na := 0.1;
  Bmax_TnClow := 70;
  koff_tncl := 19.6;
  kon_tncl := 32.7;
  Bmax_TnChigh := 140;
  koff_tnchca := 0.032;
  kon_tnchca := 2.37;
  koff_tnchmg := 3.33;
  kon_tnchmg := 3;
  Bmax_CaM := 24;
  koff_cam := 238;
  kon_cam := 34;
  Bmax_myosin := 140;
  koff_myoca := 0.46;
  kon_myoca := 13.8;
  koff_myomg := 0.057;
  kon_myomg := 0.0157;
  Bmax_SR := 19*0.9;
  koff_sr := 60;
  kon_sr := 100;
  Bmax_SLlowsl := 37.4*Vmyo/Vsl;
  Bmax_SLlowj := 4.6*Vmyo/Vjunc*0.1;
  koff_sll := 1300;
  kon_sll := 100;
  Bmax_SLhighsl := 13.4*Vmyo/Vsl;
  Bmax_SLhighj := 1.65*Vmyo/Vjunc*0.1;
  koff_slh := 30;
  kon_slh := 100;
  Bmax_Csqn := 140*Vmyo/Vsr;
  koff_csqn := 65;
  kon_csqn := 100;
  mss := 1/(1 + exp(-(56.86 + V_m)/9.03))^2;
  taum := 0.1292*exp(-((V_m + 45.79)/15.54)^2) + 0.06487*exp(-((V_m - 4.823)/51.12)^2);
  ah := piecewise(0, V_m >= -40, 0.057*exp(-(V_m + 80)/6.8));
  bh := piecewise(0.77/(0.13*(1 + exp(-(V_m + 10.66)/11.1))), V_m >= -40, 2.7*exp(0.079*V_m) + 3.1*exp(0.3485*V_m));
  tauh := 1/(ah + bh);
  hss := 1/(1 + exp((V_m + 71.55)/7.43))^2;
  aj := piecewise(0, V_m >= -40, (-2.5428*exp(0.2444*V_m) - 6.948*exp(-0.04391*V_m))*(V_m + 37.78)/(1 + exp(0.311*(V_m + 79.23))));
  bj := piecewise(0.6*exp(0.057*V_m)/(1 + exp(-0.1*(V_m + 32))), V_m >= -40, 0.02424*exp(-0.01052*V_m)/(1 + exp(-0.1378*(V_m + 40.14))));
  tauj := 1/(aj + bj);
  jss := 1/(1 + exp((V_m + 71.55)/7.43))^2;
  I_Na_junc := Fjunc*GNa*m^3*h*j*(V_m - ena_junc);
  I_Na_sl := Fsl*GNa*m^3*h*j*(V_m - ena_sl);
  I_Na := I_Na_junc + I_Na_sl;
  I_nabk_junc := Fjunc*GNaB*(V_m - ena_junc);
  I_nabk_sl := Fsl*GNaB*(V_m - ena_sl);
  I_nabk := I_nabk_junc + I_nabk_sl;
  sigma := (exp(Nao/67.3) - 1)/7;
  fnak := 1/(1 + 0.1245*exp(-0.1*V_m*FoRT) + 0.0365*sigma*exp(-V_m*FoRT));
  I_nak_junc := Fjunc*IbarNaK*fnak*Ko/(1 + (KmNaip/Na_j)^4)/(Ko + KmKo);
  I_nak_sl := Fsl*IbarNaK*fnak*Ko/(1 + (KmNaip/Na_sl)^4)/(Ko + KmKo);
  I_nak := I_nak_junc + I_nak_sl;
  gkr := 0.035*sqrt(Ko/5.4);
  xrss := 1/(1 + exp(-(V_m + 10)/5));
  tauxr := 550/(1 + exp((-22 - V_m)/9))*6/(1 + exp((V_m - (-11))/9)) + 230/(1 + exp((V_m - (-40))/20));
  rkr := 1/(1 + exp((V_m + 74)/24));
  I_kr := gkr*x_kr*rkr*(V_m - ek);
  kp_kp := 1/(1 + exp(7.488 - V_m/5.98));
  I_kp_junc := Fjunc*gkp*kp_kp*(V_m - ek);
  I_kp_sl := Fsl*gkp*kp_kp*(V_m - ek);
  I_kp := I_kp_junc + I_kp_sl;
  eks := 1/FoRT*ln((Ko + pNaK*Nao)/(K_i + pNaK*Na_i));
  gks_junc := 0.0035;
  gks_sl := 0.0035;
  xsss := 1/(1 + exp(-(V_m + 3.8)/14.25));
  tauxs := 990.1/(1 + exp(-(V_m + 2.436)/14.12));
  I_ks_junc := Fjunc*gks_junc*x_ks^2*(V_m - eks);
  I_ks_sl := Fsl*gks_sl*x_ks^2*(V_m - eks);
  I_ks := I_ks_junc + I_ks_sl;
  GtoSlow := piecewise(1*0.13*0.12, epi == 1, 0.13*0.3*0.964);
  GtoFast := piecewise(1*0.13*0.88, epi == 1, 0.13*0.3*0.036);
  xtoss := 1/(1 + exp(-(V_m - 19)/13));
  ytoss := 1/(1 + exp((V_m + 19.5)/5));
  tauxtos := 9/(1 + exp((V_m + 3)/15)) + 0.5;
  tauytos := 800/(1 + exp((V_m + 60)/10)) + 30;
  I_tos := GtoSlow*x_to_s*y_to_s*(V_m - ek);
  tauxtof := 8.5*exp(-((V_m + 45)/50)^2) + 0.5;
  tauytof := 85*exp(-(V_m + 40)^2/220) + 7;
  I_tof := GtoFast*x_to_f*y_to_f*(V_m - ek);
  I_to := I_tos + I_tof;
  aki := 1.02/(1 + exp(0.2385*(V_m - ek - 59.215)));
  bki := (0.49124*exp(0.08032*(V_m + 5.476 - ek)) + exp(0.06175*(V_m - ek - 594.31)))/(1 + exp(-0.5143*(V_m - ek + 4.753)));
  kiss := aki/(aki + bki);
  I_ki := 1*0.35*sqrt(Ko/5.4)*kiss*(V_m - ek);
  I_ClCa_junc := Fjunc*GClCa/(1 + KdClCa/Ca_j)*(V_m - ecl);
  I_ClCa_sl := Fsl*GClCa/(1 + KdClCa/Ca_sl)*(V_m - ecl);
  I_ClCa := I_ClCa_junc + I_ClCa_sl;
  I_Clbk := GClB*(V_m - ecl);
  fss := 1/(1 + exp((V_m + 35)/9)) + 0.6/(1 + exp((50 - V_m)/20));
  dss := 1/(1 + exp(-(V_m + 5)/6));
  taud := 1*dss*(1 - exp(-(V_m + 5)/6))/(0.035*(V_m + 5));
  tauf := 1/(0.0197*exp(-(0.0337*(V_m + 14.5))^2) + 0.02);
  fcaCaMSL := 0;
  fcaCaj := 0;
  ibarca_j := pCa*4*V_m*Frdy*FoRT*(0.341*Ca_j*exp(2*V_m*FoRT) - 0.341*Cao)/(exp(2*V_m*FoRT) - 1);
  ibarca_sl := pCa*4*V_m*Frdy*FoRT*(0.341*Ca_sl*exp(2*V_m*FoRT) - 0.341*Cao)/(exp(2*V_m*FoRT) - 1);
  ibark := pK*V_m*Frdy*FoRT*(0.75*K_i*exp(V_m*FoRT) - 0.75*Ko)/(exp(V_m*FoRT) - 1);
  ibarna_j := pNa*V_m*Frdy*FoRT*(0.75*Na_j*exp(V_m*FoRT) - 0.75*Nao)/(exp(V_m*FoRT) - 1);
  ibarna_sl := pNa*V_m*Frdy*FoRT*(0.75*Na_sl*exp(V_m*FoRT) - 0.75*Nao)/(exp(V_m*FoRT) - 1);
  I_Ca_junc := Fjunc_CaL*ibarca_j*d*f*(1 - f_Ca_Bj + fcaCaj)*Q10CaL^Qpow*0.45*1;
  I_Ca_sl := Fsl_CaL*ibarca_sl*d*f*(1 - f_Ca_Bsl + fcaCaMSL)*Q10CaL^Qpow*0.45*1;
  I_Ca := I_Ca_junc + I_Ca_sl;
  I_CaK := ibark*d*f*(Fjunc_CaL*(fcaCaj + (1 - f_Ca_Bj)) + Fsl_CaL*(fcaCaMSL + (1 - f_Ca_Bsl)))*Q10CaL^Qpow*0.45*1;
  I_CaNa_junc := Fjunc_CaL*ibarna_j*d*f*(1 - f_Ca_Bj + fcaCaj)*Q10CaL^Qpow*0.45*1;
  I_CaNa_sl := Fsl_CaL*ibarna_sl*d*f*(1 - f_Ca_Bsl + fcaCaMSL)*Q10CaL^Qpow*0.45*1;
  I_CaNa := I_CaNa_junc + I_CaNa_sl;
  I_Catot := I_Ca + I_CaK + I_CaNa;
  Ka_junc := 1/(1 + (Kdact/Ca_j)^2);
  Ka_sl := 1/(1 + (Kdact/Ca_sl)^2);
  s1_junc := exp(nu*V_m*FoRT)*Na_j^3*Cao;
  s1_sl := exp(nu*V_m*FoRT)*Na_sl^3*Cao;
  s2_junc := exp((nu - 1)*V_m*FoRT)*Nao^3*Ca_j;
  s3_junc := KmCai*Nao^3*(1 + (Na_j/KmNai)^3) + KmNao^3*Ca_j*(1 + Ca_j/KmCai) + KmCao*Na_j^3 + Na_j^3*Cao + Nao^3*Ca_j;
  s2_sl := exp((nu - 1)*V_m*FoRT)*Nao^3*Ca_sl;
  s3_sl := KmCai*Nao^3*(1 + (Na_sl/KmNai)^3) + KmNao^3*Ca_sl*(1 + Ca_sl/KmCai) + KmCao*Na_sl^3 + Na_sl^3*Cao + Nao^3*Ca_sl;
  I_ncx_junc := Fjunc*IbarNCX*Q10NCX^Qpow*Ka_junc*(s1_junc - s2_junc)/s3_junc/(1 + ksat*exp((nu - 1)*V_m*FoRT));
  I_ncx_sl := Fsl*IbarNCX*Q10NCX^Qpow*Ka_sl*(s1_sl - s2_sl)/s3_sl/(1 + ksat*exp((nu - 1)*V_m*FoRT));
  I_ncx := I_ncx_junc + I_ncx_sl;
  I_pca_junc := Fjunc*Q10SLCaP^Qpow*IbarSLCaP*Ca_j^1.6/(KmPCa^1.6 + Ca_j^1.6);
  I_pca_sl := Fsl*Q10SLCaP^Qpow*IbarSLCaP*Ca_sl^1.6/(KmPCa^1.6 + Ca_sl^1.6);
  I_pca := I_pca_junc + I_pca_sl;
  I_cabk_junc := Fjunc*GCaB*(V_m - eca_junc);
  I_cabk_sl := Fsl*GCaB*(V_m - eca_sl);
  I_cabk := I_cabk_junc + I_cabk_sl;
  MaxSR := 15;
  MinSR := 1;
  kCaSR := MaxSR - (MaxSR - MinSR)/(1 + (ec50SR/Ca_sr)^2.5);
  koSRCa := koCa/kCaSR;
  kiSRCa := kiCa*kCaSR;
  RI := 1 - Ry_Rr - Ry_Ro - Ry_Ri;
  J_SRCarel := ks*Ry_Ro/1*(Ca_sr - Ca_j);
  J_serca := Q10SRCaP^Qpow*Vmax_SRCaP*((Ca_i/Kmf)^hillSRCaP - (Ca_sr/Kmr)^hillSRCaP)/(1 + (Ca_i/Kmf)^hillSRCaP + (Ca_sr/Kmr)^hillSRCaP);
  J_SRleak := 5.348*(Ca_sr - Ca_j);
  dNa_Bj_dt := kon_na*Na_j*(Bmax_Naj - Na_Bj) - koff_na*Na_Bj;
  dNa_Bsl_dt := kon_na*Na_sl*(Bmax_Nasl - Na_Bsl) - koff_na*Na_Bsl;
  J_CaB_cytosol := kon_tncl*Ca_i*(Bmax_TnClow - Tn_CL) - koff_tncl*Tn_CL + kon_tnchca*Ca_i*(Bmax_TnChigh - Tn_CHc - Tn_CHm) - koff_tnchca*Tn_CHc + kon_tnchmg*Mgi*(Bmax_TnChigh - Tn_CHc - Tn_CHm) - koff_tnchmg*Tn_CHm + kon_cam*Ca_i*(Bmax_CaM - CaM) - koff_cam*CaM + kon_myoca*Ca_i*(Bmax_myosin - Myo_c - Myo_m) - koff_myoca*Myo_c + kon_myomg*Mgi*(Bmax_myosin - Myo_c - Myo_m) - koff_myomg*Myo_m + (kon_sr*Ca_i*(Bmax_SR - SRB) - koff_sr*SRB);
  J_CaB_junction := kon_sll*Ca_j*(Bmax_SLlowj - SLL_j) - koff_sll*SLL_j + (kon_slh*Ca_j*(Bmax_SLhighj - SLH_j) - koff_slh*SLH_j);
  J_CaB_sl := kon_sll*Ca_sl*(Bmax_SLlowsl - SLL_sl) - koff_sll*SLL_sl + (kon_slh*Ca_sl*(Bmax_SLhighsl - SLH_sl) - koff_slh*SLH_sl);
  I_Na_tot_junc := I_Na_junc + I_nabk_junc + 3*I_ncx_junc + 3*I_nak_junc + I_CaNa_junc;
  I_Na_tot_sl := I_Na_sl + I_nabk_sl + 3*I_ncx_sl + 3*I_nak_sl + I_CaNa_sl;
  I_Na_tot_sl2 := 3*I_ncx_sl + 3*I_nak_sl + I_CaNa_sl;
  I_Na_tot_junc2 := 3*I_ncx_junc + 3*I_nak_junc + I_CaNa_junc;
  I_K_tot := I_to + I_kr + I_ks + I_ki - 2*I_nak + I_CaK + I_kp;
  I_Ca_tot_junc := I_Ca_junc + I_cabk_junc + I_pca_junc - 2*I_ncx_junc;
  I_Ca_tot_sl := I_Ca_sl + I_cabk_sl + I_pca_sl - 2*I_ncx_sl;
  I_Na_tot := I_Na_tot_junc + I_Na_tot_sl;
  I_Cl_tot := I_ClCa + I_Clbk;
  I_Ca_tot := I_Ca_tot_junc + I_Ca_tot_sl;
  I_tot := I_Na_tot + I_Cl_tot + I_Ca_tot + I_K_tot;

  // Rate rules:
  m' = (mss - m)/taum;
  h' = (hss - h)/tauh;
  j' = (jss - j)/tauj;
  x_kr' = (xrss - x_kr)/tauxr;
  x_ks' = (xsss - x_ks)/tauxs;
  x_to_s' = (xtoss - x_to_s)/tauxtos;
  y_to_s' = (ytoss - y_to_s)/tauytos;
  x_to_f' = (xtoss - x_to_f)/tauxtof;
  y_to_f' = (ytoss - y_to_f)/tauytof;
  d' = (dss - d)/taud;
  f' = (fss - f)/tauf;
  f_Ca_Bj' = 1.7*Ca_j/1*(1 - f_Ca_Bj) - 11.9*f_Ca_Bj;
  f_Ca_Bsl' = 1.7*Ca_sl/1*(1 - f_Ca_Bsl) - 11.9*f_Ca_Bsl;
  Ry_Rr' = kim*RI - kiSRCa*Ca_j*Ry_Rr - (koSRCa*Ca_j^2*Ry_Rr - kom*Ry_Ro);
  Ry_Ro' = koSRCa*Ca_j^2*Ry_Rr - kom*Ry_Ro - (kiSRCa*Ca_j*Ry_Ro - kim*Ry_Ri);
  Ry_Ri' = kiSRCa*Ca_j*Ry_Ro - kim*Ry_Ri - (kom*Ry_Ri - koSRCa*Ca_j^2*RI);
  Na_Bj' = dNa_Bj_dt;
  Na_Bsl' = dNa_Bsl_dt;
  Tn_CL' = kon_tncl*Ca_i*(Bmax_TnClow - Tn_CL) - koff_tncl*Tn_CL;
  Tn_CHc' = kon_tnchca*Ca_i*(Bmax_TnChigh - Tn_CHc - Tn_CHm) - koff_tnchca*Tn_CHc;
  Tn_CHm' = kon_tnchmg*Mgi*(Bmax_TnChigh - Tn_CHc - Tn_CHm) - koff_tnchmg*Tn_CHm;
  CaM' = kon_cam*Ca_i*(Bmax_CaM - CaM) - koff_cam*CaM;
  Myo_c' = kon_myoca*Ca_i*(Bmax_myosin - Myo_c - Myo_m) - koff_myoca*Myo_c;
  Myo_m' = kon_myomg*Mgi*(Bmax_myosin - Myo_c - Myo_m) - koff_myomg*Myo_m;
  SRB' = kon_sr*Ca_i*(Bmax_SR - SRB) - koff_sr*SRB;
  SLL_j' = kon_sll*Ca_j*(Bmax_SLlowj - SLL_j) - koff_sll*SLL_j;
  SLL_sl' = kon_sll*Ca_sl*(Bmax_SLlowsl - SLL_sl) - koff_sll*SLL_sl;
  SLH_j' = kon_slh*Ca_j*(Bmax_SLhighj - SLH_j) - koff_slh*SLH_j;
  SLH_sl' = kon_slh*Ca_sl*(Bmax_SLhighsl - SLH_sl) - koff_slh*SLH_sl;
  Csqn_b' = kon_csqn*Ca_sr*(Bmax_Csqn - Csqn_b) - koff_csqn*Csqn_b;
  Ca_sr' = J_serca - (J_SRleak*Vmyo/Vsr + J_SRCarel) - (kon_csqn*Ca_sr*(Bmax_Csqn - Csqn_b) - koff_csqn*Csqn_b);
  Na_j' = -I_Na_tot_junc*Cmem/(Vjunc*Frdy) + J_na_juncsl/Vjunc*(Na_sl - Na_j) - dNa_Bj_dt;
  Na_sl' = -I_Na_tot_sl*Cmem/(Vsl*Frdy) + J_na_juncsl/Vsl*(Na_j - Na_sl) + J_na_slmyo/Vsl*(Na_i - Na_sl) - dNa_Bsl_dt;
  Na_i' = J_na_slmyo/Vmyo*(Na_sl - Na_i);
  K_i' = 0;
  Ca_j' = -I_Ca_tot_junc*Cmem/(Vjunc*2*Frdy) + J_ca_juncsl/Vjunc*(Ca_sl - Ca_j) - J_CaB_junction + J_SRCarel*Vsr/Vjunc + J_SRleak*Vmyo/Vjunc;
  Ca_sl' = -I_Ca_tot_sl*Cmem/(Vsl*2*Frdy) + J_ca_juncsl/Vsl*(Ca_j - Ca_sl) + J_ca_slmyo/Vsl*(Ca_i - Ca_sl) - J_CaB_sl;
  Ca_i' = -J_serca*Vsr/Vmyo - J_CaB_cytosol + J_ca_slmyo/Vmyo*(Ca_sl - Ca_i);
  V_m' = -(I_tot - I_app_membrane_potential);

  // Unit definitions:
  unit msec = 1e-3 second;
  unit joule_per_kelvin_per_kilomole = joule / (kelvin * 1000 mole);
  unit um = 1e-6 mole;
  unit um2 = (1e-6 mole)^2;
  unit cm2_per_sec = (0.01 metre)^2 / second;
  unit liters_per_msec = litre / (1e-3 second);
  unit mM = 1e-3 mole / litre;
  unit mM4 = (1e-3 mole)^4 / litre^4;
  unit mS_per_uF = 1e-3 siemens / (1e-6 farad);
  unit cm_per_sec = 0.01 metre / second;
  unit mM_per_msec = 1e-3 mole / (litre * 1e-3 second);
  unit per_mM_per_msec = litre / (1e-3 mole * 1e-3 second);
  unit coulomb_per_mole = coulomb / mole;
  unit uA_per_uF = 1e-6 ampere / (1e-6 farad);
  unit per_msec = 1 / (1e-3 second);
  unit mV = 1e-3 volt;
  unit mV2 = (1e-3 volt)^2;
  unit per_mV = 1 / (1e-3 volt);
  unit per_mV2 = 1 / (1e-3 volt)^2;
  unit per_mM2_per_msec = litre^2 / ((1e-3 mole)^2 * 1e-3 second);
  unit liters_per_femtoliter = litre / (1e-6 mole)^3;
  unit uF_per_mS = 1e-6 farad / (1e-3 siemens);
  unit time = 1e-3 second;
end
