// SBML level 2 version 4

model Cloutier2009_EnergyMetabolism_ModelF()
  // This a model from the article:
  // The control systems structures of energy metabolism.
  // Cloutier M, Wellstead P. J R Soc Interface 2010 Apr 6;7(45):651-65 19828503 ,
  // Abstract:
  // The biochemical regulation of energy metabolism (EM) allows cells to modulate their energetic output depending on available substrates and requirements. To this end, numerous biomolecular mechanisms exist that allow the sensing of the energetic state and corresponding adjustment of enzymatic reaction rates. This regulation is known to induce dynamic systems properties such as oscillations or perfect adaptation. Although the various mechanisms of energy regulation have been studied in detail from many angles at the experimental and theoretical levels, no framework is available for the systematic analysis of EM from a control systems perspective. In this study, we have used principles well known in control to clarify the basic system features that govern EM. The major result is a subdivision of the biomolecular mechanisms of energy regulation in terms of widely used engineering control mechanisms: proportional, integral, derivative control, and structures: feedback, cascade and feed-forward control. Evidence for each mechanism and structure is demonstrated and the implications for systems properties are shown through simulations. As the equivalence between biological systems and control components presented here is generic, it is also hypothesized that our work could eventually have an applicability that is much wider than the focus of the current study.
  // This model was taken from the CellML repository and automatically converted to SBML.
  // The original model was: Cloutier M, Wellstead P. (2009) - version=1.0
  // The original CellML model was created by:
  // Catherine Lloyd
  // c.lloyd@auckland.ac.nz
  // The University of Auckland
  // This model originates from BioModels Database: A Database of Annotated Published Models (http://www.ebi.ac.uk/biomodels/). It is copyright (c) 2005-2011 The BioModels.net Team.
  // To the extent possible under law, all copyright and related or neighbouring rights to this encoded model have been dedicated to the public domain worldwide. Please refer to CC0 Public Domain Dedication for more information.
  // In summary, you are entitled to use this encoded model in absolutely any manner you deem suitable, verbatim, or with modification, alone or embedded it in a larger context, redistribute it, commercially or not, in a restricted way or not..
  // To cite BioModels Database, please use: Li C, Donizelli M, Rodriguez N, Dharuri H, Endler L, Chelliah V, Li L, He E, Henry A, Stefan MI, Snoep JL, Hucka M, Le Novère N, Laibe C (2010) BioModels Database: An enhanced, curated and annotated resource for published quantitative kinetic models. BMC Syst Biol., 4:92.
  // biomodels.db:MODEL1006230096
  // isDescribedBy pubmed:19828503
  // biomodels.db:MODEL1006230096
  // isDescribedBy pubmed:19828503
  // biomodels.db:MODEL1006230096
  // biomodels.db:MODEL1006230096

  // Compartments:
  compartment COMpartment = 1 litre;

  // Parameters:
  F6P = 0.2;
  F26P = 0.001;
  GAP = 0.0405;
  PYR = 0.1;
  LAC = 0.5;
  ATP = 2.402;
  PCr = 18.14;
  Vmax_hk = 2.5;
  Km_ATP_hk = 0.5;
  KI_F6P = 0.068;
  Vmax_pfk = 3.85;
  Km_ATP_pfk = 0.05;
  Km_F6P_pfk = 0.18;
  Km_F26P_pfk = 0.01;
  Vmaxf_pfk2 = 0.0002;
  Vmaxr_pfk2 = 0.0001036;
  Km_ATP_pfk2 = 0.05;
  Km_F6P_pfk2 = 0.01;
  Km_F26P_pfk2 = 0.0001;
  Vmax_pk = 5;
  Km_ADP_pk = 0.005;
  Km_GAP_pk = 0.4;
  Vmax_op = 1;
  Km_ADP_op = 0.005;
  Km_PYR_op = 0.5;
  kf_ldh = 12.5;
  kr_ldh = 2.5355;
  kf_ck = 3;
  kr_ck = 1.26;
  PCrtot = 20;
  Vmax_ATPase = 0.9355;
  Km_ATP = 0.5;
  Vlac_0 = 0.355;
  K_LAC_eff = 0.71;
  K_LAC = 0.641;
  nATP = 0.4;
  KI_ATP = 1;
  nAMP = 0.5;
  Ka_AMP = 0.05;
  stim = 1;
  to = 50;
  tend = 200;
  v1_n = 0.5;
  v2_n = 0;
  t_n_stim = 2;
  ANP = 2.51;
  Q_adk = 0.92;
  Kamp_pfk2 = 0.005;
  nh_amp = 2;

  // Assignment rules:
  V_hk := Vmax_hk*(ATP/(ATP + Km_ATP_hk))*(1 + (F6P/KI_F6P)^4)^(-1);
  V_op := Vmax_op*(PYR/(PYR + Km_PYR_op))*(ADP/(ADP + Km_ADP_op))*(1/(1 + 0.1*(ATP/ADP)));
  V_ldh := kf_ldh*PYR - kr_ldh*LAC;
  V_ck := kf_ck*PCr*ADP - kr_ck*Cr*ATP;
  Cr := PCrtot - PCr;
  ADP := ATP/2*(-Q_adk + sqrt(u));
  u := Q_adk^2 + 4*Q_adk*(ANP/ATP - 1);
  dAMP_dATP := -1 + Q_adk/2 + (-(0.5*sqrt(u))) + Q_adk*(ANP/(ATP*sqrt(u)));
  AMP := ANP - (ATP + ADP);
  ATP_inh := ((1 + nATP*(ATP/KI_ATP))/(1 + ATP/KI_ATP))^4;
  V_pfk := Vmax_pfk*(F6P/(F6P + Km_F6P_pfk))*(ATP/(ATP + Km_ATP_pfk))*(F26P/(F26P + Km_F26P_pfk))*ATP_inh*AMP_act;
  V_pfk2 := Vmaxf_pfk2*(ATP/(ATP + Km_ATP_pfk2))*(F6P/(F6P + Km_F6P_pfk2))*AMP_pfk2 - Vmaxr_pfk2*(F26P/(F26P + Km_F26P_pfk2));
  V_pk := Vmax_pk*(GAP/(GAP + Km_GAP_pk))*(ADP/(ADP + Km_ADP_pk))*ATP_inh;
  AMP_act := ((1 + AMP/Ka_AMP)/(1 + nAMP*(AMP/Ka_AMP)))^4;
  v_stim := stim*(v1_n + v2_n*((time - to)/t_n_stim)*exp(-((time - to)*(unitpulseSB/t_n_stim))))*unitpulseSB;
  V_ATPase := Vmax_ATPase*(ATP/(ATP + Km_ATP))*(1 + v_stim);
  V_lac := Vlac_0*(1 + v_stim*K_LAC) - K_LAC_eff*LAC;
  unitpulseSB := piecewise(1, (time >= to) && (time <= to + tend), 0);
  AMP_pfk2 := (AMP/Kamp_pfk2)^nh_amp/(1 + (AMP/Kamp_pfk2)^nh_amp);

  // Rate rules:
  F6P' = V_hk - (V_pfk - V_pfk2);
  F26P' = V_pfk2;
  GAP' = 2*V_pfk - V_pk;
  PYR' = V_pk - (V_op + V_ldh);
  LAC' = 2.25*V_ldh + V_lac;
  ATP' = (2*V_pk + 15*V_op + V_ck - (V_hk + V_pfk + V_pfk2 + V_ATPase))*(1 - dAMP_dATP)^(-1);
  PCr' = -V_ck;

  // Unit definitions:
  unit s = second;
  unit mM = 1e-3 mole / litre;
  unit per_mM = litre / (1e-3 mole);
  unit mM_per_s = 1e-3 mole / (litre * second);
  unit per_mM_s = litre / (1e-3 mole * second);
  unit per_s = 1 / second;
  unit cm_per_mM_s = 0.01 metre * litre / (1e-3 mole * second);
  unit per_cm = 1 / (0.01 metre);
  unit C_per_mole = coulomb / mole;
  unit L_per_millimole = litre / (1e-3 mole);
  unit mS_per_cm2 = 1e-3 siemens / (0.01 metre)^2;
  unit mV = 1e-3 volt;
  unit time = second;
end
