// SBML level 2 version 4

model Wodarz2007_CTLinflation_ModelC()
  // This a model from the article:
  // Dynamics of killer T cell inflation in viral infections.
  // Wodarz D, Sierro S, Klenerman P. J R Soc Interface 2007 Jun 22;4(14):533-43 17251133 ,
  // Abstract:
  // Upon acute viral infection, a typical cytotoxic T lymphocyte (CTL) response is characterized by a phase of expansion and contraction after which it settles at a relatively stable memory level. Recently, experimental data from mice infected with murine cytomegalovirus (MCMV) showed different and unusual dynamics. After acute infection had resolved, some antigen specific CTL started to expand over time despite the fact that no replicative virus was detectable. This phenomenon has been termed as "CTL memory inflation". In order to examine the dynamics of this system further, we developed a mathematical model analysing the impact of innate and adaptive immune responses. According to this model, a potentially important contributor to CTL inflation is competition between the specific CTL response and an innate natural killer (NK) cell response. Inflation occurs most readily if the NK cell response is more efficient than the CTL at reducing virus load during acute infection, but thereafter maintains a chronic virus load which is sufficient to induce CTL proliferation. The model further suggests that weaker NK cell mediated protection can correlate with more pronounced CTL inflation dynamics over time. We present experimental data from mice infected with MCMV which are consistent with the theoretical predictions. This model provides valuable information and may help to explain the inflation of CMV specific CD8+T cells seen in humans as they age.
  // This model was taken from the CellML repository and automatically converted to SBML.
  // The original model was: Wodarz D, Sierro S, Klenerman P. (2007) - version=1.0
  // The original CellML model was created by:
  // Catherine Lloyd
  // c.lloyd@auckland.ac.nz
  // The University of Auckland
  // This model originates from BioModels Database: A Database of Annotated Published Models (http://www.ebi.ac.uk/biomodels/). It is copyright (c) 2005-2011 The BioModels.net Team.
  // To the extent possible under law, all copyright and related or neighbouring rights to this encoded model have been dedicated to the public domain worldwide. Please refer to CC0 Public Domain Dedication for more information.
  // In summary, you are entitled to use this encoded model in absolutely any manner you deem suitable, verbatim, or with modification, alone or embedded it in a larger context, redistribute it, commercially or not, in a restricted way or not..
  // To cite BioModels Database, please use: Li C, Donizelli M, Rodriguez N, Dharuri H, Endler L, Chelliah V, Li L, He E, Henry A, Stefan MI, Snoep JL, Hucka M, Le Novère N, Laibe C (2010) BioModels Database: An enhanced, curated and annotated resource for published quantitative kinetic models. BMC Syst Biol., 4:92.
  // biomodels.db:MODEL1006230097
  // isDescribedBy pubmed:17251133
  // biomodels.db:MODEL1006230097
  // isDescribedBy pubmed:17251133
  // biomodels.db:MODEL1006230097
  // biomodels.db:MODEL1006230097

  // Compartments:
  compartment COMpartment = 1 litre;

  // Parameters:
  x = 1;
  y0 = 0;
  y1 = 0;
  L = 0;
  v = 1;
  m_8 = 0;
  m_7 = 0;
  m_6 = 0;
  m_5 = 0;
  m_4 = 0;
  m_3 = 0;
  m_2 = 0;
  m_1 = 0;
  m_0 = 0;
  za = 1;
  zi = 0.1;
  a0 = 0.1;
  a1 = 0.2;
  k = 1;
  u = 1;
  lambda = 10;
  d = 0.1;
  beta = 0.1;
  gamma = 0.5;
  alpha = 0.2;
  phi = 0.1;
  eta = 0.01;
  pa = 1e-6;
  ca = 15.5;
  r = 1;
  ba = 0.1;
  p_i = 1;
  ci = 12;
  bi = 0.1;
  xi = 0.01;

  // Assignment rules:
  log_zi := log10(zi);
  R0 := lambda*eta/(d*a1*(a0 + eta))*(beta + gamma*phi/(phi + d));

  // Rate rules:
  x' = lambda - (d*x + beta*x*v + gamma*x*v);
  y0' = beta*x*v - (a0*y0 + eta*y0 + pa*y0*za + p_i*y0*zi) + phi*L;
  y1' = eta*y0 - (a1*y1 + pa*y1*za + p_i*y1*zi);
  L' = gamma*x*v - (phi*L + d*L);
  v' = k*y1 - u*v;
  m_8' = 2*r*m_7 - r*m_8;
  m_7' = 2*r*m_6 - r*m_7;
  m_6' = 2*r*m_5 - r*m_6;
  m_5' = 2*r*m_4 - r*m_5;
  m_4' = 2*r*m_3 - r*m_4;
  m_3' = 2*r*m_2 - r*m_3;
  m_2' = 2*r*m_1 - r*m_2;
  m_1' = 2*r*m_0 - r*m_1;
  m_0' = -r*m_0;
  za' = alpha*m_8 + ca*(y0 + y1)*za - ba*za;
  zi' = xi + ci*(y0 + y1)*zi - bi*zi;

  // Unit definitions:
  unit hour = 3600 second;
  unit first_order_rate_constant = 1 / (3600 second);
  unit time = 3600 second;
end
