// SBML level 2 version 4

model Waugh2006_WoundHealing_Diabetic_ModelD()
  // This a model from the article:
  // Modeling the effects of treating diabetic wounds with engineered skin substitutes.
  // Waugh HV, Sherratt JA. Wound Repair Regen 2007 Jul-Aug;15(4):556-65 17650100 ,
  // Abstract:
  // In this paper, a novel mathematical model of wound healing in both normal and diabetic cases is presented, focusing upon the effects of adding two currently available commercial engineered skin substitute therapies to the wound (Apligraf) and Dermagraft). Our work extends a previously developed model, which considers inflammatory and repair macrophage dynamics in normal and diabetic wound healing. Here, we extend the model to include equations for platelet-derived growth factor concentration, fibroblast density, collagen density, and hyaluronan concentration. This enables us to examine the variation of these components in both normal and diabetic wound healing cases, and to model the treatment protocols of these therapies. Within the context of our model, we find that the key component to successful healing in diabetic wounds is hyaluronan and that the therapies work by increasing the amount of hyaluronan available in the wound environment. The time-to-healing results correlate with those observed in clinical trials and the model goes some way to establishing an understanding of why diabetic wounds do not heal, and how these treatments affect the diabetic wound environment to promote wound closure.
  // This model was taken from the CellML repository and automatically converted to SBML.
  // The original model was: Waugh HV, Sherratt JA. (2007) - version=1.0
  // The original CellML model was created by:
  // Catherine Lloyd
  // c.lloyd@auckland.ac.nz
  // The University of Auckland
  // This model originates from BioModels Database: A Database of Annotated Published Models (http://www.ebi.ac.uk/biomodels/). It is copyright (c) 2005-2011 The BioModels.net Team.
  // To the extent possible under law, all copyright and related or neighbouring rights to this encoded model have been dedicated to the public domain worldwide. Please refer to CC0 Public Domain Dedication for more information.
  // In summary, you are entitled to use this encoded model in absolutely any manner you deem suitable, verbatim, or with modification, alone or embedded it in a larger context, redistribute it, commercially or not, in a restricted way or not..
  // To cite BioModels Database, please use: Li C, Donizelli M, Rodriguez N, Dharuri H, Endler L, Chelliah V, Li L, He E, Henry A, Stefan MI, Snoep JL, Hucka M, Le Novère N, Laibe C (2010) BioModels Database: An enhanced, curated and annotated resource for published quantitative kinetic models. BMC Syst Biol., 4:92.
  // biomodels.db:MODEL1006230102
  // isDescribedBy pubmed:17650100
  // biomodels.db:MODEL1006230102
  // isDescribedBy pubmed:17650100
  // biomodels.db:MODEL1006230102
  // biomodels.db:MODEL1006230102

  // Compartments:
  compartment COMpartment = 1 litre;

  // Parameters:
  time_environment has day;
  phi_I = 200 cells_per_mm3;
  phi_R = 200 cells_per_mm3;
  T = 6 pg_per_mm3;
  Apligraf_T has pg_per_mm3_per_day;
  P = 2 pg_per_mm3;
  Apligraf_P has pg_per_mm3_per_day;
  F = 50 cells_per_mm3;
  Apligraf_F has cells_per_mm3_per_day;
  C = 10 microg_per_mm3;
  Apligraf_C has microg_per_mm3_per_day;
  H = 0.01 microg_per_mm3;
  Apligraf_H has microg_per_mm3_per_day;
  K_T has cells_per_mm3_per_day;
  tau1_K_T = -2.47 mm6_cells_per_pg3_day;
  tau2_K_T = 21.94 mm3_cells_per_pg2_day;
  tau3_K_T = 6.41 cells_per_pg_per_day;
  tau4_K_T = 1.75 cells_per_mm3_per_day;
  M_P has cells_per_mm3_per_day;
  tau1_M_P = 15.333 mm6_cells_per_pg3_day;
  tau2_M_P = -167.21 mm3_cells_per_pg2_day;
  tau3_M_P = 452.38 cells_per_pg_per_day;
  tau4_M_P = 2.6593 cells_per_mm3_per_day;
  f_T has dimensionless;
  tau1_f_T = 0.0092 mm9_per_pg3;
  tau2_f_T = -0.1552 mm6_per_pg2;
  tau3_f_T = 0.6279 mm3_per_pg;
  tau4_f_T = 0.2527 dimensionless;
  g_C has dimensionless;
  tau1_g_C = -4.33e-10 mm9_per_microg3;
  tau2_g_C = 9e-7 mm6_per_microg2;
  tau3_g_C = -0.00055 mm3_per_microg;
  tau4_g_C = 0.13 dimensionless;
  alpha has dimensionless;
  k1 = 0.05 dimensionless;
  k2 = 0.693 per_day;
  k3 = 0.002 mm3_per_cells;
  k4 = 0.07 pg_per_cells_per_day;
  k5 = 0.0025 mm3_per_cells;
  k6 = 0.0004 mm3_per_microg;
  k7 = 0.004 pg_per_cells_per_day;
  k8 = 0.015 pg_per_cells_per_day;
  k9 = 0.0015 pg_per_cells_per_day;
  k10 = 0.924 per_day;
  k11 = 5 microg_per_cells_per_day;
  k12 = 0.001 microg_per_cells_per_day;
  d1 = 0.2 per_day;
  d2 = 9.1 per_day;
  d3 = 4 per_day;
  d4 = 2.5 per_day;
  d5 = 1.5e-5 mm3_per_cells_per_day;
  d6 = 0.7 per_day;

  // Assignment rules:
  Apligraf_T := piecewise(0, (time_environment >= 0) && (time_environment < 28), 0.4, (time_environment >= 28) && (time_environment < 29), 0, (time_environment >= 29) && (time_environment < 35), 0.4, (time_environment >= 35) && (time_environment < 36), 0, (time_environment >= 36) && (time_environment < 42), 0.4, (time_environment >= 42) && (time_environment < 43), 0, (time_environment >= 43) && (time_environment < 49), 0.4, (time_environment >= 49) && (time_environment < 50), 0, (time_environment >= 50) && (time_environment < 56), 0.4, (time_environment >= 56) && (time_environment < 57), 0, (time_environment >= 57) && (time_environment < 63), 0.4, (time_environment >= 63) && (time_environment < 64), 0, (time_environment >= 64) && (time_environment < 70), 0.4, (time_environment >= 70) && (time_environment < 71), 0, (time_environment >= 71) && (time_environment < 77), 0.4, (time_environment >= 77) && (time_environment < 78), 0);
  Apligraf_P := piecewise(0, (time_environment >= 0) && (time_environment < 28), 1, (time_environment >= 28) && (time_environment < 29), 0, (time_environment >= 29) && (time_environment < 35), 1, (time_environment >= 35) && (time_environment < 36), 0, (time_environment >= 36) && (time_environment < 42), 1, (time_environment >= 42) && (time_environment < 43), 0, (time_environment >= 43) && (time_environment < 49), 1, (time_environment >= 49) && (time_environment < 50), 0, (time_environment >= 50) && (time_environment < 56), 1, (time_environment >= 56) && (time_environment < 57), 0, (time_environment >= 57) && (time_environment < 63), 1, (time_environment >= 63) && (time_environment < 64), 0, (time_environment >= 64) && (time_environment < 70), 1, (time_environment >= 70) && (time_environment < 71), 0, (time_environment >= 71) && (time_environment < 77), 1, (time_environment >= 77) && (time_environment < 78), 0);
  Apligraf_F := piecewise(0, (time_environment >= 0) && (time_environment < 28), 8000, (time_environment >= 28) && (time_environment < 29), 0, (time_environment >= 29) && (time_environment < 35), 8000, (time_environment >= 35) && (time_environment < 36), 0, (time_environment >= 36) && (time_environment < 42), 8000, (time_environment >= 42) && (time_environment < 43), 0, (time_environment >= 43) && (time_environment < 49), 8000, (time_environment >= 49) && (time_environment < 50), 0, (time_environment >= 50) && (time_environment < 56), 8000, (time_environment >= 56) && (time_environment < 57), 0, (time_environment >= 57) && (time_environment < 63), 8000, (time_environment >= 63) && (time_environment < 64), 0, (time_environment >= 64) && (time_environment < 70), 8000, (time_environment >= 70) && (time_environment < 71), 0, (time_environment >= 71) && (time_environment < 77), 8000, (time_environment >= 77) && (time_environment < 78), 0);
  Apligraf_C := piecewise(0, (time_environment >= 0) && (time_environment < 28), 18.75, (time_environment >= 28) && (time_environment < 29), 0, (time_environment >= 29) && (time_environment < 35), 18.75, (time_environment >= 35) && (time_environment < 36), 0, (time_environment >= 36) && (time_environment < 42), 18.75, (time_environment >= 42) && (time_environment < 43), 0, (time_environment >= 43) && (time_environment < 49), 18.75, (time_environment >= 49) && (time_environment < 50), 0, (time_environment >= 50) && (time_environment < 56), 18.75, (time_environment >= 56) && (time_environment < 57), 0, (time_environment >= 57) && (time_environment < 63), 18.75, (time_environment >= 63) && (time_environment < 64), 0, (time_environment >= 64) && (time_environment < 70), 18.75, (time_environment >= 70) && (time_environment < 71), 0, (time_environment >= 71) && (time_environment < 77), 18.75, (time_environment >= 77) && (time_environment < 78), 0);
  Apligraf_H := piecewise(0, (time_environment >= 0) && (time_environment < 28), 80, (time_environment >= 28) && (time_environment < 29), 0, (time_environment >= 29) && (time_environment < 35), 80, (time_environment >= 35) && (time_environment < 36), 0, (time_environment >= 36) && (time_environment < 42), 80, (time_environment >= 42) && (time_environment < 43), 0, (time_environment >= 43) && (time_environment < 49), 80, (time_environment >= 49) && (time_environment < 50), 0, (time_environment >= 50) && (time_environment < 56), 80, (time_environment >= 56) && (time_environment < 57), 0, (time_environment >= 57) && (time_environment < 63), 80, (time_environment >= 63) && (time_environment < 64), 0, (time_environment >= 64) && (time_environment < 70), 80, (time_environment >= 70) && (time_environment < 71), 0, (time_environment >= 71) && (time_environment < 77), 80, (time_environment >= 77) && (time_environment < 78), 0);
  K_T := tau1_K_T*T^3 + tau2_K_T*T^2 + tau3_K_T*T + tau4_K_T;
  M_P := tau1_M_P*P^3 + tau2_M_P*P^2 + tau3_M_P*P + tau4_M_P;
  f_T := tau1_f_T*T^3 + tau2_f_T*T^2 + tau3_f_T*T + tau4_f_T;
  g_C := tau1_g_C*C^3 + tau2_g_C*C^2 + tau3_g_C*C + tau4_g_C;
  alpha := -(0.197*log10(H)) + 0.4407;

  // Rate rules:
  phi_I' = alpha*K_T + k1*k2*phi_I*(1 - (k3*(phi_I + phi_R) + k5*F + k6*C)) - d1*phi_I;
  phi_R' = (1 - alpha)*K_T + k1*k2*phi_R*(1 - (k3*(phi_I + phi_R) + k5*F + k6*C)) - d1*phi_R;
  T' = k4*phi_I + k7*F + Apligraf_T - d2*T;
  P' = k8*(phi_I + phi_R) + k9*F + Apligraf_P - d3*P;
  F' = M_P + k10*F*(1 - (k3*(phi_I + phi_R) + k5*F + k6*C)) + Apligraf_F - d4*F;
  C' = k11*F*f_T*g_C + Apligraf_C - d5*F*C;
  H' = k12*F + Apligraf_H - d6*H;

  // Unit definitions:
  unit day = 86400 second;
  unit pg_per_mm3 = 1e-12 gram / (1e-3 metre)^3;
  unit pg_per_mm3_per_day = 1e-12 gram / ((1e-3 metre)^3 * 86400 second);
  unit microg_per_mm3 = 1e-6 gram / (1e-3 metre)^3;
  unit cells_per_mm3 = 1 / (1e-3 metre)^3;
  unit cells_per_mm3_per_day = 1 / ((1e-3 metre)^3 * 86400 second);
  unit cells_per_pg_per_day = 1 / (1e-12 gram * 86400 second);
  unit mm3_per_cells = (1e-3 metre)^3;
  unit mm3_per_cells_per_day = (1e-3 metre)^3 / (86400 second);
  unit mm3_per_microg = (1e-3 metre)^3 / (1e-6 gram);
  unit pg_per_cells_per_day = 1e-12 gram / (86400 second);
  unit microg_per_cells_per_day = 1e-6 gram / (86400 second);
  unit microg_per_mm3_per_day = 1e-6 gram / ((1e-3 metre)^3 * 86400 second);
  unit mm3_cells_per_pg2_day = (1e-3 metre)^3 / ((1e-12 gram)^2 * 86400 second);
  unit mm6_cells_per_pg3_day = (1e-3 metre)^6 / ((1e-12 gram)^3 * 86400 second);
  unit mm9_per_pg3 = (1e-3 metre)^9 / (1e-12 gram)^3;
  unit mm6_per_pg2 = (1e-3 metre)^6 / (1e-12 gram)^2;
  unit mm3_per_pg = (1e-3 metre)^3 / (1e-12 gram);
  unit mm9_per_microg3 = (1e-3 metre)^9 / (1e-6 gram)^3;
  unit mm6_per_microg2 = (1e-3 metre)^6 / (1e-6 gram)^2;
  unit per_day = 1 / (86400 second);
  unit time = 86400 second;
end
