// SBML level 2 version 4

model Maltsev2009_PacemakerCellModel_SteadyState()
  // This a model from the article:
  // Synergism of coupled subsarcolemmal Ca2+ clocks and sarcolemmal voltage clocks confers robust and flexible pacemaker function in a novel pacemaker cell model.
  // Maltsev VA, Lakatta EG. Am J Physiol Heart Circ Physiol 2009 Mar;296(3):H594-615 19136600 ,
  // Abstract:
  // Recent experimental studies have demonstrated that sinoatrial node cells (SANC) generate spontaneous, rhythmic, local subsarcolemmal Ca(2+) releases (Ca(2+) clock), which occur during late diastolic depolarization (DD) and interact with the classic sarcolemmal voltage oscillator (membrane clock) by activating Na(+)-Ca(2+) exchanger current (I(NCX)). This and other interactions between clocks, however, are not captured by existing essentially membrane-delimited cardiac pacemaker cell numerical models. Using wide-scale parametric analysis of classic formulations of membrane clock and Ca(2+) cycling, we have constructed and initially explored a prototype rabbit SANC model featuring both clocks. Our coupled oscillator system exhibits greater robustness and flexibility than membrane clock operating alone. Rhythmic spontaneous Ca(2+) releases of sarcoplasmic reticulum (SR)-based Ca(2+) clock ignite rhythmic action potentials via late DD I(NCX) over much broader ranges of membrane clock parameters [e.g., L-type Ca(2+) current (I(CaL)) and/or hyperpolarization-activated ("funny") current (I(f)) conductances]. The system Ca(2+) clock includes SR and sarcolemmal Ca(2+) fluxes, which optimize cell Ca(2+) balance to increase amplitudes of both SR Ca(2+) release and late DD I(NCX) as SR Ca(2+) pumping rate increases, resulting in a broad pacemaker rate modulation (1.8-4.6 Hz). In contrast, the rate modulation range via membrane clock parameters is substantially smaller when Ca(2+) clock is unchanged or lacking. When Ca(2+) clock is disabled, the system parametric space for fail-safe SANC operation considerably shrinks: without rhythmic late DD I(NCX) ignition signals membrane clock substantially slows, becomes dysrhythmic, or halts. In conclusion, the Ca(2+) clock is a new critical dimension in SANC function. A synergism of the coupled function of Ca(2+) and membrane clocks confers fail-safe SANC operation at greatly varying rates.
  // This model was taken from the CellML repository and automatically converted to SBML.
  // The original model was: Maltsev VA, Lakatta EG. (2009) - version=1.0
  // The original CellML model was created by:
  // Catherine Lloyd
  // c.lloyd@auckland.ac.nz
  // The University of Auckland
  // This model originates from BioModels Database: A Database of Annotated Published Models (http://www.ebi.ac.uk/biomodels/). It is copyright (c) 2005-2011 The BioModels.net Team.
  // To the extent possible under law, all copyright and related or neighbouring rights to this encoded model have been dedicated to the public domain worldwide. Please refer to CC0 Public Domain Dedication for more information.
  // In summary, you are entitled to use this encoded model in absolutely any manner you deem suitable, verbatim, or with modification, alone or embedded it in a larger context, redistribute it, commercially or not, in a restricted way or not..
  // To cite BioModels Database, please use: Li C, Donizelli M, Rodriguez N, Dharuri H, Endler L, Chelliah V, Li L, He E, Henry A, Stefan MI, Snoep JL, Hucka M, Le Novère N, Laibe C (2010) BioModels Database: An enhanced, curated and annotated resource for published quantitative kinetic models. BMC Syst Biol., 4:92.
  // biomodels.db:MODEL1006230104
  // isDescribedBy pubmed:19136600
  // biomodels.db:MODEL1006230104
  // isDescribedBy pubmed:19136600
  // biomodels.db:MODEL1006230104
  // biomodels.db:MODEL1006230104

  // Compartments:
  compartment COMpartment = 1 litre;

  // Parameters:
  Vm_Vm = -57.96393;
  E_CaL = 45;
  g_CaL = 0.464;
  dL = 0.0005845456;
  Vm_i_CaL_dL_gate = ;
  time_i_CaL_dL_gate = ;
  fL = 0.8623812;
  Vm_i_CaL_fL_gate = ;
  time_i_CaL_fL_gate = ;
  fCa = 0.7113959;
  alpha_fCa = 0.021;
  Km_fCa = 0.00035;
  Vm_i_CaL_fCa_gate = ;
  Ca_sub_i_CaL_fCa_gate = ;
  time_i_CaL_fCa_gate = ;
  g_CaT = 0.1832;
  E_CaT = 45;
  dT = 0.005043934;
  Vm_i_CaT_dT_gate = ;
  time_i_CaT_dT_gate = ;
  fT = 0.4207578;
  Vm_i_CaT_fT_gate = ;
  time_i_CaT_fT_gate = ;
  g_Kr = 0.08113973;
  paS = 0.4531006;
  paF = 0.1447551;
  Vm_i_Kr_pa_gate = ;
  time_i_Kr_pa_gate = ;
  pi_ = 0.8494098;
  Vm_i_Kr_pi_gate = ;
  time_i_Kr_pi_gate = ;
  g_Ks = 0.0259;
  n = 0.02646004;
  Vm_i_Ks_n_gate = ;
  time_i_Ks_n_gate = ;
  g_to = 0.252;
  g_sus = 0.02;
  q = 0.6942413;
  Vm_AP_sensitive_currents_q_gate = ;
  time_AP_sensitive_currents_q_gate = ;
  r = 0.005581317;
  Vm_AP_sensitive_currents_r_gate = ;
  time_AP_sensitive_currents_r_gate = ;
  g_if = 0.15;
  y = 0.1136432;
  VIf_half = -64;
  Vm_i_f_y_gate = ;
  time_i_f_y_gate = ;
  g_st = 0.003;
  E_st = 37.4;
  qa = 0.4238024;
  Vm_i_st_qa_gate = ;
  time_i_st_qa_gate = ;
  qi = 0.447294;
  Vm_i_st_qi_gate = ;
  time_i_st_qi_gate = ;
  g_b_Na = 0.00486;
  Km_Kp = 1.4;
  Km_Nap = 14;
  i_NaK_max = 2.88;
  g_b_Ca = 0.0006;
  kNaCa = 187.5;
  Qci = 0.1369;
  Qn = 0.4315;
  Qco = 0;
  K3ni = 26.44;
  Kci = 0.0207;
  K1ni = 395.3;
  K2ni = 2.289;
  Kcni = 26.44;
  K3no = 4.663;
  K1no = 1628;
  K2no = 561.4;
  Kco = 3.663;
  R_j_SRCarel = 0.6880478;
  O = 1.73402e-7;
  I = 7.861817e-8;
  RI = 0.311952;
  ks = 250000;
  MaxSR = 15;
  MinSR = 1;
  EC50_SR = 0.45;
  HSR = 2.5;
  koCa = 10;
  kiCa = 0.5;
  kim = 0.005;
  kom = 0.06;
  tau_dif_Ca = 0.04;
  tau_tr = 40;
  P_up = 0.012;
  K_up = 0.0006;
  TC_tot = 0.031;
  TMC_tot = 0.062;
  CM_tot = 0.045;
  CQ_tot = 10;
  fTMM = 0.5010494;
  fCMi = 0.05948809;
  fCMs = 0.05438137;
  fTC = 0.02913162;
  fTMC = 0.432695;
  fCQ = 0.2732071;
  kf_TC = 88.8;
  kf_TMM = 2.277;
  kf_TMC = 227.7;
  kf_CM = 227.7;
  kf_CQ = 0.534;
  kb_TC = 0.446;
  kb_TMC = 0.00751;
  kb_TMM = 0.751;
  kb_CM = 0.542;
  kb_CQ = 0.445;
  Cai = 0.0001500187;
  Ca_nsr = 1.493481;
  Ca_jsr = 0.3167627;
  Ca_sub_calcium_dynamics = 0.0001381126;
  Cao = 2;
  Nai = 10;
  Nao = 140;
  Ki = 140;
  Ko = 5.4;
  Mgi = 2.5;
  R_model_parameters = 8314.4;
  T = 310.15;
  F = 96485;
  Cm = 32;
  V_jsr_part = 0.0012;
  V_i_part = 0.46;
  V_nsr_part = 0.0116;
  R_cell = 4;
  L_cell = 70;
  L_sub = 0.02;

  // Assignment rules:
  E_Na := R_model_parameters*T/F*ln(Nao/Nai);
  E_K := R_model_parameters*T/F*ln(Ko/Ki);
  E_Ks := R_model_parameters*T/F*ln((Ko + 0.12*Nao)/(Ki + 0.12*Nai));
  i_CaL := Cm*g_CaL*(Vm_Vm - E_CaL)*dL*fL*fCa;
  dL_infinity := 1/(1 + exp(-(Vm_i_CaL_dL_gate + 13.5)/6));
  tau_dL := 1/(alpha_dL + beta_dL);
  alpha_dL := -0.02839*(adVm + 35)/(exp(-(adVm + 35)/2.5) - 1) - 0.0849*adVm/(exp(-adVm/4.8) - 1);
  adVm := piecewise(-35.00001, Vm_i_CaL_dL_gate == -35, 1e-5, Vm_i_CaL_dL_gate == 0, Vm_i_CaL_dL_gate);
  beta_dL := 0.01143*(bdVm - 5)/(exp((bdVm - 5)/2.5) - 1);
  bdVm := piecewise(5.00001, Vm_i_CaL_dL_gate == 5, Vm_i_CaL_dL_gate);
  fL_infinity := 1/(1 + exp((Vm_i_CaL_fL_gate + 35)/7.3));
  tau_fL := 44.3 + 257.1*exp(-((Vm_i_CaL_fL_gate + 32.5)/13.9)^2);
  fCa_infinity := Km_fCa/(Km_fCa + Ca_sub_i_CaL_fCa_gate);
  tau_fCa := fCa_infinity/alpha_fCa;
  i_CaT := Cm*g_CaT*(Vm_Vm - E_CaT)*dT*fT;
  dT_infinity := 1/(1 + exp(-(Vm_i_CaT_dT_gate + 26.3)/6));
  tau_dT := 1/(1.068*exp((Vm_i_CaT_dT_gate + 26.3)/30) + 1.068*exp(-(Vm_i_CaT_dT_gate + 26.3)/30));
  fT_infinity := 1/(1 + exp((Vm_i_CaT_fT_gate + 61.7)/5.6));
  tau_fT := 1/(0.0153*exp(-(Vm_i_CaT_fT_gate + 61.7)/83.3) + 0.015*exp((Vm_i_CaT_fT_gate + 61.7)/15.38));
  i_Kr := Cm*g_Kr*(Vm_Vm - E_K)*(0.6*paF + 0.4*paS)*pi_;
  pa_infinity := 1/(1 + exp(-(Vm_i_Kr_pa_gate + 23.2)/10.6));
  tau_paS := 0.84655354/(0.0042*exp(Vm_i_Kr_pa_gate/17) + 0.00015*exp(-Vm_i_Kr_pa_gate/21.6));
  tau_paF := 0.84655354/(0.0372*exp(Vm_i_Kr_pa_gate/15.9) + 0.00096*exp(-Vm_i_Kr_pa_gate/22.5));
  pi_infinity := 1/(1 + exp((Vm_i_Kr_pi_gate + 28.6)/17.1));
  tau_pi := 1/(0.1*exp(-Vm_i_Kr_pi_gate/54.645) + 0.656*exp(Vm_i_Kr_pi_gate/106.157));
  i_Ks := Cm*g_Ks*(Vm_Vm - E_Ks)*n^2;
  n_infinity := alpha_n/(alpha_n + beta_n);
  tau_n := 1/(alpha_n + beta_n);
  alpha_n := 0.014/(1 + exp(-(Vm_i_Ks_n_gate - 40)/9));
  beta_n := 0.001*exp(-Vm_i_Ks_n_gate/45);
  i_to := Cm*g_to*(Vm_Vm - E_K)*q*r;
  i_sus := Cm*g_sus*(Vm_Vm - E_K)*r;
  q_infinity := 1/(1 + exp((Vm_AP_sensitive_currents_q_gate + 49)/13));
  tau_q := 6.06 + 39.102/(0.57*exp(-0.08*(Vm_AP_sensitive_currents_q_gate + 44)) + 0.065*exp(0.1*(Vm_AP_sensitive_currents_q_gate + 45.93)));
  r_infinity := 1/(1 + exp(-(Vm_AP_sensitive_currents_r_gate - 19.3)/15));
  tau_r := 2.75352 + 14.40516/(1.037*exp(0.09*(Vm_AP_sensitive_currents_r_gate + 30.61)) + 0.369*exp(-0.12*(Vm_AP_sensitive_currents_r_gate + 23.84)));
  i_f_Na := Cm*0.3833*g_if*(Vm_Vm - E_Na)*y^2;
  i_f_K := Cm*0.6167*g_if*(Vm_Vm - E_K)*y^2;
  i_f := i_f_Na + i_f_K;
  y_infinity := 1/(1 + exp((Vm_i_f_y_gate - VIf_half)/13.5));
  tau_y := 0.7166529/(exp(-(Vm_i_f_y_gate + 386.9)/45.302) + exp((Vm_i_f_y_gate - 73.08)/19.231));
  i_st := Cm*g_st*(Vm_Vm - E_st)*qa*qi;
  qa_infinity := 1/(1 + exp(-(Vm_i_st_qa_gate + 57)/5));
  tau_qa := 1/(alpha_qa + beta_qa);
  alpha_qa := 1/(0.15*exp(-Vm_i_st_qa_gate/11) + 0.2*exp(-Vm_i_st_qa_gate/700));
  beta_qa := 1/(16*exp(Vm_i_st_qa_gate/8) + 15*exp(Vm_i_st_qa_gate/50));
  qi_infinity := alpha_qi/(alpha_qi + beta_qi);
  tau_qi := 6.65/(alpha_qi + beta_qi);
  alpha_qi := 1/(3100*exp(Vm_i_st_qi_gate/13) + 700*exp(Vm_i_st_qi_gate/70));
  beta_qi := 1/(95*exp(-Vm_i_st_qi_gate/10) + 50*exp(-Vm_i_st_qi_gate/700)) + 0.000229/(1 + exp(-Vm_i_st_qi_gate/5));
  i_b_Na := Cm*g_b_Na*(Vm_Vm - E_Na);
  i_NaK := Cm*i_NaK_max/((1 + (Km_Kp/Ko)^1.2)*(1 + (Km_Nap/Nai)^1.3)*(1 + exp(-(Vm_Vm - E_Na + 120)/30)));
  i_b_Ca := Cm*g_b_Ca*(Vm_Vm - E_CaL);
  i_NaCa := Cm*kNaCa*(x2*k21 - x1*k12)/(x1 + x2 + x3 + x4);
  x1 := k41*k34*(k23 + k21) + k21*k32*(k43 + k41);
  x2 := k32*k43*(k14 + k12) + k41*k12*(k34 + k32);
  x3 := k14*k43*(k23 + k21) + k12*k23*(k43 + k41);
  x4 := k23*k34*(k14 + k12) + k14*k21*(k34 + k32);
  k43 := Nai/(K3ni + Nai);
  RTOnF := R_model_parameters*T/F;
  k12 := Ca_sub_calcium_dynamics/Kci*exp(-Qci*Vm_Vm/RTOnF)/di;
  k14 := Nai/K1ni*Nai/K2ni*(1 + Nai/K3ni)*exp(Qn*Vm_Vm/(2*RTOnF))/di;
  k41 := exp(-Qn*Vm_Vm/(2*RTOnF));
  di := 1 + Ca_sub_calcium_dynamics/Kci*(1 + exp(-Qci*Vm_Vm/RTOnF) + Nai/Kcni) + Nai/K1ni*(1 + Nai/K2ni*(1 + Nai/K3ni));
  k34 := Nao/(K3no + Nao);
  k21 := Cao/Kco*exp(Qco*Vm_Vm/RTOnF)/do;
  k23 := Nao/K1no*Nao/K2no*(1 + Nao/K3no)*exp(-Qn*Vm_Vm/(2*RTOnF))/do;
  k32 := exp(Qn*Vm_Vm/(2*RTOnF));
  do := 1 + Cao/Kco*(1 + exp(Qco*Vm_Vm/RTOnF)) + Nao/K1no*(1 + Nao/K2no*(1 + Nao/K3no));
  j_SRCarel := ks*O*(Ca_jsr - Ca_sub_calcium_dynamics);
  kCaSR := MaxSR - (MaxSR - MinSR)/(1 + (EC50_SR/Ca_jsr)^HSR);
  koSRCa := koCa/kCaSR;
  kiSRCa := kiCa*kCaSR;
  j_Ca_dif := (Ca_sub_calcium_dynamics - Cai)/tau_dif_Ca;
  j_up := P_up/(1 + K_up/Cai);
  j_tr := (Ca_nsr - Ca_jsr)/tau_tr;
  delta_fTC := kf_TC*Cai*(1 - fTC) - kb_TC*fTC;
  delta_fTMC := kf_TMC*Cai*(1 - (fTMC + fTMM)) - kb_TMC*fTMC;
  delta_fTMM := kf_TMM*Mgi*(1 - (fTMC + fTMM)) - kb_TMM*fTMM;
  delta_fCMi := kf_CM*Cai*(1 - fCMi) - kb_CM*fCMi;
  delta_fCMs := kf_CM*Ca_sub_calcium_dynamics*(1 - fCMs) - kb_CM*fCMs;
  delta_fCQ := kf_CQ*Ca_jsr*(1 - fCQ) - kb_CQ*fCQ;
  V_cell := 0.001*pi*R_cell^2*L_cell;
  V_sub := 0.001*2*pi*L_sub*(R_cell - L_sub/2)*L_cell;
  V_jsr := V_jsr_part*V_cell;
  V_i := V_i_part*V_cell - V_sub;
  V_nsr := V_nsr_part*V_cell;

  // Rate rules:
  Vm_Vm' = -(i_CaL + i_CaT + i_f + i_st + i_Kr + i_Ks + i_to + i_sus + i_NaK + i_NaCa + i_b_Ca + i_b_Na)/Cm;
  dL' = (dL_infinity - dL)/tau_dL;
  fL' = (fL_infinity - fL)/tau_fL;
  fCa' = (fCa_infinity - fCa)/tau_fCa;
  dT' = (dT_infinity - dT)/tau_dT;
  fT' = (fT_infinity - fT)/tau_fT;
  paS' = (pa_infinity - paS)/tau_paS;
  paF' = (pa_infinity - paF)/tau_paF;
  pi_' = (pi_infinity - pi_)/tau_pi;
  n' = (n_infinity - n)/tau_n;
  q' = (q_infinity - q)/tau_q;
  r' = (r_infinity - r)/tau_r;
  y' = (y_infinity - y)/tau_y;
  qa' = (qa_infinity - qa)/tau_qa;
  qi' = (qi_infinity - qi)/tau_qi;
  R_j_SRCarel' = kim*RI - kiSRCa*Ca_sub_calcium_dynamics*R_j_SRCarel - (koSRCa*Ca_sub_calcium_dynamics^2*R_j_SRCarel - kom*O);
  O' = koSRCa*Ca_sub_calcium_dynamics^2*R_j_SRCarel - kom*O - (kiSRCa*Ca_sub_calcium_dynamics*O - kim*I);
  I' = kiSRCa*Ca_sub_calcium_dynamics*O - kim*I - (kom*I - koSRCa*Ca_sub_calcium_dynamics^2*RI);
  RI' = kom*I - koSRCa*Ca_sub_calcium_dynamics^2*RI - (kim*RI - kiSRCa*Ca_sub_calcium_dynamics*R_j_SRCarel);
  fTC' = delta_fTC;
  fTMC' = delta_fTMC;
  fTMM' = delta_fTMM;
  fCMi' = delta_fCMi;
  fCMs' = delta_fCMs;
  fCQ' = delta_fCQ;
  Cai' = (j_Ca_dif*V_sub - j_up*V_nsr)/V_i - (CM_tot*delta_fCMi + TC_tot*delta_fTC + TMC_tot*delta_fTMC);
  Ca_sub_calcium_dynamics' = j_SRCarel*V_jsr/V_sub - ((i_CaL + i_CaT + i_b_Ca - 2*i_NaCa)/(2*F*V_sub) + j_Ca_dif + CM_tot*delta_fCMs);
  Ca_nsr' = j_up - j_tr*V_jsr/V_nsr;
  Ca_jsr' = j_tr - (j_SRCarel + CQ_tot*delta_fCQ);

  // Unit definitions:
  unit per_millisecond = 1 / (1e-3 second);
  unit millimolar_per_millisecond = 1e-3 mole / (litre * 1e-3 second);
  unit per_millimolar_millisecond = litre / (1e-3 mole * 1e-3 second);
  unit per_millimolar2_millisecond = litre^2 / ((1e-3 mole)^2 * 1e-3 second);
  unit millisecond = 1e-3 second;
  unit millivolt = 1e-3 volt;
  unit per_millivolt = 1 / (1e-3 volt);
  unit per_millivolt_millisecond = 1 / (1e-3 volt * 1e-3 second);
  unit nanoS_per_picoF = 1e-9 siemens / (1e-12 farad);
  unit picoF = 1e-12 farad;
  unit per_picoF = 1 / (1e-12 farad);
  unit picoA_per_picoF = 1e-12 ampere / (1e-12 farad);
  unit picoA_per_millimolar_picoF = 1e-12 ampere * litre / (1e-3 mole * 1e-12 farad);
  unit picoA = 1e-12 ampere;
  unit picolitre = 1e-12 litre;
  unit micrometre = 1e-6 metre;
  unit millimolar = 1e-3 mole / litre;
  unit joule_per_kilomole_kelvin = joule / (1000 mole * kelvin);
  unit coulomb_per_mole = coulomb / mole;
  unit time = 1e-3 second;
end
