// SBML level 2 version 4

model Sneyd1995_CalciumWave_IP3diffusion()
  // This a model from the article:
  // Intercellular calcium waves mediated by diffusion of inositol trisphosphate: a two-dimensional model.
  // Sneyd J, Wetton BT, Charles AC, Sanderson MJ. Am J Physiol 1995 Jun;268(6 Pt 1):C1537-45 7611375 ,
  // Abstract:
  // In response to mechanical stimulation of a single cell, airway epithelial cells in culture exhibit a wave of increased intracellular free Ca2+ concentration that spreads from cell to cell over a limited distance through the culture. We present a detailed analysis of the intercellular wave in a two-dimensional sheet of cells. The model is based on the hypothesis that the wave is the result of diffusion of inositol trisphosphate (IP3) from the stimulated cell. The two-dimensional model agrees well with experimental data and makes the following quantitative predictions: as the distance from the stimulated cells increases, 1) the intercellular delay increases exponentially, 2) the intracellular wave speed decreases exponentially, and 3) the arrival time increases exponentially. Furthermore, 4) a proportion of the cells at the periphery of the response will exhibit waves of decreased amplitude, 5) the intercellular membrane permeability to IP3 must be approximately 2 microns/s or greater, and 6) the ratio of the maximum concentration of IP3 in the stimulated cell to the Km of the IP3 receptor (with respect to IP3) must be approximately 300 or greater. These predictions constitute a rigorous test of the hypothesis that the intercellular Ca2+ waves are mediated by IP3 diffusion.
  // This model was taken from the CellML repository and automatically converted to SBML.
  // The original model was: Sneyd J, Wetton BT, Charles AC, Sanderson MJ. (1995) - version=1.0
  // The original CellML model was created by:
  // Wei Liu
  // wliu052@aucklanduni.ac.nz
  // The University of Auckland
  // This model originates from BioModels Database: A Database of Annotated Published Models (http://www.ebi.ac.uk/biomodels/). It is copyright (c) 2005-2011 The BioModels.net Team.
  // To the extent possible under law, all copyright and related or neighbouring rights to this encoded model have been dedicated to the public domain worldwide. Please refer to CC0 Public Domain Dedication for more information.
  // In summary, you are entitled to use this encoded model in absolutely any manner you deem suitable, verbatim, or with modification, alone or embedded it in a larger context, redistribute it, commercially or not, in a restricted way or not..
  // To cite BioModels Database, please use: Li C, Donizelli M, Rodriguez N, Dharuri H, Endler L, Chelliah V, Li L, He E, Henry A, Stefan MI, Snoep JL, Hucka M, Le Novère N, Laibe C (2010) BioModels Database: An enhanced, curated and annotated resource for published quantitative kinetic models. BMC Syst Biol., 4:92.
  // biomodels.db:MODEL1006230107
  // isDescribedBy pubmed:7611375
  // biomodels.db:MODEL1006230107
  // isDescribedBy pubmed:7611375
  // biomodels.db:MODEL1006230107
  // biomodels.db:MODEL1006230107

  // Compartments:
  compartment COMpartment = 1 litre;

  // Parameters:
  time_enviroment = ;
  P = 0;
  V_p = 0.08;
  k_p = 1;
  IPR_3_flux = 0.72;
  c = 0.3;
  k_flux = 3;
  b = 0.11;
  k_1 = 0.7;
  gamma = 1;
  k_gamma = 0.27;
  beta = 0.15;
  k_mu = 0.01;
  h = 1;
  k_2 = 0.7;
  tau_h = 0.2;

  // Assignment rules:
  J_flux := k_flux*mu*h*(b + (1 - b)*c/(k_1 + c));
  J_pump := gamma*c^2/(k_gamma^2 + c^2);
  J_leak := beta;
  mu := P^3/(k_mu^3 + P^3);

  // Rate rules:
  P' = piecewise(IPR_3_flux - V_p*P*k_p/(k_p + P), time_enviroment <= 15, -V_p*P*k_p/(k_p + P));
  c' = J_flux - J_pump + J_leak;
  h' = (k_2^2/(k_2^2 + c^2) - h)/tau_h;

  // Unit definitions:
  unit micromolar = 1e-6 mole / litre;
  unit flux = 1e-6 mole / (litre * second);
  unit per_second = 1 / second;
  unit per_sec_square = 1 / second^2;
  unit micromolar_per_second = 1e-6 mole / (litre * second);
  unit micromolar_square_per_second = (1e-6 mole)^2 / (litre^2 * second);
end
