// SBML level 2 version 4

model Phillips2008_AscendingArousalSystem_Baseline()
  // This a model from the article:
  // Sleep deprivation in a quantitative physiologically based model of the ascending arousal system.
  // Phillips AJ, Robinson PA. J Theor Biol 2008 Dec 21;255(4):413-23 18805427 ,
  // Abstract:
  // A physiologically based quantitative model of the human ascending arousal system is used to study sleep deprivation after being calibrated on a small set of experimentally based criteria. The model includes the sleep-wake switch of mutual inhibition between nuclei which use monoaminergic neuromodulators, and the ventrolateral preoptic area. The system is driven by the circadian rhythm and sleep homeostasis. We use a small number of experimentally derived criteria to calibrate the model for sleep deprivation, then investigate model predictions for other experiments, demonstrating the scope of application. Calibration gives an improved parameter set, in which the form of the homeostatic drive is better constrained, and its weighting relative to the circadian drive is increased. Within the newly constrained parameter ranges, the model predicts repayment of sleep debt consistent with experiment in both quantity and distribution, asymptoting to a maximum repayment for very long deprivations. Recovery is found to depend on circadian phase, and the model predicts that it is most efficient to recover during normal sleeping phases of the circadian cycle, in terms of the amount of recovery sleep required. The form of the homeostatic drive suggests that periods of wake during recovery from sleep deprivation are phases of relative recovery, in the sense that the homeostatic drive continues to converge toward baseline levels. This undermines the concept of sleep debt, and is in agreement with experimentally restricted recovery protocols. Finally, we compare our model to the two-process model, and demonstrate the power of physiologically based modeling by correctly predicting sleep latency times following deprivation from experimental data.
  // This model was taken from the CellML repository and automatically converted to SBML.
  // The original model was: Phillips AJ, Robinson PA. (2008) - version=1.0
  // The original CellML model was created by:
  // Catherine Lloyd
  // c.lloyd@auckland.ac.nz
  // The University of Auckland
  // This model originates from BioModels Database: A Database of Annotated Published Models (http://www.ebi.ac.uk/biomodels/). It is copyright (c) 2005-2011 The BioModels.net Team.
  // To the extent possible under law, all copyright and related or neighbouring rights to this encoded model have been dedicated to the public domain worldwide. Please refer to CC0 Public Domain Dedication for more information.
  // In summary, you are entitled to use this encoded model in absolutely any manner you deem suitable, verbatim, or with modification, alone or embedded it in a larger context, redistribute it, commercially or not, in a restricted way or not..
  // To cite BioModels Database, please use: Li C, Donizelli M, Rodriguez N, Dharuri H, Endler L, Chelliah V, Li L, He E, Henry A, Stefan MI, Snoep JL, Hucka M, Le Novère N, Laibe C (2010) BioModels Database: An enhanced, curated and annotated resource for published quantitative kinetic models. BMC Syst Biol., 4:92.
  // biomodels.db:MODEL1006230110
  // isDescribedBy pubmed:18805427
  // biomodels.db:MODEL1006230110
  // isDescribedBy pubmed:18805427
  // biomodels.db:MODEL1006230110
  // biomodels.db:MODEL1006230110

  // Compartments:
  compartment COMpartment = 1 litre;

  // Parameters:
  Vv = -6;
  tau_v = 10;
  v_vm = -1.9;
  Vm = 0;
  tau_m = 10;
  v_mv = -1.9;
  A = 1;
  H = 15;
  chi = 11;
  mu = 3.6;
  c0 = 1;
  alpha = 16;
  v_vc = -3.2;
  v_vh = 0.19;
  Qmax = 100;
  theta = 10;
  sigma = 3;

  // Assignment rules:
  Qv := Qmax/(1 + exp(-(Vv - theta)/sigma));
  Qm := Qmax/(1 + exp(-(Vm - theta)/sigma));
  D := v_vc*C + v_vh*H;
  C := c0 + cos(omega*(time - alpha));
  omega := 2*pi/24;

  // Rate rules:
  Vv' = (v_vm*Qm + D - Vv)/(tau_v/3600);
  Vm' = (A + v_mv*Qv - Vm)/(tau_m/3600);
  H' = (mu*Qm - H)/chi;

  // Unit definitions:
  unit mV = 1e-3 volt;
  unit mV_second = 1e-3 volt * second;
  unit mV_per_second = 1e-3 volt / second;
  unit mV_per_nM = 1e-3 volt * litre / (1e-9 mole);
  unit per_second = 1 / second;
  unit hour = 3600 second;
  unit per_hour = 1 / (3600 second);
  unit nM = 1e-9 mole / litre;
  unit nM_second = 1e-9 mole * second / litre;
  unit time = 3600 second;
end
