// SBML level 2 version 4

model Vinnakotta2010_TranscientAnoxia_SOLmuscle()
  // This a model from the article:
  // Common phenotype of resting mouse extensor digitorum longus and soleus muscles: equal ATPase and glycolytic flux during transient anoxia.
  // Vinnakota KC, Rusk J, Palmer L, Shankland E, Kushmerick MJ. J Physiol 2010 Jun 1;588(Pt 11):1961-83 20308252 ,
  // Abstract:
  // Rates of ATPase and glycolysis are several times faster in actively contracting mouse extensor digitorum longus muscle (EDL) than soleus (SOL), but we find these rates are not distinguishable at rest. We used a transient anoxic perturbation of steady state energy balance to decrease phosphocreatine (PCr) reversibly and to measure the rates of ATPase and of lactate production without muscle activation or contraction. The rate of glycolytic ATP synthesis is less than the ATPase rate, accounting for the continual PCr decrease during anoxia in both muscles. We fitted a mathematical model validated with properties of enzymes and solutes measured in vitro and appropriate for the transient perturbation of these muscles to experimental data to test whether the model accounts for the results. Simulations showed equal rates of ATPase and lactate production in both muscles. ATPase controls glycolytic flux by feedback from its products. Adenylate kinase function is critical because a rise in [AMP] is necessary to activate glycogen phosphorylase. ATPase is the primary source of H+ production. The sum of contributions of the 13 reactions of the glycogenolytic and glycolytic network to total proton load is negligible. The stoichiometry of lactate and H+ production is near unity. These results identify a default state of energy metabolism for resting muscle in which there is no difference in the metabolic phenotype of EDL and SOL. Therefore, additional control mechanisms, involving higher ATPase flux and [Ca2+], must exist to explain the well-known difference in glycolytic rates in fast-twitch and slow-twitch muscles in actively contracting muscle.
  // This model was taken from the CellML repository and automatically converted to SBML.
  // The original model was: Vinnakota KC, Rusk J, Palmer L, Shankland E, Kushmerick MJ. (2010) - version=1.0
  // The original CellML model was created by:
  // Geoffrey Nunns
  // gnunns1@jhu.edu
  // The University of Auckland
  // This model originates from BioModels Database: A Database of Annotated Published Models (http://www.ebi.ac.uk/biomodels/). It is copyright (c) 2005-2011 The BioModels.net Team.
  // To the extent possible under law, all copyright and related or neighbouring rights to this encoded model have been dedicated to the public domain worldwide. Please refer to CC0 Public Domain Dedication for more information.
  // In summary, you are entitled to use this encoded model in absolutely any manner you deem suitable, verbatim, or with modification, alone or embedded it in a larger context, redistribute it, commercially or not, in a restricted way or not..
  // To cite BioModels Database, please use: Li C, Donizelli M, Rodriguez N, Dharuri H, Endler L, Chelliah V, Li L, He E, Henry A, Stefan MI, Snoep JL, Hucka M, Le Novère N, Laibe C (2010) BioModels Database: An enhanced, curated and annotated resource for published quantitative kinetic models. BMC Syst Biol., 4:92.
  // biomodels.db:MODEL1006230112
  // isDescribedBy pubmed:20308252
  // biomodels.db:MODEL1006230112
  // isDescribedBy pubmed:20308252
  // biomodels.db:MODEL1006230112
  // biomodels.db:MODEL1006230112

  // Compartments:
  compartment COMpartment = 1 litre;

  // Parameters:
  clamp = 1;
  PCr = 0.0145;
  Cr = 0.0075;
  NAD = 0.000406654344;
  NADH = 4.06654344e-8;
  ATP = 0.0055;
  ADP = 1e-5;
  AMP = 1e-8;
  Pi = 0.0054;
  Gly = 0.02;
  G1P = 1e-9;
  G6P = 1e-9;
  F6P = 1e-9;
  FBP = 1e-9;
  DHAP = 1e-9;
  G3P = 1e-9;
  GAP = 1e-9;
  BPG = 1e-9;
  P3G = 1e-9;
  P2G = 1e-9;
  PEP = 1e-9;
  PYR = 1e-9;
  LAC = 1e-9;
  mg = 0.001;
  pH_calc = 7.14;
  LAC_ec = 0;
  HCO3_cy = 0.015;
  CO2_cy = 0.001564425;
  HCO3_ec = 0.03;
  CO2_ec = 0.001564425;
  MOPS = 0;
  MOPSH = 0;
  pH_ec = 7.439767;

  // Assignment rules:
  CO2_in := 0.05*0.0425*(760 - 23.8)*1;
  HCO3_in := 30;
  pH_in := 6.157 + log10(HCO3_in/CO2_in);
  MOPSt := 0;
  pH_cy := pH_calc;
  Vfgly := 0.0037;
  fracA := 1;
  KgpA_glyf := 1.7;
  KgpA_pi := 4;
  KgpA_igly := 2;
  KgpA_ipi := 4.7;
  KgpA_glyb := 1.5;
  KgpA_g1p := 2.7;
  KgpA_ig1p := 1.01;
  KgpB_pi := 2;
  KgpB_ipi := 4.6;
  KgpB_iglyf := 1.5;
  KgpB_g1p := 1.5;
  KgpB_ig1p := 7.4;
  KgpB_iglyb := 4.4;
  Kgp_amp := 6.46203;
  nH := 1.6159;
  Vffpglm := 0.0052;
  Kpglm_g1p := 6.3;
  Kpglm_g6p := 3;
  Vbbpgi := 0.3833;
  Kpgi_g6p := 4.8;
  Kpgi_f6p := 1.19;
  Vffpfk := 0.0037;
  Kpfk_f6p := 1.8;
  Kpfk_f6pT := 2;
  Kpfk_atp := 8;
  Kpfk_atpT := 2.5;
  Kpfk_fbp := 4.02;
  Kpfk_fbpT := 4.02;
  Kpfk_adp := 2.7;
  Kpfk_adpT := 2.7;
  Kpfki := 8.7*10;
  Kmpfk := 6;
  d := 1;
  e_ := 1;
  Lo := 13;
  Vffald := 0.012;
  Kald_fbp := 5;
  Kald_dhap := 2;
  Kald_gap := 1;
  Vfftpi := 0.1406;
  Ktpi_gap := 3.2;
  Ktpi_dhap := 6.1;
  Vbbg3pdh := 0.0557;
  Kg3pdh_g3p := 1.8;
  Kg3pdh_nad := 1.2;
  Kg3pdh_dhap := 2.2;
  Kg3pdh_nadh := 8;
  Vffgad := 0.0765;
  Kgapdh_gap := 2.5;
  Kgapdh_nad := 9;
  Kgapdh_pi := 2.9;
  Kgapdh_bpg := 8;
  Kgapdh_nadh := 3.3;
  Vbbpgk := 0.0087;
  Kpgk_bpg := 2;
  Kpgk_adp := 8;
  Kpgk_3pg := 1.2;
  Kpgk_atp := 3.5;
  Vffpgm := 0.0839;
  Kpgm_3pg := 2;
  Kpgm_2pg := 1.4;
  Vffen := 0.7966;
  Ken_2pg := 1;
  Ken_pep := 3.7;
  Vffpk := 0.0408;
  Kpk_pep := 8;
  Kpk_adp := 3;
  Kpk_pyr := 7.05;
  Kpk_atp := 1.13;
  Vffldh := 0.0956;
  Kldh_pyr := 3.35;
  Kldh_nadh := 2;
  Kldh_lac := 1.7;
  Kldh_nad := 8.49;
  VforCK := 8.8215;
  Kck_pcr := 1.11;
  Kck_iatp := 3.5;
  Kck_iadp := 1.35;
  Kck_ipcr := 3.9;
  Kck_cr := 3.8;
  Kck_Iadp := 0.015;
  Kck_Ipcr := 3.9;
  Kck_Icr := 58;
  Kck_Iatp := 4.346;
  Kck_Ii := 1;
  Vfadk := 2.0299;
  Kadk_amp := 3.2;
  Kadk_atp := 2.7;
  Kadk_adp := 3.5;
  kut := 0.1245473;
  VmaxOxPhos := 0.0037844;
  Kmadp := 4.19392e-5;
  nnHH := 2.217962;
  Vmax_MCT := 0.0007114938;
  Klac1 := 4;
  pKmct1 := 8.89;
  PSVCO2 := 2.3084;
  X_CA := 740;
  kf_hydrCO2 := 0.0469*60;
  Keq_CA := 10^(-6.157);
  kb_hydrCO2 := kf_hydrCO2/Keq_CA;
  Flow := 4;
  V_cell := 55*0.67*1;
  V_ec := 0.149 - 55/1.06*1;
  bufcapfixed := 0.0041388;
  T := 298.15;
  I := 0.17;
  k := 0.14;
  c0 := 1;
  R := 8.314;
  B := 1.6;
  I1 := 0.1;
  alphadebye := 1.17582;
  IcorrpKa := alphadebye*(sqrt(I1)/(1 + B*sqrt(I1)) - sqrt(I)/(1 + B*sqrt(I)))/ln(10);
  RTalpha := 2.91482;
  IcorrdeltaGpof := RTalpha*sqrt(I)/(1 + B*sqrt(I));
  pKa1_Pi := 6.75 + IcorrpKa*(2^2 + 1^2 - 1^2);
  pKamg_Pi := 1.65 + IcorrpKa*(2^2 + 2^2 - 0^2);
  pKak_Pi := 0.5;
  P_Pi := 1 + 10^(-pH_cy + pKa1_Pi) + mg/c0*10^pKamg_Pi + k/c0*10^pKak_Pi;
  HPi2 := 1/P_Pi;
  H2Pi1 := 10^(-pH_cy + pKa1_Pi)*HPi2;
  kPi := k/c0*10^pKak_Pi*HPi2;
  mgPi := mg/c0*10^pKamg_Pi*HPi2;
  Navg_Pi := H2Pi1;
  dNavgPidH := 10^pKa1_Pi*P_Pi*(1 - H2Pi1)/(c0*P_Pi^2);
  NH_HPi2 := 1;
  deltaGof_HPi2 := -1096.1;
  deltaGpof_HPi2 := deltaGof_HPi2 + NH_HPi2*ln(10)*R*T*pH_cy - IcorrdeltaGpof*(4 - NH_HPi2);
  pKa1_ATP := 6.48 + IcorrpKa*(4^2 + 1^2 - 3^2);
  pKamg_ATP := 4.19 + IcorrpKa*(4^2 + 2^2 - 2^2);
  pKak_ATP := 1.17 + IcorrpKa*(4^2 + 1^2 - 3^2);
  P_ATP := 1 + 10^(-pH_cy + pKa1_ATP) + mg/c0*10^pKamg_ATP + k/c0*10^pKak_ATP;
  ATP4 := 1/P_ATP;
  HATP3 := 10^(-pH_cy + pKa1_ATP)*ATP4;
  mgATP2 := mg/c0*10^pKamg_ATP*ATP4;
  kATP := k/c0*10^pKak_ATP*ATP4;
  Navg_ATP := HATP3;
  dNavgATPdH := 10^pKa1_ATP*P_ATP*(1 - HATP3)/(c0*P_ATP^2);
  NH_ATP4 := 12;
  deltaGof_ATP4 := -2768.1;
  deltaGpof_ATP4 := deltaGof_ATP4 + NH_ATP4*R*T*ln(10)*pH_cy - IcorrdeltaGpof*(16 - NH_ATP4);
  pKak_ADP := 1;
  pKa1_ADP := 6.38 + IcorrpKa*(3^2 + 1^2 - 2^2);
  pKamg_ADP := 3.25 + IcorrpKa*(3^2 + 2^2 - 1^2);
  P_ADP := 1 + 10^(-pH_cy + pKa1_ADP) + mg/c0*10^pKamg_ADP + k/c0*10^pKak_ADP;
  ADP3 := 1/P_ADP;
  HADP2 := 10^(-pH_cy + pKa1_ADP)*ADP3;
  mgADP := ADP3*mg/c0*10^pKamg_ADP;
  kADP := ADP3*k/c0*10^pKak_ADP;
  Navg_ADP := HADP2;
  dNavgADPdH := 10^pKa1_ADP*P_ADP*(1 - HADP2)/(c0*P_ADP^2);
  NH_ADP3 := 12;
  deltaGof_ADP3 := -1906.13;
  deltaGpof_ADP3 := deltaGof_ADP3 + NH_ADP3*R*T*ln(10)*pH_cy - IcorrdeltaGpof*(9 - NH_ADP3);
  pKa1_AMP := 6.29 + IcorrpKa*(2^2 + 1^2 - 1^2);
  pKamg_AMP := 1.92 + IcorrpKa*(2^2 + 2^2 - 0^2);
  P_AMP := 1 + 10^(pKa1_AMP - pH_cy) + mg/c0*10^pKamg_AMP;
  AMP2 := 1/P_AMP;
  HAMP1 := AMP2*10^(pKa1_AMP - pH_cy);
  mgAMP := mg/c0*10^pKamg_AMP*AMP2;
  Navg_AMP := HAMP1;
  dNavgAMPdH := 10^pKa1_AMP*(P_AMP - 10^(-pH_cy + pKa1_AMP))/(c0*P_AMP^2);
  NH_AMP2 := 12;
  deltaGof_AMP2 := -1040.45;
  deltaGpof_AMP2 := deltaGof_AMP2 + NH_AMP2*ln(10)*R*T*pH_cy - IcorrdeltaGpof*(4 - NH_AMP2);
  pKak_PCR := 0.31;
  pKa1_PCR := 4.5 + IcorrpKa*(2^2 + 1^2 - 1^2);
  pKamg_PCR := 1.6 + IcorrpKa*(2^2 + 2^2 - 0^2);
  P_PCR := 1 + 10^(-pH_cy + pKa1_PCR) + mg/c0*10^pKamg_PCR + k/c0*10^pKak_PCR;
  HPCR := 1/P_PCR;
  H2PCR := 10^(-pH_cy + pKa1_PCR)*HPCR;
  kPCR := k/c0*10^pKak_PCR*HPCR;
  mgPCR := mg/c0*10^pKamg_PCR*HPCR;
  Navg_PCR := H2PCR;
  dNavgPCRdH := 10^pKa1_PCR*(P_PCR - 10^(-pH_cy + pKa1_PCR))/(c0*P_PCR^2);
  NH_HPCR := 8;
  pKa1_CR := 2.3;
  P_CR := 1 + 10^(-pH_cy + pKa1_CR);
  HCR := 1/P_CR;
  H2CR := HCR*10^(-pH_cy + pKa1_CR);
  Navg_CR := 0*HCR + 1*H2CR;
  dNavgCRdH := 10^pKa1_CR*(P_CR - 10^(-pH_cy + pKa1_CR))/(c0*P_CR^2);
  NH_HCR := 9;
  pKa1_G1P := 6.09 + IcorrpKa*(2^2 + 1^2 - 1^2);
  pKamg_G1P := 2.48 + IcorrpKa*(2^2 + 2^2 - 0^2);
  P_G1P := 1 + 10^(-pH_cy)*10^pKa1_G1P + mg/c0*10^pKamg_G1P;
  UG1P := 1/P_G1P;
  HG1P := UG1P*10^(-pH_cy + pKa1_G1P);
  mgG1P := UG1P*mg/c0*10^pKamg_G1P;
  Navg_G1P := HG1P;
  dNavgG1PdH := 10^pKa1_G1P*(P_G1P - 10^(-pH_cy + pKa1_G1P))/(c0*P_G1P^2);
  NH_UG1P := 11;
  deltaGof_UG1P := -1756.87;
  deltaGpof_UG1P := deltaGof_UG1P + NH_UG1P*ln(10)*R*T*pH_cy - IcorrdeltaGpof*(4 - NH_UG1P);
  pKa1_G6P := 6.11 + IcorrpKa*(2^2 + 1^2 - 1^2);
  P_G6P := 1 + 10^(-pH_cy + pKa1_G6P);
  UG6P := 1/P_G6P;
  HG6P := UG6P*10^(-pH_cy + pKa1_G6P);
  Navg_G6P := HG6P;
  dNavgG6PdH := 10^pKa1_G6P*(P_G6P - 10^(-pH_cy + pKa1_G6P))/(c0*P_G6P^2);
  dNavgG6Pdmg := 0;
  NH_UG6P := 11;
  deltaGof_UG6P := -1763.94;
  deltaGpof_UG6P := deltaGof_UG6P + NH_UG6P*ln(10)*R*T*pH_cy - IcorrdeltaGpof*(4 - NH_UG6P);
  pKa1_F6P := 5.89 + IcorrpKa*(2^2 + 1^2 - 1^2);
  P_F6P := 1 + 10^(-pH_cy + pKa1_F6P);
  UF6P := 1/P_F6P;
  HF6P := UF6P*10^(-pH_cy + pKa1_F6P);
  Navg_F6P := HF6P;
  dNavgF6PdH := 10^pKa1_F6P*(P_F6P - 10^(-pH_cy + pKa1_F6P))/(c0*P_F6P^2);
  NH_UF6P := 11;
  deltaGof_UF6P := -1760.8;
  deltaGpof_UF6P := deltaGof_UF6P + NH_UF6P*ln(10)*R*T*pH_cy - IcorrdeltaGpof*(4 - NH_UF6P);
  pKa1_FDP := 6.4;
  pKamg_FDP := 2.7;
  P_FDP := 1 + 10^(-pH_cy + pKa1_FDP) + mg/c0*10^pKamg_FDP;
  UFDP := 1/P_FDP;
  HFDP := UFDP*10^(-pH_cy + pKa1_FDP);
  mgFDP := UFDP*mg/c0*10^pKamg_FDP;
  Navg_FDP := HFDP;
  dNavgFDPdH := 10^pKa1_FDP*P_FDP*(1 - HFDP)/(c0*P_FDP^2);
  NH_UFDP := 10;
  deltaGof_UFDP := -2601.4;
  deltaGpof_UFDP := deltaGof_UFDP + NH_UFDP*ln(10)*R*T*pH_cy - IcorrdeltaGpof*(16 - NH_UFDP);
  pKa1_GAP := 6.45;
  P_GAP := 1 + 10^(-pH_cy + pKa1_GAP);
  UGAP := 1/P_GAP;
  HGAP := UGAP*10^(-pH_cy + pKa1_GAP);
  Navg_GAP := HGAP;
  dNavgGAPdH := 10^pKa1_GAP*(P_GAP - 10^(-pH_cy + pKa1_GAP))/(c0*P_GAP^2);
  dNavgGAPdmg := 0;
  NH_UGAP := 5;
  deltaGof_UGAP := -1288.6;
  deltaGpof_UGAP := deltaGof_UGAP + NH_UGAP*ln(10)*R*T*pH_cy - IcorrdeltaGpof*(4 - NH_UGAP);
  pKamg_G3P := 1.63;
  pKa1_G3P := 6.22 + IcorrpKa*(2^2 + 1^2 - 1^2);
  P_G3P := 1 + 10^(-pH_cy + pKa1_G3P) + mg/c0*10^pKamg_G3P;
  UG3P := 1/P_G3P;
  HG3P := UG3P*10^(-pH_cy + pKa1_G3P);
  mgG3P := UG3P*mg/c0*10^pKamg_G3P;
  Navg_G3P := HG3P;
  dNavgG3PdH := 10^pKa1_G3P*(P_G3P - 10^(-pH_cy + pKa1_G3P))/(c0*P_G3P^2);
  NH_UG3P := 7;
  deltaGof_UG3P := -1339.25;
  deltaGpof_UG3P := deltaGof_UG3P + NH_UG3P*ln(10)*R*T*pH_cy - IcorrdeltaGpof*(4 - NH_UG3P);
  pKa1_DHAP := 5.9;
  pKamg_DHAP := 1.57;
  P_DHAP := 1 + 10^(-pH_cy + pKa1_DHAP) + mg/c0*10^pKamg_DHAP;
  UDHAP := 1/P_DHAP;
  HDHAP := UDHAP*10^(-pH_cy + pKa1_DHAP);
  mgDHAP := UDHAP*mg/c0*10^pKamg_DHAP;
  Navg_DHAP := HDHAP;
  dNavgDHAPdH := 10^pKa1_DHAP*(P_DHAP - 10^(-pH_cy + pKa1_DHAP))/(c0*P_DHAP^2);
  NH_UDHAP := 5;
  deltaGof_UDHAP := -1296.26;
  deltaGpof_UDHAP := deltaGof_UDHAP + NH_UDHAP*ln(10)*R*T*pH_cy - IcorrdeltaGpof*(4 - NH_UDHAP);
  pKa1_13DPG := 7.5;
  P_13DPG := 1 + 10^(-pH_cy + pKa1_13DPG);
  U13DPG := 1/P_13DPG;
  H13DPG := U13DPG*10^(-pH_cy + pKa1_13DPG);
  Navg_13DPG := H13DPG;
  dNavg13DPGdH := 10^pKa1_13DPG*(P_13DPG - 10^(-pH_cy + pKa1_13DPG))/(c0*P_13DPG^2);
  NH_U13DPG := 4;
  deltaGof_U13DPG := -2356.14;
  deltaGpof_U13DPG := deltaGof_U13DPG + NH_U13DPG*ln(10)*R*T*pH_cy - IcorrdeltaGpof*(16 - NH_U13DPG);
  pKa1_3PG := 6.21;
  P_3PG := 1 + 10^(-pH_cy + 6.21);
  U3PG := 1/P_3PG;
  H3PG := U3PG*10^(-pH_cy + 6.21);
  Navg_3PG := H3PG;
  dNavg3PGdH := 10^pKa1_3PG*(P_3PG - 10^(-pH_cy + pKa1_3PG))/(c0*P_3PG^2);
  NH_U3PG := 4;
  deltaGof_U3PG := -1502.54;
  deltaGpof_U3PG := deltaGof_U3PG + NH_U3PG*ln(10)*R*T*pH_cy - IcorrdeltaGpof*(9 - NH_U3PG);
  pKa1_2PG := 7;
  pKamg_2PG := 2.45;
  pKak_2PG := 1.18;
  P_2PG := 1 + 10^(-pH_cy + pKa1_2PG) + mg/c0*10^pKamg_2PG + k/c0*10^pKak_2PG;
  U2PG := 1/P_2PG;
  H2PG := U2PG*10^(-pH_cy + pKa1_2PG);
  mg2PG := U2PG*mg/c0*10^pKamg_2PG;
  k2PG := U2PG*k/c0*10^pKak_2PG;
  Navg_2PG := H2PG;
  dNavg2PGdH := 10^pKa1_2PG*(P_2PG - 10^(-pH_cy + pKa1_2PG))/(c0*P_2PG^2);
  NH_U2PG := 4;
  deltaGof_U2PG := -1496.38;
  deltaGpof_U2PG := deltaGof_U2PG + NH_U2PG*ln(10)*R*T*pH_cy - IcorrdeltaGpof*(9 - NH_U2PG);
  pKa1_PEP := 6.35;
  pKamg_PEP := 2.26;
  pKak_PEP := 1.08;
  P_PEP := 1 + 10^(pKa1_PEP - pH_cy) + mg/c0*10^pKamg_PEP + k/c0*10^pKak_PEP;
  UPEP := 1/P_PEP;
  HPEP := UPEP*10^(pKa1_PEP - pH_cy);
  kPEP := UPEP*k/c0*10^pKak_PEP;
  mgPEP := UPEP*mg/c0*10^pKamg_PEP;
  Navg_PEP := HPEP;
  dNavgPEPdH := 10^pKa1_PEP*(P_PEP - 10^(-pH_cy + pKa1_PEP))/(c0*P_PEP^2);
  NH_UPEP := 2;
  deltaGof_UPEP := -1263.65;
  deltaGpof_UPEP := deltaGof_UPEP + NH_UPEP*ln(10)*R*T*pH_cy - IcorrdeltaGpof*(9 - NH_UPEP);
  pKa1_PYR := 2.49;
  P_PYR := 1 + 10^(-pH_cy + pKa1_PYR);
  UPYR := 1/P_PYR;
  HPYR := UPYR*10^(-pH_cy + pKa1_PYR);
  Navg_PYR := HPYR;
  dNavgPYRdH := 10^pKa1_PYR*(P_PYR - 10^(-pH_cy + pKa1_PYR))/(c0*P_PYR^2);
  dNavgPYRdmg := 0;
  NH_UPYR := 3;
  deltaGof_UPYR := -472.27;
  deltaGpof_UPYR := deltaGof_UPYR + NH_UPYR*ln(10)*R*T*pH_cy - IcorrdeltaGpof*(1 - NH_UPYR);
  pKamg_LAC := 0.98;
  pKa1_LAC := 3.67 + IcorrpKa*(1^2 + 1^2 - 0^2);
  P_LAC := 1 + 10^(-pH_cy + pKa1_LAC) + mg/c0*10^pKamg_LAC;
  ULAC := 1/P_LAC;
  HLAC := ULAC*10^(-pH_cy + pKa1_LAC);
  mgLAC := mg/c0*10^pKamg_LAC*ULAC;
  Navg_LAC := HLAC;
  dNavgLACdH := 10^pKa1_LAC*(P_LAC - 10^(-pH_cy + pKa1_LAC))/(c0*P_LAC^2);
  dmgLACdmg := (P_LAC*10^pKamg_LAC/c0 - mg/c0*10^(2*pKamg_LAC)/c0)/P_LAC^2;
  dmgLACdpH := mg/c0*10^(-pH_cy + pKa1_LAC + pKamg_LAC)*ln(10)/P_LAC^2;
  NH_ULAC := 5;
  deltaGof_ULAC := -516.72;
  deltaGpof_ULAC := deltaGof_ULAC + NH_ULAC*ln(10)*R*T*pH_cy - IcorrdeltaGpof*(1 - NH_ULAC);
  dNH_GLY := -10;
  deltaGpo_GLY := 655.7 + dNH_GLY*ln(10)*R*T*pH_cy;
  NH_NAD := 26;
  deltaGof_NAD := 0;
  deltaGpof_NAD := deltaGof_NAD + NH_NAD*ln(10)*R*T*pH_cy - IcorrdeltaGpof*(1 - NH_NAD);
  NH_NADH := 27;
  deltaGof_NADH := 22.65;
  deltaGpof_NADH := deltaGof_NADH + NH_NADH*ln(10)*R*T*pH_cy - IcorrdeltaGpof*(4 - NH_NADH);
  NH_H2O := 2;
  deltaGof_H2O := -237.19;
  deltaGpof_H2O := deltaGof_H2O + NH_H2O*ln(10)*R*T*pH_cy - IcorrdeltaGpof*(0 - NH_H2O);
  NH_H := 1;
  deltaGof_H := 0;
  deltaGpof_H := deltaGof_H + NH_H*ln(10)*R*T*pH_cy;
  deltaH_CK := Navg_ATP + Navg_CR - Navg_PCR - Navg_ADP + (NH_ATP4 + NH_HCR - NH_HPCR - NH_ADP3);
  slopeint_1 := 1000*2.047421;
  slopeint_2 := 1000*0.01383838;
  Kref_CKT := exp(slopeint_1/T + slopeint_2);
  I25 := 0.25;
  alphadebye1 := 1.10708 - 1.54508*T + 5.95584*T^2;
  IcorrneglnKrefCK := alphadebye1*(sqrt(I25)/(1 + 1.6*sqrt(I25)) - sqrt(I)/(1 + 1.6*sqrt(I)));
  neglnKrefCK_Iexp := -ln(Kref_CKT) + IcorrneglnKrefCK*(4^2 + 0^2 - 2^2 - 3^2 - 1^2);
  Kref_CK := exp(-neglnKrefCK_Iexp);
  deltaGpo_CK := -R*T*ln(Kref_CK);
  Kapp_CK := exp(-deltaGpo_CK/(R*T))*10^(-pH_cy)*P_ATP*P_CR/(P_PCR*P_ADP);
  deltaH_ADK := 2*Navg_ADP - Navg_ATP - Navg_AMP + (2*NH_ADP3 - NH_ATP4 - NH_AMP2);
  deltaGpo_ADK := 2*deltaGpof_ADP3 - deltaGpof_ATP4 - deltaGpof_AMP2;
  Kapp_ADK := exp(-deltaGpo_ADK/(R*T))*P_ADP^2/(P_ATP*P_AMP);
  deltaH_GP := Navg_G1P - Navg_Pi + (1 - NH_HPi2);
  deltaGpo_GP := deltaGpo_GLY + deltaGpof_UG1P - deltaGpof_HPi2;
  Kapp_GP := exp(-deltaGpo_GP/(R*T))*P_G1P/P_Pi;
  deltaH_PGLM := Navg_G6P - Navg_G1P + (NH_UG6P - NH_UG1P);
  deltaGpo_PGLM := deltaGpof_UG6P - deltaGpof_UG1P;
  Kapp_PGLM := exp(-deltaGpo_PGLM/(R*T))*P_G6P/P_G1P;
  deltaH_PGI := Navg_F6P - Navg_G6P + (NH_UF6P - NH_UG6P);
  deltaGpo_PGI := deltaGpof_UF6P - deltaGpof_UG6P;
  Kapp_PGI := exp(-deltaGpo_PGI/(R*T))*P_F6P/P_G6P;
  deltaH_PFK := Navg_ADP + Navg_FDP - Navg_F6P - Navg_ATP + NH_ADP3 + NH_UFDP - NH_UF6P - NH_ATP4;
  deltaGpo_PFK := deltaGpof_UFDP + deltaGpof_ADP3 + deltaGpof_H - deltaGpof_UF6P - deltaGpof_ATP4;
  Kapp_PFK := exp(-deltaGpo_PFK/(R*T))*P_FDP*P_ADP/(P_F6P*P_ATP*10^(-pH_cy));
  deltaH_ALD := Navg_DHAP + Navg_GAP - Navg_FDP + (NH_UDHAP + NH_UGAP - NH_UFDP);
  deltaGpo_ALD := deltaGpof_UDHAP + deltaGpof_UGAP - deltaGpof_UFDP;
  Kapp_ALD := exp(-deltaGpo_ALD/(R*T))*P_GAP*P_FDP/P_DHAP;
  deltaH_TPI := Navg_DHAP - Navg_GAP + (NH_UDHAP - NH_UGAP);
  deltaGpo_TPI := deltaGpof_UDHAP - deltaGpof_UGAP;
  Kapp_TPI := exp(-deltaGpo_TPI/(R*T))*P_DHAP/P_GAP;
  deltaH_GAPDH := Navg_13DPG - Navg_GAP - Navg_Pi + (NH_U13DPG + NH_NADH - NH_UGAP - NH_HPi2 - NH_NAD);
  deltaGpo_GAPDH := deltaGpof_U13DPG + deltaGpof_NADH + deltaGpof_H - deltaGpof_HPi2 - deltaGpof_UGAP - deltaGpof_NAD;
  Kapp_GAPDH := exp(-deltaGpo_GAPDH/(R*T))*P_13DPG/(P_Pi*P_GAP*10^(-pH_cy));
  deltaH_G3PDH := Navg_DHAP - Navg_G3P + (NH_UDHAP + NH_NADH - NH_NAD - NH_UG3P);
  deltaGpo_G3PDH := deltaGpof_H + deltaGpof_NADH + deltaGpof_UDHAP - deltaGpof_NAD - deltaGpof_UG3P;
  Kapp_G3PDH := exp(-deltaGpo_G3PDH/(R*T))*P_DHAP/(P_G3P*10^(-pH_cy));
  deltaH_PGK := Navg_3PG + Navg_ATP - Navg_13DPG - Navg_ADP + (NH_U3PG + NH_ATP4 - NH_U13DPG - NH_ADP3);
  deltaGpo_PGK := deltaGpof_ATP4 + deltaGpof_U3PG - deltaGpof_U13DPG - deltaGpof_ADP3;
  Kapp_PGK := exp(-deltaGpo_PGK/(R*T))*P_ATP*P_3PG/(P_13DPG*P_ADP);
  deltaH_PGM := Navg_2PG - Navg_3PG + (NH_U2PG - NH_U3PG);
  deltaGpo_PGM := deltaGpof_U2PG - deltaGpof_U3PG;
  Kapp_PGM := exp(-deltaGpo_PGM/(R*T))*P_2PG/P_3PG;
  deltaH_ENOL := Navg_PEP - Navg_2PG + (NH_H2O + NH_UPEP - NH_U2PG);
  deltaGpo_ENOL := deltaGpof_H2O + deltaGpof_UPEP - deltaGpof_U2PG;
  Kapp_ENOL := exp(-deltaGpo_ENOL/(R*T))*P_PEP/P_2PG;
  deltaH_PK := Navg_PYR + Navg_ATP - Navg_PEP - Navg_ADP + (NH_UPYR + NH_ATP4 - NH_UPEP - NH_ADP3);
  deltaGpo_PK := deltaGpof_UPYR + deltaGpof_ATP4 - deltaGpof_H - deltaGpof_UPEP - deltaGpof_ADP3;
  Kapp_PK := exp(-deltaGpo_PK/(R*T))*P_PYR*P_ATP*10^(-pH_cy)/(P_PEP*P_ADP);
  deltaH_LDH := Navg_LAC - Navg_PYR + (NH_ULAC + NH_NAD - NH_UPYR - NH_NADH);
  deltaGpo_LDH := deltaGpof_ULAC + deltaGpof_NAD - deltaGpof_UPYR - deltaGpof_NADH - deltaGpof_H;
  Kapp_LDH := exp(-deltaGpo_LDH/(R*T))*P_LAC*10^(-pH_cy)/P_PYR;
  deltaH_ATPase := Navg_ADP + Navg_Pi - Navg_ATP + (NH_ADP3 + NH_HPi2 - NH_ATP4 - NH_H2O);
  deltaGpo_ATPase := deltaGpof_ADP3 + deltaGpof_HPi2 + deltaGpof_H - deltaGpof_H2O - deltaGpof_ATP4;
  Kapp_ATPase := exp(-deltaGpo_ATPase/(R*T))*P_ADP*P_Pi/(P_ATP*10^(-pH_cy));
  Dglya := 1 + Gly/KgpA_glyf + Pi/KgpA_pi + Gly*Pi/(KgpA_glyf*KgpA_ipi) + Gly/KgpA_glyb + G1P/KgpA_g1p + Gly*G1P/(KgpA_ig1p*KgpA_glyb);
  pa := 1.404/(1 + 10^(5.94 - pH_cy) + 10^(pH_cy - 7.29));
  VbglyA := pa*Vfgly*KgpA_glyb*KgpA_ig1p/(KgpA_igly*KgpA_pi*Kapp_GP);
  glyAF := pa*Vfgly*Pi/(KgpA_igly*KgpA_pi)/Dglya;
  glyAR := VbglyA*Gly/(KgpA_glyb*KgpA_ig1p)/Dglya;
  flux_GPa := fracA*(Gly*glyAF - G1P*glyAR);
  fracB := 1 - fracA;
  M := (AMP/Kgp_amp)^nH/(1 + (AMP/Kgp_amp)^nH);
  Dglyb := 1 + Gly/KgpB_iglyf + Pi/KgpB_ipi + Gly/KgpB_iglyb + G1P/KgpB_ig1p + Gly*Pi/(KgpB_iglyf*KgpB_pi) + Gly*G1P/(KgpB_g1p*KgpB_iglyb);
  pb := 1.75/(1 + 10^(6.12 - pH_cy) + 10^(pH_cy - 7.03));
  VbglyB := pb*Vfgly*KgpB_g1p*KgpB_iglyb/(KgpB_iglyf*KgpB_pi*Kapp_GP);
  glyBF := pb*M*Vfgly*Pi/(KgpB_iglyf*KgpB_pi)/Dglyb;
  glyBR := M*VbglyB*Gly/(KgpB_g1p*KgpB_iglyb)/Dglyb;
  flux_GPb := fracB*(Gly*glyBF - G1P*glyBR);
  Vfpglm := Vffpglm*1.329/(1 + 10^(-pH_cy + 6.64) + 10^(pH_cy - 8.36));
  Vbpglm := Vfpglm*Kpglm_g6p/(Kpglm_g1p*Kapp_PGLM);
  v_PGLM := (Vfpglm*G1P/Kpglm_g1p - Vbpglm*G6P/Kpglm_g6p)/(1 + G1P/Kpglm_g1p + G6P/Kpglm_g6p);
  Vbpgi := Vbbpgi/(1 + 10^(-pH_cy + 6.94) + 10^(pH_cy - 9.35));
  Vfpgi := Vbpgi*Kpgi_g6p/Kpgi_f6p*Kapp_PGI;
  v_PGI := (Vfpgi*G6P/Kpgi_g6p - Vbpgi*F6P/Kpgi_f6p)/(1 + F6P/Kpgi_f6p + G6P/Kpgi_g6p);
  Vfpfk := Vffpfk/(1 + (pH_cy/6.8)^(-30));
  Vbpfk := Vfpfk*Kpfk_fbp*Kpfk_adp/(Kpfk_f6p*Kpfk_atp*Kapp_PFK);
  L := Lo*((1 + ATP/Kpfki)/(1 + d*ATP/Kpfki)*(1 + exponentiale*AMP/Kmpfk)/(1 + AMP/Kmpfk))^4;
  alpha := Kpfk_f6p*Kpfk_atp/(Kpfk_f6pT*Kpfk_atpT);
  Delta := (1 + F6P/Kpfk_f6p)*(1 + ATP/Kpfk_atp) + FBP/Kpfk_fbp + ADP/Kpfk_adp*(1 + FBP/Kpfk_fbp);
  Deltap := (1 + F6P/Kpfk_f6pT)*(1 + ATP/Kpfk_atpT) + FBP/Kpfk_fbpT + ADP/Kpfk_adpT*(1 + FBP/Kpfk_fbpT);
  v_PFK := (Vfpfk*F6P*ATP/(Kpfk_f6p*Kpfk_atp)/Delta - Vbpfk*ADP*FBP/(Kpfk_adp*Kpfk_fbp)/Delta)*(1 + alpha*L*(Deltap/Delta)^3)/(1 + L*(Deltap/Delta)^4);
  Vfald := Vffald*1.013/(1 + 10^(-pH_cy + 5.32) + 10^(pH_cy - 9.15));
  Vbald := Vfald*Kald_gap*Kald_dhap/(Kald_fbp*Kapp_ALD*1);
  v_ALD := (Vfald*FBP/Kald_fbp - Vbald*GAP*DHAP/(Kald_gap*Kald_dhap))/(1 + FBP/Kald_fbp + GAP/Kald_gap + DHAP/Kald_dhap);
  Vftpi := Vfftpi;
  Vbtpi := Vftpi*Ktpi_dhap/(Ktpi_gap*Kapp_TPI);
  v_TPI := (Vftpi*GAP/Ktpi_gap - Vbtpi*DHAP/Ktpi_dhap)/(1 + GAP/Ktpi_gap + DHAP/Ktpi_dhap);
  Dg3pdh := (1 + G3P/Kg3pdh_g3p + NADH/Kg3pdh_nadh)*(1 + DHAP/Kg3pdh_dhap + NAD/Kg3pdh_nadh);
  Vbg3pdh := Vbbg3pdh;
  Vfg3pdh := Vbg3pdh*Kg3pdh_g3p*Kg3pdh_nad*Kapp_G3PDH/(Kg3pdh_dhap*Kg3pdh_nadh);
  v_G3PDH := (Vfg3pdh*G3P*NAD/(Kg3pdh_g3p*Kg3pdh_nad) - Vbg3pdh*DHAP*NADH/(Kg3pdh_dhap*Kg3pdh_nadh))/Dg3pdh;
  Dgap := 1 + Pi/Kgapdh_pi + GAP/Kgapdh_gap + NAD/Kgapdh_nad + GAP*NAD/(Kgapdh_gap*Kgapdh_nad) + GAP*NAD*Pi/(Kgapdh_gap*Kgapdh_nad*Kgapdh_pi) + BPG/Kgapdh_bpg + NADH/Kgapdh_nadh + BPG*NADH/(Kgapdh_nadh*Kgapdh_bpg);
  Vfgad := Vffgad*0.0007*exp(pH_cy*0.8979);
  Vbgad := Vfgad*Kgapdh_bpg*Kgapdh_nadh*1/(Kgapdh_gap*Kgapdh_pi*Kgapdh_nad*Kapp_GAPDH);
  v_GAPDH := (Vfgad*GAP*NAD*Pi/(Kgapdh_nad*Kgapdh_gap*Kgapdh_pi) - Vbgad*BPG*NADH/(Kgapdh_bpg*Kgapdh_nadh))/Dgap;
  Vbpgk := Vbbpgk;
  Vfpgk := Vbpgk*Kpgk_bpg*Kpgk_adp/(Kpgk_3pg*Kpgk_atp)*Kapp_PGK;
  D_PGK := 1 + ADP/Kpgk_adp + BPG/Kpgk_bpg + BPG*ADP/(Kpgk_bpg*Kpgk_adp) + P3G/Kpgk_3pg + ATP/Kpgk_atp + P3G*ATP/(Kpgk_3pg*Kpgk_atp);
  v_PGK := (Vfpgk*BPG*ADP/(Kpgk_adp*Kpgk_bpg) - Vbpgk*ATP*P3G/(Kpgk_atp*Kpgk_3pg))/D_PGK;
  Vfpgm := Vffpgm*0.989/(1 + 10^(-pH_cy + 5.62) + 10^(pH_cy - 8.74));
  Vbpgm := Vfpgm*Kpgm_2pg/(Kpgm_3pg*Kapp_PGM);
  v_PGM := (Vfpgm*P3G/Kpgm_3pg - Vbpgm*P2G/Kpgm_2pg)/(1 + P3G/Kpgm_3pg + P2G/Kpgm_2pg);
  Vfen := Vffen;
  Vben := Vfen*Ken_pep/(Ken_2pg*Kapp_ENOL);
  v_ENOL := (Vfen*P2G/Ken_2pg - Vben*PEP/Ken_pep)/(1 + PEP/Ken_pep + P2G/Ken_2pg);
  Vfpk := Vffpk*1.05/(1 + 10^(-pH_cy + 5.58) + 10^(pH_cy - 8.79));
  Vbpk := Vfpk*Kpk_pyr*Kpk_atp/(Kpk_pep*Kpk_adp*Kapp_PK);
  v_PK := (Vfpk*PEP*ADP/(Kpk_pep*Kpk_adp) - Vbpk*PYR*ATP/(Kpk_pyr*Kpk_atp))/(1 + PEP/Kpk_pep + ADP/Kpk_adp + PEP*ADP/(Kpk_pep*Kpk_adp) + ATP/Kpk_atp + PYR/Kpk_pyr + PYR*ATP/(Kpk_pyr*Kpk_atp));
  Vfldh := Vffldh*(-0.1134*pH_cy + 1.6069);
  Vbldh := Vfldh*Kldh_lac*Kldh_nad/(Kldh_pyr*Kldh_nadh*Kapp_LDH);
  v_LDH := (Vfldh*PYR*NADH/(Kldh_pyr*Kldh_nadh) - Vbldh*LAC*NAD/(Kldh_lac*Kldh_nad))/(1 + PYR/Kldh_pyr + NADH/Kldh_nadh + PYR*NADH/(Kldh_pyr*Kldh_nadh) + LAC/Kldh_lac + NAD/Kldh_nad + LAC*NAD/(Kldh_lac*Kldh_nad));
  VrevCK := VforCK/Kapp_CK*Kck_iatp*Kck_cr/(Kck_iadp*Kck_pcr);
  CK := (VrevCK*ATP*Cr/(Kck_iatp*Kck_cr) - VforCK*ADP*PCr/(Kck_iadp*Kck_pcr))/(1 + ADP/Kck_iadp + PCr/Kck_ipcr + PCr*ADP/(Kck_iadp*Kck_pcr) + ATP/Kck_iatp + Cr*ATP/(Kck_cr*Kck_iatp));
  Vbadk := Vfadk*Kadk_adp^2/(Kadk_amp*Kadk_atp*Kapp_ADK);
  ADK := (Vfadk*ATP*AMP/(Kadk_atp*Kadk_amp) - Vbadk*(ADP/Kadk_adp)^2)/(1 + ATP/Kadk_atp + AMP/Kadk_amp + ATP*AMP/(Kadk_atp*Kadk_amp) + 2*ADP/Kadk_adp + ADP^2/Kadk_adp^2);
  ATPase := kut*ATP;
  oxphos := VmaxOxPhos*(ADP/Kmadp)^nnHH/(1 + (ADP/Kmadp)^nnHH);
  Kh := 10^(-pKmct1);
  v_MCT := Vmax_MCT*(LAC*10^(-pH_cy)/(Kh*Klac1) - LAC_ec*10^(-pH_ec)/(Kh*Klac1))/(LAC*10^(-pH_cy)/(Kh*Klac1) + 2 + 10^(-pH_cy)/Kh + LAC/Klac1 + LAC_ec/Klac1 + 10^(-pH_ec)/Kh + LAC_ec*10^(-pH_ec)/(Klac1*Kh));
  RQ := 1;
  PO2ratio := 4.2;
  fluxO2 := oxphos/PO2ratio;
  fluxCO2 := RQ*fluxO2;
  v_psCO2 := PSVCO2*(CO2_cy - CO2_ec);
  v_hydrCO2cy := X_CA*(kf_hydrCO2*CO2_cy - kb_hydrCO2*10^(-pH_cy)*HCO3_cy);
  v_hydrCO2ec := 1*(kf_hydrCO2*CO2_ec - kb_hydrCO2*10^(-pH_ec)*HCO3_ec);
  bufcapmetab := ln(10)*10^(-pH_cy)*c0*(1 + dNavgPidH*Pi + dNavgATPdH*ATP + dNavgADPdH*ADP + dNavgAMPdH*AMP + dNavgPCRdH*PCr + dNavgCRdH*Cr + dNavgG1PdH*G1P + dNavgG6PdH*G6P + dNavgF6PdH*F6P + dNavgFDPdH*FBP + dNavgGAPdH*GAP + dNavgDHAPdH*DHAP + dNavgG3PdH*G3P + dNavg13DPGdH*BPG + dNavg3PGdH*P3G + dNavg2PGdH*P2G + dNavgPEPdH*PEP + dNavgPYRdH*PYR + dNavgLACdH*LAC);
  CKprtflux := deltaH_CK*(-CK);
  glycprtflux := deltaH_PGLM*v_PGLM + deltaH_GP*(flux_GPa + flux_GPb) + deltaH_PGI*v_PGI + deltaH_PFK*v_PFK + deltaH_ALD*v_ALD + deltaH_TPI*v_TPI + deltaH_GAPDH*v_GAPDH + deltaH_PGK*v_PGK + deltaH_PGM*v_PGM + deltaH_ENOL*v_ENOL + deltaH_PK*v_PK + deltaH_LDH*v_LDH + deltaH_G3PDH*v_G3PDH;
  protons_consumed := CKprtflux + glycprtflux + deltaH_ATPase*ATPase + (-deltaH_ATPase*oxphos) + deltaH_ADK*ADK - v_hydrCO2cy + v_MCT;
  pHODEterm1 := protons_consumed/(bufcapfixed + bufcapmetab);
  dPCrdt := clamp*CK;
  dCrdt := clamp*(-CK);
  dNADdt := clamp*(-v_GAPDH - v_G3PDH + v_LDH);
  dNADHdt := clamp*(v_GAPDH + v_G3PDH - v_LDH);
  dATPdt := clamp*(-CK - ADK - v_PFK + v_PGK + v_PK - ATPase + oxphos);
  dADPdt := clamp*(CK + 2*ADK + v_PFK - v_PGK - v_PK + ATPase - oxphos);
  dAMPdt := clamp*(-ADK);
  dPidt := clamp*(-(flux_GPa + flux_GPb) - v_GAPDH + ATPase - oxphos);
  dglydt := clamp*(-(flux_GPa + flux_GPb));
  dG1Pdt := clamp*(flux_GPa + flux_GPb - v_PGLM);
  dG6Pdt := clamp*(v_PGLM - v_PGI);
  dF6Pdt := clamp*(v_PGI - v_PFK);
  dFBPdt := clamp*(v_PFK - v_ALD);
  dDHAPdt := clamp*(v_ALD + v_TPI + v_G3PDH);
  dG3Pdt := clamp*(-v_G3PDH);
  dGAPdt := clamp*(v_ALD - v_TPI - v_GAPDH);
  dBPGdt := clamp*(v_GAPDH - v_PGK);
  dP3Gdt := clamp*(v_PGK - v_PGM);
  dP2Gdt := clamp*(v_PGM - v_ENOL);
  dPEPdt := clamp*(v_ENOL - v_PK);
  dPYRdt := clamp*(v_PK - v_LDH);
  dLACdt := clamp*(v_LDH - v_MCT);
  dmgdt := clamp*0;
  dpH_calcdt := clamp*pHODEterm1;
  dLACecdt := clamp*(V_cell*v_MCT/V_ec - Flow*LAC_ec/V_ec);
  dHCO3cydt := clamp*v_hydrCO2cy;
  dCO2cydt := clamp*(fluxCO2 - v_hydrCO2cy - v_psCO2);
  dHCO3ecdt := clamp*(Flow*(HCO3_in - HCO3_ec)/V_ec + v_hydrCO2ec);
  dCO2ecdt := clamp*(Flow*(CO2_in - CO2_ec)/V_ec + v_psCO2*V_cell/V_ec - v_hydrCO2ec);
  MOPS_in := MOPSt/2;
  MOPSH_in := MOPSt/2;
  v_MOPSbuff := 1*(10^(-7.184)*MOPS - MOPSH*10^(-pH_ec));
  dMOPSdt := clamp*(Flow*(MOPS_in - MOPS)/V_ec - v_MOPSbuff);
  dMOPSHdt := clamp*(Flow*(MOPSH_in - MOPSH)/V_ec + v_MOPSbuff);
  dpHecdt := clamp*(Flow*(10^(-pH_in) - 10^(-pH_ec))/V_ec + v_hydrCO2ec/1 + v_MOPSbuff/1 + V_cell*v_MCT/(V_ec*1))/(-ln(10)*10^(-pH_ec));

  // Rate rules:
  PCr' = dPCrdt;
  Cr' = dCrdt;
  NAD' = dNADdt;
  NADH' = dNADHdt;
  ATP' = dATPdt;
  ADP' = dADPdt;
  AMP' = dAMPdt;
  Pi' = dPidt;
  Gly' = dglydt;
  G1P' = dG1Pdt;
  G6P' = dG6Pdt;
  F6P' = dF6Pdt;
  FBP' = dFBPdt;
  DHAP' = dDHAPdt;
  G3P' = dG3Pdt;
  GAP' = dGAPdt;
  BPG' = dBPGdt;
  P3G' = dP3Gdt;
  P2G' = dP2Gdt;
  PEP' = dPEPdt;
  PYR' = dPYRdt;
  LAC' = dLACdt;
  mg' = dmgdt;
  pH_calc' = dpH_calcdt;
  LAC_ec' = dLACecdt;
  HCO3_cy' = dHCO3cydt;
  CO2_cy' = dCO2cydt;
  HCO3_ec' = dHCO3ecdt;
  CO2_ec' = dCO2ecdt;
  MOPS' = dMOPSdt;
  MOPSH' = dMOPSHdt;
  pH_ec' = dpHecdt;

  // Unit definitions:
  unit molar = mole / litre;
  unit minute = 60 second;
  unit molar_per_minute = mole / (litre * 60 second);
  unit per_minute = 1 / (60 second);
  unit liter_per_minute = litre / (60 second);
  unit kilojoule_per_mole = 1000 joule / mole;
  unit mole_per_kilojoule = mole / (1000 joule);
  unit kilojoule_per_mole_per_kelvin = 1000 joule / (kelvin * mole);
  unit per_molar = litre / mole;
  unit per_kelvin = 1 / kelvin;
  unit per_kelvin2 = 1 / kelvin^2;
  unit time = 60 second;
end
