// SBML level 2 version 4

model Heldt2002_OrthostaticStress_lpc()
  // This a model from the article:
  // Computational modeling of cardiovascular response to orthostatic stress.
  // Heldt T, Shim EB, Kamm RD, Mark RG. J Appl Physiol 2002 Mar;92(3):1239-54 11842064 ,
  // Abstract:
  // The objective of this study is to develop a model of the cardiovascular system capable of simulating the short-term (< or = 5 min) transient and steady-state hemodynamic responses to head-up tilt and lower body negative pressure. The model consists of a closed-loop lumped-parameter representation of the circulation connected to set-point models of the arterial and cardiopulmonary baroreflexes. Model parameters are largely based on literature values. Model verification was performed by comparing the simulation output under baseline conditions and at different levels of orthostatic stress to sets of population-averaged hemodynamic data reported in the literature. On the basis of experimental evidence, we adjusted some model parameters to simulate experimental data. Orthostatic stress simulations are not statistically different from experimental data (two-sided test of significance with Bonferroni adjustment for multiple comparisons). Transient response characteristics of heart rate to tilt also compare well with reported data. A case study is presented on how the model is intended to be used in the future to investigate the effects of post-spaceflight orthostatic intolerance.
  // This model was taken from the CellML repository and automatically converted to SBML.
  // The original model was: Heldt T, Shim EB, Kamm RD, Mark RG. (2002) - version=1.0
  // The original CellML model was created by:
  // David Cumin
  // d.cumin@auckland.ac.nz
  // The University of Auckland
  // This model originates from BioModels Database: A Database of Annotated Published Models (http://www.ebi.ac.uk/biomodels/). It is copyright (c) 2005-2011 The BioModels.net Team.
  // To the extent possible under law, all copyright and related or neighbouring rights to this encoded model have been dedicated to the public domain worldwide. Please refer to CC0 Public Domain Dedication for more information.
  // In summary, you are entitled to use this encoded model in absolutely any manner you deem suitable, verbatim, or with modification, alone or embedded it in a larger context, redistribute it, commercially or not, in a restricted way or not..
  // To cite BioModels Database, please use: Li C, Donizelli M, Rodriguez N, Dharuri H, Endler L, Chelliah V, Li L, He E, Henry A, Stefan MI, Snoep JL, Hucka M, Le Novère N, Laibe C (2010) BioModels Database: An enhanced, curated and annotated resource for published quantitative kinetic models. BMC Syst Biol., 4:92.
  // biomodels.db:MODEL1006230113
  // isDescribedBy pubmed:11842064
  // biomodels.db:MODEL1006230113
  // isDescribedBy pubmed:11842064
  // biomodels.db:MODEL1006230113
  // biomodels.db:MODEL1006230113

  // Compartments:
  compartment COMpartment = 1 litre;

  // Parameters:
  t = ;
  Vlvrd = 72;
  Vlvrs = 23;
  Vrvrd = 103;
  Vrvrs = 53;
  Vlard = 10;
  Vlars = 8;
  Vrard = 10;
  Vrars = 8;
  Rra = 0.001;
  Rla = 0.001;
  PRint = 0.12;
  Emaxlv = 5.6;
  Eminlv = 0.186874659;
  Emaxrv = 0.67;
  Eminrv = 0.1041641;
  Emaxra = 0.1091675;
  Eminra = 0.0992431888;
  Emaxla = 0.1446192;
  Eminla = 0.131472;
  Pbs = 0;
  Vmyo = 238;
  TsvK = 0.35;
  TsaK = 0.2;
  HR = 77;
  Vra = 78.2537;
  Vrv = 167.4806;
  Vla = 85.9126;
  Vlv = 125.360568;
  COutput = 108.5691;
  Rav = 0.0001;
  Raop = 0.0001;
  Rcrb = 6.828447;
  Raod = 0.025;
  Rtaop = 0.2;
  Rtaod = 0.3;
  Rsap = 0.025;
  Rsc = 0.1545055;
  Rsv = 0.1381298;
  Rsao = 0.5508058;
  Caop = 0.3445734;
  Caod = 1.454468;
  Csap = 1.484341;
  Csc = 7.982236;
  Laop = 0.00035;
  Laod = 0.00035;
  Kc = 497.7852;
  Do = 50;
  Vsa_o = 485.7625;
  Vsa_max = 577.7106;
  Kp1 = 0.03;
  Kp2 = 0.05;
  Kr = 0.01;
  tau_p = 0.1;
  Kv = 21.83;
  Vmax_sv = 3379.545;
  D2 = -5;
  K1 = 0.0968305478;
  K2 = 0.4;
  KR = 0.001;
  Ro = 0.025;
  Vo = 129.6486;
  Vmax_vc = 350.5314;
  Vmin_vc = 50.010747;
  COtau = 15;
  Pplc = -5.6;
  Px2 = 2;
  Vx8 = 8;
  Vx75 = 75;
  Vx1 = 1;
  Px1 = 1;
  F_vaso = 0.5;
  Paopc = 87.93968;
  MAP = 90.6179;
  Faop = 0.698577;
  Faod = 23.5957;
  Vaop = 31.1705;
  Vaod = 138.4476;
  Vsa = 519.7915;
  Vsap = 129.6439;
  Vsc = 256.8555;
  Vsv = 2961.6507;
  Vvc = 232.4664;
  Rpuv = 0.0001;
  Rtpap = 0.05;
  Rtpad = 0.05;
  Rpap = 0.0001;
  Rpad = 0.03;
  Rps = 4.295803;
  Rpa = 0.0565149137;
  Rpc = 0.0309026688;
  Rpv = 0.0001;
  Ctpap = 1.536593;
  Ctpad = 2.689367;
  Cpa = 3.132145;
  Cpc = 7.7147;
  Cpv = 27.87029;
  Lpa = 0.0001801907;
  Lpad = 0.0001932239;
  Vpap = 33.1398;
  Vpad = 60.11204;
  Vpa = 58.926;
  Vpc = 107.57022;
  Vpv = 293.0398;
  Fpap = 1.2282;
  Fpad = 57.1876;
  K_pcd = 1;
  phi_pcd = 40;
  Vpcd_o = 785;
  perifl = 15;
  Rcorao = 2.642367;
  Rcorea = 2.642367;
  Rcorla = 5.073345;
  Rcorsa = 5.073345;
  Rcorcap = 4.227788;
  Rcorsv = 0.4932479;
  Rcorlv = 0.4932479;
  Rcorev = 0.4932479;
  Ccorao = 0.13;
  Ccorea = 0.05507;
  Ccorla = 0.09129;
  Ccorsa = 0.15602;
  Ccorcap = 1.8;
  Ccorsv = 0.58155;
  Ccorlv = 0.68372;
  Ccorev = 0.832299;
  Vcorao = 2.76087;
  Vcorea = 4.41135;
  Vcorla = 4.992799;
  Vcorsa = 4.22047;
  Vcorcap = 8.55228;
  Vcorsv = 7.8362;
  Vcorlv = 8.213955;
  Vcorev = 8.76758;

  // Assignment rules:
  hrf := 60/HR;
  beattime := t - floor(t/hrf)*hrf;
  Tsv := TsvK*sqrt(1*1/HR)*7.745967;
  Tsa := TsaK*sqrt(1/HR)*7.745967;
  trelv := beattime - PRint;
  trela := beattime;
  yla := piecewise((1 - cos(pi*trela/Tsa))/2, (trela >= 0) && (trela <= Tsa), (1 + cos(2*pi*(trela - Tsa)/Tsa))/2, (trela < 1.5*Tsa) && (trela >= Tsa), 0);
  yra := yla;
  ylv := piecewise((1 - cos(pi*trelv/Tsv))/2, (trelv >= 0) && (trelv <= Tsv), (1 + cos(2*pi*(trelv - Tsv)/Tsv))/2, (trelv < 1.5*Tsv) && (trelv >= Tsv), 0);
  yrv := ylv;
  Era := (Emaxra - Eminra)*yra + Eminra;
  Erv := (Emaxrv - Eminrv)*yrv + Eminrv;
  Ela := (Emaxla - Eminla)*yla + Eminla;
  Elv := (Emaxlv - Eminlv)*ylv + Eminlv;
  Fcorao := (Pcoraoc - Pcoreac)/Rcorao;
  Fcorcap := (Pcorcapc - Pcorsvc)/Rcorcap;
  Fcorea := (Pcoreac - Pcorlac)/Rcorea;
  Fcorev := (Pcorevc - Prac)/Rcorev;
  Fcorla := (Pcorlac - Pcorsac)/Rcorla;
  Fcorlv := (Pcorlvc - Pcorevc)/Rcorlv;
  Fcorsa := (Pcorsac - Pcorcapc)/Rcorsa;
  Fcorsv := (Pcorsvc - Pcorlvc)/Rcorsv;
  Fcrb := (Paodc - Pvcc)/Rcrb;
  Fla := piecewise((Plac - Plvc)/Rla, Plac > Plvc, 0);
  Flv := piecewise((Plvc - Paopc)/Rav, Plvc > Paopc, 0);
  Fpa := (Ppac - Ppcc)/Rpa;
  Fpc := (Ppcc - Ppvc)/Rpc;
  Fps := (Ppac - Ppvc)/Rps;
  Fpv := (Ppvc - Plac)/Rpv;
  Fra := piecewise((Prac - Prvc)/Rra, Prac > Prvc, 0);
  Frv := piecewise((Prvc - Ppapc)/Rpuv, Prvc > Ppapc, 0);
  Fsa := (Psa - Psc)/Rsa;
  Fsap := (Psap - Psa)/Rsap;
  Fsc := (Psc - Psv)/Rsc;
  Fsv := (Psv - Pvcc)/Rsv;
  Fvc := (Pvcc - Prac)/Rvc;
  P_QRSwave := piecewise(5, (t > beattime) && (t < beattime + 0.02), 10, (t > beattime + PRint) && (t < beattime + PRint + 0.02), 0);
  Paod := Paodc - Pbs;
  Paodc := (Rtaod*Rcrb*Faop - Rtaod*Rcrb*Faod*0.06 + Vaod*Rcrb/Caod*0.06 - Rcrb*Px2/(exp(Vaod/Vx8) - 1)*0.06 + Pvcc*Rtaod*0.06)/(Rcrb + Rtaod)*16.66667;
  Paop := Paopc - Pplc;
  Pcorao := Paop;
  Pcoraoc := Paopc;
  Pcorcap := Vcorcap/Ccorcap - Px1*1/(exp(Vcorcap/Vx1) - 1);
  Pcorcapc := Pcorcap + Pcorisfc;
  Pcorea := Vcorea/Ccorea - Px1*1/(exp(Vcorea/Vx1) - 1);
  Pcoreac := Pcorea + Ppcdc;
  Pcorev := Vcorev/Ccorev - Px2*1/(exp(Vcorev/Vx8) - 1);
  Pcorevc := Pcorev + Ppcdc;
  Pcorisfc := abs((Plvc - Ppcdc)/2);
  Pcorla := Vcorla/Ccorla - Px1*1/(exp(Vcorla/Vx1) - 1);
  Pcorlac := Pcorla + Pcorisfc;
  Pcorlv := Vcorlv/Ccorlv - Px1*1/(exp(Vcorlv/Vx1) - 1);
  Pcorlvc := Pcorlv + Ppcdc;
  Pcorsa := Vcorsa/Ccorsa - Px1*1/(exp(Vcorsa/Vx1) - 1);
  Pcorsac := Pcorsa + Pcorisfc;
  Pcorsv := Vcorsv/Ccorsv - Px1*1/(exp(Vcorsv/Vx1) - 1);
  Pcorsvc := Pcorsv + Ppcdc;
  Pla := (Vla - Vlar)*Ela - Px2*1/(exp(Vla/Vx8) - 1);
  Plac := Pla + Ppcdc;
  Plv := (Vlv - Vlvr)*Elv - Px2*1/(exp(Vlv/Vx8) - 1);
  Plvc := Plv + Ppcdc;
  Ppa := Vpa/Cpa - Px2*1/(exp(Vpa/Vx8) - 1);
  Ppac := Ppa + Pplc;
  Ppad := Ppadc - Pplc;
  Ppadc := Vpad*Rtpad + Pplc + Vpad/Ctpad - Px2*1/(exp(Vpad/Vx8) - 1);
  Ppap := Ppapc - Pplc;
  Ppapc1 := (Rpuv*Vpap/Ctpap - Rpuv*Px2*1/(exp(Vpap/Vx8) - 1) + Prvc*Rtpap - Rpuv*Rtpap*Fpap*16.66667 + Pplc*Rpuv)/(Rtpap + Rpuv);
  Ppapc2 := Vpap/Ctpap + Pplc - Rtpap*Fpap*16.66667 - Px2*1/(exp(Vpap/Vx8) - 1);
  Ppapc := piecewise(Ppapc1, Prvc > Ppapc1, Ppapc2);
  Ppc := Vpc/Cpc - Px2*1/(exp(Vpc/Vx8) - 1);
  Ppcc := Ppc + Pplc;
  Ppcd := K_pcd*exp((Vpcd - Vpcd_o)/phi_pcd) - Px2*1/(exp(Vpcd/Vx75) - 1);
  Ppcdc := Ppcd + Pplc;
  Ppl := Pplc - Pbs;
  Ppv := Vpv/Cpv - Px2*1/(exp(Vpv/Vx8) - 1);
  Ppvc := Ppv + Pplc;
  Pra := (Vra - Vrar)*Era - Px2*1/(exp(Vra/Vx8) - 1);
  Prac := Pra + Ppcdc;
  Prv := (Vrv - Vrvr)*Erv - Px2*1/(exp(Vrv/Vx8) - 1);
  Prvc := Prv + Ppcdc;
  Psa_a := Kc*log10((Vsa - Vsa_o)/Do + 1);
  Psa := F_vaso*Psa_a + (1 - F_vaso)*Psa_p;
  Psa_p := Kp1*exp(tau_p*(Vsa - Vsa_o)) + Kp2*(Vsa - Vsa_o)^2;
  Psap := Vsap/Csap - Px2*1/(exp(Vsap/Vx8) - 1);
  Psc := Vsc/Csc - Px2*1/(exp(Vsc/Vx8) - 1);
  Psv := Kv*log10(Vmax_sv/Vsv - 0.99)*(-1);
  PulArtVol := Vpap + Vpad + Vpa;
  PulVenVol := Vpv;
  Pvc := piecewise(D2 + K2*exp(Vo/Vmin_vc) + K1*(Vvc - Vo)/1 - Px2/(exp(Vvc/Vx8) - 1), Vvc > Vo, D2 + K2*exp(Vvc/Vmin_vc) - Px2/(exp(Vvc/Vx8) - 1));
  Pvcc := Pvc + Pplc;
  Rsa := Rsao + Kr*exp(4*F_vaso) + Kr*(Vsa_max/Vsa)^2;
  Rvc := KR*(Vmax_vc/Vvc)^2 + Ro;
  SV := COutput/HR*60;
  SysArtVol := Vaop + Vaod + Vsa + Vsap;
  SysVenVol := Vsv + Vvc;
  VBcirc := Vtot - perifl;
  Vcorcirc := Vcorao + Vcorea + Vcorla + Vcorsa + Vcorcap + Vcorsv + Vcorlv + Vcorev;
  Vlar := (1 - yla)*(Vlard - Vlars) + Vlars;
  Vlvr := (1 - ylv)*(Vlvrd - Vlvrs) + Vlvrs;
  Vpcd := Vrv + Vra + Vlv + Vla + perifl + Vmyo + Vcorcirc;
  Vrar := (1 - yra)*(Vrard - Vrars) + Vrars;
  Vrvr := (1 - yrv)*(Vrvrd - Vrvrs) + Vrvrs;
  Vtot := Vra + Vrv + Vpap + Vpad + Vpa + Vpc + Vpv + Vla + Vlv + Vaop + Vaod + Vsa + Vsap + Vsc + Vsv + Vvc + perifl + Vcorcirc;

  // Rate rules:
  Faod' = (Paodc - Faod*Raod - Psap)/Laod;
  Faop' = (Paopc - Faop*Raop*16.66667 - Paodc)/Laop*0.06;
  Fpad' = (Ppadc - Ppac - Fpad*Rpad)/Lpad;
  Fpap' = (Ppapc - Ppadc - Fpap*Rpap*16.66667)/Lpa*0.06;
  MAP' = (Psa - MAP)/COtau;
  Paopc' = (Flv - Vaop - Faop*16.66667 - Fcorao)*(1/Ccorao + Px2/1*exp(Vcorao/Vx1)/(exp(Vcorao/Vx1) - 1)^2);
  Vaod' = (Faop - Faod*0.06 - Fcrb*0.06)*16.66667;
  Vaop' = (Paopc - Vaop/Caop + Px2*1/(exp(Vaop/Vx8) - 1))/Rtaop;
  Vcorao' = Flv - Vaop - Faop*16.66667 - Fcorao;
  Vcorcap' = Fcorsa - Fcorcap;
  Vcorea' = Fcorao - Fcorea;
  Vcorev' = Fcorlv - Fcorev;
  Vcorla' = Fcorea - Fcorla;
  Vcorlv' = Fcorsv - Fcorlv;
  Vcorsa' = Fcorla - Fcorsa;
  Vcorsv' = Fcorcap - Fcorsv;
  Vla' = Fpv - Fla;
  Vlv' = Fla - Flv;
  Vpa' = Fpad - Fps - Fpa;
  Vpad' = (Fpap - Fpad*0.06)*16.66667;
  Vpap' = Frv - Fpap*16.66667;
  Vpc' = Fpa - Fpc;
  Vpv' = Fpc + Fps - Fpv;
  Vra' = Fvc - Fra + Fcorev;
  Vrv' = Fra - Frv;
  Vsa' = Fsap - Fsa;
  Vsap' = Faod - Fsap;
  Vsc' = Fsa - Fsc;
  Vsv' = Fsc - Fsv;
  Vvc' = Fsv + Fcrb - Fvc;

  // Unit definitions:
  unit mmHg = 133.322 pascal;
  unit perml = 1 / (1e-3 litre);
  unit elastance = 133.322 pascal / (1e-3 litre);
  unit mL = 1e-3 litre;
  unit s = second;
  unit Hz = 1 / second;
  unit flow = 1e-3 litre / second;
  unit flowLm = litre / (60 second);
  unit inductance = 133.322 pascal * second^2 / (1e-3 litre);
  unit resistance = 133.322 pascal * second / (1e-3 litre);
  unit capacitance = 1e-3 litre / (133.322 pascal);
  unit ratepm = 1 / (60 second);
  unit Hz2rpm = 1 / (7.745967 second)^2;
  unit mmHgmlm2 = 133.322 pascal / (1e-3 litre)^2;
  unit mV = 1e-3 volt;
  unit time = second;
end
