// SBML level 2 version 4

model Bertram2006_ATPproduction_Mitochondrial()
  // This a model from the article:
  // A simplified model for mitochondrial ATP production.
  // Bertram R, Gram Pedersen M, Luciani DS, Sherman A. J Theor Biol 2006 Dec 21;243(4):575-86 16945388 ,
  // Abstract:
  // Most of the adenosine triphosphate (ATP) synthesized during glucose metabolism is produced in the mitochondria through oxidative phosphorylation. This is a complex reaction powered by the proton gradient across the mitochondrial inner membrane, which is generated by mitochondrial respiration. A detailed model of this reaction, which includes dynamic equations for the key mitochondrial variables, was developed earlier by Magnus and Keizer. However, this model is extraordinarily complicated. We develop a simpler model that captures the behavior of the original model but is easier to use and to understand. We then use it to investigate the mitochondrial responses to glycolytic and calcium input. We use the model to explain experimental observations of the opposite effects of raising cytosolic Ca(2+)in low and high glucose, and to predict the effects of a mutation in the mitochondrial enzyme nicotinamide nucleotide transhydrogenase (Nnt) in pancreatic beta-cells.
  // This model was taken from the CellML repository and automatically converted to SBML.
  // The original model was: Bertram R, Gram Pedersen M, Luciani DS, Sherman A. (2006) - version=1.0
  // The original CellML model was created by:
  // Tessa Paris
  // tpar054@aucklanduni.ac.nz
  // The University of Auckland
  // This model originates from BioModels Database: A Database of Annotated Published Models (http://www.ebi.ac.uk/biomodels/). It is copyright (c) 2005-2011 The BioModels.net Team.
  // To the extent possible under law, all copyright and related or neighbouring rights to this encoded model have been dedicated to the public domain worldwide. Please refer to CC0 Public Domain Dedication for more information.
  // In summary, you are entitled to use this encoded model in absolutely any manner you deem suitable, verbatim, or with modification, alone or embedded it in a larger context, redistribute it, commercially or not, in a restricted way or not..
  // To cite BioModels Database, please use: Li C, Donizelli M, Rodriguez N, Dharuri H, Endler L, Chelliah V, Li L, He E, Henry A, Stefan MI, Snoep JL, Hucka M, Le Novère N, Laibe C (2010) BioModels Database: An enhanced, curated and annotated resource for published quantitative kinetic models. BMC Syst Biol., 4:92.
  // biomodels.db:MODEL1006230114
  // isDescribedBy pubmed:16945388
  // biomodels.db:MODEL1006230114
  // isDescribedBy pubmed:16945388
  // biomodels.db:MODEL1006230114
  // biomodels.db:MODEL1006230114

  // Compartments:
  compartment COMpartment = 1 litre;

  // Parameters:
  time_Environment = ;
  NADHm = 0.6;
  gamma = 0.001;
  ADPm = 7.4;
  PSIm = 93;
  Cam = 0.1;
  NADtot = 10;
  fm = 0.01;
  Cmito = 1.8;
  Amtot = 15;
  ADPc = 1850;
  Ac_tot = 2500;
  khyd = 5e-5;
  Jhydbas = 5e-5;
  c = 0.1;
  FBP = 0.5;
  time_Clamp_parameters = ;
  Fhold = 1;
  Ftest = 5;
  Fton = 90000;
  Ftoff = 330000;
  Chold = 0.1;
  Ctest = 0.1;
  Cton1 = 120000;
  Cton2 = 180000;
  Cton3 = 240000;
  Ctoff1 = 150000;
  Ctoff2 = 210000;
  Ctoff3 = 270000;
  FRT = 0.037;
  kgpdh = 0.0005;
  p1 = 400;
  p2 = 1;
  p3 = 0.01;
  p4 = 0.6;
  p5 = 0.1;
  p6 = 177;
  p7 = 5;
  p8 = 7;
  p9 = 0.1;
  p10 = 177;
  p11 = 5;
  p12 = 120;
  p13 = 10;
  p14 = 190;
  p15 = 8.5;
  p16 = 35;
  p17 = 0.002;
  p18 = -0.03;
  p19 = 0.35;
  p20 = 2;
  p21 = 0.01;
  p22 = 1.1;
  p23 = 0.001;
  p24 = 0.016;

  // Assignment rules:
  NADm := NADtot - NADHm;
  ATPm := Amtot - ADPm;
  RATm := ATPm/ADPm;
  delta := 3.9/53.2;
  ATPc := Ac_tot - ADPc;
  Jh_yd := (khyd*c + Jhydbas)*ATPc/1;
  Fproto := Fhold + (Ftest - Fhold)*(heav_on - heav_off);
  heav_on := piecewise(1, time_Clamp_parameters - Fton >= 0, 0);
  heav_off := piecewise(1, time_Clamp_parameters - Ftoff >= 0, 0);
  heav_Cton1 := piecewise(1, time_Clamp_parameters - Cton1 >= 0, 0);
  heav_Cton2 := piecewise(1, time_Clamp_parameters - Cton2 >= 0, 0);
  heav_Cton3 := piecewise(1, time_Clamp_parameters - Cton3 >= 0, 0);
  heav_Ctoff1 := piecewise(1, time_Clamp_parameters - Ctoff1 >= 0, 0);
  heav_Ctoff2 := piecewise(1, time_Clamp_parameters - Ctoff2 >= 0, 0);
  heav_Ctoff3 := piecewise(1, time_Clamp_parameters - Ctoff3 >= 0, 0);
  pulse1 := (Ctest - Chold)*(heav_Cton1 - heav_Ctoff1);
  pulse2 := (Ctest - Chold)*(heav_Cton2 - heav_Ctoff2);
  pulse3 := (Ctest - Chold)*(heav_Cton3 - heav_Ctoff3);
  Cproto := Chold + pulse1 + pulse2 + pulse3;
  Juni := (p21*PSIm - p22)*c^2;
  Jnaca := p23*Cam/c*exp(p24*PSIm);
  Jmito := Jnaca - Juni;
  Jh_leak := p17*PSIm + p18;
  MM1 := p4*NADHm/(p5 + NADHm);
  MM2 := p8*NADHm/(p9 + NADHm);
  Jo := MM1/(1 + exp((PSIm - p6)/p7));
  Jh_res := MM2/(1 + exp((PSIm - p10)/p11));
  b13 := p12*p13/(p13 + ATPm);
  Jh_atp := b13/(1 + exp((p14 - PSIm)/p15));
  b2 := p16*p13/(p13 + ATPm);
  Jf1f0 := b2/(1 + exp((p14 - PSIm)/p15));
  Jant := p19*RATm/(RATm + p20)/exp(-0.5*FRT*PSIm);
  Jgpdh := kgpdh*sqrt(FBP/1);
  Jpdh := p1/(p2 + NADHm/NADm)*(Cam/(p3 + Cam))*Jgpdh;

  // Rate rules:
  NADHm' = gamma*(Jpdh - Jo);
  ADPm' = gamma*(Jant - Jf1f0);
  PSIm' = (Jh_res - Jh_atp - Jant - Jh_leak - Jnaca - Juni*2)/Cmito;
  Cam' = -fm*Jmito;
  ADPc' = -delta*Jant + Jh_yd*1;
  FBP' = (Fproto - FBP)/0.1;
  c' = (Cproto - c)/0.1;

  // Unit definitions:
  unit mM = 1e-3 mole / litre;
  unit uM = 1e-6 mole / litre;
  unit mV = 1e-3 volt;
  unit ms = 1e-3 second;
  unit per_ms = 1 / (1e-3 second);
  unit uM_per_ms = 1e-6 mole / (litre * 1e-3 second);
  unit per_uM_per_ms_per_mV = litre / (1e-6 mole * 1e-3 second * 1e-3 volt);
  unit uM_per_mV = 1e-6 mole / (litre * 1e-3 volt);
  unit per_uM_per_ms = litre / (1e-6 mole * 1e-3 second);
  unit per_mV = 1 / (1e-3 volt);
  unit uM_per_ms_per_mV = 1e-6 mole / (litre * 1e-3 second * 1e-3 volt);
  unit C_per_mol = coulomb / mole;
  unit mJ_per_K_per_mol = 1e-3 joule / (kelvin * mole);
  unit time = 1e-3 second;
end
