// SBML level 2 version 4

model Tran2009_CardiacActiveForceGeneration()
  // This a model from the article:
  // A metabolite-sensitive, thermodynamically constrained model of cardiac cross-bridge cycling: implications for force development during ischemia.
  // Tran K, Smith NP, Loiselle DS, Crampin EJ. Biophys J 2010 Jan 20;98(2):267-76 20338848 ,
  // Abstract:
  // We present a metabolically regulated model of cardiac active force generation with which we investigate the effects of ischemia on maximum force production. Our model, based on a model of cross-bridge kinetics that was developed by others, reproduces many of the observed effects of MgATP, MgADP, Pi, and H(+) on force development while retaining the force/length/Ca(2+) properties of the original model. We introduce three new parameters to account for the competitive binding of H(+) to the Ca(2+) binding site on troponin C and the binding of MgADP within the cross-bridge cycle. These parameters, along with the Pi and H(+) regulatory steps within the cross-bridge cycle, were constrained using data from the literature and validated using a range of metabolic and sinusoidal length perturbation protocols. The placement of the MgADP binding step between two strongly-bound and force-generating states leads to the emergence of an unexpected effect on the force-MgADP curve, where the trend of the relationship (positive or negative) depends on the concentrations of the other metabolites and [H(+)]. The model is used to investigate the sensitivity of maximum force production to changes in metabolite concentrations during the development of ischemia. Copyright 2010 Biophysical Society. Published by Elsevier Inc. All rights reserved.
  // This model was taken from the CellML repository and automatically converted to SBML.
  // The original model was: Tran K, Smith NP, Loiselle DS, Crampin EJ. (2009) - version=1.0
  // The original CellML model was created by:
  // Catherine Lloyd
  // c.lloyd@auckland.ac.nz
  // The University of Auckland
  // This model originates from BioModels Database: A Database of Annotated Published Models (http://www.ebi.ac.uk/biomodels/). It is copyright (c) 2005-2011 The BioModels.net Team.
  // To the extent possible under law, all copyright and related or neighbouring rights to this encoded model have been dedicated to the public domain worldwide. Please refer to CC0 Public Domain Dedication for more information.
  // In summary, you are entitled to use this encoded model in absolutely any manner you deem suitable, verbatim, or with modification, alone or embedded it in a larger context, redistribute it, commercially or not, in a restricted way or not..
  // To cite BioModels Database, please use: Li C, Donizelli M, Rodriguez N, Dharuri H, Endler L, Chelliah V, Li L, He E, Henry A, Stefan MI, Snoep JL, Hucka M, Le Novère N, Laibe C (2010) BioModels Database: An enhanced, curated and annotated resource for published quantitative kinetic models. BMC Syst Biol., 4:92.
  // biomodels.db:MODEL1006230116
  // isDescribedBy pubmed:20338848
  // biomodels.db:MODEL1006230116
  // isDescribedBy pubmed:20338848
  // biomodels.db:MODEL1006230116
  // biomodels.db:MODEL1006230116

  // Compartments:
  compartment COMpartment = 1 litre;

  // Parameters:
  k_p1 = 25900;
  k_p2 = 2540;
  k_p3 = 20.5;
  k_m1 = 16;
  k_m2 = 67200;
  k_m3 = 149;
  kdcai = 0.9;
  kdcasr = 2.24;
  kdh1 = 1.09e-5;
  kdhi = 0.00354;
  kdhsr = 1.05e-8;
  kdh = 7.24e-5;
  n = 2;
  Ca_i = 0.00015;
  Ca_sr = 0;
  H_i = 0.0001;
  ATP = 5;
  ADP = 0.0363;
  P_i = 1;

  // Assignment rules:
  T_Cai := Ca_i/kdcai;
  T_Casr := Ca_sr/kdcasr;
  T_H1 := H_i/kdh1;
  T_Hi := H_i^n/kdhi;
  T_Hsr := H_i^n/kdhsr;
  T_H := H_i/kdh;
  a_p1 := k_p1*ATP;
  a_p2 := k_p2*T_Cai^2/(T_Cai^2 + T_Cai^2*T_Hi + T_Hi*(1 + T_H1));
  a_p3 := k_p3*T_Hsr/(T_Casr^2*T_H + T_H + T_Hsr*(1 + T_H));
  a_m1 := k_m1*T_Hi/(T_Cai^2 + T_Cai^2*T_Hi + T_Hi*(1 + T_H1));
  a_m2 := k_m2*ADP*T_Casr^2*T_H/(T_Casr^2*T_H + T_H + T_Hsr*(1 + T_H));
  a_m3 := k_m3*P_i;
  s1 := a_p2*a_p3 + a_m1*a_p3 + a_m1*a_m2;
  s2 := a_p1*a_p3 + a_m2*a_p1 + a_m2*a_m3;
  s3 := a_p1*a_p2 + a_m3*a_m1 + a_m3*a_p2;
  v_cycle := (a_p1*a_p2*a_p3 - a_m1*a_m2*a_m3)/(s1 + s2 + s3);

  // Rate rules:
  Ca_sr' = 1;

  // Unit definitions:
  unit first_order_rate_constant = 1 / second;
  unit per_second_squared = 1 / second^2;
  unit millimolar = 1e-3 mole / litre;
  unit flux = 1e-3 mole / (litre * second);
  unit millimolar_squared = (1e-3 mole)^2 / litre^2;
  unit second_order_rate_constant = litre / (1e-3 mole * second);
end
