// SBML level 2 version 1

model Iancu2007_CardiacMyoscytes_cAMPsignaling()
  // This a model from the article:
  // Compartmentation of cAMP signaling in cardiac myocytes: a computational study.
  // Iancu RV, Jones SW, Harvey RD. Biophys J 2007 May 1;92(9):3317-31 17293406 ,
  // Abstract:
  // Receptor-mediated changes in cAMP production play an essential role in sympathetic and parasympathetic regulation of the electrical, mechanical, and metabolic activity of cardiac myocytes. However, responses to receptor activation cannot be easily ascribed to a uniform increase or decrease in cAMP activity throughout the entire cell. In this study, we used a computational approach to test the hypothesis that in cardiac ventricular myocytes the effects of beta(1)-adrenergic receptor (beta(1)AR) and M(2) muscarinic receptor (M(2)R) activation involve compartmentation of cAMP. A model consisting of two submembrane (caveolar and extracaveolar) microdomains and one bulk cytosolic domain was created using published information on the location of beta(1)ARs and M(2)Rs, as well as the location of stimulatory (G(s)) and inhibitory (G(i)) G-proteins, adenylyl cyclase isoforms inhibited (AC5/6) and stimulated (AC4/7) by G(i), and multiple phosphodiesterase isoforms (PDE2, PDE3, and PDE4). Results obtained with the model indicate that: 1), bulk basal cAMP can be high ( approximately 1 microM) and only modestly stimulated by beta(1)AR activation ( approximately 2 microM), but caveolar cAMP varies in a range more appropriate for regulation of protein kinase A ( approximately 100 nM to approximately 2 microM); 2), M(2)R activation strongly reduces the beta(1)AR-induced increases in caveolar cAMP, with less effect on bulk cAMP; and 3), during weak beta(1)AR stimulation, M(2)R activation not only reduces caveolar cAMP, but also produces a rebound increase in caveolar cAMP following termination of M(2)R activity. We conclude that compartmentation of cAMP can provide a quantitative explanation for several aspects of cardiac signaling.
  // This model was taken from the CellML repository and automatically converted to SBML.
  // The original model was: Iancu RV, Jones SW, Harvey RD. (2007) - version=1.0
  // The original CellML model was created by:
  // Geoffrey Nunns
  // gnunns1@jhu.edu
  // The University of Auckland
  // This model originates from BioModels Database: A Database of Annotated Published Models (http://www.ebi.ac.uk/biomodels/). It is copyright (c) 2005-2011 The BioModels.net Team.
  // To the extent possible under law, all copyright and related or neighbouring rights to this encoded model have been dedicated to the public domain worldwide. Please refer to CC0 Public Domain Dedication for more information.
  // In summary, you are entitled to use this encoded model in absolutely any manner you deem suitable, verbatim, or with modification, alone or embedded it in a larger context, redistribute it, commercially or not, in a restricted way or not..
  // To cite BioModels Database, please use: Li C, Donizelli M, Rodriguez N, Dharuri H, Endler L, Chelliah V, Li L, He E, Henry A, Stefan MI, Snoep JL, Hucka M, Le Novère N, Laibe C (2010) BioModels Database: An enhanced, curated and annotated resource for published quantitative kinetic models. BMC Syst Biol., 4:92.
  // biomodels.db:MODEL1006230117
  // isDescribedBy pubmed:17293406
  // biomodels.db:MODEL1006230117
  // isDescribedBy pubmed:17293406
  // biomodels.db:MODEL1006230117
  // biomodels.db:MODEL1006230117

  // Compartments:
  compartment COMpartment = 1 litre;

  // Parameters:
  K_H_beta_1_adrenergic_parameters = 0.035;
  K_L_beta_1_adrenergic_parameters = 0.386;
  K_C_beta_1_adrenergic_parameters = 8.809;
  K_H_muscarinic_parameters = 0.16;
  K_L_muscarinic_parameters = 11;
  K_C_muscarinic_parameters = 30;
  k_PDE2 = 20;
  Km_PDE2 = 50;
  k_PDE3 = 1.25;
  Km_PDE3 = 0.08;
  k_PDE4 = 2.5;
  Km_PDE4 = 2.2;
  k_act1_G_s_parameters = 5;
  k_act2_G_s_parameters = 0.1;
  k_hydr_G_s_parameters = 0.8;
  k_reas_G_s_parameters = 1210;
  k_act1_G_i_parameters = 2.5;
  k_act2_G_i_parameters = 0.05;
  k_hydr_G_i_parameters = 0.8;
  k_reas_G_i_parameters = 1210;
  var R_caveolar_beta_1_adrenergic_receptor_module;
  var LR_caveolar_beta_1_adrenergic_receptor_module;
  var LRG_caveolar_beta_1_adrenergic_receptor_module;
  var RG_caveolar_beta_1_adrenergic_receptor_module;
  R_Total_caveolar_beta_1_adrenergic_receptor_module = 0.633;
  var R_caveolar_muscarinic_receptor_module;
  var LR_caveolar_muscarinic_receptor_module;
  var LRG_caveolar_muscarinic_receptor_module;
  var RG_caveolar_muscarinic_receptor_module;
  R_Total_caveolar_muscarinic_receptor_module = 0.633;
  Gs_alpha_GTP_caveolar_G_s_protein_activation_module = 0.041983438;
  Gs_beta_gamma_caveolar_G_s_protein_activation_module = 0.042634499;
  Gs_alpha_GDP_caveolar_G_s_protein_activation_module = 0.000651061;
  var Gs_alpha_beta_gamma_caveolar_G_s_protein_activation_module;
  Gs_Total_caveolar_G_s_protein_activation_module = 10;
  Gi_alpha_GTP_caveolar_G_i_protein_activation_module = 0.012644961;
  Gi_beta_gamma_caveolar_G_i_protein_activation_module = 0.013274751;
  Gi_alpha_GDP_caveolar_G_i_protein_activation_module = 0.00062979;
  var Gi_alpha_beta_gamma_caveolar_G_i_protein_activation_module;
  Gi_Total_caveolar_G_i_protein_activation_module = 20;
  var R_extracaveolar_beta_1_adrenergic_receptor_module;
  var LR_extracaveolar_beta_1_adrenergic_receptor_module;
  var LRG_extracaveolar_beta_1_adrenergic_receptor_module;
  var RG_extracaveolar_beta_1_adrenergic_receptor_module;
  R_Total_extracaveolar_beta_1_adrenergic_receptor_module = 0.633;
  var R_extracaveolar_muscarinic_receptor_module;
  var LR_extracaveolar_muscarinic_receptor_module;
  var LRG_extracaveolar_muscarinic_receptor_module;
  var RG_extracaveolar_muscarinic_receptor_module;
  R_Total_extracaveolar_muscarinic_receptor_module = 0.633;
  Gs_alpha_GTP_extracaveolar_G_s_protein_activation_module = 0.083866891;
  Gs_beta_gamma_extracaveolar_G_s_protein_activation_module = 0.084522918;
  Gs_alpha_GDP_extracaveolar_G_s_protein_activation_module = 0.000656025;
  var Gs_alpha_beta_gamma_extracaveolar_G_s_protein_activation_module;
  Gs_Total_extracaveolar_G_s_protein_activation_module = 10;
  Gi_alpha_GTP_extracaveolar_G_i_protein_activation_module = 0.001018705;
  Gi_beta_gamma_extracaveolar_G_i_protein_activation_module = 0.001475253;
  Gi_alpha_GDP_extracaveolar_G_i_protein_activation_module = 0.000456548;
  var Gi_alpha_beta_gamma_extracaveolar_G_i_protein_activation_module;
  Gi_Total_extracaveolar_G_i_protein_activation_module = 1;
  AC_56 = 3.379;
  AF56 = 500;
  MW_AC56 = 130;
  ATP_AC56_module = 5000;
  Km_ATP_AC56_module = 315;
  AC_47_ecav = 0.2;
  AF47_AC47_ecav_module = 130;
  MW_AC47 = 130;
  ATP_AC47_ecav_module = 5000;
  Km_ATP_AC47_ecav_module = 315;
  k_AC47_cyt = 0.00108;
  AC_47_cyt = 0.136;
  AF47_AC47_cyt_module = 130;
  ATP_AC47_cyt_module = 5000;
  Km_ATP_AC47_cyt_module = 315;
  PDE2_caveolar_PDE_module = 4.5;
  PDE3_caveolar_PDE_module = 5.6;
  PDE4_caveolar_PDE_module = 2;
  PDE2_extracaveolar_PDE_module = 0.02;
  PDE4_extracaveolar_PDE_module = 0.16;
  PDE2_bulk_cytoplasmic_PDE_module = 0.005;
  PDE3_bulk_cytoplasmic_PDE_module = 0.0075;
  PDE4_bulk_cytoplasmic_PDE_module = 0.005;
  cAMP_cav = 0.11750433;
  cAMP_ecav = 1.092201;
  cAMP_cyt = 0.992583576;
  V_cell = 3.8e-11;
  J_cav_ecav = 7.5e-15;
  J_cav_cyt = 7.5e-14;
  J_ecav_cyt = 1.5e-17;

  // Assignment rules:
  L_iso := piecewise(1, (time > 120) && (time <= 720), 1);
  L_ach := piecewise(0, (time > 240) && (time <= 540), 0);
  R_caveolar_beta_1_adrenergic_receptor_module := R_Total_caveolar_beta_1_adrenergic_receptor_module - LR_caveolar_beta_1_adrenergic_receptor_module - LRG_caveolar_beta_1_adrenergic_receptor_module - RG_caveolar_beta_1_adrenergic_receptor_module;
  LR_caveolar_beta_1_adrenergic_receptor_module := L_iso*R_caveolar_beta_1_adrenergic_receptor_module/K_L_beta_1_adrenergic_parameters;
  LRG_caveolar_beta_1_adrenergic_receptor_module := L_iso*R_caveolar_beta_1_adrenergic_receptor_module*Gs_alpha_beta_gamma_caveolar_G_s_protein_activation_module/(K_H_beta_1_adrenergic_parameters*K_C_beta_1_adrenergic_parameters);
  RG_caveolar_beta_1_adrenergic_receptor_module := R_caveolar_beta_1_adrenergic_receptor_module*Gs_alpha_beta_gamma_caveolar_G_s_protein_activation_module/K_C_beta_1_adrenergic_parameters;
  R_caveolar_muscarinic_receptor_module := R_Total_caveolar_muscarinic_receptor_module - LR_caveolar_muscarinic_receptor_module - LRG_caveolar_muscarinic_receptor_module - RG_caveolar_muscarinic_receptor_module;
  LR_caveolar_muscarinic_receptor_module := L_ach*R_caveolar_muscarinic_receptor_module/K_L_muscarinic_parameters;
  LRG_caveolar_muscarinic_receptor_module := L_ach*R_caveolar_muscarinic_receptor_module*Gi_alpha_beta_gamma_caveolar_G_i_protein_activation_module/(K_H_muscarinic_parameters*K_C_muscarinic_parameters);
  RG_caveolar_muscarinic_receptor_module := R_caveolar_muscarinic_receptor_module*Gi_alpha_beta_gamma_caveolar_G_i_protein_activation_module/K_C_muscarinic_parameters;
  Gs_alpha_beta_gamma_caveolar_G_s_protein_activation_module := Gs_Total_caveolar_G_s_protein_activation_module - Gs_alpha_GTP_caveolar_G_s_protein_activation_module - Gs_alpha_GDP_caveolar_G_s_protein_activation_module;
  Gi_alpha_beta_gamma_caveolar_G_i_protein_activation_module := Gi_Total_caveolar_G_i_protein_activation_module - Gi_alpha_GTP_caveolar_G_i_protein_activation_module - Gi_alpha_GDP_caveolar_G_i_protein_activation_module;
  R_extracaveolar_beta_1_adrenergic_receptor_module := R_Total_extracaveolar_beta_1_adrenergic_receptor_module - LR_extracaveolar_beta_1_adrenergic_receptor_module - LRG_extracaveolar_beta_1_adrenergic_receptor_module - RG_extracaveolar_beta_1_adrenergic_receptor_module;
  LR_extracaveolar_beta_1_adrenergic_receptor_module := L_iso*R_extracaveolar_beta_1_adrenergic_receptor_module/K_L_beta_1_adrenergic_parameters;
  LRG_extracaveolar_beta_1_adrenergic_receptor_module := L_iso*R_extracaveolar_beta_1_adrenergic_receptor_module*Gs_alpha_beta_gamma_extracaveolar_G_s_protein_activation_module/(K_H_beta_1_adrenergic_parameters*K_C_beta_1_adrenergic_parameters);
  RG_extracaveolar_beta_1_adrenergic_receptor_module := R_extracaveolar_beta_1_adrenergic_receptor_module*Gs_alpha_beta_gamma_extracaveolar_G_s_protein_activation_module/K_C_beta_1_adrenergic_parameters;
  R_extracaveolar_muscarinic_receptor_module := R_Total_extracaveolar_muscarinic_receptor_module - LR_extracaveolar_muscarinic_receptor_module - LRG_extracaveolar_muscarinic_receptor_module - RG_extracaveolar_muscarinic_receptor_module;
  LR_extracaveolar_muscarinic_receptor_module := L_ach*R_extracaveolar_muscarinic_receptor_module/K_L_muscarinic_parameters;
  LRG_extracaveolar_muscarinic_receptor_module := L_ach*R_extracaveolar_muscarinic_receptor_module*Gi_alpha_beta_gamma_extracaveolar_G_i_protein_activation_module/(K_H_muscarinic_parameters*K_C_muscarinic_parameters);
  RG_extracaveolar_muscarinic_receptor_module := R_extracaveolar_muscarinic_receptor_module*Gi_alpha_beta_gamma_extracaveolar_G_i_protein_activation_module/K_C_muscarinic_parameters;
  Gs_alpha_beta_gamma_extracaveolar_G_s_protein_activation_module := Gs_Total_extracaveolar_G_s_protein_activation_module - Gs_alpha_GTP_extracaveolar_G_s_protein_activation_module - Gs_alpha_GDP_extracaveolar_G_s_protein_activation_module;
  Gi_alpha_beta_gamma_extracaveolar_G_i_protein_activation_module := Gi_Total_extracaveolar_G_i_protein_activation_module - Gi_alpha_GTP_extracaveolar_G_i_protein_activation_module - Gi_alpha_GDP_extracaveolar_G_i_protein_activation_module;
  k_AC56 := (0.7 + 3.8234*(Gs_alpha_GTP_caveolar_G_s_protein_activation_module/1)^0.9787/(0.1986 + (Gs_alpha_GTP_caveolar_G_s_protein_activation_module/1)^0.9787))*(1 + 1/1.4432*(-1.0061)*(Gi_alpha_GTP_caveolar_G_i_protein_activation_module/1)^0.8356/(0.1918 + (Gi_alpha_GTP_caveolar_G_i_protein_activation_module/1)^0.8356))*MW_AC56/60*0.001;
  dcAMP_AC_56_dt := k_AC56*AC_56*AF56*ATP_AC56_module/(Km_ATP_AC56_module + ATP_AC56_module);
  k_AC47_ecav := (0.063 + 2.01*(Gs_alpha_GTP_extracaveolar_G_s_protein_activation_module*1000)^1.0043/(31.544 + (Gs_alpha_GTP_extracaveolar_G_s_protein_activation_module*1000)^1.0043))*(1 + 1/3.01*49.1*(Gi_beta_gamma_extracaveolar_G_i_protein_activation_module*1000)^0.8921/(25.44 + (Gi_beta_gamma_extracaveolar_G_i_protein_activation_module*1000)^0.8921))*MW_AC47/60*0.001;
  dcAMP_AC_47_ecav_dt := k_AC47_ecav*AC_47_ecav*AF47_AC47_ecav_module*ATP_AC47_ecav_module/(Km_ATP_AC47_ecav_module + ATP_AC47_ecav_module);
  dcAMP_AC_47_cyt_dt := k_AC47_cyt*AC_47_cyt*AF47_AC47_cyt_module*ATP_AC47_cyt_module/(Km_ATP_AC47_cyt_module + ATP_AC47_cyt_module);
  dcAMP_cav_PDE2_dt := k_PDE2*PDE2_caveolar_PDE_module*cAMP_cav/(Km_PDE2 + cAMP_cav);
  dcAMP_cav_PDE3_dt := k_PDE3*PDE3_caveolar_PDE_module*cAMP_cav/(Km_PDE3 + cAMP_cav);
  dcAMP_cav_PDE4_dt := k_PDE4*PDE4_caveolar_PDE_module*cAMP_cav/(Km_PDE4 + cAMP_cav);
  dcAMP_ecav_PDE2_dt := k_PDE2*PDE2_extracaveolar_PDE_module*cAMP_ecav/(Km_PDE2 + cAMP_ecav);
  dcAMP_ecav_PDE4_dt := k_PDE4*PDE4_extracaveolar_PDE_module*cAMP_ecav/(Km_PDE4 + cAMP_ecav);
  dcAMP_cyt_PDE2_dt := k_PDE2*PDE2_bulk_cytoplasmic_PDE_module*cAMP_cyt/(Km_PDE2 + cAMP_cyt);
  dcAMP_cyt_PDE3_dt := k_PDE3*PDE3_bulk_cytoplasmic_PDE_module*cAMP_cyt/(Km_PDE3 + cAMP_cyt);
  dcAMP_cyt_PDE4_dt := k_PDE4*PDE4_bulk_cytoplasmic_PDE_module*cAMP_cyt/(Km_PDE4 + cAMP_cyt);
  V_cav := 0.01*V_cell;
  V_ecav := 0.02*V_cell;
  V_cyt := 0.5*V_cell;

  // Rate rules:
  Gs_alpha_GTP_caveolar_G_s_protein_activation_module' = RG_caveolar_beta_1_adrenergic_receptor_module*k_act2_G_s_parameters + LRG_caveolar_beta_1_adrenergic_receptor_module*k_act1_G_s_parameters - Gs_alpha_GTP_caveolar_G_s_protein_activation_module*k_hydr_G_s_parameters;
  Gs_beta_gamma_caveolar_G_s_protein_activation_module' = RG_caveolar_beta_1_adrenergic_receptor_module*k_act2_G_s_parameters + LRG_caveolar_beta_1_adrenergic_receptor_module*k_act1_G_s_parameters - Gs_alpha_GDP_caveolar_G_s_protein_activation_module*Gs_beta_gamma_caveolar_G_s_protein_activation_module*k_reas_G_s_parameters;
  Gs_alpha_GDP_caveolar_G_s_protein_activation_module' = Gs_alpha_GTP_caveolar_G_s_protein_activation_module*k_hydr_G_s_parameters - Gs_alpha_GDP_caveolar_G_s_protein_activation_module*Gs_beta_gamma_caveolar_G_s_protein_activation_module*k_reas_G_s_parameters;
  Gi_alpha_GTP_caveolar_G_i_protein_activation_module' = RG_caveolar_muscarinic_receptor_module*k_act2_G_i_parameters + LRG_caveolar_muscarinic_receptor_module*k_act1_G_i_parameters - Gi_alpha_GTP_caveolar_G_i_protein_activation_module*k_hydr_G_i_parameters;
  Gi_beta_gamma_caveolar_G_i_protein_activation_module' = RG_caveolar_muscarinic_receptor_module*k_act2_G_i_parameters + LRG_caveolar_muscarinic_receptor_module*k_act1_G_i_parameters - Gi_alpha_GDP_caveolar_G_i_protein_activation_module*Gi_beta_gamma_caveolar_G_i_protein_activation_module*k_reas_G_i_parameters;
  Gi_alpha_GDP_caveolar_G_i_protein_activation_module' = Gi_alpha_GTP_caveolar_G_i_protein_activation_module*k_hydr_G_i_parameters - Gi_alpha_GDP_caveolar_G_i_protein_activation_module*Gi_beta_gamma_caveolar_G_i_protein_activation_module*k_reas_G_i_parameters;
  Gs_alpha_GTP_extracaveolar_G_s_protein_activation_module' = RG_extracaveolar_beta_1_adrenergic_receptor_module*k_act2_G_s_parameters + LRG_extracaveolar_beta_1_adrenergic_receptor_module*k_act1_G_s_parameters - Gs_alpha_GTP_extracaveolar_G_s_protein_activation_module*k_hydr_G_s_parameters;
  Gs_beta_gamma_extracaveolar_G_s_protein_activation_module' = RG_extracaveolar_beta_1_adrenergic_receptor_module*k_act2_G_s_parameters + LRG_extracaveolar_beta_1_adrenergic_receptor_module*k_act1_G_s_parameters - Gs_alpha_GDP_extracaveolar_G_s_protein_activation_module*Gs_beta_gamma_extracaveolar_G_s_protein_activation_module*k_reas_G_s_parameters;
  Gs_alpha_GDP_extracaveolar_G_s_protein_activation_module' = Gs_alpha_GTP_extracaveolar_G_s_protein_activation_module*k_hydr_G_s_parameters - Gs_alpha_GDP_extracaveolar_G_s_protein_activation_module*Gs_beta_gamma_extracaveolar_G_s_protein_activation_module*k_reas_G_s_parameters;
  Gi_alpha_GTP_extracaveolar_G_i_protein_activation_module' = RG_extracaveolar_muscarinic_receptor_module*k_act2_G_i_parameters + LRG_extracaveolar_muscarinic_receptor_module*k_act1_G_i_parameters - Gi_alpha_GTP_extracaveolar_G_i_protein_activation_module*k_hydr_G_i_parameters;
  Gi_beta_gamma_extracaveolar_G_i_protein_activation_module' = RG_extracaveolar_muscarinic_receptor_module*k_act2_G_i_parameters + LRG_extracaveolar_muscarinic_receptor_module*k_act1_G_i_parameters - Gi_alpha_GDP_extracaveolar_G_i_protein_activation_module*Gi_beta_gamma_extracaveolar_G_i_protein_activation_module*k_reas_G_i_parameters;
  Gi_alpha_GDP_extracaveolar_G_i_protein_activation_module' = Gi_alpha_GTP_extracaveolar_G_i_protein_activation_module*k_hydr_G_i_parameters - Gi_alpha_GDP_extracaveolar_G_i_protein_activation_module*Gi_beta_gamma_extracaveolar_G_i_protein_activation_module*k_reas_G_i_parameters;
  cAMP_cav' = dcAMP_AC_56_dt - (dcAMP_cav_PDE2_dt + dcAMP_cav_PDE3_dt + dcAMP_cav_PDE4_dt) - J_cav_ecav*(cAMP_cav - cAMP_ecav)/V_cav - J_cav_cyt*(cAMP_cav - cAMP_cyt)/V_cav;
  cAMP_ecav' = dcAMP_AC_47_ecav_dt - (dcAMP_ecav_PDE2_dt + dcAMP_ecav_PDE4_dt) + J_cav_ecav*(cAMP_cav - cAMP_ecav)/V_ecav - J_ecav_cyt*(cAMP_ecav - cAMP_cyt)/V_ecav;
  cAMP_cyt' = dcAMP_AC_47_cyt_dt - (dcAMP_cyt_PDE2_dt + dcAMP_cyt_PDE3_dt + dcAMP_cyt_PDE4_dt) + J_cav_cyt*(cAMP_cav - cAMP_cyt)/V_cyt + J_ecav_cyt*(cAMP_ecav - cAMP_cyt)/V_cyt;

  // Unit definitions:
  unit uM = 1e-6 mole / litre;
  unit per_uM = litre / (1e-6 mole);
  unit per_sec = 1 / second;
  unit uM_per_sec = 1e-6 mole / (litre * second);
  unit per_uM_per_sec = litre / (1e-6 mole * second);
  unit liters_per_second = litre / second;
  unit kDa = 1000 gram / mole;
end
