// SBML level 2 version 1

model Saucerman2003_CardiacMyocyte_BetaAdrenergic()
  // This a model from the article:
  // Modeling beta-adrenergic control of cardiac myocyte contractility in silico.
  // Saucerman JJ, Brunton LL, Michailova AP, McCulloch AD. J Biol Chem 2003 Nov 28;278(48):47997-8003 12972422 ,
  // Abstract:
  // The beta-adrenergic signaling pathway regulates cardiac myocyte contractility through a combination of feedforward and feedback mechanisms. We used systems analysis to investigate how the components and topology of this signaling network permit neurohormonal control of excitation-contraction coupling in the rat ventricular myocyte. A kinetic model integrating beta-adrenergic signaling with excitation-contraction coupling was formulated, and each subsystem was validated with independent biochemical and physiological measurements. Model analysis was used to investigate quantitatively the effects of specific molecular perturbations. 3-Fold overexpression of adenylyl cyclase in the model allowed an 85% higher rate of cyclic AMP synthesis than an equivalent overexpression of beta 1-adrenergic receptor, and manipulating the affinity of Gs alpha for adenylyl cyclase was a more potent regulator of cyclic AMP production. The model predicted that less than 40% of adenylyl cyclase molecules may be stimulated under maximal receptor activation, and an experimental protocol is suggested for validating this prediction. The model also predicted that the endogenous heat-stable protein kinase inhibitor may enhance basal cyclic AMP buffering by 68% and increasing the apparent Hill coefficient of protein kinase A activation from 1.0 to 2.0. Finally, phosphorylation of the L-type calcium channel and phospholamban were found sufficient to predict the dominant changes in myocyte contractility, including a 2.6x increase in systolic calcium (inotropy) and a 28% decrease in calcium half-relaxation time (lusitropy). By performing systems analysis, the consequences of molecular perturbations in the beta-adrenergic signaling network may be understood within the context of integrative cellular physiology.
  // This model was taken from the CellML repository and automatically converted to SBML.
  // The original model was: Saucerman JJ, Brunton LL, Michailova AP, McCulloch AD. (2003) - version=1.0
  // The original CellML model was created by:
  // Geoffrey Nunns
  // gnunns1@jhu.edu
  // The University of Auckland
  // This model originates from BioModels Database: A Database of Annotated Published Models (http://www.ebi.ac.uk/biomodels/). It is copyright (c) 2005-2011 The BioModels.net Team.
  // To the extent possible under law, all copyright and related or neighbouring rights to this encoded model have been dedicated to the public domain worldwide. Please refer to CC0 Public Domain Dedication for more information.
  // In summary, you are entitled to use this encoded model in absolutely any manner you deem suitable, verbatim, or with modification, alone or embedded it in a larger context, redistribute it, commercially or not, in a restricted way or not..
  // To cite BioModels Database, please use: Li C, Donizelli M, Rodriguez N, Dharuri H, Endler L, Chelliah V, Li L, He E, Henry A, Stefan MI, Snoep JL, Hucka M, Le Novère N, Laibe C (2010) BioModels Database: An enhanced, curated and annotated resource for published quantitative kinetic models. BMC Syst Biol., 4:92.
  // biomodels.db:MODEL1006230118
  // isDescribedBy pubmed:12972422
  // biomodels.db:MODEL1006230118
  // isDescribedBy pubmed:12972422
  // biomodels.db:MODEL1006230118
  // biomodels.db:MODEL1006230118

  // Compartments:
  compartment COMpartment = 1 litre;

  // Parameters:
  L_totmax = 1;
  sum_b1_AR = 0.0132;
  Gs_tot = 3.83;
  Kl = 0.285;
  Kr = 0.062;
  Kc = 33;
  k_bar_kp = 0.0011;
  k_bar_km = 0.0022;
  k_p_kap = 0.0036;
  k_p_kam = 0.0022;
  k_g_act = 16;
  k_hyd = 0.8;
  k_reassoc = 1210;
  AC_tot = 0.0497;
  ATP = 5000;
  PDE_tot = 0.0389;
  IBMX_tot = 0;
  Fsk_tot = 0;
  k_ac_basal = 0.2;
  k_ac_gsa = 8.5;
  k_ac_fsk = 7.3;
  k_pde = 5;
  Km_basal = 1030;
  Km_gsa = 315;
  Km_fsk = 860;
  Km_pde = 1.3;
  K_gsa = 0.4;
  K_fsk = 44;
  Ki_ibmx = 30;
  PKAI_tot = 0.59;
  PKAII_tot = 0.025;
  PKI_tot = 0.18;
  K_a = 9.14;
  K_b = 1.64;
  K_d = 4.375;
  Ki_pki = 0.0002;
  PLB_tot = 106;
  PP1_tot = 0.89;
  Inhib1_tot = 0.3;
  k_pka_plb = 54;
  Km_pka_plb = 21;
  k_pp1_plb = 8.5;
  Km_pp1_plb = 7;
  k_pka_i1 = 60;
  Km_pka_i1 = 1;
  Vmax_pp2a_i1 = 14;
  Km_pp2a_i1 = 1;
  Ki_inhib1 = 0.001;
  epsilon = 10;
  LCC_tot = 0.025;
  PP1_lcc_tot = 0.025;
  PP2A_lcc_tot = 0.025;
  k_pka_lcc = 54;
  Km_pka_lcc = 21;
  k_pp1_lcc = 8.52;
  Km_pp1_lcc = 3;
  k_pp2a_lcc = 10.1;
  Km_pp2a_lcc = 3;
  V_myo = 2.08e-5;
  V_nsr = 9.88e-7;
  V_jsr = 9.3e-8;
  A_Cap = 0.0001534;
  Temp = 310;
  Na_ext = 140;
  K_ext = 5.4;
  Ca_ext = 1.8;
  G_Na = 8;
  G_to = 0.35;
  G_ss = 0.07;
  G_Ki_bar = 0.24;
  G_Kp = 0.008;
  f = 300;
  g = 2000;
  gamma_o = 5187.5;
  omega = 10;
  p_Ca = 1.7469e-8;
  p_K = 3.234e-11;
  N_lcc = 300000;
  I_Ca05 = -0.458;
  k_NaCa = 1483;
  Km_Na = 87.5;
  Km_Ca = 1.38;
  k_sat = 0.1;
  eta = 0.35;
  I_bar_NaK = 1.1;
  Km_Nai = 10;
  Km_Ko = 1.5;
  I_bar_PCa = 1.15;
  Km_PCa = 0.0005;
  G_CaB = 0.0028;
  G_NaB = 0.00118;
  Pns = 0;
  Km_NS = 0.0012;
  I_up_bar = 4.7;
  Km_up0 = 0.0003;
  NSR_bar = 15;
  tau_on = 0.002;
  tau_off = 0.002;
  G_max_rel = 60000;
  d_Cai_th = 0.00018;
  Km_rel = 0.0008;
  CSQN_th = 8.75;
  CSQN_bar = 15;
  Km_CSQN = 0.8;
  tau_tr = 0.00057;
  TRPN_bar = 0.07;
  CMDN_bar = 0.05;
  INDO_bar = 0.07;
  Km_TRPN = 0.0005128;
  Km_CMDN = 0.00238;
  Km_INDO = 0.000844;
  var R_b1_AR_module;
  b1_AR_tot = 0.01205;
  b1_AR_d = 0;
  b1_AR_p = 0.001154;
  Gs_agtp_tot = 0.02505;
  Gs_agdp = 0.0006446;
  Gs_bg = 0.02569;
  cAMP_tot = 0.8453;
  PKAC_I = ;
  PKAC_II = ;
  PLB_p = 4.105;
  Inhib1p_tot = 0.0526;
  LCCa_p = 0.005103;
  LCCb_p = 0.005841;
  R_Nernst_Potentials = 8314;
  Frdy = 96485;
  z_Na = 1;
  z_K = 1;
  z_Ca = 2;
  m = 0.0014;
  h = 0.99;
  j = 0.99;
  v = 0;
  w = 0;
  x = 0.13;
  y = 0.96;
  z = 0.92;
  var I_Ca_tot_L_Type_Calcium_Current;
  r_to = 0.0014;
  s_to = 1;
  ss_to = 0.613;
  r_ss = 0.198;
  s_ss = 0.43;
  var I_Ca_tot_Total_Membrane_Currents;
  Ca_nsr = 1.92;
  Ca_jsr = 1.92;
  Na_i = 16;
  K_i = 145;
  Ca_i = 0.000158;
  V_m = -85.66;
  trel = 0.9;
  V_hold = -40;
  V_test = -10;
  R_clamp = 0.02;

  // Assignment rules:
  LR := L*R_b1_AR_module/Kl;
  LRG := LR*Gs/Kr;
  RG := R_b1_AR_module*Gs/Kc;
  BARK_DESENS := k_bar_kp*(LR + LRG);
  BARK_RESENS := k_bar_km*b1_AR_d;
  PKA_DESENS := k_p_kap*PKAC_I*b1_AR_tot;
  PKA_RESENS := k_p_kam*b1_AR_p;
  G_ACT := k_g_act*(RG + LRG);
  HYD := k_hyd*Gs_agtp_tot;
  REASSOC := k_reassoc*Gs_agdp*Gs_bg;
  L := L_totmax - LR - LRG;
  R_b1_AR_module := b1_AR_tot - LR - LRG - RG;
  Gs := Gs_tot - LRG - RG;
  Gsa_GTP_AC := Gsa_GTP*AC/K_gsa;
  Fsk_AC := Fsk*AC/K_fsk;
  AC_ACT_BASAL := k_ac_basal*AC*ATP/(Km_basal + ATP);
  AC_ACT_GSA := k_ac_gsa*Gsa_GTP_AC*ATP/(Km_gsa + ATP);
  AC_ACT_FSK := k_ac_fsk*Fsk_AC*ATP/(Km_fsk + ATP);
  PDE_ACT := k_pde*PDE*cAMP/(Km_pde + cAMP);
  PDE_IBMX := PDE*IBMX/Ki_ibmx;
  Gsa_GTP := Gs_agtp_tot - Gsa_GTP_AC;
  Fsk := Fsk_tot - Fsk_AC;
  AC := AC_tot - Gsa_GTP_AC;
  PDE := PDE_tot - PDE_IBMX;
  IBMX := IBMX_tot - PDE_IBMX;
  PKI := PKI_tot*Ki_pki/(Ki_pki + PKAC_I + PKAC_II);
  A2RC_I := PKAC_I/K_d*PKAC_I*(1 + PKI/Ki_pki);
  A2R_I := PKAC_I*(1 + PKI/Ki_pki);
  A2RC_II := PKAC_II/K_d*PKAC_II*(1 + PKI/Ki_pki);
  A2R_II := PKAC_II*(1 + PKI/Ki_pki);
  ARC_I := K_a/cAMP*A2RC_I;
  ARC_II := K_a/cAMP*A2RC_II;
  PKA_temp := K_a*K_b/K_d + K_a*cAMP/K_d + cAMP^2/K_d;
  cAMP := cAMP_tot - (ARC_I + 2*A2RC_I + 2*A2R_I) - (ARC_II + 2*A2RC_II + 2*A2R_II);
  PLB := PLB_tot - PLB_p;
  PLB_PHOSPH := k_pka_plb*PKAC_I*PLB/(Km_pka_plb + PLB);
  PLB_DEPHOSPH := k_pp1_plb*PP1*PLB_p/(Km_pp1_plb + PLB_p);
  Inhib1 := Inhib1_tot - Inhib1p_tot;
  Inhib1p_PP1 := Inhib1p*PP1/Ki_inhib1;
  Inhib1_PHOSPH := k_pka_i1*PKAC_I*Inhib1/(Km_pka_i1 + Inhib1);
  Inhib1_DEPHOSPH := Vmax_pp2a_i1*Inhib1p_tot/(Km_pp2a_i1 + Inhib1p_tot);
  Inhib1p := Inhib1p_tot - Inhib1p_PP1;
  PP1 := PP1_tot - Inhib1p_PP1;
  frac_PLB_p := PLB_p/PLB_tot;
  frac_PLB := PLB/PLB_tot;
  frac_PLB_o := 0.9613;
  LCCa := LCC_tot - LCCa_p;
  LCCa_PHOSPH := epsilon*k_pka_lcc*PKAC_II*LCCa/(Km_pka_lcc + epsilon*LCCa);
  LCCa_DEPHOSPH := epsilon*k_pp2a_lcc*PP2A_lcc_tot*LCCa_p/(Km_pp2a_lcc + epsilon*LCCa_p);
  LCCb := LCC_tot - LCCb_p;
  LCCb_PHOSPH := epsilon*k_pka_lcc*PKAC_II*LCCb/(Km_pka_lcc + epsilon*LCCb);
  LCCb_DEPHOSPH := epsilon*k_pp1_lcc*PP1_lcc_tot*LCCb_p/(Km_pp1_lcc + epsilon*LCCb_p);
  frac_LCCa_p := LCCa_p/LCC_tot;
  frac_LCCa_po := 0.2041;
  frac_LCCb_p := LCCb_p/LCC_tot;
  frac_LCCb_po := 0.2336;
  FoRT := Frdy/R_Nernst_Potentials/Temp;
  E_Na := 1/(FoRT*z_Na)*ln(Na_ext/Na_i);
  E_K := 1/(FoRT*z_K)*ln(K_ext/K_i);
  E_Ca := 1/(FoRT*z_Ca)*ln(Ca_ext/Ca_i);
  E_Cl := -40;
  am := 0.32*(V_m + 47.13)/(1 - exp(-0.1*(V_m + 47.13)));
  bm := 0.08*exp(-V_m/11);
  ah := piecewise(0, V_m >= -40, 0.135*exp((80 + V_m)/(-6.8)));
  aj := piecewise(0, V_m >= -40, (-1.2714*exp(0.2444*V_m) - 3.474*exp(-0.04391*V_m))*(V_m + 37.78)/(1 + exp(0.311*(V_m + 79.23))));
  bh := piecewise(1/(0.13*(1 + exp(-(V_m + 10.66)/11.1))), V_m >= -40, 3.56*exp(0.079*V_m) + 3.1*exp(0.35*V_m));
  bj := piecewise(0.3*exp(-2.575*V_m)/(1 + exp(-0.1*(V_m + 32))), V_m >= -40, 0.1212*exp(-0.01052*V_m)/(1 + exp(-0.1378*(V_m + 40.14))));
  I_Na := G_Na*m^3*h*j*(V_m - E_Na);
  a_lcc := 400*exp((V_m + 2)/10);
  b_lcc := 50*exp(-1*(V_m + 2)/13);
  f_lcc := f*(0.375*frac_LCCa_p/frac_LCCa_po + 0.625);
  y_lcc_inf := 1/(1 + exp((V_m + 55)/7.5)) + 0.1/(1 + exp((-V_m + 21)/6));
  tau_y_lcc := 0.02 + 0.3/(1 + exp((V_m + 30)/9.5));
  gamma := gamma_o*Ca_i;
  v_gamma := gamma*((1 - v)^4 + 2*v*(1 - v)^3 + 4*v^2*(1 - v)^2 + 8*v^3*(1 - v) + 16*v^4*(1 - f_lcc/g));
  v_omega := omega*((1 - w)^4 + 0.5*w*(1 - w)^3 + 0.25*w^2*(1 - w)^2 + 0.125*w^3*(1 - w) + 0.0625*w^4);
  i_bar_Ca := p_Ca*4*V_m*Frdy*FoRT*(1*exp(2*V_m*FoRT) - 0.341*Ca_ext)/(exp(2*V_m*FoRT) - 1);
  i_bar_K := p_K*V_m*Frdy*FoRT*(K_i*exp(V_m*FoRT) - K_ext)/(exp(V_m*FoRT) - 1);
  f_avail := 0.5*(0.4*frac_LCCb_p/frac_LCCb_po + 0.6);
  I_Ca := i_bar_Ca*N_lcc*f_avail*v^4*x*y*z;
  I_CaK := i_bar_K/(1 + I_Ca/I_Ca05)*N_lcc*f_avail*v^4*x*y*z;
  I_Ca_tot_L_Type_Calcium_Current := I_Ca + I_CaK;
  r_toss := 1/(1 + exp((V_m + 10.6)/(-11.42)));
  s_toss := 1/(1 + exp((V_m + 43.5)/6.8841));
  tau_r_to := 1/(45.16*exp(0.03577*(V_m + 50)) + 98.9*exp(-0.1*(V_m + 38)));
  tau_s_to := 0.35*exp(-1*((V_m + 70)/15)^2) + 0.035;
  tau_ss_to := 3.7*exp(-1*((V_m + 70)/30)^2) + 0.035;
  I_to := G_to*r_to*(0.886*s_to + 0.114*ss_to)*(V_m - E_K);
  r_ss_inf := 1/(1 + exp((V_m + 11.5)/(-11.82)));
  tau_r_ss := 10/(45.16*exp(0.03577*(V_m + 50)) + 98.9*exp(-0.1*(V_m + 38)));
  s_ss_inf := 1/(1 + exp((V_m + 87.5)/10.3));
  tau_s_ss := 2.1;
  I_ss := G_ss*r_ss*s_ss*(V_m - E_K);
  a_Ki := 1.02/(1 + exp(0.2385*(V_m - E_K - 59.215)));
  b_Ki := (0.49124*exp(0.08032*(V_m + 5.476 - E_K)) + exp(0.06175*(V_m - E_K - 594.31)))/(1 + exp(-0.5143*(V_m - E_K + 4.753)));
  Ki_ss := a_Ki/(a_Ki + b_Ki);
  I_Ki := G_Ki_bar*sqrt(K_ext/5.4)*Ki_ss*(V_m - E_K);
  Kp := 1/(1 + exp((7.488 - V_m)/5.98));
  I_Kp := G_Kp*Kp*(V_m - E_K);
  s4 := exp(eta*V_m*FoRT)*Na_i^3*Ca_ext;
  s5 := exp((eta - 1)*V_m*FoRT)*Na_ext^3*Ca_i;
  I_NCX := k_NaCa/((Km_Na^3 + Na_ext^3)*(Km_Ca + Ca_ext)*(1 + k_sat*exp((eta - 1)*V_m*FoRT)))*(s4 - s5);
  sigma := (exp(Na_ext/67.3) - 1)/7;
  f_NaK := 1/(1 + 0.1245*exp(-0.1*V_m*FoRT) + 0.0365*sigma*exp(-V_m*FoRT));
  I_NaK := I_bar_NaK*f_NaK/(1 + (Km_Nai/Na_i)^1.5)*K_ext/(K_ext + Km_Ko);
  I_PCa := I_bar_PCa*Ca_i/(Km_PCa + Ca_i);
  I_CaB := G_CaB*(V_m - E_Ca);
  I_NaB := G_NaB*(V_m - E_Na);
  I_Na_tot := I_Na + I_NaB + 3*I_NCX + 3*I_NaK;
  I_K_tot := I_to + I_ss + I_Ki + I_Kp - 2*I_NaK + I_CaK;
  I_Ca_tot_Total_Membrane_Currents := I_Ca + I_CaB + I_PCa - 2*I_NCX;
  t_rel := trel + 2;
  ryr_on := 1 - exp(-t_rel/tau_on);
  ryr_off := exp(-t_rel/tau_off);
  g_rel := G_max_rel/(1 + exp((I_Ca_tot_Total_Membrane_Currents + 5)/0.9));
  I_rel := g_rel*ryr_on*ryr_off*(Ca_jsr - Ca_i);
  Km_up := Km_up0*(1 + 2*frac_PLB)/(1 + 2*frac_PLB_o);
  I_up := I_up_bar*Ca_i^2/(Km_up^2 + Ca_i^2);
  I_leak := I_up_bar*Ca_nsr/NSR_bar;
  I_tr := (Ca_nsr - Ca_jsr)/tau_tr;
  B_jsr := 1/(1 + CSQN_bar*Km_CSQN/(Km_CSQN + Ca_jsr)^2);
  SR_content := 1*((Ca_jsr + Ca_jsr/B_jsr)*V_jsr/V_myo + Ca_nsr*V_nsr/V_myo);
  b_trpn := TRPN_bar*Km_TRPN/(Km_TRPN + Ca_i)^2;
  b_cmdn := CMDN_bar*Km_CMDN/(Km_CMDN + Ca_i)^2;
  b_indo := INDO_bar*Km_INDO/(Km_INDO + Ca_i)^2;
  B_myo := 1/(1 + b_cmdn + b_trpn + b_trpn + b_indo);
  V_clamp := piecewise(V_test, (time > 59.1) && (time < 59.5), V_hold);
  I_app := 0;

  // Rate rules:
  b1_AR_tot' = BARK_RESENS - BARK_DESENS + (PKA_RESENS - PKA_DESENS);
  b1_AR_d' = BARK_DESENS - BARK_RESENS;
  b1_AR_p' = PKA_DESENS - PKA_RESENS;
  Gs_agtp_tot' = G_ACT - HYD;
  Gs_agdp' = HYD - REASSOC;
  Gs_bg' = G_ACT - REASSOC;
  cAMP_tot' = AC_ACT_BASAL + AC_ACT_GSA + AC_ACT_FSK - PDE_ACT;
  PLB_p' = PLB_PHOSPH - PLB_DEPHOSPH;
  Inhib1p_tot' = Inhib1_PHOSPH - Inhib1_DEPHOSPH;
  LCCa_p' = LCCa_PHOSPH - LCCa_DEPHOSPH;
  LCCb_p' = LCCb_PHOSPH - LCCb_DEPHOSPH;
  m' = 1*(am*(1 - m) - bm*m);
  h' = 1*(ah*(1 - h) - bh*h);
  j' = 1*(aj*(1 - j) - bj*j);
  v' = a_lcc*(1 - v) - b_lcc*v;
  w' = 2*a_lcc*(1 - w) - b_lcc/2*w;
  x' = f_lcc*(1 - x) - g*x;
  y' = (y_lcc_inf - y)/tau_y_lcc;
  z' = v_omega*(1 - z) - v_gamma*z;
  r_to' = (r_toss - r_to)/tau_r_to;
  s_to' = (s_toss - s_to)/tau_s_to;
  ss_to' = (s_toss - ss_to)/tau_ss_to;
  r_ss' = (r_ss_inf - r_ss)/tau_r_ss;
  s_ss' = (s_ss_inf - s_ss)/tau_s_ss;
  Ca_nsr' = I_up - I_leak - I_tr*V_jsr/V_nsr;
  Ca_jsr' = B_jsr*(I_tr - I_rel);
  Na_i' = -1*I_Na_tot*A_Cap/(V_myo*z_Na*Frdy);
  K_i' = -1*I_K_tot*A_Cap/(V_myo*z_K*Frdy);
  Ca_i' = -B_myo*(1*I_Ca_tot_Total_Membrane_Currents*A_Cap/(V_myo*z_Ca*Frdy) + (I_up - I_leak)*V_nsr/V_myo - I_rel*V_jsr/V_myo);
  V_m' = -1*(I_Ca_tot_Total_Membrane_Currents + I_K_tot + I_Na_tot - I_app);
  trel' = piecewise(1 - 1*trel, -1*(I_Ca_tot_Total_Membrane_Currents + I_K_tot + I_Na_tot - I_app) > 30, 1);

  // Unit definitions:
  unit mM = 1e-3 mole / litre;
  unit uM = 1e-6 mole / litre;
  unit per_sec = 1 / second;
  unit mM_per_sec = 1e-3 mole / (litre * second);
  unit uM_per_sec = 1e-6 mole / (litre * second);
  unit per_mM_per_sec = litre / (1e-3 mole * second);
  unit per_uM_per_sec = litre / (1e-6 mole * second);
  unit uL = 1e-6 litre;
  unit cm_per_sec = 0.01 metre / second;
  unit cm2 = (0.01 metre)^2;
  unit mV = 1e-3 volt;
  unit per_mV = 1 / (1e-3 volt);
  unit mV_per_sec = 1e-3 volt / second;
  unit mS_per_uF = 1e-3 siemens / (1e-6 farad);
  unit uA_per_uF = 1e-6 ampere / (1e-6 farad);
  unit joules_per_mole_kelvin = joule / (mole * kelvin);
  unit coulombs_per_mole = coulomb / mole;
  unit unknown = dimensionless;
end
