// SBML level 2 version 1

model Siebert2008_MuscleContraction_CCSEC()
  // This a model from the article:
  // Nonlinearities make a difference: comparison of two common Hill-type models with real muscle.
  // Siebert T, Rode C, Herzog W, Till O, Blickhan R. Biol Cybern 2008 Feb;98(2):133-43 18049823 ,
  // Abstract:
  // Compared to complex structural Huxley-type models, Hill-type models phenomenologically describe muscle contraction using only few state variables. The Hill-type models dominate in the ever expanding field of musculoskeletal simulations for simplicity and low computational cost. Reasonable parameters are required to gain insight into mechanics of movement. The two most common Hill-type muscle models used contain three components. The series elastic component is connected in series to the contractile component. A parallel elastic component is either connected in parallel to both the contractile and the series elastic component (model [CC+SEC]), or is connected in parallel only with the contractile component (model [CC]). As soon as at least one of the components exhibits substantial nonlinearities, as, e.g., the contractile component by the ability to turn on and off, the two models are mechanically different. We tested which model ([CC+SEC] or [CC]) represents the cat soleus better. Ramp experiments consisting of an isometric and an isokinetic part were performed with an in situ cat soleus preparation using supramaximal nerve stimulation. Hill-type models containing force-length and force-velocity relationship, excitation-contraction coupling and series and parallel elastic force-elongation relations were fitted to the data. To test which model might represent the muscle better, the obtained parameters were compared with experimentally determined parameters. Determined in situations with negligible passive force, the force-velocity relation and the series elastic component relation are independent of the chosen model. In contrast to model [CC+SEC], these relations predicted by model [CC] were in accordance with experimental relations. In conclusion model [CC] seemed to better represent the cat soleus contraction dynamics and should be preferred in the nonlinear regression of muscle parameters and in musculoskeletal modeling.
  // This model was taken from the CellML repository and automatically converted to SBML.
  // The original model was: Siebert T, Rode C, Herzog W, Till O, Blickhan R. (2008) - version=1.0
  // The original CellML model was created by:
  // Paul Harrington
  // paul.harrington@auckland.ac.nz
  // The University of Auckland
  // This model originates from BioModels Database: A Database of Annotated Published Models (http://www.ebi.ac.uk/biomodels/). It is copyright (c) 2005-2011 The BioModels.net Team.
  // To the extent possible under law, all copyright and related or neighbouring rights to this encoded model have been dedicated to the public domain worldwide. Please refer to CC0 Public Domain Dedication for more information.
  // In summary, you are entitled to use this encoded model in absolutely any manner you deem suitable, verbatim, or with modification, alone or embedded it in a larger context, redistribute it, commercially or not, in a restricted way or not..
  // To cite BioModels Database, please use: Li C, Donizelli M, Rodriguez N, Dharuri H, Endler L, Chelliah V, Li L, He E, Henry A, Stefan MI, Snoep JL, Hucka M, Le Novère N, Laibe C (2010) BioModels Database: An enhanced, curated and annotated resource for published quantitative kinetic models. BMC Syst Biol., 4:92.
  // biomodels.db:MODEL1006230120
  // isDescribedBy pubmed:18049823
  // biomodels.db:MODEL1006230120
  // isDescribedBy pubmed:18049823
  // biomodels.db:MODEL1006230120
  // biomodels.db:MODEL1006230120

  // Compartments:
  compartment COMpartment = 1 litre;

  // Parameters:
  L_1 = -23;
  L_2 = -14;
  L_3 = 2;
  L_4 = 19;
  f_c = 0.49;
  v_max = -141;
  curv = 5.8;
  k_1 = 0.012;
  k_2 = 0.317;
  F_1 = 4.1;
  d_LSEC1 = 4.1;
  k_sh = 3.3;
  L_m = 0.3;
  F_im = 18.1;
  tau = 0.006;
  delta_L_sec1 = 4.1;
  delta_L_pec = 0.2;
  k = 3.5;
  A = 1;
  L_mslack = 0.3;

  // Assignment rules:
  L_mtc := piecewise(0.29, time <= 1, 0.22, (time > 1) && (time < 5), 0.19);
  delta_L_sec := L_mtc - delta_L_pec - L_mslack;
  f_sec := piecewise(F_1/(exp(k_sh) - 1)*(exp(k_sh*delta_L_sec/delta_L_sec1) - 1), (delta_L_sec > 0) && (delta_L_sec < delta_L_sec1), F_1 + k*(delta_L_sec - delta_L_sec1), delta_L_sec <= delta_L_sec1);
  f_pec := piecewise(k_1*(exp(k_2*delta_L_pec) - 1), delta_L_pec > 0, 0, delta_L_pec <= 0);
  f_L := piecewise(f_c/(L_2 - L_1)*(delta_L_pec - L_1), (delta_L_pec >= L_1) && (delta_L_pec <= L_2), (1 - f_c)/(-L_2)*(delta_L_pec - L_2), (delta_L_pec > L_2) && (delta_L_pec <= 0), 1, (delta_L_pec > 0) && (delta_L_pec <= L_3), -1/(L_4 - L_3)*(delta_L_pec - L_3), (delta_L_pec > L_3) && (delta_L_pec <= L_4));
  v_cc := 1/f_v*((f_sec - f_pec)/(A*f_L*F_im));
  f_v := (v_max - v_cc)/(v_max + v_cc*curv);

  // Rate rules:
  delta_L_pec' = v_cc;

  // Unit definitions:
  unit mm = 1e-3 metre;
  unit mm_per_second = 1e-3 metre / second;
  unit per_mm = 1 / (1e-3 metre);
  unit newton_per_mm = newton / (1e-3 metre);
  unit mm_newton_per_second = 1e-3 metre * newton / second;
end
