// SBML level 2 version 1

model Tran2009_CaDynamicsSERCA_Cardiac()
  // This a model from the article:
  // A thermodynamic model of the cardiac sarcoplasmic/endoplasmic Ca(2+) (SERCA) pump.
  // Tran K, Smith NP, Loiselle DS, Crampin EJ. Biophys J 2009 Mar 4;96(5):2029-42 19254563 ,
  // Abstract:
  // We present a biophysically based kinetic model of the cardiac SERCA pump that consolidates a range of experimental data into a consistent and thermodynamically constrained framework. The SERCA model consists of a number of sub-states with partial reactions that are sensitive to Ca(2+) and pH, and to the metabolites MgATP, MgADP, and Pi. Optimization of model parameters to fit experimental data favors a fully cooperative Ca(2+)-binding mechanism and predicts a Ca(2+)/H(+) counter-transport stoichiometry of 2. Moreover, the order of binding of the partial reactions, particularly the binding of MgATP, proves to be a strong determinant of the ability of the model to fit the data. A thermodynamic investigation of the model indicates that the binding of MgATP has a large inhibitory effect on the maximal reverse rate of the pump. The model is suitable for integrating into whole-cell models of cardiac electrophysiology and Ca(2+) dynamics to simulate the effects on the cell of compromised metabolism arising in ischemia and hypoxia.
  // This model was taken from the CellML repository and automatically converted to SBML.
  // The original model was: Tran K, Smith NP, Loiselle DS, Crampin EJ. (2009) - version=1.0
  // The original CellML model was created by:
  // Kenneth Tran
  // k.tran@auckland.ac.nz
  // The University of Auckland
  // This model originates from BioModels Database: A Database of Annotated Published Models (http://www.ebi.ac.uk/biomodels/). It is copyright (c) 2005-2011 The BioModels.net Team.
  // To the extent possible under law, all copyright and related or neighbouring rights to this encoded model have been dedicated to the public domain worldwide. Please refer to CC0 Public Domain Dedication for more information.
  // In summary, you are entitled to use this encoded model in absolutely any manner you deem suitable, verbatim, or with modification, alone or embedded it in a larger context, redistribute it, commercially or not, in a restricted way or not..
  // To cite BioModels Database, please use: Li C, Donizelli M, Rodriguez N, Dharuri H, Endler L, Chelliah V, Li L, He E, Henry A, Stefan MI, Snoep JL, Hucka M, Le Novère N, Laibe C (2010) BioModels Database: An enhanced, curated and annotated resource for published quantitative kinetic models. BMC Syst Biol., 4:92.
  // biomodels.db:MODEL1006230121
  // isDescribedBy pubmed:19254563
  // biomodels.db:MODEL1006230121
  // isDescribedBy pubmed:19254563
  // biomodels.db:MODEL1006230121
  // biomodels.db:MODEL1006230121

  // Compartments:
  compartment COMpartment = 1 litre;

  // Parameters:
  time_environment has millisecond;
  SOVFThick has dimensionless;
  SOVFThin has dimensionless;
  sovr_ze has micrometre;
  sovr_cle has micrometre;
  len_sovr has micrometre;
  TRPNCaL = 0.01477301 dimensionless;
  TRPNCaH = 0.130661 dimensionless;
  dTRPNCaL has first_order_rate_constant;
  dTRPNCaH has first_order_rate_constant;
  kn_pT has first_order_rate_constant;
  kp_nT has first_order_rate_constant;
  H has micromolar;
  H_cons has micromolar;
  konT has second_order_rate_constant;
  koffLT has first_order_rate_constant;
  koffHT has first_order_rate_constant;
  Qkon = 1.5 dimensionless;
  Qkoff = 1.3 dimensionless;
  Qkn_p = 1.6 dimensionless;
  Qkp_n = 1.6 dimensionless;
  kon = 0.05 second_order_rate_constant;
  koffL = 0.25 first_order_rate_constant;
  koffH = 0.025 first_order_rate_constant;
  perm50 = 0.5 dimensionless;
  nperm = 15 dimensionless;
  kn_p = 0.5 first_order_rate_constant;
  kp_n = 0.05 first_order_rate_constant;
  koffmod = 1 dimensionless;
  Tropreg has dimensionless;
  permtot has dimensionless;
  inprmt has dimensionless;
  pH = 7.15 dimensionless;
  m = 1 dimensionless;
  kdHCa = 0.02 micromolar;
  fappT has first_order_rate_constant;
  gappT has first_order_rate_constant;
  hfT has first_order_rate_constant;
  hbT has first_order_rate_constant;
  gxbT has first_order_rate_constant;
  fapp = 0.5 first_order_rate_constant;
  gapp = 0.07 first_order_rate_constant;
  hf = 2 first_order_rate_constant;
  hb = 0.4 first_order_rate_constant;
  gxb = 0.07 first_order_rate_constant;
  gslmod = 6 dimensionless;
  hfmd has dimensionless;
  hbmd has dimensionless;
  hfmdc = 5 dimensionless;
  hbmdc = 0 dimensionless;
  sigmap = 8 dimensionless;
  sigman = 1 dimensionless;
  xbmodsp = 0.2 dimensionless;
  Qfapp = 6.25 dimensionless;
  Qgapp = 2.5 dimensionless;
  Qhf = 6.25 dimensionless;
  Qhb = 6.25 dimensionless;
  Qgxb = 6.25 dimensionless;
  gxbmd has dimensionless;
  gapslmd has dimensionless;
  XBpostr = 1.810176e-6 dimensionless;
  XBprer = 3.049496e-7 dimensionless;
  dXBpostr has first_order_rate_constant;
  dXBprer has first_order_rate_constant;
  alpha1_plus has first_order_rate_constant;
  alpha2_plus has first_order_rate_constant;
  alpha3_plus has first_order_rate_constant;
  alpha1_minus has first_order_rate_constant;
  alpha2_minus has first_order_rate_constant;
  alpha3_minus has first_order_rate_constant;
  kMgATP = 1.54e10 micromolar2;
  kdADP = 4 micromolar;
  xPi_cons = 2000 micromolar;
  MgATP_cons = 5000 micromolar;
  fxbT has first_order_rate_constant;
  N_NoXB = 1 dimensionless;
  P_NoXB = 4.074372e-8 dimensionless;
  P = 0.9999978 dimensionless;
  N has dimensionless;
  MgADP_cons = 36 micromolar;
  xPi = 2000 micromolar;
  MgATP = 5000 micromolar;
  MgADP = 36.3 micromolar;
  xXBpostr = 0.007000054 micrometre;
  xXBprer = 3.412128e-8 micrometre;
  dxXBpostr has micrometre_per_millisecond;
  dxXBprer has micrometre_per_millisecond;
  xPsi = 2 dimensionless;
  dutyprer has dimensionless;
  dutypostr has dimensionless;
  SSXBpostr has dimensionless;
  SSXBprer has dimensionless;
  dSL has micrometre_per_millisecond;
  SL = 2.2 micrometre;
  kxb_normalised_active_and_passive_force = 120 millinewton_per_millimetre2;
  Fnordv has millinewton_micrometre_per_millimetre2;
  force has millinewton_micrometre_per_millimetre2;
  intf = -4.511345e-6 unit_normalised_force_millisecond;
  SL_c = 2.25 micrometre;
  SLrest = 1.85 micrometre;
  SLset = 1.9 micrometre;
  PCon_t = 0.002;
  PExp_t = 10 per_micrometre;
  PCon_c = 0.02;
  PExp_c = 70 per_micrometre;
  KSE = 1 unit_normalised_force_per_micrometre;
  fxb has first_order_rate_constant;
  SEon = 1 dimensionless;
  FrSBXB has dimensionless;
  dFrSBXB has first_order_rate_constant;
  dsovr_ze has micrometre_per_millisecond;
  dsovr_cle has micrometre_per_millisecond;
  dlen_sovr has micrometre_per_millisecond;
  dSOVFThick has first_order_rate_constant;
  dSOVFThin has first_order_rate_constant;
  kxb_calculation_of_micromolar_per_millisecondes_of_Ca_for_apparent_Ca_binding = 120 millinewton_per_millimetre2;
  dforce has millinewton_micrometre_per_millimetre2_per_millisecond;
  Trop_conc = 70 micromolar;
  TropTot has micromolar;
  dTropTot has micromolar_per_millisecond;
  Cai = 200 micromolar;
  len_thin = 1.2 micrometre;
  len_thick = 1.65 micrometre;
  len_hbare = 0.1 micrometre;
  TmpC = 22 celsius;
  x_0 = 0.007 micrometre;

  // Assignment rules:
  sovr_ze := piecewise(len_thick/2, len_thick/2 < SL/2, SL/2);
  sovr_cle := piecewise(SL/2 - (SL - len_thin), SL/2 - (SL - len_thin) > len_hbare/2, len_hbare/2);
  len_sovr := sovr_ze - sovr_cle;
  SOVFThick := len_sovr*2/(len_thick - len_hbare);
  SOVFThin := len_sovr/len_thin;
  konT := (kdHCa^m + H_cons^m)/(kdHCa^m + H^m)*kon*Qkon^((TmpC - 37)/10);
  H := 10*10^(-pH);
  H_cons := 10*10^(-7.15);
  koffLT := koffL*koffmod*Qkoff^((TmpC - 37)/10);
  koffHT := koffH*koffmod*Qkoff^((TmpC - 37)/10);
  kn_pT := kn_p*permtot*Qkn_p^((TmpC - 37)/10);
  kp_nT := kp_n*inprmt*Qkp_n^((TmpC - 37)/10);
  permtot := sqrt(abs(1/(1 + (perm50/Tropreg)^nperm)));
  inprmt := piecewise(1/permtot, 1/permtot < 100, 100);
  dTRPNCaL := konT*Cai*(1 - TRPNCaL) - koffLT*TRPNCaL;
  dTRPNCaH := konT*Cai*(1 - TRPNCaH) - koffHT*TRPNCaH;
  Tropreg := (1 - SOVFThin)*TRPNCaL + SOVFThin*TRPNCaH;
  fappT := fapp*xbmodsp*Qfapp^((TmpC - 37)/10);
  gapslmd := 1 + (1 - SOVFThick)*gslmod;
  gappT := gapp*gapslmd*xbmodsp*Qgapp^((TmpC - 37)/10);
  hfmd := exp(-xXBprer/abs(xXBprer)*hfmdc*(xXBprer/x_0)^2);
  hbmd := exp((xXBpostr - x_0)/abs(xXBpostr - x_0)*hbmdc*((xXBpostr - x_0)/x_0)^2);
  hfT := hf*hfmd*xbmodsp*Qhf^((TmpC - 37)/10);
  hbT := hb*hbmd*xbmodsp*Qhb^((TmpC - 37)/10);
  gxbmd := piecewise(exp(sigmap*((x_0 - xXBpostr)/x_0)^2), xXBpostr < x_0, exp(sigman*((xXBpostr - x_0)/x_0)^2));
  gxbT := gxb*gxbmd*xbmodsp*Qgxb^((TmpC - 37)/10);
  N := 1 - (P + XBprer + XBpostr);
  dXBprer := alpha1_plus*P + alpha2_minus*XBpostr - (alpha1_minus + alpha2_plus)*XBprer;
  dXBpostr := alpha3_minus*P + alpha2_plus*XBprer - (alpha2_minus + alpha3_plus)*XBpostr;
  alpha1_plus := fappT;
  alpha2_plus := hfT;
  alpha3_plus := MgATP*(gxbT/MgATP_cons)*((kdADP + MgADP_cons)/(kdADP + MgADP));
  alpha1_minus := xPi*(gappT/xPi_cons);
  alpha2_minus := H*(hbT/H_cons)*((kdADP + MgADP_cons)/MgADP_cons)*(MgADP/(kdADP + MgADP));
  alpha3_minus := fxbT;
  fxbT := kdADP*fappT*hfT*(gxbT/MgATP_cons)/(gappT/xPi_cons*(hbT/H_cons)*kMgATP);
  dSL := 0;
  dxXBprer := dSL/2 + xPsi/dutyprer*(-(alpha1_plus*xXBprer) + alpha2_minus*(xXBpostr - (x_0 + xXBprer)));
  dxXBpostr := dSL/2 + xPsi/dutypostr*alpha2_plus*(xXBprer + x_0 - xXBpostr);
  dutyprer := (alpha3_minus*alpha2_minus + alpha3_plus*alpha1_plus + alpha2_minus*alpha1_plus)/(alpha1_plus*alpha2_plus + alpha3_minus*alpha1_minus + alpha3_minus*alpha2_plus + alpha3_minus*alpha2_minus + alpha3_plus*alpha1_plus + alpha2_minus*alpha1_plus + alpha2_plus*alpha3_plus + alpha3_minus*alpha1_minus + alpha3_plus*alpha1_minus);
  dutypostr := (alpha1_plus*alpha2_plus + alpha3_minus*alpha1_minus + alpha3_minus*alpha2_plus)/(alpha1_plus*alpha2_plus + alpha3_minus*alpha1_minus + alpha3_minus*alpha2_plus + alpha3_minus*alpha2_minus + alpha3_plus*alpha1_plus + alpha2_minus*alpha1_plus + alpha2_plus*alpha3_plus + alpha3_minus*alpha1_minus + alpha3_plus*alpha1_minus);
  fxb := kdADP*fapp*hf*(gxb/MgATP_cons)/(gapp/xPi_cons*(hb/H_cons)*kMgATP);
  SSXBprer := (fxb*hb + gxb*fapp + hbT*fapp)/(hf*gxb + hb*gapp + gxb*gapp + fxb*hb + gxb*fapp + hb*fapp + fxb*gapp + fapp*hf + fxb*hb);
  SSXBpostr := (fapp*hf + fxb*gapp + fxb*hb)/(hf*gxb + hb*gapp + gxb*gapp + fxb*hb + gxb*fapp + hb*fapp + fxb*gapp + fapp*hf + fxb*hb);
  Fnordv := kxb_normalised_active_and_passive_force*x_0*SSXBpostr;
  force := kxb_normalised_active_and_passive_force*SOVFThick*(xXBpostr*XBpostr + xXBprer*XBprer);
  active := 1*force/Fnordv;
  ppforce_t := (SL - SLrest)/abs(SL - SLrest)*PCon_t*(exp(PExp_t*abs(SL - SLrest)) - 1);
  ppforce_c := piecewise(PCon_c*(exp(PExp_c*abs(SL - SL_c)) - 1), SL > SL_c, 0);
  ppforce := ppforce_t + ppforce_c;
  preload := abs(SLset - SLrest)/(SLset - SLrest)*PCon_t*(exp(PExp_t*abs(SLset - SLrest)) - 1);
  afterload := piecewise(KSE*(SLset - SL), SEon == 1, 0);
  FrSBXB := (XBpostr + XBprer)/(SSXBpostr + SSXBprer);
  dFrSBXB := (dXBpostr + dXBprer)/(SSXBpostr + SSXBprer);
  dsovr_ze := piecewise(-0.5*dSL, SL < len_thick, 0);
  dsovr_cle := piecewise(-0.5*dSL, 2*len_thin - SL > len_hbare, 0);
  dlen_sovr := dsovr_ze - dsovr_cle;
  dSOVFThin := dlen_sovr/len_thin;
  dSOVFThick := 2*dlen_sovr/(len_thick - len_hbare);
  TropTot := Trop_conc*((1 - SOVFThin)*TRPNCaL + SOVFThin*(FrSBXB*TRPNCaH + (1 - FrSBXB)*TRPNCaL));
  dTropTot := Trop_conc*(-dSOVFThin*TRPNCaL + (1 - SOVFThin)*dTRPNCaL + dSOVFThin*(FrSBXB*TRPNCaH + (1 - FrSBXB)*TRPNCaL) + SOVFThin*(dFrSBXB*TRPNCaH + FrSBXB*dTRPNCaH + (1 - FrSBXB)*dTRPNCaL - dFrSBXB*TRPNCaL));
  dforce := kxb_calculation_of_micromolar_per_millisecondes_of_Ca_for_apparent_Ca_binding*dSOVFThick*(xXBpostr*XBpostr + xXBprer*XBprer) + kxb_calculation_of_micromolar_per_millisecondes_of_Ca_for_apparent_Ca_binding*SOVFThick*(dxXBpostr*XBpostr + xXBpostr*dXBpostr + dxXBprer*XBprer + xXBprer*dXBprer);

  // Rate rules:
  TRPNCaL' = dTRPNCaL;
  TRPNCaH' = dTRPNCaH;
  N_NoXB' = kp_nT*P_NoXB - kn_pT*N_NoXB;
  P_NoXB' = kn_pT*N_NoXB - kp_nT*P_NoXB;
  P' = kn_pT*N - (kp_nT + alpha1_plus)*P;
  XBprer' = dXBprer;
  XBpostr' = dXBpostr;
  xXBprer' = dxXBprer;
  xXBpostr' = dxXBpostr;
  SL' = dSL;
  intf' = preload + afterload - (ppforce + active);

  // Unit definitions:
  unit unit_normalised_force_millisecond2_per_micrometre = (1e-3 second)^2 / (1e-6 metre);
  unit unit_normalised_force_millisecond = 1e-3 second;
  unit unit_normalised_force_millisecond_per_micrometre = 1e-3 second / (1e-6 metre);
  unit unit_normalised_force_per_micrometre = 1 / (1e-6 metre);
  unit micrometre = 1e-6 metre;
  unit per_micrometre = 1 / (1e-6 metre);
  unit micrometre_per_millisecond = 1e-6 metre / (1e-3 second);
  unit millisecond_per_micrometre = 1e-3 second / (1e-6 metre);
  unit millisecond = 1e-3 second;
  unit millisecond2_per_micrometre = (1e-3 second)^2 / (1e-6 metre);
  unit micromolar = 1e-6 mole / litre;
  unit micromolar2 = (1e-6 mole)^2 / litre^2;
  unit micromolar_per_millisecond = 1e-6 mole / (litre * 1e-3 second);
  unit first_order_rate_constant = 1 / (1e-3 second);
  unit second_order_rate_constant = litre / (1e-6 mole * 1e-3 second);
  unit millinewton_per_millimetre2 = 1e-3 newton / (1e-3 metre)^2;
  unit millinewton_micrometre_per_millimetre2 = 1e-3 newton / metre;
  unit millinewton_micrometre_per_millimetre2_per_millisecond = 1e-3 newton / (metre * 1e-3 second);
  unit time = 1e-3 second;
end
