// SBML level 2 version 4

function MM(Vmax, Km, S)
  Vmax*S/(Km + S);
end

function MM_twosubst(Vmax, Km1, Km2, S1, S2)
  Vmax*S1*S2/((Km1 + S1)*(Km2 + S2));
end

model Nijhout2006_Folate_Metab()
  // Nijhout2006_Hepatic_Folate_Metab
  // This is the model described in the article:
  // In silico experimentation with a model of hepatic mitochondrial folate metabolism.
  // H. Frederik Nijhout, Michael C Reed, Shi-Ling Lam, Barry Shane, Jesse F Gregory and Cornelia M Ulrich, Theor Biol Med Model 2006,3:40; PubmedID: 17150100 ; DOI: 10.1186/1742-4682-3-40 ;
  // Abstract:
  // BACKGROUND: In eukaryotes, folate metabolism is compartmentalized and occurs in both the cytosol and the mitochondria. The function of this compartmentalization and the great changes that occur in the mitochondrial compartment during embryonic development and in rapidly growing cancer cells are gradually becoming understood, though many aspects remain puzzling and controversial.
  // APPROACH: We explore the properties of cytosolic and mitochondrial folate metabolism by experimenting with a mathematical model of hepatic one-carbon metabolism. The model is based on known biochemical properties of mitochondrial and cytosolic enzymes. We use the model to study questions about the relative roles of the cytosolic and mitochondrial folate cycles posed in the experimental literature. We investigate: the control of the direction of the mitochondrial and cytosolic serine hydroxymethyltransferase (SHMT) reactions, the role of the mitochondrial bifunctional enzyme, the role of the glycine cleavage system, the effects of variations in serine and glycine inputs, and the effects of methionine and protein loading.
  // CONCLUSION: The model reproduces many experimental findings and gives new insights into the underlying properties of mitochondrial folate metabolism. Particularly interesting is the remarkable stability of formate production in the mitochondria in the face of large changes in serine and glycine input. The model shows that in the presence of the bifunctional enzyme (as in embryonic tissues and cancer cells), the mitochondria primarily support cytosolic purine and pyrimidine synthesis via the export of formate, while in adult tissues the mitochondria produce serine for gluconeogenesis.
  // This model does not reproduce the results in the article completely, but most steady state concentrations are in a range of 10% around the published values. Also parameterscans give nearly identical results as shown in the article.
  // In the SBML version model the volumes of the mitochondrion, the cytoplasm and the cell were all set to one to obtain the same equations as described in the supplemental materials of the article. The total folate is equally split between the cytosol and the mitochondrion and divided by 3/4 for the cytosol and 1/4 for the mitochondrion, respectively. To obtain an SBML model in which the volumes of the compartments, cytosol and mito , are used, the model needs to be altered as follows:
  // for the initial distribution of folate the terms 3/4 and 1/4 have to be replaced by volumes of cytosol and mitochondria respectively
  // in the transport reactions between mitochondrion and cytosol the stoichiometry of the mitochondrial reactants has to be set from 3 to 1 and in the first part of the according rate laws the factor mito/3 should simply be replaced with mito .
  // the stoichiometries of src and dmg have to be changed to cell/mito for mitchondrial and cell/cytosol for cytosolic reactions involving these two species.
  // While the concentrations stay the same after these alteration, the reaction fluxes change by a factor of cytosol and mito for cytosolic and mitchondrial reactions, respectively.
  // Originally created by libAntimony v1.3 (using libSBML 3.4.1)
  // This model originates from BioModels Database: A Database of Annotated Published Models (http://www.ebi.ac.uk/biomodels/). It is copyright (c) 2005-2011 The BioModels.net Team.
  // To the extent possible under law, all copyright and related or neighbouring rights to this encoded model have been dedicated to the public domain worldwide. Please refer to CC0 Public Domain Dedication for more information.
  // In summary, you are entitled to use this encoded model in absolutely any manner you deem suitable, verbatim, or with modification, alone or embedded it in a larger context, redistribute it, commercially or not, in a restricted way or not..
  // To cite BioModels Database, please use: Li C, Donizelli M, Rodriguez N, Dharuri H, Endler L, Chelliah V, Li L, He E, Henry A, Stefan MI, Snoep JL, Hucka M, Le Novère N, Laibe C (2010) BioModels Database: An enhanced, curated and annotated resource for published quantitative kinetic models. BMC Syst Biol., 4:92.
  // biomodels.db:MODEL1007200000
  // isDescribedBy pubmed:17150100
  // biomodels.db:MODEL1007200000
  // isDescribedBy pubmed:17150100
  // biomodels.db:MODEL1007200000
  // biomodels.db:MODEL1007200000

  // Compartments:
  compartment blood = 1;
  compartment cytosol = 1;
  compartment mito = 1; mito is "mitochondrion";
  compartment cell = 1; cell is "whole cell";

  // Species:
  species $b_met in blood = 30;
  species $b_gly in blood = 300;
  species $b_ser in blood = 150;
  species $GAR in cytosol = 10;
  species $NADPH in cytosol = 50;
  species $BET in cytosol = 50; BET is "Betaine";
  species $DUMP in cytosol = 20; DUMP is "dUMP";
  species $Fol in cell = 20; Fol is "Folate";
  species $CO in mito = 0; CO is "CO2";
  species $HCHO in cell = 500; HCHO is "Formaldehyde";
  species c_thf in cytosol = Fol/(2*0.75) - (c_5mf + c_2cf + c_1cf + c_10f + dhf);
  species m_thf in mito = Fol/(2*0.25) - (m_2cf + m_1cf + m_10f);
  species c_5mf in cytosol = 0; c_5mf is "c_5-methyl-THF";
  species c_2cf in cytosol = 0; c_2cf is "c_5-10-methylene-THF";
  species c_1cf in cytosol = 0; c_1cf is "c_5-10-methenyl-THF";
  species c_10f in cytosol = 0; c_10f is "c_10-formyl-THF";
  species dhf in cytosol = 0;
  species m_2cf in mito = 0; m_2cf is "m_5-10-methylene-THF";
  species m_1cf in mito = 0; m_1cf is "m_5-10-methenyl-THF";
  species m_10f in mito = 0; m_10f is "m_10-formyl-THF";
  species aic in cytosol = 0; aic is "AICAR";
  species c_gly in cytosol = 0; c_gly is "c_Glycine";
  species hcy in cytosol = 0; hcy is "Homocysteine";
  species c_ser in cytosol = 0;
  species sah in cytosol = 0; sah is "S-adenosylhomocysteine";
  species sam in cytosol = 0; sam is "S-adenosylmethionine";
  species met in cytosol = 0; met is "methionine";
  species c_coo in cytosol = 0; c_coo is "c_formate";
  species m_ser in mito = 0; m_ser is "m_Serine";
  species m_gly in mito = 0; m_gly is "mit_Glycine";
  species m_coo in mito = 0; m_coo is "m_formate";
  species src in cell = 0; src is "Sarcosine";
  species dmg in cell = 0; dmg is "Dimethylglycine";

  // Parameters:
  c_cys = 0;
  c_gsg = 0;
  e = 2.71828;
  V_bglyc = 2000;
  K_bglyc = 150;
  k_out_gly = 1;
  V_bserc = 2700;
  K_bserc = 150;
  k_out_ser = 1;
  V_bmetc = 910;
  K_bmetc = 150;
  k_out_met = 1;
  Vm_mFTD = 1050;
  K_10f_FTD = 20;
  Vf_mSHMT = 11440;
  K_thf_SHMT = 50;
  K_ser_SHMT = 600;
  Vr_mSHMT = 30000000;
  K_gly_SHMT = 10000;
  K_2cf_SHMT = 3200;
  Vf_mFTS = 2000;
  K_thf_mFTS = 3;
  K_coo_mFTS = 43;
  Vr_mFTS = 6300;
  K_10f_mFTS = 22;
  k1_mNE = 0.03;
  k2_mNE = 20;
  Vm_GDC = 15000;
  K_thf_GDC = 50;
  K_gly_GDC = 3400;
  Vm_SDH = 15000;
  K_thf_SDH = 50;
  K_src_SDH = 320;
  Vm_DMGD = 15000;
  K_thf_DMGD = 50;
  K_dmg_DMGD = 50;
  Vf_mMTD = 180000;
  K_2cf_MTD = 2;
  Vr_MTD = 600000;
  K_1cf_MTD = 10;
  Vf_mMTCH = 790000;
  K_1cf_MTCH = 250;
  Vr_MTCH = 20000;
  K_10f_MTCH = 100;
  V_mser = 10000;
  K_mser = 5700;
  V_cser = 10000;
  K_cser = 5700;
  k_in_coo = 100;
  k_out_coo = 100;
  V_mgly = 10000;
  K_mgly = 5700;
  V_cgly = 10000;
  K_cgly = 5700;
  Vm_MS = 500;
  K_5mf_MS = 25;
  K_hcy_MS = 1;
  Ki_MS = 0.01;
  Vm_DHFR = 2000;
  K_dhf_DHFR = 0.5;
  K_NADPH_DHFR = 4;
  Vm_cFTD = 500;
  Vm_PGT = 24300;
  K_10f_PGT = 4.9;
  K_GAR_PGT = 520;
  Vm_cFTS = 3900;
  K_thf_cFTS = 3;
  K_coo_cFTS = 43;
  Vf_cSHMT = 5200;
  Vr_cSHMT = 15000000;
  k1_cNE = 0.03;
  k2_cNE = 22;
  Vm_TS = 5000;
  K_DUMP_TS = 6.3;
  K_2cf_TS = 14;
  Vm_MTHFR = 5300;
  K_2cf_MTHFR = 50;
  K_NADPH_MTHFR = 16;
  Vf_cMTD = 80000;
  Vf_cMTCH = 500000;
  Vm_ART = 55000;
  K_10f_ART = 5.9;
  K_aic_ART = 100;
  Vm_BHMT = 2160;
  K_hcy_BHMT = 12;
  K_bet_BHMT = 100;
  Ki_BHMT = 0.01;
  Vm_MAT1 = 260;
  Km_MAT1 = 41;
  Vm_MAT3 = 220;
  Km_MAT3 = 300;
  Ka_MAT3 = 360;
  Vm_GNMT = 245;
  K_sam_GNMT = 32;
  K_gly_GNMT = 130;
  Ki_GNMT = 18;
  Vm_DNMT = 180;
  Km_DNMT = 1.4;
  Ki_DNMT = 1.4;
  Vf_SAHH = 5000;
  K_sah_SAHH = 10;
  Vr_SAHH = 5000;
  K_hcy_SAHH = 1;
  Vm_CBS = 402000;
  K_hcy_CBS = 1000;
  K_ser_CBS = 2000;

  // Assignment rules:
  tot_cfol := c_5mf + c_2cf + c_1cf + c_10f + dhf + c_thf;
  tot_mfol := m_thf + m_2cf + m_1cf + m_10f;

  // Reactions:
  V_b_GLY_c: $b_gly -> c_gly; cytosol*(MM(V_bglyc, K_bglyc, b_gly) - k_out_gly*c_gly);
  V_b_SER_c: $b_ser -> c_ser; cytosol*(MM(V_bserc, K_bserc, b_ser) - k_out_ser*c_ser);
  V_b_MET_c: $b_met -> met; cytosol*(MM(V_bmetc, K_bmetc, b_met) - k_out_met*met);
  VmFTD: m_10f -> m_thf; mito*MM(Vm_mFTD, K_10f_FTD, m_10f);
  VmSHMT: m_thf + m_ser -> m_gly + m_2cf; mito*(MM_twosubst(Vf_mSHMT, K_thf_SHMT, K_ser_SHMT, m_thf, m_ser) - MM_twosubst(Vr_mSHMT, K_gly_SHMT, K_2cf_SHMT, m_gly, m_2cf));
  VmFTS: m_thf + m_coo -> m_10f; mito*(MM_twosubst(Vf_mFTS, K_thf_mFTS, K_coo_mFTS, m_thf, m_coo) - MM(Vr_mFTS, K_10f_mFTS, m_10f));
  VmNE: m_thf + $HCHO -> m_2cf; mito*(k1_mNE*m_thf*HCHO - k2_mNE*m_2cf);
  V_GDC: m_thf + m_gly -> m_2cf + $CO; mito*MM_twosubst(Vm_GDC, K_thf_GDC, K_gly_GDC, m_thf, m_gly);
  V_SDH: m_thf + src -> m_2cf + m_gly; mito*MM_twosubst(Vm_SDH, K_thf_SDH, K_src_SDH, m_thf, src);
  V_DMGD: m_thf + dmg -> m_2cf + src; mito*MM_twosubst(Vm_DMGD, K_thf_DMGD, K_dmg_DMGD, m_thf, dmg);
  VmMTD: m_2cf -> m_1cf; mito*(MM(Vf_mMTD, K_2cf_MTD, m_2cf) - MM(Vr_MTD, K_1cf_MTD, m_1cf));
  VmMTCH: m_1cf -> m_10f; mito*(MM(Vf_mMTCH, K_1cf_MTCH, m_1cf) - MM(Vr_MTCH, K_10f_MTCH, m_10f));
  VmSERc: 3 m_ser -> c_ser; MM(V_mser, K_mser, m_ser)*mito/3 - MM(V_cser, K_cser, c_ser)*cytosol;
  VmHCOOHc: 3 m_coo -> c_coo; k_in_coo*m_coo*mito/3 - k_out_coo*c_coo*cytosol;
  VmGLYc: 3 m_gly -> c_gly; MM(V_mgly, K_mgly, m_gly)*mito/3 - MM(V_cgly, K_cgly, c_gly)*cytosol;
  V_MS: c_5mf + hcy -> c_thf + met; cytosol*MM_twosubst(Vm_MS, K_5mf_MS, K_hcy_MS, c_5mf, hcy);
  V_DHFR: dhf + $NADPH -> c_thf; cytosol*MM_twosubst(Vm_DHFR, K_dhf_DHFR, K_NADPH_DHFR, dhf, NADPH);
  VcFTD: c_10f -> c_thf; cytosol*MM(Vm_cFTD, K_10f_FTD, c_10f);
  V_PGT: c_10f + $GAR -> aic + c_thf; cytosol*MM_twosubst(Vm_PGT, K_10f_PGT, K_GAR_PGT, c_10f, GAR);
  VcFTS: c_thf + c_coo -> c_10f; cytosol*MM_twosubst(Vm_cFTS, K_thf_cFTS, K_coo_cFTS, c_thf, c_coo);
  VcSHMT: c_ser + c_thf -> c_gly + c_2cf; cytosol*(MM_twosubst(Vf_cSHMT, K_thf_SHMT, K_ser_SHMT, c_thf, c_ser) - MM_twosubst(Vr_cSHMT, K_gly_SHMT, K_2cf_SHMT, c_gly, c_2cf));
  VcNE: c_thf + $HCHO -> c_2cf; cytosol*(k1_cNE*c_thf*HCHO - k2_cNE*c_2cf);
  V_TS: $DUMP + c_2cf -> dhf; cytosol*MM_twosubst(Vm_TS, K_DUMP_TS, K_2cf_TS, DUMP, c_2cf);
  V_MTHFR: c_2cf + $NADPH -> c_5mf; cytosol*MM_twosubst(Vm_MTHFR, K_2cf_MTHFR, K_NADPH_MTHFR, c_2cf, NADPH)*60/(10 + sam - sah);  // modifiers: sam, sah
  VcMTD: c_2cf -> c_1cf + $NADPH; cytosol*(MM(Vf_cMTD, K_2cf_MTD, c_2cf) - MM(Vr_MTD, K_1cf_MTD, c_1cf));
  VcMTCH: c_1cf -> c_10f; cytosol*(MM(Vf_cMTCH, K_1cf_MTCH, c_1cf) - MM(Vr_MTCH, K_10f_MTCH, c_10f));
  V_ART: c_10f + aic -> c_thf; cytosol*MM_twosubst(Vm_ART, K_10f_ART, K_aic_ART, c_10f, aic);
  V_BHMT: hcy + $BET -> met + dmg; cytosol*exp(-0.0021*(sam + sah))*exp(0.0021*76.7)*MM_twosubst(Vm_BHMT, K_hcy_BHMT, K_bet_BHMT, hcy, BET);  // modifiers: sam, sah
  V_MATI: met -> sam; cytosol*Vm_MAT1*(met/(Km_MAT1 + met))*(0.23 + 0.8*exp(-0.0026*sam));
  V_MATIII: met -> sam; cytosol*Vm_MAT3*(met^1.21/(Km_MAT3 + met^1.21))*(1 + 7.2*sam^2/(Ka_MAT3^2 + sam^2));
  V_GNMT: sam + c_gly -> sah + src; cytosol*MM_twosubst(Vm_GNMT, K_sam_GNMT, K_gly_GNMT, sam, c_gly)*(1/(1 + sah/Ki_GNMT))*(5.88/(0.35 + c_5mf));  // modifiers: c_5mf
  V_DNMT: sam -> sah; cytosol*Vm_DNMT*(sam/(Km_DNMT*(1 + sah/Ki_DNMT) + sam));
  V_SAHH: sah -> hcy; cytosol*(MM(Vf_SAHH, K_sah_SAHH, sah) - MM(Vr_SAHH, K_hcy_SAHH, hcy));
  gluconeogenesis_ser: c_ser -> ; cytosol*1.2*c_ser;
  V_CBS: hcy + c_ser -> ; cytosol*MM_twosubst(Vm_CBS, K_hcy_CBS, K_ser_CBS, hcy, c_ser)*(1.2*(sam + sah)^2/(30^2 + (sam + sah)^2));  // modifiers: sam, sah

  // Unit definitions:
  unit substance = 1e-6 mole; substance is "micromole";
  unit uM = 1e-6 mole / litre;
  unit uM_per_h = 1e-6 mole / (litre * 3600 second); uM_per_h is "uM/h";
  unit per_h = 1 / (3600 second); per_h is "1/h";
  unit per_uM_per_h = litre / (1e-6 mole * 3600 second); per_uM_per_h is "1/(uM*h)";
  unit per_uM = litre / (1e-6 mole); per_uM is "1/uM";
  unit time = 3600 second; time is "hours";
end
