// SBML level 2 version 4

model Model_1()
  // Werner2005_IkappaB_kinase
  // This is the model described in the article:
  // Stimulus specificity of gene expression programs determined by temporal control of IKK activity.
  // by Werner SL, Barken D, Hoffmann A. Science. 2005 Sep 16;309(5742):1857-61; PMID: 16166517 , DOI= 10.1126/science.1113319
  // Abstract:
  // A small number of mammalian signaling pathways mediate a myriad of distinct physiological responses to diverse cellular stimuli. Temporal control of the signaling module that contains IkappaB kinase (IKK), its substrate inhibitor of NF-kappaB (IkappaB), and the key inflammatory transcription factor NF-kappaB can allow for selective gene activation. We have demonstrated that different inflammatory stimuli induce distinct IKK profiles, and we examined the underlying molecular mechanisms. Although tumor necrosis factor-alpha (TNFalpha)-induced IKK activity was rapidly attenuated by negative feedback, lipopolysaccharide (LPS) signaling and LPS-specific gene expression programs were dependent on a cytokine-mediated positive feedback mechanism. Thus, the distinct biological responses to LPS and TNFalpha depend on signaling pathway-specific mechanisms that regulate the temporal profile of IKK activity.
  // The model was implemented according to the description in the supplemental materials and by comparison to the matlab files provided by Prof. Hoffmann. It includes a delay for the induced transcription of IκBε mRNA. For the IKK input one of the randomly generated profiles was used. In its current form the model could not reproduce the time courses given in the article, as first the IKK activity profiles cannot easily be described by the same fitting functions in SBML and second the time delay limits simulation to tools, for which the current converters do not provide full SBML export.
  // Originally created by libAntimony v1.4 (using libSBML 3.4.1)
  // This model originates from BioModels Database: A Database of Annotated Published Models (http://www.ebi.ac.uk/biomodels/). It is copyright (c) 2005-2011 The BioModels.net Team.
  // To the extent possible under law, all copyright and related or neighbouring rights to this encoded model have been dedicated to the public domain worldwide. Please refer to CC0 Public Domain Dedication for more information.
  // In summary, you are entitled to use this encoded model in absolutely any manner you deem suitable, verbatim, or with modification, alone or embedded it in a larger context, redistribute it, commercially or not, in a restricted way or not..
  // To cite BioModels Database, please use: Li C, Donizelli M, Rodriguez N, Dharuri H, Endler L, Chelliah V, Li L, He E, Henry A, Stefan MI, Snoep JL, Hucka M, Le Novère N, Laibe C (2010) BioModels Database: An enhanced, curated and annotated resource for published quantitative kinetic models. BMC Syst Biol., 4:92.
  // biomodels.db:MODEL1008110000
  // isDescribedBy pubmed:16166517
  // biomodels.db:MODEL1008110000
  // isDescribedBy pubmed:16166517
  // biomodels.db:MODEL1008110000
  // biomodels.db:MODEL1008110000

  // Compartments:
  compartment cytoplasm = 1;
  compartment nucleus = 1;

  // Species:
  species $IKK in cytoplasm;
  species NFKB in cytoplasm = 0; NFKB is "NF-κB";
  species NFKBN in nucleus = 0; NFKBN is "NF-κB nucleus";
  species IKBAT in cytoplasm = 0; IKBAT is "IκBα mRNA";
  species IKBA in cytoplasm = 0; IKBA is "IκBα";
  species IKBAN in nucleus = 0; IKBAN is "IκBα nucleus";
  species IKBANFKB in cytoplasm = 0.07; IKBANFKB is "IκBαNF-κB";
  species IKBANFKBN in nucleus = 0; IKBANFKBN is "IκBαNF-κB nucleus";
  species IKKIKBA in cytoplasm = 0; IKKIKBA is "IKKIκBα";
  species IKKIKBANFKB in cytoplasm = 0; IKKIKBANFKB is "IKKIκBαNF-κB";
  species IKBBT in cytoplasm = 0; IKBBT is "IκBβ mRNA";
  species IKBB in cytoplasm = 0; IKBB is "IκBβ";
  species IKBBN in nucleus = 0; IKBBN is "IκBβ nucleus";
  species IKBBNFKB in cytoplasm = 0.02; IKBBNFKB is "IκBβNF-κB";
  species IKBBNFKBN in nucleus = 0; IKBBNFKBN is "IκBβNF-κB nucleus";
  species IKKIKBB in cytoplasm = 0; IKKIKBB is "IKKIκBβ";
  species IKKIKBBNFKB in cytoplasm = 0; IKKIKBBNFKB is "IKKIκBβNF-κB";
  species IKBET in cytoplasm = 0; IKBET is "IκBε mRNA";
  species IKBE in cytoplasm = 0; IKBE is "IκBε";
  species IKBEN in nucleus = 0; IKBEN is "IκBε nucleus";
  species IKBENFKB in cytoplasm = 0.01; IKBENFKB is "IκBεNF-κB";
  species IKBENFKBN in nucleus = 0; IKBENFKBN is "IκBεNF-κB nucleus";
  species IKKIKBE in cytoplasm = 0; IKKIKBE is "IKKIκBε";
  species IKKIKBENFKB in cytoplasm = 0; IKKIKBENFKB is "IKKIκBεNF-κB";

  // Parameters:
  IkBe_transcription_delay = 45;
  dur1 = 120;
  dur2 = 15;
  dur3 = 60;
  t_end = 240;
  ikk_1 = 0.11;
  ikk_2 = 0.001;
  ikk_basal = 0.001;
  a_c_ai = 1.35;
  a_c_an = 30;
  a_c_bi = 0.36;
  a_c_bn = 30;
  a_c_ei = 0.54;
  a_c_en = 30;
  a_c_2ain = 30;
  a_c_2ani = 11.1;
  a_c_2bin = 30;
  a_c_2bni = 2.88;
  a_c_2ein = 30;
  a_c_2eni = 4.2;
  a_n_an = 30;
  a_n_bn = 30;
  a_n_en = 30;
  d_c_ai = 0.075;
  d_c_an = 6e-5;
  d_c_bi = 0.105;
  d_c_bn = 6e-5;
  d_c_ei = 0.105;
  d_c_en = 6e-5;
  d_c_2ain = 6e-5;
  d_c_2ani = 0.075;
  d_c_2bin = 6e-5;
  d_c_2bni = 0.105;
  d_c_2ein = 6e-5;
  d_c_2eni = 0.105;
  d_n_an = 6e-5;
  d_n_bn = 6e-5;
  d_n_en = 6e-5;
  ex_a = 0.012;
  ex_b = 0.012;
  ex_e = 0.012;
  ex_n = 0.0048;
  ex_2an = 0.828;
  ex_2bn = 0.424;
  ex_2en = 0.424;
  in_a = 0.018;
  in_b = 0.018;
  in_e = 0.018;
  in_n = 5.4;
  pd_c_a = 0.12;
  pd_c_b = 0.18;
  pd_c_e = 0.18;
  pd_c_2ai = 0.0018;
  pd_c_2an = 6e-5;
  pd_c_2bi = 0.0006;
  pd_c_2bn = 6e-5;
  pd_c_2ei = 0.0012;
  pd_c_2en = 6e-5;
  pd_c_3ain = 0.36;
  pd_c_3bin = 0.12;
  pd_c_3ein = 0.18;
  pd_n_2an = 6e-5;
  pd_n_2bn = 6e-5;
  pd_n_2en = 6e-5;
  pd_n_a = 0.12;
  pd_n_b = 0.18;
  pd_n_e = 0.18;
  ps_c_a = 0.2448;
  ps_c_b = 0.2448;
  ps_c_e = 0.2448;
  rd_a = 0.0168;
  rd_b = 0.0168;
  rd_e = 0.0168;
  rs_an = 7.92;
  rs_en = 0.8;
  rs_a = 0.0001848;
  rs_b = 4.272e-5;
  rs_e = 3.048e-5;

  // Assignment rules:
  IKK := piecewise(ikk_basal, time > t_end, piecewise(ikk_2, (time >= t3) && (time <= t_end), piecewise(ikk_1 + (ikk_2 - ikk_1)*(time - t2)/dur3, (time < t3) && (time > t2), piecewise(ikk_1, (time <= t2) && (time >= t1), ikk_basal + (ikk_1 - ikk_basal)*time/dur1))));
  t1 := dur1;
  t2 := dur1 + dur2;
  t3 := dur1 + dur2 + dur3;
  NFKBn_tot := NFKBN + IKBBNFKBN;

  // Reactions:
  re1: IKBA + $IKK => IKKIKBA; cytoplasm*a_c_ai*IKBA*IKK;
  re2: IKBA + NFKB => IKBANFKB; cytoplasm*a_c_an*IKBA*NFKB;
  re3: IKBB + $IKK => IKKIKBB; cytoplasm*a_c_bi*IKBB*IKK;
  re4: IKBB + NFKB => IKBBNFKB; cytoplasm*a_c_bn*IKBB*NFKB;
  re5: IKBE + $IKK => IKKIKBE; cytoplasm*a_c_ei*IKBE*IKK;
  re6: IKBE + NFKB => IKBENFKB; cytoplasm*a_c_en*IKBE*NFKB;
  re7: IKKIKBA + NFKB => IKKIKBANFKB; cytoplasm*a_c_2ain*IKKIKBA*NFKB;
  re8: IKBANFKB + $IKK => IKKIKBANFKB; cytoplasm*a_c_2ani*IKBANFKB*IKK;
  re9: IKKIKBB + NFKB => IKKIKBBNFKB; cytoplasm*a_c_2bin*IKKIKBB*NFKB;
  re10: IKBBNFKB + $IKK => IKKIKBBNFKB; cytoplasm*a_c_2bni*IKBBNFKB*IKK;
  re11: IKKIKBE + NFKB => IKKIKBENFKB; cytoplasm*a_c_2ein*IKKIKBE*NFKB;
  re12: IKBENFKB + $IKK => IKKIKBENFKB; cytoplasm*a_c_2eni*IKBENFKB*IKK;
  re13: IKBAN + NFKBN => IKBANFKBN; nucleus*a_n_an*IKBAN*NFKBN;
  re14: IKBBN + NFKBN => IKBBNFKBN; nucleus*a_n_bn*IKBBN*NFKBN;
  re15: IKBEN + NFKBN => IKBENFKBN; nucleus*a_n_en*IKBEN*NFKBN;
  re16: IKKIKBA => $IKK + IKBA; cytoplasm*d_c_ai*IKKIKBA;
  re17: IKBANFKB => IKBA + NFKB; cytoplasm*d_c_an*IKBANFKB;
  re18: IKKIKBB => $IKK + IKBB; cytoplasm*d_c_bi*IKKIKBB;
  re19: IKBBNFKB => IKBB + NFKB; cytoplasm*d_c_bn*IKBBNFKB;
  re20: IKKIKBE => $IKK + IKBE; cytoplasm*d_c_ei*IKKIKBE;
  re21: IKBENFKB => IKBE + NFKB; cytoplasm*d_c_en*IKBENFKB;
  re22: IKKIKBANFKB => IKKIKBA + NFKB; cytoplasm*d_c_2ain*IKKIKBANFKB;
  re23: IKKIKBANFKB => $IKK + IKBANFKB; cytoplasm*d_c_2ani*IKKIKBANFKB;
  re24: IKKIKBBNFKB => IKKIKBB + NFKB; cytoplasm*d_c_2bin*IKKIKBBNFKB;
  re25: IKKIKBBNFKB => $IKK + IKBBNFKB; cytoplasm*d_c_2bni*IKKIKBBNFKB;
  re26: IKKIKBENFKB => IKKIKBE + NFKB; cytoplasm*d_c_2ein*IKKIKBENFKB;
  re27: IKKIKBENFKB => $IKK + IKBENFKB; cytoplasm*d_c_2eni*IKKIKBENFKB;
  re28: IKBANFKBN => IKBAN + NFKBN; nucleus*d_n_an*IKBANFKBN;
  re29: IKBBNFKBN => IKBBN + NFKBN; nucleus*d_n_bn*IKBBNFKBN;
  re30: IKBENFKBN => IKBEN + NFKBN; nucleus*d_n_en*IKBENFKBN;
  re31: IKBAN => IKBA; nucleus*ex_a*IKBAN;
  re32: IKBBN => IKBB; nucleus*ex_b*IKBBN;
  re33: IKBEN => IKBE; nucleus*ex_e*IKBEN;
  re34: NFKBN => NFKB; nucleus*ex_n*NFKBN;
  re35: IKBANFKBN => IKBANFKB; nucleus*ex_2an*IKBANFKBN;
  re36: IKBBNFKBN => IKBBNFKB; nucleus*ex_2bn*IKBBNFKBN;
  re37: IKBENFKBN => IKBENFKB; nucleus*ex_2en*IKBENFKBN;
  re38: IKBA => IKBAN; cytoplasm*in_a*IKBA;
  re39: IKBB => IKBBN; cytoplasm*in_b*IKBB;
  re40: IKBE => IKBEN; cytoplasm*in_e*IKBE;
  re41: NFKB => NFKBN; cytoplasm*in_n*NFKB;
  re42: IKBA => ; cytoplasm*pd_c_a*IKBA;
  re43: IKBB => ; cytoplasm*pd_c_b*IKBB;
  re44: IKBE => ; cytoplasm*pd_c_e*IKBE;
  re45: IKKIKBA => $IKK; cytoplasm*pd_c_2ai*IKKIKBA;
  re46: IKBANFKB => NFKB; cytoplasm*pd_c_2an*IKBANFKB;
  re47: IKKIKBB => $IKK; cytoplasm*pd_c_2bi*IKKIKBB;
  re48: IKBBNFKB => NFKB; cytoplasm*pd_c_2bn*IKBBNFKB;
  re49: IKKIKBE => $IKK; cytoplasm*pd_c_2ei*IKKIKBE;
  re50: IKBENFKB => NFKB; cytoplasm*pd_c_2en*IKBENFKB;
  re51: IKKIKBANFKB => $IKK + NFKB; cytoplasm*pd_c_3ain*IKKIKBANFKB;
  re52: IKKIKBBNFKB => $IKK + NFKB; cytoplasm*pd_c_3bin*IKKIKBBNFKB;
  re53: IKKIKBENFKB => $IKK + NFKB; cytoplasm*pd_c_3ein*IKKIKBENFKB;
  re54: IKBANFKBN => NFKBN; nucleus*pd_n_2an*IKBANFKBN;
  re55: IKBBNFKBN => NFKBN; nucleus*pd_n_2bn*IKBBNFKBN;
  re56: IKBENFKBN => NFKBN; nucleus*pd_n_2en*IKBENFKBN;
  re57: IKBAN => ; nucleus*pd_n_a*IKBAN;
  re58: IKBBN => ; nucleus*pd_n_b*IKBBN;
  re59: IKBEN => ; nucleus*pd_n_e*IKBEN;
  re60: => IKBA; cytoplasm*ps_c_a;
  re61: => IKBB; cytoplasm*ps_c_b;
  re62: => IKBE; cytoplasm*ps_c_e;
  re63: IKBAT => ; cytoplasm*rd_a*IKBAT;
  re64: IKBBT => ; cytoplasm*rd_b*IKBBT;
  re65: IKBET => ; cytoplasm*rd_e*IKBET;
  re66: => IKBAT; nucleus*rs_an*NFKBN^3;  // modifiers: NFKBN
  re67: => IKBET; nucleus*rs_en*delay(NFKBN, IkBe_transcription_delay)^3;  // modifiers: NFKBN
  re68: => IKBAT; nucleus*rs_a;
  re69: => IKBBT; nucleus*rs_b;
  re70: => IKBET; nucleus*rs_e;

  // Unit definitions:
  unit substance = 1e-6 mole; substance is "micromole";
  unit time = 60 second; time is "minutes";
end
