// SBML level 2 version 4

function fd(S, P, V, K, Ki)
  V*(S - P)/K/(1 + S/K + P/K + Ki*S/K*P/K);
end
fd is "facilitated diffusion: symmetrical carrier";

function hill(S, Vmax, KS, nH)
  Vmax*(S/KS)^nH/(1 + (S/KS)^nH);
end
hill is "Hill kinetics";

function ima1(S, k)
  k*S;
end
ima1 is "irreversible mass action: one substrate";

function imm1(S, P, V, KS, KP)
  V*S/KS/((1 + S/KS)*(1 + P/KP));
end
imm1 is "irreversible michaelis-menten: one noncompeting couple";

function pfk_fun(ATP, F6P, F16bP, AMP, F26bP, Vmax, gR, Kf6p, Katp, L0, Ciatp, Kiatp, Camp, Kamp, Cf26, Kf26, Cf16, Kf16, Catp)
  Vmax*(gR*(F6P/Kf6p)*(ATP/Katp)*(1 + F6P/Kf6p + ATP/Katp + gR*F6P/Kf6p*ATP/Katp)/((1 + F6P/Kf6p + ATP/Katp + gR*F6P/Kf6p*ATP/Katp)^2 + L0*((1 + Ciatp*ATP/Kiatp)/(1 + ATP/Kiatp))^2*((1 + Camp*AMP/Kamp)/(1 + AMP/Kamp))^2*((1 + Cf26*F26bP/Kf26 + Cf16*F16bP/Kf16)/(1 + F26bP/Kf26 + F16bP/Kf16))^2*(1 + Catp*ATP/Katp)^2));
end
pfk_fun is "phosphofructokinase kinetics";

function rma1eq(S, P, k, Keq)
  k*(S - P/Keq);
end
rma1eq is "reversible mass action with equilibrium term: one substrate, one product";

function rma2eq(S1, S2, P1, P2, k, Keq)
  k*(S1*S2 - P1*P2/Keq);
end
rma2eq is "reversible mass action with equilibrium term: two substrates, two products";

function rmm1(S, P, V, KS, KP, Keq)
  V*(S/KS - P/(KS*Keq))/(1 + S/KS + P/KP);
end
rmm1 is "reversible michaelis-menten: one substrate, one product";

function rmm_bb(S1, S2, P1, P2, V, KS1, KiS1, KS2, KiS2, KP1, KiP1, KP2, KiP2, Keq)
  V*(S1*S2/(KS1*KiS2) - P1*P2/(KS1*KiS2*Keq))/(1 + S2/KiS2 + S1*KS2/(KiS2*KS1) + P1*KP2/(KiP2*KP1) + P2/KiP2 + S1*S2/(KiS2*KS1) + S2*P1*KP2/(KiS2*KiP2*KP1) + S1*P2*KS2/(KiS2*KiP2*KS1) + P1*P2/(KP1*KiP2) + S1*S2*P1/(KiS2*KiP1*KS1) + S1*P1*P2/(KiS1*KiP2*KP1));
end
rmm_bb is "reversible michaelis-menten: ordered bi-bi";

function rmm_ub(S, P1, P2, V, KS, KP1, KP2, KiP2, Keq)
  V*(S/KS - P1*P2/(KS*Keq))/(1 + S/KS + P1/KP1 + P2/KP2 + S*P2/(KS*KiP2) + P1*P2/(KP1*KP2));
end
rmm_ub is "reversible michaelis-menten: ordered uni-bi";

function rmm2(S1, S2, P1, P2, V, KS1, KS2, KP1, KP2, Keq)
  V*(S1*S2/(KS1*KS2) - P1*P2/(KS1*KS2*Keq))/((1 + S1/KS1 + P1/KP1)*(1 + S2/KS2 + P2/KP2));
end
rmm2 is "reversible michaelis-menten: two noncompeting couples";

function rmm2_3i(S1, S2, P1, P2, i1, i2, i3, V, KS1, KS2, KP1, KP2, Ki1, Ki2, Ki3, Keq)
  V/(KS1*KS2)*(S1*S2 - P1*P2/Keq)/((1 + i1/Ki1 + i2/Ki2 + i3/Ki3)*(1 + S1/KS1 + P1/KP1)*(1 + S2/KS2 + P2/KP2));
end
rmm2_3i is "reversible michaelis-menten: two substrates, two products, three inhibitors, non-competitive inhibition";

model martins04()
  // Martins2004_Yeast_Glycolysis_GlycerolSynthesis
  // A systems biology study of two distinct growth phases of Saccharomyces cerevisiae cultures
  // AM Martins, D Camacho, J Shuman, W Sha, P Mendes, V Shulaev, Current Genomics 2004 5:649-663
  // This is a model of yeast glycolysis and glycerol synthesis for high medium glucose concentration. It was constructed by joining the glycolysis model of Teusink et al. (2000) Eur J Biochem 267, 5313, modified by Pritchard and Kell (2002) Eur. J. Biochem. 269, 3894, with the glycerol synthesis model of Crownright et al. (2002) Appl. Env. Microbiol. 68, 4448. Glycerol transport was added as a first order reaction with parameters that comply with empirical data on internal/external glycerol ratios.
  // Curation notes
  // The model provided by the authors is available from http://www.mcisb.org/resources/models/martins04_original.xml . It contains one error: the kinetic law of glycerol 3-phosphate dehydrogenase has denominator of the form
  // (1+NADH/Kdhap+NAD/Kg3p)*(1+DHAP/Knadh+G3P/Knad)
  // rather than
  // (1+DHAP/Kdhap+G3P/Kg3p)*(1+NADH/Knadh+NAD/Knad).
  // This has now been corrected; steady states of the original model may be resolved by exchanging the order of substrates and products in COPASI . Some other cosmetic changes (e.g minutes to seconds) have also been carried out.
  // This model originates from BioModels Database: A Database of Annotated Published Models (http://www.ebi.ac.uk/biomodels/). It is copyright (c) 2005-2011 The BioModels.net Team.
  // To the extent possible under law, all copyright and related or neighbouring rights to this encoded model have been dedicated to the public domain worldwide. Please refer to CC0 Public Domain Dedication for more information.
  // In summary, you are entitled to use this encoded model in absolutely any manner you deem suitable, verbatim, or with modification, alone or embedded it in a larger context, redistribute it, commercially or not, in a restricted way or not. .
  // To cite BioModels Database, please use: Li C, Donizelli M, Rodriguez N, Dharuri H, Endler L, Chelliah V, Li L, He E, Henry A, Stefan MI, Snoep JL, Hucka M, Le Novère N, Laibe C (2010) BioModels Database: An enhanced, curated and annotated resource for published quantitative kinetic models. BMC Syst Biol., 4:92.
  // biomodels.db:MODEL1009220000
  // isDescribedBy doi:10.2174/1389202043348643
  // occursIn taxonomy:4932
  // biomodels.db:MODEL1009220000
  // isDescribedBy doi:10.2174/1389202043348643
  // biomodels.db:MODEL1009220000

  // Compartments:
  compartment cell = 1;  // GO:0005829
  compartment extracellular = 1;  // GO:0005576

  // Species:
  species $GLCx in extracellular = 50; GLCx is "glucose";  // CHEBI:4167 kegg.compound:C00031
  species GLC in cell = 0.09177; GLC is "glucose";  // CHEBI:4167 kegg.compound:C00031
  species ATP in cell = 2.744058;  // CHEBI:15422 kegg.compound:C00002
  species G6P in cell = 3.260874; G6P is "glucose 6-phosphate";  // CHEBI:17665 kegg.compound:C00668
  species ADP in cell = 1.142052;  // CHEBI:16761 kegg.compound:C00008
  species F6P in cell = 0.7818638; F6P is "fructose 6-phosphate";  // CHEBI:16084 kegg.compound:C05345
  species F16bP in cell = 20.1291; F16bP is "fructose 1,6-bisphosphate";  // CHEBI:28013 kegg.compound:C05378
  species AMP in cell = 0.2138902;  // CHEBI:16027 kegg.compound:C00020
  species $F26bP in cell = 0.02; F26bP is "fructose 2,6-bisphosphate";  // CHEBI:28602 kegg.compound:C00665
  species DHAP in cell = 2.525363; DHAP is "dihydroxyacetone phosphate";  // CHEBI:16108 kegg.compound:C00111
  species GAP in cell = 0.1136343; GAP is "glyceraldehyde 3-phosphate";  // CHEBI:29052 kegg.compound:C00118
  species NAD in cell = 1.253971;  // CHEBI:15846 kegg.compound:C00003
  species BPG in cell = 0.001013794; BPG is "1,3-bisphosphoglycerate";  // CHEBI:16001 kegg.compound:C00236
  species NADH in cell = 0.3360292;  // CHEBI:16908 kegg.compound:C00004
  species P3G in cell = 1.019895; P3G is "3-phosphoglycerate";  // CHEBI:17794 kegg.compound:C00197
  species P2G in cell = 0.147537; P2G is "2-phosphoglycerate";  // CHEBI:17835 kegg.compound:C00631
  species PEP in cell = 0.07545658; PEP is "phosphoenolpyruvate";  // CHEBI:18021 kegg.compound:C00074
  species PYR in cell = 1.847589; PYR is "pyruvate";  // CHEBI:15361 kegg.compound:C00022
  species AcAld in cell = 0.06796849; AcAld is "acetaldehyde";  // CHEBI:15343 kegg.compound:C00084
  species $CO2 in cell = 1;  // CHEBI:16526 kegg.compound:C00011
  species $EtOH in cell = 50; EtOH is "ethanol";  // CHEBI:16236 kegg.compound:C00469
  species GLY in cell = 20.45196; GLY is "glycerol";  // CHEBI:17754 kegg.compound:C00116
  species $glycogen in cell = 0;  // CHEBI:28087 kegg.compound:C00182
  species $trehalose in cell = 0;  // CHEBI:16551 kegg.compound:C01083
  species $succinate in cell = 0;  // CHEBI:30031 kegg.compound:C00042
  species G3P in cell = 0.1128819; G3P is "glycerol 3-phosphate";  // CHEBI:15978 kegg.compound:C00093
  species $iP in cell = 1; iP is "phosphate";  // CHEBI:18367
  species $GLYx in extracellular = 0.084; GLYx is "glycerol";  // CHEBI:17754 kegg.compound:C00116

  // Reactions:
  HXT: $GLCx -> GLC; cell*HXT_ExpR*fd(GLCx, GLC, HXT_Vmax, HXT_Kglc, Ki); HXT is "glucose transport";  // isVersionOf GO:0015758
    HXT_Vmax = 1.620667 mM_per_second; HXT_Kglc = 1.1918 mM; Ki = 0.91 dimensionless; HXT_ExpR = 1 dimensionless;
  HXK: ATP + GLC -> ADP + G6P; cell*HXK_ExpR*rmm2(GLC, ATP, G6P, ADP, HXK_Vmax, HXK_Kglc, HXK_Katp, HXK_Kg6p, HXK_Kadp, HXK_Keq); HXK is "hexokinase";  // isVersionOf ec-code:2.7.1.1 GO:0004396; kegg.reaction:R02848
    HXK_Vmax = 3.945 mM_per_second; HXK_Kglc = 0.08 mM; HXK_Katp = 0.15 mM; HXK_Keq = 2000 dimensionless; HXK_Kg6p = 30 mM; HXK_Kadp = 0.23 mM; HXK_ExpR = 1 dimensionless;
  PGI: G6P -> F6P; cell*PGI_ExpR*rmm1(G6P, F6P, PGI_Vmax, PGI_Kg6p, PGI_Kf6p, PGI_Keq); PGI is "phosphoglucose isomerase";  // isVersionOf ec-code:5.3.1.9 GO:0004347; kegg.reaction:R00771
    PGI_Vmax = 17.6 mM_per_second; PGI_Kg6p = 1.4 mM; PGI_Keq = 0.29 dimensionless; PGI_Kf6p = 0.3 mM; PGI_ExpR = 1 dimensionless;
  PFK: ATP + F6P => ADP + F16bP; cell*PFK_ExpR*pfk_fun(ATP, F6P, F16bP, AMP, F26bP, PFK_Vmax, gR, PFK_Kf6p, PFK_Katp, L0, Ciatp, Kiatp, Camp, Kamp, Cf26, Kf26, Cf16, Kf16, Catp); PFK is "phosphofructokinase";  // modifiers: AMP, F26bP; kegg.reaction:R00756; isVersionOf ec-code:2.7.1.11 GO:0003872
    PFK_Vmax = 1.833333 mM_per_second; gR = 5.12 dimensionless; PFK_Kf6p = 0.1 mM; PFK_Katp = 0.71 mM; L0 = 0.66 dimensionless; Ciatp = 100 dimensionless; Kiatp = 0.65 mM; Camp = 0.0845 dimensionless; Kamp = 0.0995 mM; Cf26 = 0.0174 dimensionless; Kf26 = 0.000682 mM; Cf16 = 0.397 dimensionless; Kf16 = 0.111 mM; Catp = 3 dimensionless; PFK_ExpR = 1 dimensionless;
  ALD: F16bP -> DHAP + GAP; cell*ALD_ExpR*rmm_ub(F16bP, DHAP, GAP, ALD_Vmax, Kf16bp, ALD_Kdhap, ALD_Kgap, Kigap, ALD_Keq); ALD is "fructosebisphosphate aldolase";  // isVersionOf ec-code:4.1.2.13 GO:0004332; kegg.reaction:R01068
    ALD_Vmax = 1.578167 mM_per_second; Kf16bp = 0.3 mM; ALD_Keq = 0.069 mM; ALD_Kdhap = 2 mM; ALD_Kgap = 2.4 mM; Kigap = 10 mM; ALD_ExpR = 1 dimensionless;
  TPI: DHAP -> GAP; cell*TPI_ExpR*rma1eq(DHAP, GAP, TPI_k, TPI_Keq); TPI is "triosephosphate isomerase";  // isVersionOf ec-code:5.3.1.1 GO:0004807; kegg.reaction:R01015
    TPI_k = 7500 per_second; TPI_Keq = 0.045 dimensionless; TPI_ExpR = 1 dimensionless;
  TDH: GAP + NAD -> BPG + NADH; cell*TDH_ExpR*rmm2(GAP, NAD, BPG, NADH, TDH_Vmax, TDH_Kgap, TDH_Knad, TDH_Kbpg, TDH_Knadh, TDH_Keq); TDH is "glyceraldehyde phosphate dehydrogenase";  // isVersionOf ec-code:1.2.1.12 GO:0004365; kegg.reaction:R01061
    TDH_Vmax = 19.2 mM_per_second; TDH_Kgap = 0.21 mM; TDH_Knad = 0.09 mM; TDH_Kbpg = 0.0098 mM; TDH_Knadh = 0.06 mM; TDH_ExpR = 1 dimensionless; TDH_Keq = 0.005334127 dimensionless;
  PGK: ADP + BPG -> ATP + P3G; cell*PGK_ExpR*rmm2(BPG, ADP, P3G, ATP, PGK_Vmax, PGK_Kbpg, PGK_Kadp, PGK_Kp3g, PGK_Katp, PGK_Keq); PGK is "3-phosphoglycerate kinase";  // isVersionOf ec-code:2.7.2.3 GO:0004618; kegg.reaction:R01512
    PGK_Vmax = 259.2201 mM_per_second; PGK_Keq = 3200 dimensionless; PGK_Kp3g = 0.53 mM; PGK_Katp = 0.3 mM; PGK_Kbpg = 0.003 mM; PGK_Kadp = 0.2 mM; PGK_ExpR = 1 dimensionless;
  PGM: P3G -> P2G; cell*PGM_ExpR*rmm1(P3G, P2G, PGM_Vmax, PGM_Kp3g, PGM_Kp2g, PGM_Keq); PGM is "phosphoglyceromutase";  // kegg.reaction:R01518; isVersionOf ec-code:5.4.2.1 GO:0004619
    PGM_Vmax = 43.08333 mM_per_second; PGM_Kp3g = 1.2 mM; PGM_Keq = 0.19 dimensionless; PGM_Kp2g = 0.08 mM; PGM_ExpR = 1 dimensionless;
  ENO: P2G -> PEP; cell*ENO_ExpR*rmm1(P2G, PEP, ENO_Vmax, ENO_Kp2g, ENO_Kpep, ENO_Keq); ENO is "enolase";  // isVersionOf ec-code:4.2.1.11 GO:0004634; kegg.reaction:R00658
    ENO_Vmax = 3.36 mM_per_second; ENO_Kp2g = 0.04 mM; ENO_Keq = 6.7 dimensionless; ENO_Kpep = 0.5 mM; ENO_ExpR = 1 dimensionless;
  PYK: ADP + PEP -> ATP + PYR; cell*PYK_ExpR*rmm2(PEP, ADP, PYR, ATP, PYK_Vmax, PYK_Kpep, PYK_Kadp, PYK_Kpyr, PYK_Katp, PYK_Keq); PYK is "pyruvate kinase";  // isVersionOf ec-code:2.7.1.40 GO:0004743; kegg.reaction:R00200
    PYK_Vmax = 16.66667 mM_per_second; PYK_Kpep = 0.14 mM; PYK_Kadp = 0.53 mM; PYK_Keq = 6500 dimensionless; PYK_Kpyr = 21 mM; PYK_Katp = 1.5 mM; PYK_ExpR = 1 dimensionless;
  PDC: PYR => AcAld + $CO2; cell*PDC_ExpR*hill(PYR, PDC_Vmax, PDC_Kpyr, nH); PDC is "pyruvate decarboxylase";  // isVersionOf ec-code:4.1.1.1 GO:0004737; kegg.reaction:R00636
    PDC_Vmax = 14.29667 mM_per_second; PDC_Kpyr = 4.33 mM; nH = 1.9 dimensionless; PDC_ExpR = 1 dimensionless;
  ADH: AcAld + NADH -> $EtOH + NAD; cell*ADH_ExpR*rmm_bb(AcAld, NADH, EtOH, NAD, ADH_Vmax, Kacald, Kiacald, ADH_Knadh, Kinadh, Ketoh, Kietoh, ADH_Knad, Kinad, ADH_Keq); ADH is "alcohol dehydrogenase";  // isVersionOf ec-code:1.1.1.1 GO:0004022; kegg.reaction:R00754
    ADH_Vmax = 111.335 mM_per_second; Ketoh = 17 mM; Kinad = 0.92 mM; ADH_Keq = 14492.75 dimensionless; ADH_Knad = 0.17 mM; ADH_Knadh = 0.11 mM; Kinadh = 0.031 mM; Kacald = 1.11 mM; Kiacald = 1.1 mM; Kietoh = 90 mM; ADH_ExpR = 1 dimensionless;
  ATPase: ATP => ADP; cell*ATPase_ExpR*ima1(ATP, ATPase_k);  // isVersionOf GO:0016887
    ATPase_k = 0.6583333 per_second; ATPase_ExpR = 1 dimensionless;
  AK: 2 ADP -> AMP + ATP; cell*AK_ExpR*rma2eq(ADP, ADP, ATP, AMP, AK_k, AK_Keq); AK is "adenylate kinase";  // isVersionOf ec-code:2.7.4.3 GO:0004017; kegg.reaction:R00127
    AK_k = 0.75 per_mM_per_second; AK_Keq = 0.45 dimensionless; AK_ExpR = 1 dimensionless;
  GPD: DHAP + NADH -> G3P + NAD; cell*GPD_ExpR*rmm2_3i(DHAP, NADH, G3P, NAD, F16bP, ATP, ADP, GPD_Vmax, GPD_Kdhap, GPD_Knadh, GPD_Kg3p, GPD_Knad, Kfbp, GPD_Katp, GPD_Kadp, GPD_Keq); GPD is "glycerol 3-phosphate dehydrogenase";  // modifiers: ADP, ATP, F16bP; ec-code:1.1.1.94 kegg.reaction:R00842
    GPD_Vmax = 1.116667 mM_per_second; GPD_Knadh = 0.023 mM; GPD_Kdhap = 0.54 mM; GPD_Keq = 10000 dimensionless; Kfbp = 4.8 mM; GPD_Katp = 0.73 mM; GPD_Kadp = 2 mM; GPD_Knad = 0.93 mM; GPD_Kg3p = 1.2 mM; GPD_ExpR = 1 dimensionless;
  glycogen_branch: ATP + G6P => ADP + $glycogen; cell*ima1(G6P*ATP, glycogen_branch_k1);  // isVersionOf GO:0005978
    glycogen_branch_k1 = 0.01649685 per_mM_per_second;
  trehalose_branch: ATP + 2 G6P => ADP + $trehalose; cell*ima1(G6P^2*ATP, trehalose_branch_k1);  // isVersionOf GO:0005992
    trehalose_branch_k1 = 0.002703049 per_mM_squared_per_second;
  succinate_branch: 2 AcAld + 3 NAD => 3 NADH + $succinate; cell*ima1(AcAld^2*NAD^3, succinate_branch_k1);  // isVersionOf GO:0006105
    succinate_branch_k1 = 0.594532 per_mM_fourth_per_second;
  GPP: G3P => GLY + $iP; cell*GPP_ExpR*imm1(G3P, iP, GPP_Vmax, GPP_Kg3p, Kpi); GPP is "glycerol 3-phosphatase";  // ec-code:3.1.3.21 kegg.reaction:R00841
    GPP_Vmax = 1.733333 mM_per_second; GPP_Kg3p = 3.5 mM; Kpi = 1 mM; GPP_ExpR = 1 dimensionless;
  glycerol_efflux: GLY -> $GLYx; cell*ima1(GLY - GLYx, glycerol_efflux_k1);  // isVersionOf GO:0015793
    glycerol_efflux_k1 = 0.00132946 per_second;

  // Unit definitions:
  unit mM = 1e-3 mole / (10 litre);
  unit mM_per_second = 1e-3 mole / (10 litre * 10 second);
  unit per_mM_per_second = 10 litre / (1e-3 mole * 10 second);
  unit per_mM_squared_per_second = (10 litre)^2 / ((1e-3 mole)^2 * 10 second);
  unit per_second = 1 / (10 second);
  unit substance = 1e-3 mole; substance is "mmol";
  unit per_mM_fourth_per_second = (10 litre)^4 / ((1e-3 mole)^4 * 10 second);
end
