// SBML level 2 version 4

model Bruck2008_Glycolysis()
  // Exploring the effect of variable enzyme concentrations in a kinetic model of yeast glycolysis
  // Jozsef Bruck, Wolfram Liebermeister, Edda Klipp, Genome Inform 2008 20:1-14
  // Abstract:
  // Metabolism is one of the best studied fields of biochemistry, but its regulation involves processes on many different levels, some of which are still not understood well enough to allow for quantitative modeling and prediction. Glycolysis in yeast is a good example: although high-quality quantitative data are available, well-established mathematical models typically only cover direct regulation of the involved enzymes by metabolite binding. The effect of various metabolites on the enzyme kinetics is summarized in carefully developed mathematical formulae. However, this approach implicitly assumes that the enzyme concentrations themselves are constant, thus neglecting other regulatory levels - e.g. transcriptional and translational regulation--involved in the regulation of enzyme activities. It is believed, however, that different experimental conditions result in different enzyme activities regulated by the above mechanisms. Detailed modeling of all regulatory levels is still out of reach since some of the necessary data - e.g. quantitative large scale enzyme concentration data sets - are lacking or rare. Nevertheless, a viable approach is to include the regulation of enzyme concentrations into an established model and to investigate whether this improves the predictive capabilities. Proteome data are usually hard to obtain, but levels of mRNA transcripts may be used instead as clues for changes in enzyme concentrations. Here we investigate whether including mRNA data into an established model of yeast glycolysis allows to predict the steady state metabolic concentrations for different experimental conditions. To this end, we modified an established ODE model for the glycolytic pathway of yeast to include changes of enzyme concentrations. Presumable changes were inferred from mRNA transcript level measurement data. We investigate how this approach can be used to predict metabolite concentrations for steady-state yeast cultures at five different oxygen levels ranging from anaerobic to fully aerobic conditions. We were partly able to reproduce the experimental data and present a number of changes that were necessary to improve the modeling result.
  // Further modifications to this model and improved data fit will be presented soon.
  // This model originates from BioModels Database: A Database of Annotated Published Models (http://www.ebi.ac.uk/biomodels/). It is copyright (c) 2005-2011 The BioModels.net Team.
  // To the extent possible under law, all copyright and related or neighbouring rights to this encoded model have been dedicated to the public domain worldwide. Please refer to CC0 Public Domain Dedication for more information.
  // In summary, you are entitled to use this encoded model in absolutely any manner you deem suitable, verbatim, or with modification, alone or embedded it in a larger context, redistribute it, commercially or not, in a restricted way or not. .
  // To cite BioModels Database, please use: Li C, Donizelli M, Rodriguez N, Dharuri H, Endler L, Chelliah V, Li L, He E, Henry A, Stefan MI, Snoep JL, Hucka M, Le Novère N, Laibe C (2010) BioModels Database: An enhanced, curated and annotated resource for published quantitative kinetic models. BMC Syst Biol., 4:92.
  // biomodels.db:MODEL1011010000
  // occursIn taxonomy:4932
  // isDescribedBy pubmed:19425118
  // biomodels.db:MODEL1011010000
  // isDescribedBy pubmed:19425118
  // biomodels.db:MODEL1011010000

  // Compartments:
  compartment cell = 1;  // GO:0005829
  compartment extracellular = 1;  // GO:0005576

  // Species:
  species GLCi in cell = 0.087; GLCi is "glucose";  // CHEBI:4167 kegg.compound:C00031
  species G6P in cell = 1.39; G6P is "glucose 6-phosphate";  // CHEBI:17665 kegg.compound:C00668
  species F6P in cell = 0.28; F6P is "fructose 6-phosphate";  // CHEBI:16084 kegg.compound:C05345
  species F16P in cell = 0.1; F16P is "fructose 1,6-bisphosphate";  // CHEBI:28013 kegg.compound:C05378
  species TRIO in cell = 5.17; TRIO is "triose-phosphate";  // hasPart kegg.compound:C00111 kegg.compound:C00118; hasPart CHEBI:29052 CHEBI:16108
  species NADH in cell = 0.39;  // CHEBI:16908 kegg.compound:C00004
  species NAD in cell = 1.2;  // CHEBI:15846 kegg.compound:C00003
  species BPG in cell = 0; BPG is "1,3-bisphosphoglycerate";  // CHEBI:16001 kegg.compound:C00236
  species P3G in cell = 0.1; P3G is "3-phosphoglycerate";  // CHEBI:17794 kegg.compound:C00197
  species P2G in cell = 0.1; P2G is "2-phosphoglycerate";  // CHEBI:17835 kegg.compound:C00631
  species PEP in cell = 0.1; PEP is "phosphoenolpyruvate";  // CHEBI:18021 kegg.compound:C00074
  species PYR in cell = 3.36; PYR is "pyruvate";  // CHEBI:15361 kegg.compound:C00022
  species ACE in cell = 0.04; ACE is "acetaldehyde";  // CHEBI:15343 kegg.compound:C00084
  species $GLCo in extracellular = 50; GLCo is "glucose";  // CHEBI:4167 kegg.compound:C00031
  species GLY in cell = 0.15; GLY is "glycerol";  // CHEBI:17754 kegg.compound:C00116
  species $ETOH in cell = 50; ETOH is "ethanol";  // CHEBI:16236 kegg.compound:C00469
  species $CO2 in cell = 1;  // CHEBI:16526 kegg.compound:C00011
  // species added by BJ
  species ATP in cell = 1.6616;  // CHEBI:15422 kegg.compound:C00002
  // species added by BJ
  species ADP in cell = 1.6769;  // CHEBI:16761 kegg.compound:C00008
  // species added by BJ
  species AMP in cell = 0.76156;  // CHEBI:16027 kegg.compound:C00020
  species $F26BP in cell = 0.02; F26BP is "fructose 2,6-bisphosphate";  // CHEBI:28602 kegg.compound:C00665
  species $GLYout in extracellular = 8.67; GLYout is "glycerol";  // CHEBI:17754 kegg.compound:C00116

  // Parameters:
  KeqTPI = 0.045 dimensionless;

  // Reactions:
  vGLT: $GLCo -> GLCi; cell*(VmGLT*(GLCo - GLCi/KeqGLT)/(KmGLTGLCo*(1 + GLCo/KmGLTGLCo + GLCi/KmGLTGLCi + 0.91*GLCo*GLCi/(KmGLTGLCi*KmGLTGLCo)))); vGLT is "glucose transport";  // isVersionOf GO:0015758
    VmGLT = 97.264 mM_per_min; KeqGLT = 1 dimensionless; KmGLTGLCo = 1.1918 mM; KmGLTGLCi = 1.1918 mM;
  vGLK: GLCi + ATP -> G6P + ADP; cell*(VmGLK*(-(G6P*ADP/KeqGLK) + GLCi*ATP)/(KmGLKATP*KmGLKGLCi*(1 + G6P/KmGLKG6P + GLCi/KmGLKGLCi)*(1 + ADP/KmGLKADP + ATP/KmGLKATP))); vGLK is "hexokinase";  // isVersionOf ec-code:2.7.1.1 GO:0004396; kegg.reaction:R02848
    VmGLK = 226.452 mM_per_min; KeqGLK = 3800 dimensionless; KmGLKATP = 0.15 mM; KmGLKGLCi = 0.08 mM; KmGLKG6P = 30 mM; KmGLKADP = 0.23 mM;
  vPGI: G6P -> F6P; cell*(VmPGI/KmPGIG6P*(G6P - F6P/KeqPGI)/(1 + G6P/KmPGIG6P + F6P/KmPGIF6P)); vPGI is "phosphoglucose isomerase";  // isVersionOf ec-code:5.3.1.9 GO:0004347; kegg.reaction:R00771
    VmPGI = 339.677 mM_per_min; KmPGIG6P = 1.4 mM; KeqPGI = 0.314 dimensionless; KmPGIF6P = 0.3 mM;
  vGLYCO: ATP + G6P -> ADP; cell*KGLYCOGEN*G6P*ATP; vGLYCO is "G6P consumption";  // hasPart GO:0005978 GO:0005992
    KGLYCOGEN = 6 per_mM_per_min;
  vAdKin: ATP + AMP -> 2 ADP; cell*(VmAK*ATP*AMP - VmAK/KeqAK*ADP*ADP); vAdKin is "adenylate kinase";  // isVersionOf ec-code:2.7.4.3 GO:0004017; kegg.reaction:R00127
    VmAK = 1 per_mM_per_min; KeqAK = 0.45 dimensionless;
  // ReactionRate typed again by BJ,2008 based on paper eq.A9-12 (the one contained in the Teusink-file was suspciously complex, eg. conained[ADP])
  vPFK: F6P + ATP -> F16P + ADP; cell*(VmPFK*gR*(F6P/KmPFKF6P)*(ATP/KmPFKATP)*(1 + F6P/KmPFKF6P*(ATP/KmPFKATP) + gR*(F6P/KmPFKF6P)*(ATP/KmPFKATP))/((1 + F6P/KmPFKF6P*(ATP/KmPFKATP) + gR*(F6P/KmPFKF6P)*(ATP/KmPFKATP))^2 + L0*((1 + CiPFKATP*ATP/KiPFKATP)/(1 + ATP/KiPFKATP))^2*((1 + CPFKAMP*AMP/KPFKAMP)/(1 + AMP/KPFKAMP))^2*((1 + CPFKF26BP*F26BP/KPFKF26BP + CPFKF16BP*F16P/KPFKF16BP)/(1 + F26BP/KPFKF26BP + F16P/KPFKF16BP))*(1 + CPFKATP*(ATP/KmPFKATP))^2)); vPFK is "phosphofructokinase";  // modifiers: AMP, F26BP; kegg.reaction:R00756; isVersionOf ec-code:2.7.1.11 GO:0003872
    gR = 5.12 dimensionless; VmPFK = 182.903 mM_per_min; KmPFKF6P = 0.1 mM; KmPFKATP = 0.71 mM; L0 = 0.66 dimensionless; CPFKF26BP = 0.0174 dimensionless; KPFKF26BP = 0.000682 mM; CPFKF16BP = 0.397 dimensionless; KPFKF16BP = 0.111 mM; CPFKAMP = 0.0845 dimensionless; KPFKAMP = 0.0995 mM; CiPFKATP = 100 dimensionless; KiPFKATP = 0.65 mM; CPFKATP = 3 dimensionless;
  vALD: F16P -> 2 TRIO; cell*(VmALD*(F16P - KeqTPI*TRIO^2/(KeqALD*(1 + KeqTPI)^2))/(KmALDF16P*(1 + F16P/KmALDF16P + TRIO/((1 + KeqTPI)*KmALDDHAP) + KeqTPI*TRIO/((1 + KeqTPI)*KmALDGAP) + KeqTPI*F16P*TRIO/((1 + KeqTPI)*KmALDF16P*KmALDGAPi) + KeqTPI*TRIO^2/((1 + KeqTPI)^2*KmALDDHAP*KmALDGAP)))); vALD is "fructosebisphosphate aldolase";  // isVersionOf ec-code:4.1.2.13 GO:0004332; kegg.reaction:R01068
    VmALD = 322.258 mM_per_min; KeqALD = 0.069 mM; KmALDF16P = 0.3 mM; KmALDDHAP = 2.4 mM; KmALDGAP = 2 mM; KmALDGAPi = 10 mM;
  vG3PDH: NADH + TRIO -> NAD + GLY; cell*(VmG3PDH*(-(GLY*NAD/KeqG3PDH) + NADH*TRIO/(1 + KeqTPI))/(KmG3PDHDHAP*KmG3PDHNADH*(1 + NAD/KmG3PDHNAD + NADH/KmG3PDHNADH)*(1 + GLY/KmG3PDHGLY + TRIO/((1 + KeqTPI)*KmG3PDHDHAP)))); vG3PDH is "glycerol 3-phosphate dehydrogenase";  // ec-code:1.1.1.94 kegg.reaction:R00842
    VmG3PDH = 70.15 mM_per_min; KeqG3PDH = 4300 dimensionless; KmG3PDHDHAP = 0.4 mM; KmG3PDHNADH = 0.023 mM; KmG3PDHNAD = 0.93 mM; KmG3PDHGLY = 1 mM;
  // introduce new constant VmGAPDHall "overall Vm" (original has forward and reverse separately) only to have a constant to be multiplied when modelling genetic regulation
  vGAPDH: NAD + TRIO -> NADH + BPG; cell*(VmGAPDHall*(VmGAPDHf*KeqTPI*NAD*TRIO/((1 + KeqTPI)*KmGAPDHGAP*KmGAPDHNAD) - VmGAPDHr*BPG*NADH/(KmGAPDHBPG*KmGAPDHNADH))/((1 + NAD/KmGAPDHNAD + NADH/KmGAPDHNADH)*(1 + BPG/KmGAPDHBPG + KeqTPI*TRIO/((1 + KeqTPI)*KmGAPDHGAP)))); vGAPDH is "glyceraldehyde phosphate dehydrogenase";  // isVersionOf ec-code:1.2.1.12 GO:0004365; kegg.reaction:R01061
    VmGAPDHr = 6549.68 mM_per_min; KmGAPDHBPG = 0.0098 mM; KmGAPDHNADH = 0.06 mM; VmGAPDHf = 1184.52 mM_per_min; KmGAPDHGAP = 0.21 mM; KmGAPDHNAD = 0.09 mM; VmGAPDHall = 1 dimensionless;
  vPGK: BPG + ADP -> P3G + ATP; cell*(VmPGK*(KeqPGK*BPG*ADP - ATP*P3G)/(KmPGKATP*KmPGKP3G*(1 + ADP/KmPGKADP + ATP/KmPGKATP)*(1 + BPG/KmPGKBPG + P3G/KmPGKP3G))); vPGK is "3-phosphoglycerate kinase";  // isVersionOf ec-code:2.7.2.3 GO:0004618; kegg.reaction:R01512
    VmPGK = 1306.45 mM_per_min; KeqPGK = 3200 dimensionless; KmPGKATP = 0.3 mM; KmPGKP3G = 0.53 mM; KmPGKADP = 0.2 mM; KmPGKBPG = 0.003 mM;
  vPGM: P3G -> P2G; cell*(VmPGM/KmPGMP3G*(P3G - P2G/KeqPGM)/(1 + P3G/KmPGMP3G + P2G/KmPGMP2G)); vPGM is "phosphoglyceromutase";  // kegg.reaction:R01518; isVersionOf ec-code:5.4.2.1 GO:0004619
    VmPGM = 2525.81 mM_per_min; KmPGMP3G = 1.2 mM; KeqPGM = 0.19 dimensionless; KmPGMP2G = 0.08 mM;
  vENO: P2G -> PEP; cell*(VmENO/KmENOP2G*(P2G - PEP/KeqENO)/(1 + P2G/KmENOP2G + PEP/KmENOPEP)); vENO is "enolase";  // isVersionOf ec-code:4.2.1.11 GO:0004634; kegg.reaction:R00658
    VmENO = 365.806 mM_per_min; KmENOP2G = 0.04 mM; KeqENO = 6.7 dimensionless; KmENOPEP = 0.5 mM;
  vPYK: PEP + ADP -> PYR + ATP; cell*(VmPYK/(KmPYKPEP*KmPYKADP)*(PEP*ADP - PYR*ATP/KeqPYK)/((1 + PEP/KmPYKPEP + PYR/KmPYKPYR)*(1 + ATP/KmPYKATP + ADP/KmPYKADP))); vPYK is "pyruvate kinase";  // isVersionOf ec-code:2.7.1.40 GO:0004743; kegg.reaction:R00200
    VmPYK = 1088.71 mM_per_min; KmPYKPEP = 0.14 mM; KmPYKADP = 0.53 mM; KeqPYK = 6500 dimensionless; KmPYKPYR = 21 mM; KmPYKATP = 1.5 mM;
  // Kinetics by BJ: to make the step PDC reversible a negative term was added to the original irreversible hill kinetics of [Teusink] with the new constant KmPDCACE
  vPDC: PYR -> ACE + $CO2; cell*(VmPDC*(PYR^nPDC/KmPDCPYR^nPDC - ACE^nPDC/KmPDCACE^nPDC)/(1 + PYR^nPDC/KmPDCPYR^nPDC + ACE^nPDC/KmPDCACE^nPDC)); vPDC is "pyruvate decarboxylase";  // isVersionOf ec-code:4.1.1.1 GO:0004737; kegg.reaction:R00636
    VmPDC = 174.194 mM_per_min; nPDC = 1.9 dimensionless; KmPDCPYR = 4.33 mM; KmPDCACE = 5 mM;
  vTCA: ACE + 4 NAD + ADP -> 4 NADH + ATP + 2 $CO2; cell*(VmTCA*ACE*NAD*ADP - VmTCA/KeqTCA*NADH*ATP);  // GO:0006099
    VmTCA = 20 per_mM_squared_per_min; KeqTCA = 1 per_mM;
  vADH: ACE + NADH -> $ETOH + NAD; cell*(-(VmADH/(KiADHNAD*KmADHETOH)*(NAD*ETOH - NADH*ACE/KeqADH)/(1 + NAD/KiADHNAD + KmADHNAD*ETOH/(KiADHNAD*KmADHETOH) + KmADHNADH*ACE/(KiADHNADH*KmADHACE) + NADH/KiADHNADH + NAD*ETOH/(KiADHNAD*KmADHETOH) + KmADHNADH*NAD*ACE/(KiADHNAD*KiADHNADH*KmADHACE) + KmADHNAD*ETOH*NADH/(KiADHNAD*KmADHETOH*KiADHNADH) + NADH*ACE/(KiADHNADH*KmADHACE) + NAD*ETOH*ACE/(KiADHNAD*KmADHETOH*KiADHACE) + ETOH*NADH*ACE/(KiADHETOH*KiADHNADH*KmADHACE)))); vADH is "alcohol dehydrogenase";  // isVersionOf ec-code:1.1.1.1 GO:0004022; kegg.reaction:R00754
    VmADH = 810 mM_per_min; KiADHNAD = 0.92 mM; KmADHETOH = 17 mM; KeqADH = 6.9e-5 dimensionless; KmADHNAD = 0.17 mM; KmADHNADH = 0.11 mM; KiADHNADH = 0.031 mM; KmADHACE = 1.11 mM; KiADHACE = 1.1 mM; KiADHETOH = 90 mM;
  vATP: ATP -> ADP; cell*KATPASE*ATP; vATP is "ATPase";  // isVersionOf GO:0016887
    KATPASE = 39.5 per_min;
  // added by BJ: respiration(oxidative phosphorylation) - rate will be multiplied with relativ Oxygen level
  vRESP: NADH + 2.5 ADP => NAD + 2.5 ATP; cell*(VmRESP*NADH*ADP - VmRESP/KeqRESP*NAD*ATP); vRESP is "respiration";  // GO:0045333
    VmRESP = 66.66667 per_mM_per_min; KeqRESP = 1 dimensionless;
  // added by BJ: Glycerol transport reaction to compare with Glycerol_outside concentration which is measured in [Wiebe]
  GLYtrs: GLY => $GLYout; cell*(VmGLY*GLY - VmGLY/KeqGLY*GLYout); GLYtrs is "glycerol efflux";  // isVersionOf GO:0015793
    VmGLY = 1000 per_min; KeqGLY = 2 dimensionless;
  // added by BJ: to make the step F6P->F16BP reversible in Glycolysis
  vFBP: F16P => F6P; cell*VmFBP*F16P; vFBP is "fructose 1,6-bisphosphatase";  // ec-code:3.1.3.11 GO:0042132
    VmFBP = 1000 per_min;

  // Unit definitions:
  unit substance = 1e-3 mole; substance is "millimole";
  unit time = 60 second; time is "minute";
  unit mM = 1e-3 mole / litre;
  unit mM_per_min = 1e-3 mole / (litre * 60 second); mM_per_min is "mM per minute";
  unit per_min = 1 / (60 second); per_min is "permin";
  unit per_mM_per_min = 10 litre / (1e-3 mole * 600 second); per_mM_per_min is "per mM per minute";
  unit per_mM_squared_per_min = (10 litre)^2 / ((1e-3 mole)^2 * 600 second); per_mM_squared_per_min is "per mM squared per minute";
  unit per_mM = 10 litre / (1e-3 mole);
end
