// SBML level 2 version 4

model Heitzler2012_GPCRsignalling()
  // This model is from the article:
  // Competing G protein-coupled receptor kinases balance G protein and β-arrestin signaling
  // Heitzler D, Durand G, Gallay N, Rizk A, Ahn S, Kim J, Violin JD, Dupuy L, Gauthier C, Piketty V, Crépieux P, Poupon A, Clément F, Fages F, Lefkowitz RJ, Reiter E. Mol Syst Biol. 2012; 8: 590. 22735336 ,
  // Abstract:
  // Seven-transmembrane receptors (7TMRs) are involved in nearly all aspects of chemical communications and represent major drug targets. 7TMRs transmit their signals not only via heterotrimeric G proteins but also through β-arrestins, whose recruitment to the activated receptor is regulated by G protein-coupled receptor kinases (GRKs). In this paper, we combined experimental approaches with computational modeling to decipher the molecular mechanisms as well as the hidden dynamics governing extracellular signal-regulated kinase (ERK) activation by the angiotensin II type 1A receptor (AT(1A)R) in human embryonic kidney (HEK)293 cells. We built an abstracted ordinary differential equations (ODE)-based model that captured the available knowledge and experimental data. We inferred the unknown parameters by simultaneously fitting experimental data generated in both control and perturbed conditions. We demonstrate that, in addition to its well-established function in the desensitization of G-protein activation, GRK2 exerts a strong negative effect on β-arrestin-dependent signaling through its competition with GRK5 and 6 for receptor phosphorylation. Importantly, we experimentally confirmed the validity of this novel GRK2-dependent mechanism in both primary vascular smooth muscle cells naturally expressing the AT(1A)R, and HEK293 cells expressing other 7TMRs.
  // biomodels.db:MODEL1012080000
  // isDescribedBy pubmed:22735336
  // biomodels.db:MODEL1012080000
  // biomodels.db:MODEL1012080000
  // isDescribedBy pubmed:22735336

  // Compartments:
  compartment compartmentOne = 1;

  // Species:
  species HR in compartmentOne = 0.08; HR is "H-R";
  species G in compartmentOne = 56.99;
  species ERK in compartmentOne = 4.243;
  species PIP2 in compartmentOne = 0.997;
  species DAG in compartmentOne = 0.009;
  species PKC in compartmentOne = 8.842;
  species PKC_a in compartmentOne = 0.002;
  species GpERK in compartmentOne = 0.015;
  species bpERK in compartmentOne = 0.015;
  species barr1 in compartmentOne = 0.858;
  species barr2 in compartmentOne = 0.483;
  species G_a in compartmentOne = 0;
  species HRP1 in compartmentOne = 0; HRP1 is "H-R~{P1}";
  species Hbarr1RP1 in compartmentOne = 0; Hbarr1RP1 is "H-barr1-R~{P1}";
  species Hbarr2RP1 in compartmentOne = 0; Hbarr2RP1 is "H-barr2-R~{P1}";
  species HRP2 in compartmentOne = 0; HRP2 is "H-R~{P2}";
  species HRbarr2 in compartmentOne = 0; HRbarr2 is "H-R-barr2";
  species Hbarr2RP2 in compartmentOne = 0; Hbarr2RP2 is "H-barr2-R~{P2}";

  // Parameters:
  k0 = 0.000311;
  k1 = 0.0178;
  k2 = 7.6;
  k3 = 4.63;
  k4 = 0.0787;
  k5 = 2.65;
  k6 = 5.0985;
  k7 = 0.461;
  k8 = 1.77;
  k9 = 3.04;
  k10 = 2.27;
  k11 = 2.61;
  k12 = 2.59;
  k13 = 0.00619;
  k14 = 0.0311;
  k15 = 6.54e-5;
  k16 = 0.0723;
  k17 = 0.0665;
  k18 = 0.59;
  k19 = 0.205;
  k20 = 1.04;
  k21 = 0.00042;
  k22 = 14.44;
  k23 = 1.05;
  k24 = 0.347;
  k25 = 0.762;
  GRK23 = 0.899447579;
  GRK56 = 1.5180818;
  GRK23_si = 0.478865092;
  GRK56_si = 0.00103512491;
  P0_Ro = 0.00173556731;
  P0_a_Ro = 2.09075206e-5;
  barr2_0_si = 0.000112306963;
  nDAG = 4.11974423;
  nPKC = 7.20901786;

  // Reactions:
  R_1: G => G_a; k0*G;
  R_2: G + HRP1 => G_a + HRP1; k1*G*HRP1;
  R_3: G + HR => G_a + HR; k2*G*HR;
  R_4: G_a + PIP2 => DAG + G_a; k3*G_a*PIP2;
  R_5: DAG + PKC => DAG + PKC_a; k4*DAG*PKC;
  R_6: ERK + PKC_a => GpERK + PKC_a; k5*ERK*PKC_a;
  R_7: G_a => G; k6*G_a;
  R_8: DAG => PIP2; k7*DAG;
  R_9: PKC_a => PKC; k8*PKC_a;
  R_10: GpERK => ERK; k9*GpERK;
  R_11: HR => HRP1; k10*GRK23*HR;
  R_12: barr1 + HRP1 => Hbarr1RP1; k11*barr1*HRP1;
  R_13: Hbarr1RP1 => barr1 + HRP1; k13*Hbarr1RP1;
  R_14: barr2 + HRP1 => Hbarr2RP1; k12*barr2*HRP1;
  R_15: Hbarr2RP1 => barr2 + HRP1; k14*Hbarr2RP1;
  R_16: Hbarr1RP1 => barr1 + HR; k15*Hbarr1RP1;
  R_17: Hbarr2RP1 => barr2 + HR; k16*Hbarr2RP1;
  R_18: HR => HRP2; k18*GRK56*HR;
  R_19: HRP2 => HR; k17*HRP2;
  R_20: barr2 + HR => HRbarr2; k19*barr2*HR;
  R_21: HRbarr2 => barr2 + HR; k23*HRbarr2;
  R_22: barr2 + HRP2 => Hbarr2RP2; k20*barr2*HRP2;
  R_23: Hbarr2RP2 => barr2 + HRP2; k24*Hbarr2RP2;
  R_24: ERK + HRbarr2 => bpERK + HRbarr2; k21*ERK*HRbarr2;
  R_25: ERK + Hbarr2RP2 => bpERK + Hbarr2RP2; k22*ERK*Hbarr2RP2;
  R_26: bpERK => ERK; k25*bpERK;
end
