// SBML level 2 version 4

model Kim2011_Oscillator_DetailedIII()
  // This model originates from BioModels Database: A Database of Annotated Published Models (http://www.ebi.ac.uk/biomodels/). It is copyright (c) 2005-2011 The BioModels.net Team.
  // To the extent possible under law, all copyright and related or neighbouring rights to this encoded model have been dedicated to the public domain worldwide. Please refer to CC0 Public Domain Dedication for more information.
  // In summary, you are entitled to use this encoded model in absolutely any manner you deem suitable, verbatim, or with modification, alone or embedded it in a larger context, redistribute it, commercially or not, in a restricted way or not..
  // To cite BioModels Database, please use: Li C, Donizelli M, Rodriguez N, Dharuri H, Endler L, Chelliah V, Li L, He E, Henry A, Stefan MI, Snoep JL, Hucka M, Le Novère N, Laibe C (2010) BioModels Database: An enhanced, curated and annotated resource for published quantitative kinetic models. BMC Syst Biol., 4:92.
  // biomodels.db:MODEL1012090004
  // isDescribedBy pubmed:21283141
  // biomodels.db:MODEL1012090004
  // isDescribedBy pubmed:21283141
  // biomodels.db:MODEL1012090004
  // biomodels.db:MODEL1012090004

  // Compartments:
  compartment compartment_1 = 1;

  // Species:
  species T12 in compartment_1 = T12tot;
  species A2 in compartment_1 = A2tot;
  species T31 in compartment_1 = T31tot;
  species A1 in compartment_1 = A1tot;
  species rI3 in compartment_1 = 0;
  species rI1 in compartment_1 = rI1init;
  species rI2 in compartment_1 = rI2init;
  species T12A2 in compartment_1 = 0;
  species T31A1 in compartment_1 = 0;
  species A1rI1 in compartment_1 = 0;
  species A3 in compartment_1 = A3tot;
  species A2rI2 in compartment_1 = 0;
  species RNAP in compartment_1 = RNAPtot;
  species RNaseH in compartment_1 = RNaseHtot;
  species RNAPT12A2 in compartment_1 = 0;
  species RNAPT12 in compartment_1 = 0;
  species RNAPT23A3 in compartment_1 = 0;
  species RNAPT23 in compartment_1 = 0;
  species RNaseHA1rI1 in compartment_1 = 0;
  species RNaseHA2rI2 in compartment_1 = 0;
  species T23 in compartment_1 = T23tot;
  species T23A3 in compartment_1 = 0;
  species RNAPT31A1 in compartment_1 = 0;
  species RNAPT31 in compartment_1 = 0;
  species A3rI3 in compartment_1 = 0;
  species RNaseHA3rI3 in compartment_1 = 0;

  // Parameters:
  T12tot = 1e-7;
  T31tot = 1e-7;
  A1tot = 5e-7;
  A3tot = 5e-7;
  A2tot = 5e-7;
  RNAPtot = 7.5e-8;
  RNaseHtot = 3e-8;
  kTA23 = 74000;
  kTA12 = 74000;
  kAI1 = 24000;
  kAI2 = 24000;
  kTAI23 = 53000;
  kTAI12 = 53000;
  kAI3 = 24000;
  kplus = 100000000;
  kplusH = 100000000;
  kminusON12 = 24.8;
  kminusOFF12 = 267;
  kminusON23 = 24.8;
  kminusOFF23 = 267;
  kminusH1 = 7.6;
  kminusH2 = 7.6;
  kcatON12 = 0.08;
  kcatOFF12 = 0.02;
  kcatON23 = 0.08;
  kcatOFF23 = 0.02;
  kcatH1 = 0.05;
  kcatH2 = 0.05;
  kTA31 = 74000;
  kTAI31 = 53000;
  kminusON31 = 24.8;
  kminusOFF31 = 267;
  kcatON31 = 0.08;
  kcatOFF31 = 0.02;
  T23tot = 1e-7;
  ksplus1 = 4120;
  ksminus1 = 0.83;
  rI1init = 7.5e-7;
  rI2init = 0;
  kminusH3 = 7.6;
  kcatH3 = 0.05;
  ksplus2 = 13100;
  ksminus2 = 0.62;
  ksplus3 = 6730;
  ksminus3 = 0.59;

  // Reactions:
  Activation1: T12 + A2 => T12A2; compartment_1*kTA12*T12*A2;
  Activation2: T31 + A1 => T31A1; compartment_1*kTA31*T31*A1;
  Annihilation1: A1 + rI1 => A1rI1; compartment_1*kAI1*A1*rI1;
  Annihilation2: A2 + rI2 => A2rI2; compartment_1*kAI2*A2*rI2;
  Annihilation3: A3 + rI3 => A3rI3; compartment_1*kAI3*A3*rI3;
  Inhibition1: T12A2 + rI2 => T12 + A2rI2; compartment_1*kTAI12*T12A2*rI2;
  Inhibition2: T31A1 + rI1 => T31 + A1rI1; compartment_1*kTAI31*T31A1*rI1;
  RNAPbinding1: RNAP + T12A2 -> RNAPT12A2; compartment_1*(kplus*RNAP*T12A2 - kminusON12*RNAPT12A2);
  RNAPbinding2: RNAP + T31A1 -> RNAPT31A1; compartment_1*(kplus*RNAP*T31A1 - kminusON31*RNAPT31A1);
  RNAPbinding3: RNAP + T12 -> RNAPT12; compartment_1*(kplus*RNAP*T12 - kminusOFF12*RNAPT12);
  RNAPbinding4: RNAP + T31 -> RNAPT31; compartment_1*(kplus*RNAP*T31 - kminusOFF31*RNAPT31);
  RNAPcat1: RNAPT12A2 => RNAP + T12A2 + rI1; compartment_1*kcatON12*RNAPT12A2;
  RNAPcat2: RNAPT23A3 => RNAP + T23A3 + rI2; compartment_1*kcatON23*RNAPT23A3;
  RNAPcat3: RNAPT12 => RNAP + T12 + rI1; compartment_1*kcatOFF12*RNAPT12;
  RNAPcat4: RNAPT23 => RNAP + T23 + rI2; compartment_1*kcatOFF23*RNAPT23;
  RNaseHbinding1: RNaseH + A1rI1 -> RNaseHA1rI1; compartment_1*(kplusH*RNaseH*A1rI1 - kminusH1*RNaseHA1rI1);
  RNaseHbinding2: RNaseH + A2rI2 -> RNaseHA2rI2; compartment_1*(kplusH*RNaseH*A2rI2 - kminusH2*RNaseHA2rI2);
  RNaseHcat1: RNaseHA1rI1 => RNaseH + A1; compartment_1*kcatH1*RNaseHA1rI1;
  RNaseHcat2: RNaseHA2rI2 => RNaseH + A2; compartment_1*kcatH2*RNaseHA2rI2;
  Activation3: T23 + A3 => T23A3; compartment_1*kTA23*T23*A3;
  Inhibition3: T23A3 + rI3 => T23 + A3rI3; compartment_1*kTAI23*T23A3*rI3;
  RNAPbinding5: RNAP + T23A3 -> RNAPT23A3; compartment_1*(kplus*RNAP*T23A3 - kminusON23*RNAPT23A3);
  RNAPbinding6: RNAP + T23 -> RNAPT23; compartment_1*(kplus*RNAP*T23 - kminusOFF23*RNAPT23);
  RNAPcat5: RNAPT31A1 => RNAP + T31A1 + rI3; compartment_1*kcatON31*RNAPT31A1;
  RNAPcat6: RNAPT31 => RNAP + T31 + rI3; compartment_1*kcatOFF31*RNAPT31;
  RNaseHbinding3: RNaseH + A3rI3 -> RNaseHA3rI3; compartment_1*(kplusH*RNaseH*A3rI3 - kminusH3*RNaseHA3rI3);
  RNaseHcat3: RNaseHA3rI3 => RNaseH + A3; compartment_1*kcatH3*RNaseHA3rI3;
end
