// SBML level 2 version 4

model Kim2011_Oscillator_ExtendedI()
  // This model originates from BioModels Database: A Database of Annotated Published Models (http://www.ebi.ac.uk/biomodels/). It is copyright (c) 2005-2011 The BioModels.net Team.
  // To the extent possible under law, all copyright and related or neighbouring rights to this encoded model have been dedicated to the public domain worldwide. Please refer to CC0 Public Domain Dedication for more information.
  // In summary, you are entitled to use this encoded model in absolutely any manner you deem suitable, verbatim, or with modification, alone or embedded it in a larger context, redistribute it, commercially or not, in a restricted way or not..
  // To cite BioModels Database, please use: Li C, Donizelli M, Rodriguez N, Dharuri H, Endler L, Chelliah V, Li L, He E, Henry A, Stefan MI, Snoep JL, Hucka M, Le Novère N, Laibe C (2010) BioModels Database: An enhanced, curated and annotated resource for published quantitative kinetic models. BMC Syst Biol., 4:92.
  // biomodels.db:MODEL1012090005
  // isDescribedBy pubmed:21283141
  // biomodels.db:MODEL1012090005
  // isDescribedBy pubmed:21283141
  // biomodels.db:MODEL1012090005
  // biomodels.db:MODEL1012090005

  // Compartments:
  compartment compartment_1 = 1;

  // Species:
  species T12 in compartment_1 = T12tot;
  species A2 in compartment_1 = A2tot;
  species T21 in compartment_1 = T21tot;
  species A1 in compartment_1 = A1tot;
  species dI1 in compartment_1 = dI1tot;
  species rA1 in compartment_1 = rA1init;
  species rI2 in compartment_1 = rI2init;
  species T12A2 in compartment_1 = 0;
  species T21A1 in compartment_1 = 0;
  species A1dI1 in compartment_1 = 0;
  species rA1dI1 in compartment_1 = 0;
  species A2rI2 in compartment_1 = 0;
  species RNAP in compartment_1 = RNAPtot;
  species RNaseH in compartment_1 = RNaseHtot;
  species RNAPT12A2 in compartment_1 = 0;
  species RNAPT12 in compartment_1 = 0;
  species RNAPT21A1 in compartment_1 = 0;
  species RNAPT21 in compartment_1 = 0;
  species RNaseHrA1dI1 in compartment_1 = 0;
  species RNaseHA2rI2 in compartment_1 = 0;
  species T11 in compartment_1 = T11tot;
  species T11A1 in compartment_1 = 0;
  species RNAPT11A1 in compartment_1 = 0;
  species RNAPT11 in compartment_1 = 0;
  species sI2 in compartment_1 = 0;
  species A2sI2 in compartment_1 = 0;
  species T12A2sI2 in compartment_1 = 0;
  species RNAPT12A2sI2 in compartment_1 = 0;

  // Parameters:
  T12tot = 1.2e-7;
  T21tot = 2.5e-7;
  A1tot = 2.5e-7;
  dI1tot = 1e-6;
  A2tot = 5e-7;
  RNAPtot = 1.25e-7;
  RNaseHtot = 1.75e-8;
  kTA21 = 60400;
  kTA12 = 4630;
  kAI1 = 10000;
  krAI1 = 42700;
  kAI2 = 42800;
  kTAI21 = 10300;
  kTAI12 = 22300;
  kAIrA1 = 79600;
  kplus = 100000000;
  kplusH = 100000000;
  kminusON12 = 11.3;
  kminusOFF12 = 161;
  kminusON21 = 11.8;
  kminusOFF21 = 48;
  kminusH1 = 4.4;
  kminusH2 = 5.5;
  kcatON12 = 0.081;
  kcatOFF12 = 0.0018;
  kcatON21 = 0.026;
  kcatOFF21 = 0.0024;
  kcatH1 = 0.024;
  kcatH2 = 0.062;
  kTA11 = 74000;
  kTAI11 = 28000;
  kminusON11 = 24.7;
  kminusOFF11 = 267;
  kcatON11 = 0.05;
  kcatOFF11 = 0.002;
  T11tot = 0;
  ksplus = 192000;
  ksminus = 0.032;
  rA1init = 8e-7;
  rI2init = 5.5e-7;

  // Reactions:
  Activation1: T12 + A2 => T12A2; compartment_1*kTA12*T12*A2;
  Activation2: T21 + A1 => T21A1; compartment_1*kTA21*T21*A1;
  Annihilation1: A1 + dI1 => A1dI1; compartment_1*kAI1*A1*dI1;
  Annihilation2: rA1 + dI1 => rA1dI1; compartment_1*krAI1*rA1*dI1;
  Annihilation3: A2 + rI2 => A2rI2; compartment_1*kAI2*A2*rI2;
  Inhibition1: T12A2 + rI2 => T12 + A2rI2; compartment_1*kTAI12*T12A2*rI2;
  Inhibition2: T21A1 + dI1 => T21 + A1dI1; compartment_1*kTAI21*T21A1*dI1;
  Release: rA1 + A1dI1 => A1 + rA1dI1; compartment_1*kAIrA1*rA1*A1dI1;
  RNAPbinding1: RNAP + T12A2 -> RNAPT12A2; compartment_1*(kplus*RNAP*T12A2 - kminusON12*RNAPT12A2);
  RNAPbinding2: RNAP + T21A1 -> RNAPT21A1; compartment_1*(kplus*RNAP*T21A1 - kminusON21*RNAPT21A1);
  RNAPbinding3: RNAP + T12 -> RNAPT12; compartment_1*(kplus*RNAP*T12 - kminusOFF12*RNAPT12);
  RNAPbinding4: RNAP + T21 -> RNAPT21; compartment_1*(kplus*RNAP*T21 - kminusOFF21*RNAPT21);
  RNAPcat1: RNAPT12A2 => RNAP + T12A2 + rA1; compartment_1*kcatON12*RNAPT12A2;
  RNAPcat2: RNAPT21A1 => RNAP + T21A1 + rI2; compartment_1*kcatON21*RNAPT21A1;
  RNAPcat3: RNAPT12 => RNAP + T12 + rA1; compartment_1*kcatOFF12*RNAPT12;
  RNAPcat4: RNAPT21 => RNAP + T21 + rI2; compartment_1*kcatOFF21*RNAPT21;
  RNaseHbinding1: RNaseH + rA1dI1 -> RNaseHrA1dI1; compartment_1*(kplusH*RNaseH*rA1dI1 - kminusH1*RNaseHrA1dI1);
  RNaseHbinding2: RNaseH + A2rI2 -> RNaseHA2rI2; compartment_1*(kplusH*RNaseH*A2rI2 - kminusH2*RNaseHA2rI2);
  RNaseHcat1: RNaseHrA1dI1 => RNaseH + dI1; compartment_1*kcatH1*RNaseHrA1dI1;
  RNaseHcat2: RNaseHA2rI2 => RNaseH + A2sI2; compartment_1*kcatH2*RNaseHA2rI2;
  Activation3: T11 + A1 => T11A1; compartment_1*kTA11*T11*A1;
  Inhibition3: T11A1 + dI1 => T11 + A1dI1; compartment_1*kTAI11*T11A1*dI1;
  RNAPbinding5: RNAP + T11A1 -> RNAPT11A1; compartment_1*(kplus*RNAP*T11A1 - kminusON11*RNAPT11A1);
  RNAPbinding6: RNAP + T11 -> RNAPT11; compartment_1*(kplus*RNAP*T11 - kminusOFF11*RNAPT11);
  RNAPcat5: RNAPT11A1 => RNAP + T11A1 + rA1; compartment_1*kcatON11*RNAPT11A1;
  RNAPcat6: RNAPT11 => RNAP + T11 + rA1; compartment_1*kcatOFF11*RNAPT11;
  RNAPbinding7: RNAP + T12A2sI2 -> RNAPT12A2sI2; compartment_1*(kplus*RNAP*T12A2sI2 - kminusON12*RNAPT12A2sI2);
  RNAPcat7: RNAPT12A2sI2 => RNAP + T12A2sI2 + rA1; compartment_1*kcatON12*RNAPT12A2sI2;
  sI2binding1: A2 + sI2 -> A2sI2; compartment_1*(ksplus*A2*sI2 - ksminus*A2sI2);
  sI2binding2: T12A2 + sI2 -> T12A2sI2; compartment_1*(ksplus*T12A2*sI2 - ksminus*T12A2sI2);
  sI2activation: T12 + A2sI2 => T12A2sI2; compartment_1*kTA12*T12*A2sI2;
  sI2annihilation: A2sI2 + rI2 => A2rI2 + sI2; compartment_1*kAI2*A2sI2*rI2;
end
