// SBML level 2 version 4

model Kim2011_Oscillator_ExtendedIII()
  // This model originates from BioModels Database: A Database of Annotated Published Models (http://www.ebi.ac.uk/biomodels/). It is copyright (c) 2005-2011 The BioModels.net Team.
  // To the extent possible under law, all copyright and related or neighbouring rights to this encoded model have been dedicated to the public domain worldwide. Please refer to CC0 Public Domain Dedication for more information.
  // In summary, you are entitled to use this encoded model in absolutely any manner you deem suitable, verbatim, or with modification, alone or embedded it in a larger context, redistribute it, commercially or not, in a restricted way or not..
  // To cite BioModels Database, please use: Li C, Donizelli M, Rodriguez N, Dharuri H, Endler L, Chelliah V, Li L, He E, Henry A, Stefan MI, Snoep JL, Hucka M, Le Novère N, Laibe C (2010) BioModels Database: An enhanced, curated and annotated resource for published quantitative kinetic models. BMC Syst Biol., 4:92.
  // biomodels.db:MODEL1012090006
  // isDescribedBy pubmed:21283141
  // biomodels.db:MODEL1012090006
  // isDescribedBy pubmed:21283141
  // biomodels.db:MODEL1012090006
  // biomodels.db:MODEL1012090006

  // Compartments:
  compartment compartment_1 = 1;

  // Species:
  species T12 in compartment_1 = T12tot;
  species A2 in compartment_1 = A2tot;
  species T31 in compartment_1 = T31tot;
  species A1 in compartment_1 = A1tot;
  species rI3 in compartment_1 = 0;
  species rI1 in compartment_1 = rI1init;
  species rI2 in compartment_1 = rI2init;
  species T12A2 in compartment_1 = 0;
  species T31A1 in compartment_1 = 0;
  species A1rI1 in compartment_1 = 0;
  species A3 in compartment_1 = A3tot;
  species A2rI2 in compartment_1 = 0;
  species RNAP in compartment_1 = RNAPtot;
  species RNaseH in compartment_1 = RNaseHtot;
  species RNAPT12A2 in compartment_1 = 0;
  species RNAPT12 in compartment_1 = 0;
  species RNAPT23A3 in compartment_1 = 0;
  species RNAPT23 in compartment_1 = 0;
  species RNaseHA1rI1 in compartment_1 = 0;
  species RNaseHA2rI2 in compartment_1 = 0;
  species T23 in compartment_1 = T23tot;
  species T23A3 in compartment_1 = 0;
  species RNAPT31A1 in compartment_1 = 0;
  species RNAPT31 in compartment_1 = 0;
  species sI2 in compartment_1 = 0;
  species A2sI2 in compartment_1 = 0;
  species T12A2sI2 in compartment_1 = 0;
  species RNAPT12A2sI2 in compartment_1 = 0;
  species A1sI1 in compartment_1 = 0;
  species A3sI3 in compartment_1 = 0;
  species A3rI3 in compartment_1 = 0;
  species RNaseHA3rI3 in compartment_1 = 0;
  species T23A3sI3 in compartment_1 = 0;
  species T31A1sI1 in compartment_1 = 0;
  species sI1 in compartment_1 = 0;
  species sI3 in compartment_1 = 0;
  species RNAPT23A3sI3 in compartment_1 = 0;
  species RNAPT31A1sI1 in compartment_1 = 0;

  // Parameters:
  T12tot = 1e-7;
  T31tot = 1e-7;
  A1tot = 3e-7;
  A3tot = 4e-7;
  A2tot = 2e-7;
  RNAPtot = 8.34e-8;
  RNaseHtot = 1.04e-8;
  kTA23 = 3330;
  kTA12 = 3940;
  kAI1 = 10400;
  kAI2 = 42400;
  kTAI23 = 6350;
  kTAI12 = 8410;
  kAI3 = 6430;
  kplus = 100000000;
  kplusH = 100000000;
  kminusON12 = 31.6;
  kminusOFF12 = 130;
  kminusON23 = 30.7;
  kminusOFF23 = 109;
  kminusH1 = 27.6;
  kminusH2 = 10.6;
  kcatON12 = 0.061;
  kcatOFF12 = 0.017;
  kcatON23 = 0.078;
  kcatOFF23 = 0.027;
  kcatH1 = 0.085;
  kcatH2 = 0.211;
  kTA31 = 3410;
  kTAI31 = 4290;
  kminusON31 = 13.5;
  kminusOFF31 = 167;
  kcatON31 = 0.078;
  kcatOFF31 = 0.028;
  T23tot = 1.2e-7;
  ksplus1 = 4120;
  ksminus1 = 0.83;
  rI1init = 0;
  rI2init = 0;
  kminusH3 = 9;
  kcatH3 = 0.285;
  ksplus2 = 13100;
  ksminus2 = 0.62;
  ksplus3 = 6730;
  ksminus3 = 0.59;

  // Reactions:
  Activation1: T12 + A2 => T12A2; compartment_1*kTA12*T12*A2;
  Activation2: T31 + A1 => T31A1; compartment_1*kTA31*T31*A1;
  Annihilation1: A1 + rI1 => A1rI1; compartment_1*kAI1*A1*rI1;
  Annihilation2: A2 + rI2 => A2rI2; compartment_1*kAI2*A2*rI2;
  Annihilation3: A3 + rI3 => A3rI3; compartment_1*kAI3*A3*rI3;
  Inhibition1: T12A2 + rI2 => T12 + A2rI2; compartment_1*kTAI12*T12A2*rI2;
  Inhibition2: T31A1 + rI1 => T31 + A1rI1; compartment_1*kTAI31*T31A1*rI1;
  RNAPbinding1: RNAP + T12A2 -> RNAPT12A2; compartment_1*(kplus*RNAP*T12A2 - kminusON12*RNAPT12A2);
  RNAPbinding2: RNAP + T31A1 -> RNAPT31A1; compartment_1*(kplus*RNAP*T31A1 - kminusON31*RNAPT31A1);
  RNAPbinding3: RNAP + T12 -> RNAPT12; compartment_1*(kplus*RNAP*T12 - kminusOFF12*RNAPT12);
  RNAPbinding4: RNAP + T31 -> RNAPT31; compartment_1*(kplus*RNAP*T31 - kminusOFF31*RNAPT31);
  RNAPcat1: RNAPT12A2 => RNAP + T12A2 + rI1; compartment_1*kcatON12*RNAPT12A2;
  RNAPcat2: RNAPT23A3 => RNAP + T23A3 + rI2; compartment_1*kcatON23*RNAPT23A3;
  RNAPcat3: RNAPT12 => RNAP + T12 + rI1; compartment_1*kcatOFF12*RNAPT12;
  RNAPcat4: RNAPT23 => RNAP + T23 + rI2; compartment_1*kcatOFF23*RNAPT23;
  RNaseHbinding1: RNaseH + A1rI1 -> RNaseHA1rI1; compartment_1*(kplusH*RNaseH*A1rI1 - kminusH1*RNaseHA1rI1);
  RNaseHbinding2: RNaseH + A2rI2 -> RNaseHA2rI2; compartment_1*(kplusH*RNaseH*A2rI2 - kminusH2*RNaseHA2rI2);
  RNaseHcat1: RNaseHA1rI1 => RNaseH + A1sI1; compartment_1*kcatH1*RNaseHA1rI1;
  RNaseHcat2: RNaseHA2rI2 => RNaseH + A2sI2; compartment_1*kcatH2*RNaseHA2rI2;
  Activation3: T23 + A3 => T23A3; compartment_1*kTA23*T23*A3;
  Inhibition3: T23A3 + rI3 => T23 + A3rI3; compartment_1*kTAI23*T23A3*rI3;
  RNAPbinding5: RNAP + T23A3 -> RNAPT23A3; compartment_1*(kplus*RNAP*T23A3 - kminusON23*RNAPT23A3);
  RNAPbinding6: RNAP + T23 -> RNAPT23; compartment_1*(kplus*RNAP*T23 - kminusOFF23*RNAPT23);
  RNAPcat5: RNAPT31A1 => RNAP + T31A1 + rI3; compartment_1*kcatON31*RNAPT31A1;
  RNAPcat6: RNAPT31 => RNAP + T31 + rI3; compartment_1*kcatOFF31*RNAPT31;
  RNAPbinding7: RNAP + T12A2sI2 -> RNAPT12A2sI2; compartment_1*(kplus*RNAP*T12A2sI2 - kminusON12*RNAPT12A2sI2);
  RNAPcat7: RNAPT12A2sI2 => RNAP + T12A2sI2 + rI1; compartment_1*kcatON12*RNAPT12A2sI2;
  sI2binding1: A2 + sI2 -> A2sI2; compartment_1*(ksplus2*A2*sI2 - ksminus2*A2sI2);
  sI2binding2: T12A2 + sI2 -> T12A2sI2; compartment_1*(ksplus2*T12A2*sI2 - ksminus2*T12A2sI2);
  sI2activation: T12 + A2sI2 => T12A2sI2; compartment_1*kTA12*T12*A2sI2;
  sI2annihilation: A2sI2 + rI2 => A2rI2 + sI2; compartment_1*kAI2*A2sI2*rI2;
  RNAPbinding8: RNAP + T31A1sI1 -> RNAPT31A1sI1; compartment_1*(kplus*RNAP*T31A1sI1 - kminusON31*RNAPT31A1sI1);
  RNAPbinding9: RNAP + T23A3sI3 -> RNAPT23A3sI3; compartment_1*(kplus*RNAP*T23A3sI3 - kminusON23*RNAPT23A3sI3);
  RNAPcat8: RNAPT31A1sI1 => RNAP + T31A1sI1 + rI3; compartment_1*kcatON31*RNAPT31A1sI1;
  RNAPcat9: RNAPT23A3sI3 => RNAP + T23A3sI3 + rI2; compartment_1*kcatON23*RNAPT23A3sI3;
  RNaseHbinding3: RNaseH + A3rI3 -> RNaseHA3rI3; compartment_1*(kplusH*RNaseH*A3rI3 - kminusH3*RNaseHA3rI3);
  RNaseHcat3: RNaseHA3rI3 => RNaseH + A3sI3; compartment_1*kcatH3*RNaseHA3rI3;
  sI1activation: T31 + A1sI1 => T31A1sI1; compartment_1*kTA31*T31*A1sI1;
  sI1annihilation: rI1 + A1sI1 => A1rI1 + sI1; compartment_1*kAI1*rI1*A1sI1;
  sI1binding1: A1 + sI1 -> A1sI1; compartment_1*(ksplus1*A1*sI1 - ksminus1*A1sI1);
  sI1binding2: T31A1 + sI1 -> T31A1sI1; compartment_1*(ksplus1*T31A1*sI1 - ksminus1*T31A1sI1);
  sI3activation: T23 + A3sI3 => T23A3sI3; compartment_1*kTA23*T23*A3sI3;
  sI3annihilation: rI3 + A3sI3 => A3rI3 + sI3; compartment_1*kAI3*rI3*A3sI3;
  sI3binding1: A3 + sI3 -> A3sI3; compartment_1*(ksplus3*A3*sI3 - ksminus3*A3sI3);
  sI3binding2: T23A3 + sI3 -> T23A3sI3; compartment_1*(ksplus3*T23A3*sI3 - ksminus3*T23A3sI3);
end
