// SBML level 2 version 4
// dcterms:bibliographicCitation: urn:miriam:ec-code:4.1.2.13 urn:miriam:pubmed:8435847
// dcterms:bibliographicCitation: urn:miriam:ec-code:2.7.1.11 urn:miriam:pubmed:3007939
// dcterms:bibliographicCitation: urn:miriam:ec-code:5.3.1.9 urn:miriam:pubmed:8435847
// dcterms:bibliographicCitation: urn:miriam:ec-code:2.7.2.3 urn:miriam:pubmed:6347186
// dcterms:bibliographicCitation: urn:miriam:ec-code:4.2.1.11 urn:miriam:pubmed:7520111
// dcterms:bibliographicCitation: urn:miriam:ec-code:1.2.1.12 urn:miriam:pubmed:3905788
// dcterms:bibliographicCitation: urn:miriam:ec-code:2.7.1.1 urn:miriam:pubmed:6394965
// dcterms:bibliographicCitation: urn:miriam:ec-code:5.4.2.1 urn:miriam:pubmed:3033435
// dcterms:bibliographicCitation: urn:miriam:ec-code:2.7.1.40 urn:miriam:pubmed:6185493
// dcterms:bibliographicCitation: urn:miriam:ec-code:4.1.1.1

function function_1(Cytoplasm, Et, Ks, M_276, kcat)
  kcat*Et*M_276/(Ks + M_276)/Cytoplasm;
end
function_1 is "function_4_fructose-bisphosphate aldolase";

function function_4_phosphofructokinase(Cytoplasm, M_172, M_273, k0)
  k0*M_172*M_273/Cytoplasm;
end

function function_2(Cytoplasm, I, Ki, Km, M_292, Vmax)
  Vmax*M_292/(Km*(1 + I/Ki) + M_292)/Cytoplasm;
end
function_2 is "function_4_glucose-6-phosphate isomerase";

function function_3(Cytoplasm, E_670, Km, M_57, kcat)
  E_670*kcat*M_57/(Km + M_57)/Cytoplasm;
end
function_3 is "function_4_phosphoglycerate kinase";

function function_4_enolase(Cytoplasm, Km, M_36, Vmax)
  Vmax*M_36/(Km + M_36)/Cytoplasm;
end

function function_4(Cytoplasm, M_289, M_411, M_454, k1)
  k1*M_289*M_411*M_454/Cytoplasm;
end
function_4 is "function_4_glyceraldehyde-3-phosphate dehydrogenase";

function function_5(Cytoplasm, M_172, M_304, k2)
  k2*M_172*M_304/Cytoplasm;
end
function_5 is "function_4_hexokinase (D-glucose:ATP)";

function function_6(Cytoplasm, M_57, k3)
  k3*M_57/Cytoplasm;
end
function_6 is "function_4_phosphoglycerate mutase";

function function_4_pyruvate_kinase(Cytoplasm, M_135, M_329, M_446, k4)
  k4*M_135*M_329*M_446/Cytoplasm;
end

function function_8(Cytoplasm, M_329, M_483, k5)
  k5*M_329*M_483/Cytoplasm;
end
function_8 is "function_4_pyruvate decarboxylase";

model Li2010_YeastGlycolysis()
  // This model originates from BioModels Database: A Database of Annotated Published Models (http://www.ebi.ac.uk/biomodels/). It is copyright (c) 2005-2011 The BioModels.net Team.
  // To the extent possible under law, all copyright and related or neighbouring rights to this encoded model have been dedicated to the public domain worldwide. Please refer to CC0 Public Domain Dedication for more information.
  // In summary, you are entitled to use this encoded model in absolutely any manner you deem suitable, verbatim, or with modification, alone or embedded it in a larger context, redistribute it, commercially or not, in a restricted way or not. .
  // To cite BioModels Database, please use: Li C, Donizelli M, Rodriguez N, Dharuri H, Endler L, Chelliah V, Li L, He E, Henry A, Stefan MI, Snoep JL, Hucka M, Le Novère N, Laibe C (2010) BioModels Database: An enhanced, curated and annotated resource for published quantitative kinetic models. BMC Syst Biol., 4:92.
  // biomodels.db:MODEL1012110001
  // isDescribedBy pubmed:21114840
  // biomodels.db:MODEL1012110001
  // isDescribedBy pubmed:21114840
  // biomodels.db:MODEL1012110001
  // biomodels.db:MODEL1012110001

  // Compartments:
  compartment Cytoplasm = 1;  // GO:0005737
  compartment Plasma_membrane = 1;  // GO:0005886
  compartment Extracellular = 1;  // GO:0005576

  // Species:
  species M_276 in Cytoplasm = 0; M_276 is "D-Fructose 1,6-bisphosphate";  // CHEBI:16905
  species M_172 in Cytoplasm = 3.5; M_172 is "ATP";  // CHEBI:15422
  species M_273 in Cytoplasm = 0; M_273 is "D-Fructose 6-phosphate";  // CHEBI:15946
  species M_292 in Cytoplasm = 0; M_292 is "D-Glucose 6-phosphate";  // CHEBI:15954
  species M_4 in Cytoplasm = 0; M_4 is "3-Phospho-D-glyceroyl phosphate";  // CHEBI:16001
  species M_135 in Cytoplasm = 0; M_135 is "ADP";  // CHEBI:16761
  species M_36 in Cytoplasm = 0; M_36 is "D-Glycerate 2-phosphate";  // CHEBI:17835
  species M_289 in Cytoplasm = 0; M_289 is "Glyceraldehyde 3-phosphate";  // CHEBI:29052
  species M_411 in Cytoplasm = 4; M_411 is "Nicotinamide adenine dinucleotide";  // CHEBI:15846
  species M_454 in Cytoplasm = 4; M_454 is "Phosphate";  // CHEBI:18367
  species M_304 in Cytoplasm = 50; M_304 is "D-Glucose";  // CHEBI:17634
  species M_57 in Cytoplasm = 0; M_57 is "3-Phospho-D-glycerate";  // CHEBI:17794
  species M_329 in Cytoplasm = 4; M_329 is "H+";  // CHEBI:15378
  species M_446 in Cytoplasm = 0; M_446 is "Phosphoenolpyruvate";  // CHEBI:18021
  species M_483 in Cytoplasm = 0; M_483 is "Pyruvate";  // CHEBI:15361
  species M_234 in Cytoplasm = 0; M_234 is "Dihydroxyacetone phosphate";  // CHEBI:16108
  species M_330 in Cytoplasm = 0; M_330 is "H2O";  // CHEBI:15377
  species M_412 in Cytoplasm = 0; M_412 is "Nicotinamide adenine dinucleotide - reduced";  // CHEBI:16908
  species M_121 in Cytoplasm = 0; M_121 is "Acetaldehyde";  // CHEBI:15343
  species M_203 in Cytoplasm = 0; M_203 is "CO2";  // CHEBI:16526
  species E_375 in Cytoplasm = 0.1891505; E_375 is "YKL060C";  // sgd:S000001543 uniprot:P14540
  species Cx_40 in Cytoplasm = 0.003378568; Cx_40 is "YGR240C:YMR205C";  // uniprot:P16861 uniprot:P16862
  species E_417 in Cytoplasm = 0.01103967; E_417 is "YBR196C";  // sgd:S000000400 uniprot:P12709
  species E_670 in Cytoplasm = 0.05511025; E_670 is "YCR012W";  // sgd:S000000605 uniprot:P00560
  species E_352 in Cytoplasm = 0.0925997; E_352 is "YGR254W";  // sgd:S000003486 uniprot:P00924
  species E_426 in Cytoplasm = 0.03453452; E_426 is "YJL052W";  // sgd:S000003588 uniprot:P00360
  species E_502 in Cytoplasm = 0.001664688; E_502 is "YFR053C";  // sgd:S000001949 uniprot:P04806
  species E_336 in Cytoplasm = 0.06322939; E_336 is "YKL152C";  // sgd:S000001635 uniprot:P00950
  species E_726 in Cytoplasm = 0.2978867; E_726 is "YAL038W";  // sgd:S000000036 uniprot:P00549
  species E_24 in Cytoplasm = 0.09520869; E_24 is "YLR044C";  // sgd:S000004034 uniprot:P06169

  // Reactions:
  fructose_bisphosphate_aldolase: M_276 -> M_234 + M_289; Cytoplasm*function_1(Cytoplasm, Et, Ks, M_276, fructose_bisphosphate_aldolase_kcat); fructose_bisphosphate_aldolase is "fructose-bisphosphate aldolase";  // modifiers: E_375; isDescribedBy ec-code:4.1.2.13 pubmed:8435847
    Et = 4.0625e-5; Ks = 0.450701; fructose_bisphosphate_aldolase_kcat = 4.13856;
  phosphofructokinase: M_172 + M_273 -> M_135 + M_276 + M_329; Cytoplasm*function_4_phosphofructokinase(Cytoplasm, M_172, M_273, k0);  // modifiers: Cx_40; isDescribedBy ec-code:2.7.1.11 pubmed:3007939
    k0 = 1;
  glucose_6_phosphate_isomerase: M_292 -> M_273; Cytoplasm*function_2(Cytoplasm, I, Ki, glucose_6_phosphate_isomerase_Km, M_292, glucose_6_phosphate_isomerase_Vmax); glucose_6_phosphate_isomerase is "glucose-6-phosphate isomerase";  // modifiers: E_417; isDescribedBy ec-code:5.3.1.9 pubmed:8435847
    I = 0; Ki = 1.9; glucose_6_phosphate_isomerase_Km = 0.86; glucose_6_phosphate_isomerase_Vmax = 0;
  phosphoglycerate_kinase: M_4 + M_135 -> M_57 + M_172; Cytoplasm*function_3(Cytoplasm, E_670, phosphoglycerate_kinase_Km, M_57, phosphoglycerate_kinase_kcat);  // modifiers: E_670; isDescribedBy ec-code:2.7.2.3 pubmed:6347186
    phosphoglycerate_kinase_Km = 0.77; phosphoglycerate_kinase_kcat = 343.5;
  enolase: M_36 -> M_330 + M_446; Cytoplasm*function_4_enolase(Cytoplasm, enolase_Km, M_36, enolase_Vmax);  // modifiers: E_352; isDescribedBy ec-code:4.2.1.11 pubmed:7520111
    enolase_Km = 48; enolase_Vmax = 42;
  R_1501: M_289 + M_411 + M_454 -> M_4 + M_329 + M_412; Cytoplasm*function_4(Cytoplasm, M_289, M_411, M_454, k1); R_1501 is "glyceraldehyde-3-phosphate dehydrogenase";  // modifiers: E_426; isDescribedBy ec-code:1.2.1.12 pubmed:3905788
    k1 = 1;
  hexokinase_D_glucose_ATP: M_172 + M_304 -> M_135 + M_292 + M_329; Cytoplasm*function_5(Cytoplasm, M_172, M_304, k2); hexokinase_D_glucose_ATP is "hexokinase (D-glucose:ATP)";  // modifiers: E_502; isDescribedBy ec-code:2.7.1.1 pubmed:6394965
    k2 = 1;
  phosphoglycerate_mutase: M_57 -> M_36; Cytoplasm*function_6(Cytoplasm, M_57, k3);  // modifiers: E_336; isDescribedBy ec-code:5.4.2.1 pubmed:3033435
    k3 = 1;
  pyruvate_kinase: M_135 + M_329 + M_446 -> M_172 + M_483; Cytoplasm*function_4_pyruvate_kinase(Cytoplasm, M_135, M_329, M_446, k4);  // modifiers: E_726; isDescribedBy ec-code:2.7.1.40 pubmed:6185493
    k4 = 1;
  pyruvate_decarboxylase: M_329 + M_483 -> M_121 + M_203; Cytoplasm*function_8(Cytoplasm, M_329, M_483, k5);  // modifiers: E_24; isDescribedBy ec-code:4.1.1.1
    k5 = 1;
end
