// SBML level 2 version 4

model Rattanakul2003_BoneFormation_PTHadministration()
  // This a model from the article:
  // Modeling of bone formation and resorption mediated by parathyroid hormone: response to estrogen/PTH therapy.
  // Rattanakul C, Lenbury Y, Krishnamara N, Wollkind DJ. Biosystems 2003:70(1):55-72. 12753937 ,
  // Abstract:
  // Bone, a major reservoir of body calcium, is under the hormonal control of the parathyroid hormone (PTH). Several aspects of its growth, turnover, and mechanism, occur in the absence of gonadal hormones. Sex steroids such as estrogen, nonetheless, play an important role in bone physiology, and are extremely essential to maintain bone balance in adults. In order to provide a basis for understanding the underlying mechanisms of bone remodeling as it is mediated by PTH, we propose here a mathematical model of the process. The nonlinear system model is then utilized to study the temporal effect of PTH as well as the action of estrogen replacement therapy on bone turnover. Analysis of the model is done on the assumption, supported by reported clinical evidence, that the process is characterized by highly diversified dynamics, which warrants the use of singular perturbation arguments. The model is shown to exhibit limit cycle behavior, which can develop into chaotic dynamics for certain ranges of the system's parametric values. Effects of estrogen and PTH administrations are then investigated by extending on the core model. Analysis of the model seems to indicate that the paradoxical observation that intermittent PTH administration causes net bone deposition while continuous administration causes net bone loss, and certain other reported phenomena may be attributed to the highly diversified dynamics which characterizes this nonlinear remodeling process.
  // About this model: This model represents the second model from the published paper (eqs 35-37). The model has been built on the core model (which describes changes in the concentration of PTH, the number of osteoclasts and the number of osteoblasts) by considering the effects of exogenous PTH administration - in this particular case pulsatile, for a period of 6 hours in an interval of 1 day.
  // This model was taken from the CellML repository and automatically converted to SBML.
  // The original model was: rattananakul, lenbury, krishnamara, wollkind. (2003) - version01
  // The original CellML model was created by:
  // Lloyd, Catherine, May
  // c.lloyd@auckland.ac.nz
  // The University of Auckland
  // Auckland Bioengineering Institute
  // This model originates from BioModels Database: A Database of Annotated Published Models (http://www.ebi.ac.uk/biomodels/). It is copyright (c) 2005-2011 The BioModels.net Team.
  // To the extent possible under law, all copyright and related or neighbouring rights to this encoded model have been dedicated to the public domain worldwide. Please refer to CC0 Public Domain Dedication for more information.
  // In summary, you are entitled to use this encoded model in absolutely any manner you deem suitable, verbatim, or with modification, alone or embedded it in a larger context, redistribute it, commercially or not, in a restricted way or not..
  // To cite BioModels Database, please use: Li C, Donizelli M, Rodriguez N, Dharuri H, Endler L, Chelliah V, Li L, He E, Henry A, Stefan MI, Snoep JL, Hucka M, Le Novère N, Laibe C (2010) BioModels Database: An enhanced, curated and annotated resource for published quantitative kinetic models. BMC Syst Biol., 4:92.
  // biomodels.db:MODEL1012140000
  // isDescribedBy pubmed:12753937
  // biomodels.db:MODEL1012140000
  // isDescribedBy pubmed:12753937
  // biomodels.db:MODEL1012140000
  // biomodels.db:MODEL1012140000

  // Compartments:
  compartment Compartment = 1 litre;

  // Species:
  species x in Compartment = 2; x is "PTH";
  species y in Compartment = 1; y is "active osteoclasts";
  species z in Compartment = 0.15; z is "active osteoblasts";

  // Parameters:
  epsilon = 0.1;
  delta = 0.9;
  a1 = 0.05;
  a2 = 0.009;
  a3 = 0.675;
  a4 = 0.01;
  a5 = 0.005;
  b1 = 0.1;
  b2 = 0.3;
  b3 = 0.01;
  k1 = 0.1;
  k2 = 0.5;
  k3 = 0.025;
  kp = 0.5;

  // Rate rules:
  x' = piecewise(a1/(k1 + y) - b1*x, (time >= 0) && (time < 10000), a1/(k1 + y) - b1*x + kp, (time >= 10000) && (time < 10360), a1/(k1 + y) - b1*x, (time >= 10360) && (time < 11440), a1/(k1 + y) - b1*x + kp, (time >= 11440) && (time < 11800), a1/(k1 + y) - b1*x, (time >= 11800) && (time < 12880), a1/(k1 + y) - b1*x + kp, (time >= 12880) && (time < 13240), a1/(k1 + y) - b1*x, (time >= 13240) && (time < 14320), a1/(k1 + y) - b1*x + kp, (time >= 14320) && (time < 14680), a1/(k1 + y) - b1*x, (time >= 14680) && (time < 15760), a1/(k1 + y) - b1*x + kp, (time >= 15760) && (time < 16120), a1/(k1 + y) - b1*x, (time >= 16120) && (time < 17560), a1/(k1 + y) - b1*x + kp, (time >= 17560) && (time < 17920), a1/(k1 + y) - b1*x, (time >= 17920) && (time < 19360), a1/(k1 + y) - b1*x + kp, (time >= 19360) && (time < 19720), a1/(k1 + y) - b1*x, (time >= 19720) && (time < 21160), a1/(k1 + y) - b1*x + kp, (time >= 21160) && (time < 21520), a1/(k1 + y) - b1*x, (time >= 21520) && (time < 22960), a1/(k1 + y) - b1*x + kp, (time >= 22960) && (time < 23320), a1/(k1 + y) - b1*x, (time >= 23320) && (time < 24760), a1/(k1 + y) - b1*x + kp, (time >= 24720) && (time < 25120), a1/(k1 + y) - b1*x, (time >= 25120) && (time < 26560), a1/(k1 + y) - b1*x + kp, (time >= 26560) && (time < 26920), a1/(k1 + y) - b1*x, (time >= 26920) && (time < 28360), a1/(k1 + y) - b1*x + kp, (time >= 28360) && (time < 28720), a1/(k1 + y) - b1*x, (time >= 28720) && (time < 30160), a1/(k1 + y) - b1*x + kp, (time >= 30160) && (time < 30520));
  y' = epsilon*((a2 + a3*x)*y*z/(k2 + x^2) - b2*y);
  z' = epsilon*delta*(a4*x - (a5*x*z/(k3 + x) + b3*z));

  // Unit definitions:
  unit minute = 60 second;
  unit time = 60 second;
end
