// SBML level 2 version 4

model Bakker1997_Glycolysis()
  // This model originates from BioModels Database: A Database of Annotated Published Models (http://www.ebi.ac.uk/biomodels/). It is copyright (c) 2005-2011 The BioModels.net Team.
  // To the extent possible under law, all copyright and related or neighbouring rights to this encoded model have been dedicated to the public domain worldwide. Please refer to CC0 Public Domain Dedication for more information.
  // In summary, you are entitled to use this encoded model in absolutely any manner you deem suitable, verbatim, or with modification, alone or embedded it in a larger context, redistribute it, commercially or not, in a restricted way or not..
  // To cite BioModels Database, please use: Li C, Donizelli M, Rodriguez N, Dharuri H, Endler L, Chelliah V, Li L, He E, Henry A, Stefan MI, Snoep JL, Hucka M, Le Novère N, Laibe C (2010) BioModels Database: An enhanced, curated and annotated resource for published quantitative kinetic models. BMC Syst Biol., 4:92.
  // biomodels.db:MODEL1101100000
  // isDescribedBy pubmed:9013556
  // biomodels.db:MODEL1101100000
  // isDescribedBy pubmed:9013556
  // biomodels.db:MODEL1101100000
  // biomodels.db:MODEL1101100000

  // Compartments:
  compartment default = 1 volume;
  compartment cytosol in default = 1 volume;

  // Species:
  species GLU in cytosol = 0.1/cytosol;
  species GLU6P in cytosol = 0;
  species ATP in cytosol = 0;
  species ADP in cytosol = 1.4/cytosol;
  species _2_7_1_1 in cytosol = 0.25/cytosol; _2_7_1_1 is "2.7.1.1";
  species FRU6P in cytosol = 0;
  species _2DOGLP in cytosol = 0;
  species _5_3_1_9 in cytosol = 0; _5_3_1_9 is "5.3.1.9";
  species FRU16DP in cytosol = 0;
  species CITRATE in cytosol = 0;
  species cAMP in cytosol = 0;
  species AMP in cytosol = 0;
  species FRU26DP in cytosol = 0;
  species _2_7_1_11 in cytosol = 0.39/cytosol; _2_7_1_11 is "2.7.1.11";
  species DHAP in cytosol = 0.61/cytosol;
  species G3P in cytosol = 0;
  species _4_1_2_7 in cytosol = 1.23/cytosol; _4_1_2_7 is "4.1.2.7";
  species _5_3_1_1 in cytosol = 0; _5_3_1_1 is "5.3.1.1";
  species _13DPG in cytosol = 0;
  species _1_2_1_12 in cytosol = 0.5/cytosol; _1_2_1_12 is "1.2.1.12";
  species IODACTE in cytosol = 0;
  species s22 in cytosol = 0; s22 is "NAD";
  species s23 in cytosol = 0; s23 is "NAD";
  species _3PG in cytosol = 0.46/cytosol;
  species _2_7_2_3 in cytosol = 0.16/cytosol; _2_7_2_3 is "2.7.2.3";
  species _2PG in cytosol = 0.085/cytosol;
  species _5_4_2_1 in cytosol = 0; _5_4_2_1 is "5.4.2.1";
  species PEP in cytosol = 0.57/cytosol;
  species _4_2_1_11 in cytosol = 0; _4_2_1_11 is "4.2.1.11";
  species H_sub_2_endsub_O in cytosol = 0;
  species FLURIDE in cytosol = 0;
  species PHOSPHATE in cytosol = 0;
  species PYRUVATE in cytosol = 0;
  species s38 in cytosol = 0;
  species ALANIN in cytosol = 0;
  species ACETYLCOA in cytosol = 0;
  species Ca_super_2__endsuper in cytosol = 0; Ca_super_2__endsuper is "Ca_super_2+_endsuper_";
  species _2_7_1_40 in cytosol = 0.16/cytosol; _2_7_1_40 is "2.7.1.40";

  // Parameters:
  kic_re1_s2 = 1 substance;
  kic_re1_s1_s5 = 1 substance;
  kmc_re1_s3_s5 = 1 substance;
  kmc_re1_s1_s5 = 1 substance; kmc_re1_s1_s5 is "kmc_re1_s3_s5";
  kcat_re1_s5 = 1 per_second;
  kic_re2_s7 = 1 substance;
  kass_re2 = 1 per_second;
  kcat_re3_s8 = 1 per_second;
  hic_re3_s8 = 1 DIMENSIONLESS;
  ksp_re3_s8 = 1 substance;
  kcat_re4_s14 = 1 per_second;
  hic_re4_s14 = 1 DIMENSIONLESS; hic_re4_s14 is "hic_re3_s14";
  ksp_re4_s14 = 1 substance;
  kcat_re5_s17 = 1 per_second;
  hic_re5_s17 = 1 DIMENSIONLESS;
  ksp_re5_s17 = 1 substance;
  kcat_re6_s17 = 1 per_second;
  hic_re6_s17 = 1 DIMENSIONLESS;
  ksp_re6_s17 = 1 substance;
  kcat_re7_s18 = 1 per_second;
  hic_re7_s18 = 1 DIMENSIONLESS;
  ksp_re7_s18 = 1 substance;
  kcat_re8_s18 = 1 per_second;
  hic_re8_s18 = 1 DIMENSIONLESS;
  ksp_re8_s18 = 1 substance;
  kic_re9_s21 = 1 substance;
  kic_re9_s16_s20 = 1 substance;
  kmc_re9_s22_s20 = 1 substance;
  kmc_re9_s16_s20 = 1 substance;
  kcat_re9_s20 = 1 per_second;
  kass_re10 = 1 per_second;
  kic_re11_s19_s25 = 1 substance;
  kmc_re11_s4_s25 = 1 substance;
  kmc_re11_s19_s25 = 1 substance;
  kcat_re11_s25 = 1 per_second;
  kcat_re12_s27 = 1 per_second;
  hic_re12_s27 = 1 DIMENSIONLESS;
  ksp_re12_s27 = 1 substance;
  kass_re13 = 1 per_second;
  kcat_re14_s29 = 1 per_second;
  hic_re14_s29 = 1 DIMENSIONLESS;
  ksp_re14_s29 = 1 substance;
  kic_re15_s46 = 1 substance;
  kic_re15_s45 = 1 substance;
  kic_re15_s44 = 1 substance;
  kic_re15_s28_s47 = 1 substance;
  kmc_re15_s4_s47 = 1 substance;
  kmc_re15_s28_s47 = 1 substance;
  kcat_re15_s47 = 1 per_second;
  kass_re21 = 1 per_second;

  // Reactions:
  re1: GLU + ATP => GLU6P + ADP; kic_re1_s2/(kic_re1_s2 + GLU6P*cytosol)*(kcat_re1_s5*_2_7_1_1*cytosol*GLU*cytosol*ATP*cytosol/(kic_re1_s1_s5*kmc_re1_s3_s5 + GLU*cytosol*ATP*cytosol + kmc_re1_s3_s5*GLU*cytosol + kmc_re1_s1_s5*ATP*cytosol));  // modifiers: _2_7_1_1
  re2: GLU6P => FRU6P; kic_re2_s7/(kic_re2_s7 + _2DOGLP*cytosol)*kass_re2*GLU6P*cytosol;  // modifiers: _2DOGLP
  re3: FRU6P => GLU6P; kcat_re3_s8*_5_3_1_9*cytosol*(FRU6P*cytosol)^hic_re3_s8/(ksp_re3_s8^hic_re3_s8 + (FRU6P*cytosol)^hic_re3_s8);  // modifiers: _5_3_1_9
  re4: FRU6P => FRU16DP; kcat_re4_s14*_2_7_1_11*cytosol*(FRU6P*cytosol)^hic_re4_s14/(ksp_re4_s14^hic_re4_s14 + (FRU6P*cytosol)^hic_re4_s14);  // modifiers: CITRATE, cAMP, AMP, FRU26DP, _2_7_1_11
  re5: FRU16DP => DHAP; kcat_re5_s17*_4_1_2_7*cytosol*(FRU16DP*cytosol)^hic_re5_s17/(ksp_re5_s17^hic_re5_s17 + (FRU16DP*cytosol)^hic_re5_s17);  // modifiers: _4_1_2_7
  re6: FRU16DP => G3P; kcat_re6_s17*_4_1_2_7*cytosol*(FRU16DP*cytosol)^hic_re6_s17/(ksp_re6_s17^hic_re6_s17 + (FRU16DP*cytosol)^hic_re6_s17);  // modifiers: _4_1_2_7
  re7: G3P => DHAP; kcat_re7_s18*_5_3_1_1*cytosol*(G3P*cytosol)^hic_re7_s18/(ksp_re7_s18^hic_re7_s18 + (G3P*cytosol)^hic_re7_s18);  // modifiers: _5_3_1_1
  re8: DHAP => G3P; kcat_re8_s18*_5_3_1_1*cytosol*(DHAP*cytosol)^hic_re8_s18/(ksp_re8_s18^hic_re8_s18 + (DHAP*cytosol)^hic_re8_s18);  // modifiers: _5_3_1_1
  re9: G3P + s22 => _13DPG + s23; kic_re9_s21/(kic_re9_s21 + IODACTE*cytosol)*(kcat_re9_s20*_1_2_1_12*cytosol*G3P*cytosol*s22*cytosol/(kic_re9_s16_s20*kmc_re9_s22_s20 + G3P*cytosol*s22*cytosol + kmc_re9_s22_s20*G3P*cytosol + kmc_re9_s16_s20*s22*cytosol));  // modifiers: _1_2_1_12, IODACTE
  re10: _13DPG => G3P; kass_re10*_13DPG*cytosol;
  re11: _13DPG + ADP => _3PG + ATP; kcat_re11_s25*_2_7_2_3*cytosol*_13DPG*cytosol*ADP*cytosol/(kic_re11_s19_s25*kmc_re11_s4_s25 + _13DPG*cytosol*ADP*cytosol + kmc_re11_s4_s25*_13DPG*cytosol + kmc_re11_s19_s25*ADP*cytosol);  // modifiers: _2_7_2_3
  re12: _3PG => _2PG; kcat_re12_s27*_5_4_2_1*cytosol*(_3PG*cytosol)^hic_re12_s27/(ksp_re12_s27^hic_re12_s27 + (_3PG*cytosol)^hic_re12_s27);  // modifiers: _5_4_2_1
  re13: _2PG => _3PG; kass_re13*_2PG*cytosol;
  re14: _2PG => PEP + H_sub_2_endsub_O; kcat_re14_s29*_4_2_1_11*cytosol*(_2PG*cytosol)^hic_re14_s29/(ksp_re14_s29^hic_re14_s29 + (_2PG*cytosol)^hic_re14_s29);  // modifiers: _4_2_1_11, PHOSPHATE, FLURIDE
  re15: PEP + ADP => PYRUVATE + ATP; kic_re15_s44/(kic_re15_s44 + ALANIN*cytosol)*kic_re15_s46/(kic_re15_s46 + Ca_super_2__endsuper*cytosol)*(kic_re15_s45/(kic_re15_s45 + ACETYLCOA*cytosol))*(kcat_re15_s47*_2_7_1_40*cytosol*PEP*cytosol*ADP*cytosol/(kic_re15_s28_s47*kmc_re15_s4_s47 + PEP*cytosol*ADP*cytosol + kmc_re15_s4_s47*PEP*cytosol + kmc_re15_s28_s47*ADP*cytosol));  // modifiers: ALANIN, ACETYLCOA, Ca_super_2__endsuper, _2_7_1_40
  re21: PYRUVATE => PEP; kass_re21*PYRUVATE*cytosol;

  // Unit definitions:
  unit substance = 1e-3 mole;
  unit volume = 1e-3 litre;
  unit area = metre^2;
  unit length = metre;
  unit time = second;
  unit per_second = 1 / second; per_second is "per time";
end
