// SBML level 2 version 4

function kf_enz(kcat, KM)
  5*kcat/KM;
end

function kb_enz(kcat)
  4*kcat;
end

model Nakano2010_Synaptic_Plasticity()
  // This is an SBML version of the model described in: A kinetic model of dopamine- and calcium-dependent striatal synaptic plasticity.
  // Nakano T, Doi T, Yoshimoto J, Doya K. PLoS Comput Biol. 2010 Feb 12;6(2):e1000670. PMID: 20169176 ; DOI: 10.1371/journal.pcbi.1000670
  // Abstract:
  // Corticostriatal synapse plasticity of medium spiny neurons is regulated by glutamate input from the cortex and dopamine input from the substantia nigra. While cortical stimulation alone results in long-term depression (LTD), the combination with dopamine switches LTD to long-term potentiation (LTP), which is known as dopamine-dependent plasticity. LTP is also induced by cortical stimulation in magnesium-free solution, which leads to massive calcium influx through NMDA-type receptors and is regarded as calcium-dependent plasticity. Signaling cascades in the corticostriatal spines are currently under investigation. However, because of the existence of multiple excitatory and inhibitory pathways with loops, the mechanisms regulating the two types of plasticity remain poorly understood. A signaling pathway model of spines that express D1-type dopamine receptors was constructed to analyze the dynamic mechanisms of dopamine- and calcium-dependent plasticity. The model incorporated all major signaling molecules, including dopamine- and cyclic AMP-regulated phosphoprotein with a molecular weight of 32 kDa (DARPP32), as well as AMPA receptor trafficking in the post-synaptic membrane. Simulations with dopamine and calcium inputs reproduced dopamine- and calcium-dependent plasticity. Further in silico experiments revealed that the positive feedback loop consisted of protein kinase A (PKA), protein phosphatase 2A (PP2A), and the phosphorylation site at threonine 75 of DARPP-32 (Thr75) served as the major switch for inducing LTD and LTP. Calcium input modulated this loop through the PP2B (phosphatase 2B)-CK1 (casein kinase 1)-Cdk5 (cyclin-dependent kinase 5)-Thr75 pathway and PP2A, whereas calcium and dopamine input activated the loop via PKA activation by cyclic AMP (cAMP). The positive feedback loop displayed robust bi-stable responses following changes in the reaction parameters. Increased basal dopamine levels disrupted this dopamine-dependent plasticity. The present model elucidated the mechanisms involved in bidirectional regulation of corticostriatal synapses and will allow for further exploration into causes and therapies for dysfunctions such as drug addiction.
  // The model was encoded from the supplemental material accompanying the article.
  // The stimuli used in the article are hard to implement in SBML, so right now the model does not reproduce the results given in the article.
  // Originally created by libAntimony v1.4 (using libSBML 3.4.1)
  // This model originates from BioModels Database: A Database of Annotated Published Models (http://www.ebi.ac.uk/biomodels/). It is copyright (c) 2005-2011 The BioModels.net Team.
  // To the extent possible under law, all copyright and related or neighbouring rights to this encoded model have been dedicated to the public domain worldwide. Please refer to CC0 Public Domain Dedication for more information.
  // In summary, you are entitled to use this encoded model in absolutely any manner you deem suitable, verbatim, or with modification, alone or embedded it in a larger context, redistribute it, commercially or not, in a restricted way or not..
  // To cite BioModels Database, please use: Li C, Donizelli M, Rodriguez N, Dharuri H, Endler L, Chelliah V, Li L, He E, Henry A, Stefan MI, Snoep JL, Hucka M, Le Novère N, Laibe C (2010) BioModels Database: An enhanced, curated and annotated resource for published quantitative kinetic models. BMC Syst Biol., 4:92.
  // biomodels.db:MODEL1101170000
  // isDescribedBy pubmed:20169176
  // biomodels.db:MODEL1101170000
  // isDescribedBy pubmed:20169176
  // biomodels.db:MODEL1101170000
  // biomodels.db:MODEL1101170000

  // Compartments:
  compartment spine = 1e-15;
  compartment extra_cellular = 1;

  // Species:
  species $DA in extra_cellular = DA_basal;
  species R2C2 in spine = 3.59;
  species R2C2_cAMP2 in spine = 0.1;
  species R2C2_cAMP4 in spine = 0.00488;
  species R2_cAMP4 in spine = 0.69;
  species PKA_act in spine = 0.06;
  species PKA_D75 in spine = 1.23;
  species PKA_D75_137 in spine = 0.05;
  species PP1_act in spine = 2.3;
  species PP1_D34 in spine = 0.24;
  species PP1_D34_137 in spine = 0.03;
  species PP1_D34_75 in spine = 5.3e-5;
  species PP1_D34_75_137 in spine = 7.84e-6;
  species PP1_D in spine = 0.24;
  species PP1_D75 in spine = 5.32e-5;
  species PP1_D137 in spine = 0.01;
  species PP1_D75_137 in spine = 2.31e-6;
  species I1 in spine = 0.68;
  species PP1_I1 in spine = 0.01;
  species PP1_I1_p in spine = 2.2;
  species I1_p in spine = 0.000673;
  species CaNAB in spine = 0.27;
  species CaNAB_Ca2 in spine = 9.69;
  species CaNAB_Ca4 in spine = 0.13;
  species CaM_Ca4_CaNAB in spine = 0.000955;
  species CaM_Ca3_CaNAB in spine = 0.01;
  species CaM_Ca2_CaNAB in spine = 0.01;
  species CaMKII in spine = 18.89;
  species CaMKII_CaM in spine = 0.0029;
  species CaMKII_Thr286 in spine = 0.33;
  species CaMKII_Thr306 in spine = 0.01;
  species $tot_CaM_CaMKII in spine;
  species $tot_autonomous_CaMKII in spine;
  species CaMKII_Thr286p_CaM in spine = 0.02;
  species CaMKII_Thr286_305 in spine = 0.01;
  species $CaMKII_act in spine;
  species basal_CaMKII in spine = 2;
  species CaM_Ca2 in spine = 0.21;
  species CaM_Ca3 in spine = 0.00454;
  species CaM in spine = 58.4;
  species CaM_Ca4 in spine = 1.27e-5;
  species Cam_total in spine = 58.61;
  species D in spine = 34.97;
  species D34 in spine = 0.01;
  species D137 in spine = 1.37;
  species D75 in spine = 9.92;
  species D34_75 in spine = 2.36e-6;
  species D34_137 in spine = 0.000455;
  species D34_75_137 in spine = 1.07e-7;
  species D75_137 in spine = 0.39;
  species B1 in spine = 2.37;
  species B2 in spine = 2.1;
  species PP2A_PKA in spine = 0.01;
  species PP2A_Ca in spine = 0.00121;
  species B1_2Ca in spine = 0.000349;
  species PP2A in spine = 0.42;
  species B2p in spine = 0.02;
  species GluR in spine = 0.02;
  species GluR_845p in spine = 0.01;
  species GluR_831p_845p in spine = 0.00146;
  species GluR_I_831p_845p in spine = 0.01;
  species GluR_I_845p in spine = 0.07;
  species GluR_I in spine = 0.16;
  species $Bulk_AMPAR in spine = 9;
  species Anchor in spine = 11.56;
  species D1R in spine = 0.06;
  species D1R_Gs in spine = 0.44;
  species D1R_DA in spine = 0.000989;
  species D1R_DA_Gs in spine = 0.000536;
  species Gs_GDP in spine = 2.54;
  species bc in spine = 0.03;
  species Gsa_GTP in spine = 0.00107;
  species Gsa_GDP in spine = 0.00418;
  species AC in spine = 2.34;
  species AC_Gsa in spine = 0.00193;
  species cAMP in spine = 0.22;
  species $ATP in spine = 2000;
  species AC_Ca in spine = 0.16;
  species ACGsa_Ca in spine = 0.000128;
  species ACGsa_Ca_ATP in spine = 0.00107;
  species AC_Gsa_ATP in spine = 0.02;
  species PDE2 in spine = 1.11;
  species PDE2_p in spine = 0.86;
  species PDE1 in spine = 3.98;
  species PDE1_CaM in spine = 5.04e-6;
  species PP2C in spine = 1.26;
  species CK1p in spine = 0.48;
  species CK1 in spine = 0.02;
  species CDK5p in spine = 0.07;
  species CDK5 in spine = 0.5;
  species PKA_act_I1 in spine = 0.00883;
  species PKA_act_PP2A in spine = 0.136;
  species PP2A_p in spine = 0;
  species PKA_act_D in spine = 0.941;
  species PKA_act_D137 in spine = 0.0368;
  species PKA_act_GluR in spine = 0.000567;
  species PKA_act_GluR_I in spine = 0.00523;
  species PKA_act_PDE2 in spine = 0.00956;
  species PDE1_cAMP in spine = 0.0222;
  species PDE1_CaM_cAMP in spine = 2.43e-7;
  species PDE2_cAMP in spine = 0.0062;
  species PDE2_p_cAMP in spine = 0.00962;
  species PP1_act_CaMKII_Thr286p_CaM in spine = 0.00731;
  species PP1_act_CaMKII_Thr286 in spine = 0.149;
  species PP1_act_CaMKII_Thr286_305 in spine = 0.006;
  species PP1_act_CaMKII_Thr306 in spine = 0.006;
  species PP1_act_GluR_831p_845p in spine = 3.36e-5;
  species PP1_act_GluR_845p in spine = 0.000191;
  species PP1_act_GluR_I_831p_845p in spine = 0.000163;
  species PP1_act_GluR_I_845p in spine = 0.00171;
  species PP2A_PKA_D75 in spine = 0.237;
  species PP2A_PKA_D34_75 in spine = 5.63e-8;
  species PP2A_PKA_D75_137 in spine = 0.00928;
  species PP2A_PKA_D34_75_137 in spine = 2.56e-9;
  species PP2A_PKA_GluR_831p_845p in spine = 4.33e-7;
  species PP2A_PKA_GluR_845p in spine = 2.46e-6;
  species PP2A_PKA_GluR_I_831p_845p in spine = 2.1e-6;
  species PP2A_PKA_GluR_I_845p in spine = 2.21e-5;
  species PP2A_Ca_D75 in spine = 0.0323;
  species PP2A_Ca_D34_75 in spine = 7.67e-9;
  species PP2A_Ca_D75_137 in spine = 0.00126;
  species PP2A_Ca_D34_75_137 in spine = 3.49e-10;
  species PP2A_Ca_GluR_831p_845p in spine = 5.9e-8;
  species PP2A_Ca_GluR_845p in spine = 3.35e-7;
  species PP2A_Ca_GluR_I_831p_845p in spine = 2.86e-7;
  species PP2A_Ca_GluR_I_845p in spine = 3.01e-6;
  species CaM_Ca2_CaNAB_Ca4 in spine = 0;
  species CaM_Ca2_CaNAB_Ca4_D34 in spine = 0.00502;
  species CaM_Ca2_CaNAB_Ca4_D34_75 in spine = 1.1e-6;
  species CaM_Ca2_CaNAB_Ca4_D34_137 in spine = 0.000212;
  species CaM_Ca2_CaNAB_Ca4_D34_75_137 in spine = 5e-8;
  species CaM_Ca2_CaNAB_Ca4_PP1_D34 in spine = 0.113;
  species CaM_Ca2_CaNAB_Ca4_PP1_D34_75 in spine = 2.47e-5;
  species CaM_Ca2_CaNAB_Ca4_PP1_D34_137 in spine = 0.0155;
  species CaM_Ca2_CaNAB_Ca4_PP1_D34_75_137 in spine = 3.65e-6;
  species CaM_Ca2_CaNAB_Ca4_I1_p in spine = 0.00279;
  species CaM_Ca2_CaNAB_Ca4_PP1_I1_p in spine = 1.07e-6;
  species CaM_Ca2_CaNAB_Ca4_CK1p in spine = 0.00151;
  species CaM_Ca3_CaNAB_Ca4 in spine = 0;
  species CaM_Ca3_CaNAB_Ca4_D34 in spine = 0.0101;
  species CaM_Ca3_CaNAB_Ca4_D34_75 in spine = 2.21e-6;
  species CaM_Ca3_CaNAB_Ca4_D34_137 in spine = 0.000427;
  species CaM_Ca3_CaNAB_Ca4_D34_75_137 in spine = 1.01e-7;
  species CaM_Ca3_CaNAB_Ca4_PP1_D34 in spine = 0.228;
  species CaM_Ca3_CaNAB_Ca4_PP1_D34_75 in spine = 4.98e-5;
  species CaM_Ca3_CaNAB_Ca4_PP1_D34_137 in spine = 0.0312;
  species CaM_Ca3_CaNAB_Ca4_PP1_D34_75_137 in spine = 7.36e-6;
  species CaM_Ca3_CaNAB_Ca4_I1_p in spine = 2.15e-6;
  species CaM_Ca3_CaNAB_Ca4_PP1_I1_p in spine = 0.00561;
  species CaM_Ca3_CaNAB_Ca4_CK1p in spine = 0.00304;
  species CaM_Ca4_CaNAB_Ca4 in spine = 0;
  species CaM_Ca4_CaNAB_Ca4_D34 in spine = 0.017;
  species CaM_Ca4_CaNAB_Ca4_D34_75 in spine = 3.72e-6;
  species CaM_Ca4_CaNAB_Ca4_D34_137 in spine = 0.00233;
  species CaM_Ca4_CaNAB_Ca4_D34_75_137 in spine = 5.5e-7;
  species CaM_Ca4_CaNAB_Ca4_PP1_D34 in spine = 0.000756;
  species CaM_Ca4_CaNAB_Ca4_PP1_D34_75 in spine = 1.65e-7;
  species CaM_Ca4_CaNAB_Ca4_PP1_D34_137 in spine = 3.19e-5;
  species CaM_Ca4_CaNAB_Ca4_PP1_D34_75_137 in spine = 7.53e-9;
  species CaM_Ca4_CaNAB_Ca4_I1_p in spine = 1.61e-7;
  species CaM_Ca4_CaNAB_Ca4_PP1_I1_p in spine = 0.00042;
  species CaM_Ca4_CaNAB_Ca4_CK1p in spine = 0.000227;
  species tot_CaM_CAMKII in spine = 0;
  species tot_CaM_CAMKII_CaMKII_CaM in spine = 4.88e-7;
  species tot_CaM_CAMKII_CaMKII_Thr286 in spine = 5.54e-5;
  species tot_autonomous_CaMKII_CaMKII_CaM in spine = 5.69e-6;
  species tot_autonomous_CaMKII_CaMKII_Thr286 in spine = 0.000645;
  species CaMKII_act_GluR_845p in spine = 2e-5;
  species CaMKII_act_GluR_I_845p in spine = 0.00018;
  species CK1p_D in spine = 0.191;
  species CK1p_D34 in spine = 5.9e-5;
  species CK1p_D75 in spine = 0.0543;
  species CK1p_D34_75 in spine = 1.29e-8;
  species CK1p_CDK5 in spine = 0.0155;
  species CDK5p_D in spine = 0.601;
  species CDK5p_D34 in spine = 0.000185;
  species CDK5p_D137 in spine = 0.0235;
  species CDK5p_D34_137 in spine = 7.82e-6;
  species PP2C_D137 in spine = 0.574;
  species PP2C_D34_137 in spine = 0.000191;
  species PP2C_D75_137 in spine = 0.163;
  species PP2C_D34_75_137 in spine = 4.5e-8;
  species Gs_GTP in spine = 0;
  species $Ca in spine = Ca_basal;
  species PP2A_B1 in spine = 0;
  species PP2A_B1_2Ca in spine = 0;
  species PP2A_B2p in spine = 0;
  species PP2A_B2 in spine = 0;
  species IR in spine = 0;

  // Parameters:
  kcat_PKA_act_I1 = 1.4;
  KM_PKA_act_I1 = 5;
  kcat_PKA_act_PP2A = 1.2;
  KM_PKA_act_PP2A = 1;
  kcat_PKA_act_D = 2.7;
  KM_PKA_act_D = 2.4;
  kcat_PKA_act_D137 = 2.7;
  KM_PKA_act_D137 = 2.4;
  kcat_PKA_act_GluR = 1;
  KM_PKA_act_GluR = 2;
  kcat_PKA_act_GluR_I = 1;
  KM_PKA_act_GluR_I = 2;
  kcat_PKA_act_PDE2 = 9;
  KM_PKA_act_PDE2 = 7.5;
  kcat_PDE1_cAMP = 9;
  KM_PDE1_cAMP = 39.7;
  kcat_PDE1_CaM_cAMP = 18;
  KM_PDE1_CaM_cAMP = 4.6;
  kcat_PDE2_cAMP = 18;
  KM_PDE2_cAMP = 39.7;
  kcat_PDE2_p_cAMP = 20;
  KM_PDE2_p_cAMP = 19.841;
  kcat_PP1_act_CaMKII_Thr286p_CaM = 0.35;
  KM_PP1_act_CaMKII_Thr286p_CaM = 5.1;
  kcat_PP1_act_CaMKII_Thr286 = 0.35;
  KM_PP1_act_CaMKII_Thr286 = 5.1;
  kcat_PP1_act_CaMKII_Thr286_305 = 0.35;
  KM_PP1_act_CaMKII_Thr286_305 = 5.1;
  kcat_PP1_act_CaMKII_Thr306 = 0.35;
  KM_PP1_act_CaMKII_Thr306 = 5.1;
  kcat_PP1_act_GluR_831p_845p = 1;
  KM_PP1_act_GluR_831p_845p = 100;
  kcat_PP1_act_GluR_845p = 3;
  KM_PP1_act_GluR_845p = 100;
  kcat_PP1_act_GluR_I_831p_845p = 1;
  KM_PP1_act_GluR_I_831p_845p = 100;
  kcat_PP1_act_GluR_I_845p = 3;
  KM_PP1_act_GluR_I_845p = 100;
  kcat_PP2A_PKA_D75 = 6.7;
  KM_PP2A_PKA_D75 = 0.37;
  kcat_PP2A_PKA_D34_75 = 6.7;
  KM_PP2A_PKA_D34_75 = 0.37;
  kcat_PP2A_PKA_D75_137 = 6.7;
  KM_PP2A_PKA_D75_137 = 0.37;
  kcat_PP2A_PKA_D34_75_137 = 6.7;
  KM_PP2A_PKA_D34_75_137 = 0.37;
  kcat_PP2A_PKA_GluR_831p_845p = 1;
  KM_PP2A_PKA_GluR_831p_845p = 30;
  kcat_PP2A_PKA_GluR_845p = 3;
  KM_PP2A_PKA_GluR_845p = 30;
  kcat_PP2A_PKA_GluR_I_831p_845p = 1;
  KM_PP2A_PKA_GluR_I_831p_845p = 30;
  kcat_PP2A_PKA_GluR_I_845p = 3;
  KM_PP2A_PKA_GluR_I_845p = 30;
  kcat_PP2A_Ca_D75 = 6.7;
  KM_PP2A_Ca_D75 = 0.372;
  kcat_PP2A_Ca_D34_75 = 6.7;
  KM_PP2A_Ca_D34_75 = 0.372;
  kcat_PP2A_Ca_D75_137 = 6.7;
  KM_PP2A_Ca_D75_137 = 0.372;
  kcat_PP2A_Ca_D34_75_137 = 6.7;
  KM_PP2A_Ca_D34_75_137 = 0.372;
  kcat_PP2A_Ca_GluR_831p_845p = 1;
  KM_PP2A_Ca_GluR_831p_845p = 30;
  kcat_PP2A_Ca_GluR_845p = 3;
  KM_PP2A_Ca_GluR_845p = 30;
  kcat_PP2A_Ca_GluR_I_831p_845p = 1;
  KM_PP2A_Ca_GluR_I_831p_845p = 30;
  kcat_PP2A_Ca_GluR_I_845p = 3;
  KM_PP2A_Ca_GluR_I_845p = 30;
  kcat_CaM_Ca2_CaNAB_Ca4_D34 = 6.8;
  KM_CaM_Ca2_CaNAB_Ca4_D34 = 0.0136;
  kcat_CaM_Ca2_CaNAB_Ca4_D34_75 = 6.8;
  KM_CaM_Ca2_CaNAB_Ca4_D34_75 = 0.0136;
  kcat_CaM_Ca2_CaNAB_Ca4_D34_137 = 2;
  KM_CaM_Ca2_CaNAB_Ca4_D34_137 = 0.0136;
  kcat_CaM_Ca2_CaNAB_Ca4_D34_75_137 = 2;
  KM_CaM_Ca2_CaNAB_Ca4_D34_75_137 = 0.0136;
  kcat_CaM_Ca2_CaNAB_Ca4_PP1_D34 = 6.8;
  KM_CaM_Ca2_CaNAB_Ca4_PP1_D34 = 0.0136;
  kcat_CaM_Ca2_CaNAB_Ca4_PP1_D34_75 = 6.8;
  KM_CaM_Ca2_CaNAB_Ca4_PP1_D34_75 = 0.0136;
  kcat_CaM_Ca2_CaNAB_Ca4_PP1_D34_137 = 2;
  KM_CaM_Ca2_CaNAB_Ca4_PP1_D34_137 = 0.0136;
  kcat_CaM_Ca2_CaNAB_Ca4_PP1_D34_75_137 = 2;
  KM_CaM_Ca2_CaNAB_Ca4_PP1_D34_75_137 = 0.0136;
  kcat_CaM_Ca2_CaNAB_Ca4_I1_p = 3;
  KM_CaM_Ca2_CaNAB_Ca4_I1_p = 4;
  kcat_CaM_Ca2_CaNAB_Ca4_PP1_I1_p = 1.4;
  KM_CaM_Ca2_CaNAB_Ca4_PP1_I1_p = 5;
  kcat_CaM_Ca2_CaNAB_Ca4_CK1p = 6;
  KM_CaM_Ca2_CaNAB_Ca4_CK1p = 2;
  kcat_CaM_Ca3_CaNAB_Ca4_D34 = 6.8;
  KM_CaM_Ca3_CaNAB_Ca4_D34 = 0.0136;
  kcat_CaM_Ca3_CaNAB_Ca4_D34_75 = 6.8;
  KM_CaM_Ca3_CaNAB_Ca4_D34_75 = 0.0136;
  kcat_CaM_Ca3_CaNAB_Ca4_D34_137 = 2;
  KM_CaM_Ca3_CaNAB_Ca4_D34_137 = 0.0136;
  kcat_CaM_Ca3_CaNAB_Ca4_D34_75_137 = 2;
  KM_CaM_Ca3_CaNAB_Ca4_D34_75_137 = 0.0136;
  kcat_CaM_Ca3_CaNAB_Ca4_PP1_D34 = 6.8;
  KM_CaM_Ca3_CaNAB_Ca4_PP1_D34 = 0.0136;
  kcat_CaM_Ca3_CaNAB_Ca4_PP1_D34_75 = 6.8;
  KM_CaM_Ca3_CaNAB_Ca4_PP1_D34_75 = 0.0136;
  kcat_CaM_Ca3_CaNAB_Ca4_PP1_D34_137 = 2;
  KM_CaM_Ca3_CaNAB_Ca4_PP1_D34_137 = 0.0136;
  kcat_CaM_Ca3_CaNAB_Ca4_PP1_D34_75_137 = 2;
  KM_CaM_Ca3_CaNAB_Ca4_PP1_D34_75_137 = 0.0136;
  kcat_CaM_Ca3_CaNAB_Ca4_I1_p = 3;
  KM_CaM_Ca3_CaNAB_Ca4_I1_p = 4;
  kcat_CaM_Ca3_CaNAB_Ca4_PP1_I1_p = 1.4;
  KM_CaM_Ca3_CaNAB_Ca4_PP1_I1_p = 5;
  kcat_CaM_Ca3_CaNAB_Ca4_CK1p = 6;
  KM_CaM_Ca3_CaNAB_Ca4_CK1p = 2;
  kcat_CaM_Ca4_CaNAB_Ca4_D34 = 6.8;
  KM_CaM_Ca4_CaNAB_Ca4_D34 = 0.0136;
  kcat_CaM_Ca4_CaNAB_Ca4_D34_75 = 6.8;
  KM_CaM_Ca4_CaNAB_Ca4_D34_75 = 0.0136;
  kcat_CaM_Ca4_CaNAB_Ca4_D34_137 = 2;
  KM_CaM_Ca4_CaNAB_Ca4_D34_137 = 0.0136;
  kcat_CaM_Ca4_CaNAB_Ca4_D34_75_137 = 2;
  KM_CaM_Ca4_CaNAB_Ca4_D34_75_137 = 0.0136;
  kcat_CaM_Ca4_CaNAB_Ca4_PP1_D34 = 6.8;
  KM_CaM_Ca4_CaNAB_Ca4_PP1_D34 = 0.0136;
  kcat_CaM_Ca4_CaNAB_Ca4_PP1_D34_75 = 6.8;
  KM_CaM_Ca4_CaNAB_Ca4_PP1_D34_75 = 0.0136;
  kcat_CaM_Ca4_CaNAB_Ca4_PP1_D34_137 = 2;
  KM_CaM_Ca4_CaNAB_Ca4_PP1_D34_137 = 0.0136;
  kcat_CaM_Ca4_CaNAB_Ca4_PP1_D34_75_137 = 2;
  KM_CaM_Ca4_CaNAB_Ca4_PP1_D34_75_137 = 0.0136;
  kcat_CaM_Ca4_CaNAB_Ca4_I1_p = 3;
  KM_CaM_Ca4_CaNAB_Ca4_I1_p = 4;
  kcat_CaM_Ca4_CaNAB_Ca4_PP1_I1_p = 1.4;
  KM_CaM_Ca4_CaNAB_Ca4_PP1_I1_p = 5;
  kcat_CaM_Ca4_CaNAB_Ca4_CK1p = 6;
  KM_CaM_Ca4_CaNAB_Ca4_CK1p = 2;
  kcat_tot_CaM_CAMKII_CaMKII_CaM = 0.5;
  KM_tot_CaM_CAMKII_CaMKII_CaM = 113.6;
  kcat_tot_CaM_CAMKII_CaMKII_Thr286 = 6;
  KM_tot_CaM_CAMKII_CaMKII_Thr286 = 113.6;
  kcat_tot_autonomous_CaMKII_CaMKII_CaM = 0.5;
  KM_tot_autonomous_CaMKII_CaMKII_CaM = 175;
  kcat_tot_autonomous_CaMKII_CaMKII_Thr286 = 6;
  KM_tot_autonomous_CaMKII_CaMKII_Thr286 = 175;
  kcat_CaMKII_act_GluR_845p = 1;
  KM_CaMKII_act_GluR_845p = 150;
  kcat_CaMKII_act_GluR_I_845p = 1;
  KM_CaMKII_act_GluR_I_845p = 150;
  kcat_CK1p_D = 3;
  KM_CK1p_D = 3.4;
  kcat_CK1p_D34 = 3;
  KM_CK1p_D34 = 3.4;
  kcat_CK1p_D75 = 3;
  KM_CK1p_D75 = 3.4;
  kcat_CK1p_D34_75 = 3;
  KM_CK1p_D34_75 = 3.4;
  kcat_CK1p_CDK5 = 4;
  KM_CK1p_CDK5 = 0.6;
  kcat_CDK5p_D = 3;
  KM_CDK5p_D = 4;
  kcat_CDK5p_D34 = 3;
  KM_CDK5p_D34 = 4;
  kcat_CDK5p_D137 = 3;
  KM_CDK5p_D137 = 4;
  kcat_CDK5p_D34_137 = 3;
  KM_CDK5p_D34_137 = 4;
  kcat_PP2C_D137 = 1;
  KM_PP2C_D137 = 3;
  kcat_PP2C_D34_137 = 1;
  KM_PP2C_D34_137 = 3;
  kcat_PP2C_D75_137 = 1;
  KM_PP2C_D75_137 = 3;
  kcat_PP2C_D34_75_137 = 1;
  KM_PP2C_D34_75_137 = 3;
  kf_D1R__DA = 1.11;
  kb_D1R__DA = 10;
  kf_D1R_Gs__DA = 3.33;
  kb_D1R_Gs__DA = 10;
  kf_D1R__Gs_GDP = 0.06;
  kb_D1R__Gs_GDP = 0.0003;
  kf_D1R_DA__Gs_GDP = 0.6;
  kb_D1R_DA__Gs_GDP = 0.001;
  kf_D1R_DA_Gs = 20;
  kb_D1R_DA_Gs = 0;
  kf_Gs_GTP = 10;
  kb_Gs_GTP = 0;
  kf_Gsa_GDP__bc = 100;
  kb_Gsa_GDP__bc = 0;
  kf_AC__Ca = 1;
  kb_AC__Ca = 0.9;
  kf_AC__Gsa_GTP = 38.5;
  kb_AC__Gsa_GTP = 50;
  kf_AC_Ca__Gsa_GTP = 19.2;
  kb_AC_Ca__Gsa_GTP = 25;
  kf_AC_Gsa__ATP = 0.128;
  kb_AC_Gsa__ATP = 0.261;
  kf_ACGsa_Ca__ATP = 0.06;
  kb_ACGsa_Ca__ATP = 0.131;
  kf_AC_Gsa_ATP = 28.46;
  kb_AC_Gsa_ATP = 0.259;
  kf_ACGsa_Ca_ATP = 14.23;
  kb_ACGsa_Ca_ATP = 0.13;
  kf_PDE1__CaM = 0.1;
  kb_PDE1__CaM = 1;
  kf_PDE2_p = 0.1;
  kb_PDE2_p = 0;
  kf_R2C2__cAMP = 0.035;
  kb_R2C2__cAMP = 0.06;
  kf_R2C2_cAMP2__cAMP = 0.27;
  kb_R2C2_cAMP2__cAMP = 0.28;
  kf_R2C2_cAMP4 = 0.05;
  kb_R2C2_cAMP4 = 0.085;
  kf_PKA_act__D75 = 4.6;
  kb_PKA_act__D75 = 2.4;
  kf_PKA_act__D75_137 = 4.6;
  kb_PKA_act__D75_137 = 2.4;
  kf_PP1_I1 = 1;
  kb_PP1_I1 = 0;
  kf_PP1_act__I1_p = 150;
  kb_PP1_act__I1_p = 0.1;
  kf_PP1_act__D34 = 100;
  kb_PP1_act__D34 = 0.2;
  kf_PP1_act__D34_75 = 100;
  kb_PP1_act__D34_75 = 0.2;
  kf_PP1_act__D34_137 = 100;
  kb_PP1_act__D34_137 = 0.2;
  kf_PP1_act__D34_75_137 = 100;
  kb_PP1_act__D34_75_137 = 0.2;
  kf_PP1_D = 10;
  kb_PP1_D = 0;
  kf_PP1_D75 = 10;
  kb_PP1_D75 = 0;
  kf_PP1_D137 = 10;
  kb_PP1_D137 = 0;
  kf_PP1_D75_137 = 10;
  kb_PP1_D75_137 = 0;
  kf_PP2A_B1__Ca = 0.082;
  kb_PP2A_B1__Ca = 2;
  kf_PP2A_B2p = 8.3;
  kb_PP2A_B2p = 0;
  kf_PP2A__PP2A_B2p = 7.4;
  kb_PP2A__PP2A_B2p = 6.8;
  kf_PP2A__PP2A_B1_2Ca = 1;
  kb_PP2A__PP2A_B1_2Ca = 0.12;
  kf_Ca__CaNAB = 10008;
  kb_Ca__CaNAB = 1;
  kf_Ca__CaNAB_Ca2 = 3.6;
  kb_Ca__CaNAB_Ca2 = 1;
  kf_CaM_Ca2__CaNAB_Ca4 = 0.24;
  kb_CaM_Ca2__CaNAB_Ca4 = 1;
  kf_CaM_Ca3__CaNAB_Ca4 = 22.38;
  kb_CaM_Ca3__CaNAB_Ca4 = 1;
  kf_CaM_Ca4__CaNAB_Ca4 = 600;
  kb_CaM_Ca4__CaNAB_Ca4 = 1;
  kf_CaMKII = 0.003;
  kb_CaMKII = 0;
  kf_CaMKII__CaM = 50;
  kb_CaMKII__CaM = 5;
  kf_CaMKII_Thr286__CaM = 1000;
  kb_CaMKII_Thr286__CaM = 0.1;
  kf_CaM__Ca = 72;
  kb_CaM__Ca = 72;
  kf_CaM_Ca2__Ca = 3.6;
  kb_CaM_Ca2__Ca = 10;
  kf_CaM_Ca3__Ca = 0.465;
  kb_CaM_Ca3__Ca = 10;
  kf_GluR = 0.0008;
  kb_GluR = 0;
  kf_IR__Anchor = 0.018;
  kb_IR__Anchor = 1;
  kf_GluR_I = 1;
  kb_GluR_I = 0.018;
  kf_GluR_I_845p = 2e-5;
  kb_GluR_I_845p = 0;
  kf_GluR_I_831p_845p = 2e-5;
  kb_GluR_I_831p_845p = 0;
  kf_CK1 = 1.54;
  kb_CK1 = 0;
  kf_CDK5p = 0.9;
  kb_CDK5p = 0;
  tau_Ca = 0.1;
  Ca_basal = 0.06;
  Ca_stim = 5;
  tau_DA = 0.1;
  DA_basal = 0.01;
  DA_stim = 1;

  // Assignment rules:
  tot_CaM_CaMKII := 0.02;
  tot_autonomous_CaMKII := 0.34;
  CaMKII_act := 0.36;

  // Reactions:
  PKA_act_I1_formation: PKA_act + I1 -> PKA_act_I1; spine*(kf_enz(kcat_PKA_act_I1, KM_PKA_act_I1)*PKA_act*I1 - kb_enz(kcat_PKA_act_I1)*PKA_act_I1);
  PKA_act_I1_p_release: PKA_act_I1 => PKA_act + I1_p; spine*kcat_PKA_act_I1*PKA_act_I1;
  PKA_act_PP2A_formation: PKA_act + PP2A -> PKA_act_PP2A; spine*(kf_enz(kcat_PKA_act_PP2A, KM_PKA_act_PP2A)*PKA_act*PP2A - kb_enz(kcat_PKA_act_PP2A)*PKA_act_PP2A);
  PKA_act_PP2A_p_release: PKA_act_PP2A => PKA_act + PP2A_p; spine*kcat_PKA_act_PP2A*PKA_act_PP2A;
  PKA_act_D_formation: PKA_act + D -> PKA_act_D; spine*(kf_enz(kcat_PKA_act_D, KM_PKA_act_D)*PKA_act*D - kb_enz(kcat_PKA_act_D)*PKA_act_D);
  PKA_act_D34_release: PKA_act_D => PKA_act + D34; spine*kcat_PKA_act_D*PKA_act_D;
  PKA_act_D137_formation: PKA_act + D137 -> PKA_act_D137; spine*(kf_enz(kcat_PKA_act_D137, KM_PKA_act_D137)*PKA_act*D137 - kb_enz(kcat_PKA_act_D137)*PKA_act_D137);
  PKA_act_D34_137_release: PKA_act_D137 => PKA_act + D34_137; spine*kcat_PKA_act_D137*PKA_act_D137;
  PKA_act_GluR_formation: PKA_act + GluR -> PKA_act_GluR; spine*(kf_enz(kcat_PKA_act_GluR, KM_PKA_act_GluR)*PKA_act*GluR - kb_enz(kcat_PKA_act_GluR)*PKA_act_GluR);
  PKA_act_GluR_845p_release: PKA_act_GluR => PKA_act + GluR_845p; spine*kcat_PKA_act_GluR*PKA_act_GluR;
  PKA_act_GluR_I_formation: PKA_act + GluR_I -> PKA_act_GluR_I; spine*(kf_enz(kcat_PKA_act_GluR_I, KM_PKA_act_GluR_I)*PKA_act*GluR_I - kb_enz(kcat_PKA_act_GluR_I)*PKA_act_GluR_I);
  PKA_act_GluR_I_845p_release: PKA_act_GluR_I => PKA_act + GluR_I_845p; spine*kcat_PKA_act_GluR_I*PKA_act_GluR_I;
  PKA_act_PDE_formation: PKA_act + PDE2 -> PKA_act_PDE2; spine*(kf_enz(kcat_PKA_act_PDE2, KM_PKA_act_PDE2)*PKA_act*PDE2 - kb_enz(kcat_PKA_act_PDE2)*PKA_act_PDE2);
  PKA_act_PDE2_p_release: PKA_act_PDE2 => PKA_act + PDE2_p; spine*kcat_PKA_act_PDE2*PKA_act_PDE2;
  PDE1_cAMP_formation: PDE1 + cAMP -> PDE1_cAMP; spine*(kf_enz(kcat_PDE1_cAMP, KM_PDE1_cAMP)*PDE1*cAMP - kb_enz(kcat_PDE1_cAMP)*PDE1_cAMP);
  PDE1_AMP_release: PDE1_cAMP => PDE1 + cAMP; spine*kcat_PDE1_cAMP*PDE1_cAMP;
  PDE1_CaM_cAMP_formation: PDE1_CaM + cAMP -> PDE1_CaM_cAMP; spine*(kf_enz(kcat_PDE1_CaM_cAMP, KM_PDE1_CaM_cAMP)*PDE1_CaM*cAMP - kb_enz(kcat_PDE1_CaM_cAMP)*PDE1_CaM_cAMP);
  PDE1_CaM_AMP_release: PDE1_CaM_cAMP => PDE1_CaM + cAMP; spine*kcat_PDE1_CaM_cAMP*PDE1_CaM_cAMP;
  PDE2_cAMP_formation: PDE2 + cAMP -> PDE2_cAMP; spine*(kf_enz(kcat_PDE2_cAMP, KM_PDE2_cAMP)*PDE2*cAMP - kb_enz(kcat_PDE2_cAMP)*PDE2_cAMP);
  PDE2_AMP_release: PDE2_cAMP => PDE2 + cAMP; spine*kcat_PDE2_cAMP*PDE2_cAMP;
  PDE2_p_cAMP_formation: PDE2_p + cAMP -> PDE2_p_cAMP; spine*(kf_enz(kcat_PDE2_p_cAMP, KM_PDE2_p_cAMP)*PDE2_p*cAMP - kb_enz(kcat_PDE2_p_cAMP)*PDE2_p_cAMP);
  PDE2_p_AMP_release: PDE2_p_cAMP => PDE2_p + cAMP; spine*kcat_PDE2_p_cAMP*PDE2_p_cAMP;
  PP1_act_CaMKII_Thr286p_CaM_formation: PP1_act + CaMKII_Thr286p_CaM -> PP1_act_CaMKII_Thr286p_CaM; spine*(kf_enz(kcat_PP1_act_CaMKII_Thr286p_CaM, KM_PP1_act_CaMKII_Thr286p_CaM)*PP1_act*CaMKII_Thr286p_CaM - kb_enz(kcat_PP1_act_CaMKII_Thr286p_CaM)*PP1_act_CaMKII_Thr286p_CaM);
  PP1_act_CaMKII_CaM_release: PP1_act_CaMKII_Thr286p_CaM => PP1_act + CaMKII_CaM; spine*kcat_PP1_act_CaMKII_Thr286p_CaM*PP1_act_CaMKII_Thr286p_CaM;
  PP1_act_CaMKII_Thr286_formation: PP1_act + CaMKII_Thr286 -> PP1_act_CaMKII_Thr286; spine*(kf_enz(kcat_PP1_act_CaMKII_Thr286, KM_PP1_act_CaMKII_Thr286)*PP1_act*CaMKII_Thr286 - kb_enz(kcat_PP1_act_CaMKII_Thr286)*PP1_act_CaMKII_Thr286);
  PP1_act_CaMKII_release: PP1_act_CaMKII_Thr286 => PP1_act + CaMKII; spine*kcat_PP1_act_CaMKII_Thr286*PP1_act_CaMKII_Thr286;
  PP1_act_CaMKII_Thr286_305_formation: PP1_act + CaMKII_Thr286_305 -> PP1_act_CaMKII_Thr286_305; spine*(kf_enz(kcat_PP1_act_CaMKII_Thr286_305, KM_PP1_act_CaMKII_Thr286_305)*PP1_act*CaMKII_Thr286_305 - kb_enz(kcat_PP1_act_CaMKII_Thr286_305)*PP1_act_CaMKII_Thr286_305);
  PP1_act_CaMKII_Thr286_release: PP1_act_CaMKII_Thr286_305 => PP1_act + CaMKII_Thr286; spine*kcat_PP1_act_CaMKII_Thr286_305*PP1_act_CaMKII_Thr286_305;
  PP1_act_CaMKII_Thr306_formation: PP1_act + CaMKII_Thr306 -> PP1_act_CaMKII_Thr306; spine*(kf_enz(kcat_PP1_act_CaMKII_Thr306, KM_PP1_act_CaMKII_Thr306)*PP1_act*CaMKII_Thr306 - kb_enz(kcat_PP1_act_CaMKII_Thr306)*PP1_act_CaMKII_Thr306);
  PP1_act_GluR_831p_845p_formation: PP1_act + GluR_831p_845p -> PP1_act_GluR_831p_845p; spine*(kf_enz(kcat_PP1_act_GluR_831p_845p, KM_PP1_act_GluR_831p_845p)*PP1_act*GluR_831p_845p - kb_enz(kcat_PP1_act_GluR_831p_845p)*PP1_act_GluR_831p_845p);
  PP1_act_GluR_845p_release: PP1_act_GluR_831p_845p => PP1_act + GluR_845p; spine*kcat_PP1_act_GluR_831p_845p*PP1_act_GluR_831p_845p;
  PP1_act_GluR_845p_formation: PP1_act + GluR_845p -> PP1_act_GluR_845p; spine*(kf_enz(kcat_PP1_act_GluR_845p, KM_PP1_act_GluR_845p)*PP1_act*GluR_845p - kb_enz(kcat_PP1_act_GluR_845p)*PP1_act_GluR_845p);
  PP1_act_GluR_release: PP1_act_GluR_845p => PP1_act + GluR; spine*kcat_PP1_act_GluR_845p*PP1_act_GluR_845p;
  PP1_act_GluR_I_831p_845p_formation: PP1_act + GluR_I_831p_845p -> PP1_act_GluR_I_831p_845p; spine*(kf_enz(kcat_PP1_act_GluR_I_831p_845p, KM_PP1_act_GluR_I_831p_845p)*PP1_act*GluR_I_831p_845p - kb_enz(kcat_PP1_act_GluR_I_831p_845p)*PP1_act_GluR_I_831p_845p);
  PP1_act_GluR_I_845p_formation: PP1_act + GluR_I_845p -> PP1_act_GluR_I_845p; spine*(kf_enz(kcat_PP1_act_GluR_I_845p, KM_PP1_act_GluR_I_845p)*PP1_act*GluR_I_845p - kb_enz(kcat_PP1_act_GluR_I_845p)*PP1_act_GluR_I_845p);
  PP1_act_GluR_I_release: PP1_act_GluR_I_845p => PP1_act + GluR_I; spine*kcat_PP1_act_GluR_I_845p*PP1_act_GluR_I_845p;
  PP2A_PKA_D75_formation: PP2A_PKA + D75 -> PP2A_PKA_D75; spine*(kf_enz(kcat_PP2A_PKA_D75, KM_PP2A_PKA_D75)*PP2A_PKA*D75 - kb_enz(kcat_PP2A_PKA_D75)*PP2A_PKA_D75);
  PP2A_PKA_D_release: PP2A_PKA_D75 => PP2A_PKA + D; spine*kcat_PP2A_PKA_D75*PP2A_PKA_D75;
  PP2A_PKA_D34_75_formation: PP2A_PKA + D34_75 -> PP2A_PKA_D34_75; spine*(kf_enz(kcat_PP2A_PKA_D34_75, KM_PP2A_PKA_D34_75)*PP2A_PKA*D34_75 - kb_enz(kcat_PP2A_PKA_D34_75)*PP2A_PKA_D34_75);
  PP2A_PKA_D34_release: PP2A_PKA_D34_75 => PP2A_PKA + D34; spine*kcat_PP2A_PKA_D34_75*PP2A_PKA_D34_75;
  PP2A_PKA_D75_137_formation: PP2A_PKA + D75_137 -> PP2A_PKA_D75_137; spine*(kf_enz(kcat_PP2A_PKA_D75_137, KM_PP2A_PKA_D75_137)*PP2A_PKA*D75_137 - kb_enz(kcat_PP2A_PKA_D75_137)*PP2A_PKA_D75_137);
  PP2A_PKA_D137_release: PP2A_PKA_D75_137 => PP2A_PKA + D137; spine*kcat_PP2A_PKA_D75_137*PP2A_PKA_D75_137;
  PP2A_PKA_D34_75_137_formation: PP2A_PKA + D34_75_137 -> PP2A_PKA_D34_75_137; spine*(kf_enz(kcat_PP2A_PKA_D34_75_137, KM_PP2A_PKA_D34_75_137)*PP2A_PKA*D34_75_137 - kb_enz(kcat_PP2A_PKA_D34_75_137)*PP2A_PKA_D34_75_137);
  PP2A_PKA_D34_137_release: PP2A_PKA_D34_75_137 => PP2A_PKA + D34_137; spine*kcat_PP2A_PKA_D34_75_137*PP2A_PKA_D34_75_137;
  PP2A_PKA_GluR_831p_845p_formation: PP2A_PKA + GluR_831p_845p -> PP2A_PKA_GluR_831p_845p; spine*(kf_enz(kcat_PP2A_PKA_GluR_831p_845p, KM_PP2A_PKA_GluR_831p_845p)*PP2A_PKA*GluR_831p_845p - kb_enz(kcat_PP2A_PKA_GluR_831p_845p)*PP2A_PKA_GluR_831p_845p);
  PP2A_PKA_GluR_845p_release: PP2A_PKA_GluR_831p_845p => PP2A_PKA + GluR_845p; spine*kcat_PP2A_PKA_GluR_831p_845p*PP2A_PKA_GluR_831p_845p;
  PP2A_PKA_GluR_845p_formation: PP2A_PKA + GluR_845p -> PP2A_PKA_GluR_845p; spine*(kf_enz(kcat_PP2A_PKA_GluR_845p, KM_PP2A_PKA_GluR_845p)*PP2A_PKA*GluR_845p - kb_enz(kcat_PP2A_PKA_GluR_845p)*PP2A_PKA_GluR_845p);
  PP2A_PKA_GluR_release: PP2A_PKA_GluR_845p => PP2A_PKA + GluR; spine*kcat_PP2A_PKA_GluR_845p*PP2A_PKA_GluR_845p;
  PP2A_PKA_GluR_I_831p_845p_formation: PP2A_PKA + GluR_I_831p_845p -> PP2A_PKA_GluR_I_831p_845p; spine*(kf_enz(kcat_PP2A_PKA_GluR_I_831p_845p, KM_PP2A_PKA_GluR_I_831p_845p)*PP2A_PKA*GluR_I_831p_845p - kb_enz(kcat_PP2A_PKA_GluR_I_831p_845p)*PP2A_PKA_GluR_I_831p_845p);
  PP2A_PKA_GluR_I_845p_release: PP2A_PKA_GluR_I_831p_845p => PP2A_PKA + GluR_I_845p; spine*kcat_PP2A_PKA_GluR_I_831p_845p*PP2A_PKA_GluR_I_831p_845p;
  PP2A_PKA_GluR_I_845p_formation: PP2A_PKA + GluR_I_845p -> PP2A_PKA_GluR_I_845p; spine*(kf_enz(kcat_PP2A_PKA_GluR_I_845p, KM_PP2A_PKA_GluR_I_845p)*PP2A_PKA*GluR_I_845p - kb_enz(kcat_PP2A_PKA_GluR_I_845p)*PP2A_PKA_GluR_I_845p);
  PP2A_PKA_GluR_I_release: PP2A_PKA_GluR_I_845p => PP2A_PKA + GluR_I; spine*kcat_PP2A_PKA_GluR_I_845p*PP2A_PKA_GluR_I_845p;
  PP2A_Ca_D75_formation: PP2A_Ca + D75 -> PP2A_Ca_D75; spine*(kf_enz(kcat_PP2A_Ca_D75, KM_PP2A_Ca_D75)*PP2A_Ca*D75 - kb_enz(kcat_PP2A_Ca_D75)*PP2A_Ca_D75);
  PP2A_Ca_D_release: PP2A_Ca_D75 => PP2A_Ca + D; spine*kcat_PP2A_Ca_D75*PP2A_Ca_D75;
  PP2A_Ca_D34_75_formation: PP2A_Ca + D34_75 -> PP2A_Ca_D34_75; spine*(kf_enz(kcat_PP2A_Ca_D34_75, KM_PP2A_Ca_D34_75)*PP2A_Ca*D34_75 - kb_enz(kcat_PP2A_Ca_D34_75)*PP2A_Ca_D34_75);
  PP2A_Ca_D34_release: PP2A_Ca_D34_75 => PP2A_Ca + D34; spine*kcat_PP2A_Ca_D34_75*PP2A_Ca_D34_75;
  PP2A_Ca_D75_137_formation: PP2A_Ca + D75_137 -> PP2A_Ca_D75_137; spine*(kf_enz(kcat_PP2A_Ca_D75_137, KM_PP2A_Ca_D75_137)*PP2A_Ca*D75_137 - kb_enz(kcat_PP2A_Ca_D75_137)*PP2A_Ca_D75_137);
  PP2A_Ca_D137_release: PP2A_Ca_D75_137 => PP2A_Ca + D137; spine*kcat_PP2A_Ca_D75_137*PP2A_Ca_D75_137;
  PP2A_Ca_D34_75_137_formation: PP2A_Ca + D34_75_137 -> PP2A_Ca_D34_75_137; spine*(kf_enz(kcat_PP2A_Ca_D34_75_137, KM_PP2A_Ca_D34_75_137)*PP2A_Ca*D34_75_137 - kb_enz(kcat_PP2A_Ca_D34_75_137)*PP2A_Ca_D34_75_137);
  PP2A_Ca_D34_137_release: PP2A_Ca_D34_75_137 => PP2A_Ca + D34_137; spine*kcat_PP2A_Ca_D34_75_137*PP2A_Ca_D34_75_137;
  PP2A_Ca_GluR_831p_845p_formation: PP2A_Ca + GluR_831p_845p -> PP2A_Ca_GluR_831p_845p; spine*(kf_enz(kcat_PP2A_Ca_GluR_831p_845p, KM_PP2A_Ca_GluR_831p_845p)*PP2A_Ca*GluR_831p_845p - kb_enz(kcat_PP2A_Ca_GluR_831p_845p)*PP2A_Ca_GluR_831p_845p);
  PP2A_Ca_GluR_845p_release: PP2A_Ca_GluR_831p_845p => PP2A_Ca + GluR_845p; spine*kcat_PP2A_Ca_GluR_831p_845p*PP2A_Ca_GluR_831p_845p;
  PP2A_Ca_GluR_845p_formation: PP2A_Ca + GluR_845p -> PP2A_Ca_GluR_845p; spine*(kf_enz(kcat_PP2A_Ca_GluR_845p, KM_PP2A_Ca_GluR_845p)*PP2A_Ca*GluR_845p - kb_enz(kcat_PP2A_Ca_GluR_845p)*PP2A_Ca_GluR_845p);
  PP2A_Ca_GluR_release: PP2A_Ca_GluR_845p => PP2A_Ca + GluR; spine*kcat_PP2A_Ca_GluR_845p*PP2A_Ca_GluR_845p;
  PP2A_Ca_GluR_I_831p_845p_formation: PP2A_Ca + GluR_I_831p_845p -> PP2A_Ca_GluR_I_831p_845p; spine*(kf_enz(kcat_PP2A_Ca_GluR_I_831p_845p, KM_PP2A_Ca_GluR_I_831p_845p)*PP2A_Ca*GluR_I_831p_845p - kb_enz(kcat_PP2A_Ca_GluR_I_831p_845p)*PP2A_Ca_GluR_I_831p_845p);
  PP2A_Ca_GluR_I_845p_release: PP2A_Ca_GluR_I_831p_845p => PP2A_Ca + GluR_I_845p; spine*kcat_PP2A_Ca_GluR_I_831p_845p*PP2A_Ca_GluR_I_831p_845p;
  PP2A_Ca_GluR_I_845p_formation: PP2A_Ca + GluR_I_845p -> PP2A_Ca_GluR_I_845p; spine*(kf_enz(kcat_PP2A_Ca_GluR_I_845p, KM_PP2A_Ca_GluR_I_845p)*PP2A_Ca*GluR_I_845p - kb_enz(kcat_PP2A_Ca_GluR_I_845p)*PP2A_Ca_GluR_I_845p);
  PP2A_Ca_GluR_I_release: PP2A_Ca_GluR_I_845p => PP2A_Ca + GluR_I; spine*kcat_PP2A_Ca_GluR_I_845p*PP2A_Ca_GluR_I_845p;
  CaM_Ca2_CaNAB_Ca4_D34_formation: CaM_Ca2_CaNAB_Ca4 + D34 -> CaM_Ca2_CaNAB_Ca4_D34; spine*(kf_enz(kcat_CaM_Ca2_CaNAB_Ca4_D34, KM_CaM_Ca2_CaNAB_Ca4_D34)*CaM_Ca2_CaNAB_Ca4*D34 - kb_enz(kcat_CaM_Ca2_CaNAB_Ca4_D34)*CaM_Ca2_CaNAB_Ca4_D34);
  CaM_Ca2_CaNAB_Ca4_D_release: CaM_Ca2_CaNAB_Ca4_D34 => CaM_Ca2_CaNAB_Ca4 + D; spine*kcat_CaM_Ca2_CaNAB_Ca4_D34*CaM_Ca2_CaNAB_Ca4_D34;
  CaM_Ca2_CaNAB_Ca4_D34_75_formation: CaM_Ca2_CaNAB_Ca4 + D34_75 -> CaM_Ca2_CaNAB_Ca4_D34_75; spine*(kf_enz(kcat_CaM_Ca2_CaNAB_Ca4_D34_75, KM_CaM_Ca2_CaNAB_Ca4_D34_75)*CaM_Ca2_CaNAB_Ca4*D34_75 - kb_enz(kcat_CaM_Ca2_CaNAB_Ca4_D34_75)*CaM_Ca2_CaNAB_Ca4_D34_75);
  CaM_Ca2_CaNAB_Ca4_D75_release: CaM_Ca2_CaNAB_Ca4_D34_75 => CaM_Ca2_CaNAB_Ca4 + D75; spine*kcat_CaM_Ca2_CaNAB_Ca4_D34_75*CaM_Ca2_CaNAB_Ca4_D34_75;
  CaM_Ca2_CaNAB_Ca4_D34_137_formation: CaM_Ca2_CaNAB_Ca4 + D34_137 -> CaM_Ca2_CaNAB_Ca4_D34_137; spine*(kf_enz(kcat_CaM_Ca2_CaNAB_Ca4_D34_137, KM_CaM_Ca2_CaNAB_Ca4_D34_137)*CaM_Ca2_CaNAB_Ca4*D34_137 - kb_enz(kcat_CaM_Ca2_CaNAB_Ca4_D34_137)*CaM_Ca2_CaNAB_Ca4_D34_137);
  CaM_Ca2_CaNAB_Ca4_D137_release: CaM_Ca2_CaNAB_Ca4_D34_137 => CaM_Ca2_CaNAB_Ca4 + D137; spine*kcat_CaM_Ca2_CaNAB_Ca4_D34_137*CaM_Ca2_CaNAB_Ca4_D34_137;
  CaM_Ca2_CaNAB_Ca4_D34_75_137_formation: CaM_Ca2_CaNAB_Ca4 + D34_75_137 -> CaM_Ca2_CaNAB_Ca4_D34_75_137; spine*(kf_enz(kcat_CaM_Ca2_CaNAB_Ca4_D34_75_137, KM_CaM_Ca2_CaNAB_Ca4_D34_75_137)*CaM_Ca2_CaNAB_Ca4*D34_75_137 - kb_enz(kcat_CaM_Ca2_CaNAB_Ca4_D34_75_137)*CaM_Ca2_CaNAB_Ca4_D34_75_137);
  CaM_Ca2_CaNAB_Ca4_D75_137_release: CaM_Ca2_CaNAB_Ca4_D34_75_137 => CaM_Ca2_CaNAB_Ca4 + D75_137; spine*kcat_CaM_Ca2_CaNAB_Ca4_D34_75_137*CaM_Ca2_CaNAB_Ca4_D34_75_137;
  CaM_Ca2_CaNAB_Ca4_PP1_D34_formation: CaM_Ca2_CaNAB_Ca4 + PP1_D34 -> CaM_Ca2_CaNAB_Ca4_PP1_D34; spine*(kf_enz(kcat_CaM_Ca2_CaNAB_Ca4_PP1_D34, KM_CaM_Ca2_CaNAB_Ca4_PP1_D34)*CaM_Ca2_CaNAB_Ca4*PP1_D34 - kb_enz(kcat_CaM_Ca2_CaNAB_Ca4_PP1_D34)*CaM_Ca2_CaNAB_Ca4_PP1_D34);
  CaM_Ca2_CaNAB_Ca4_PP1_D_release: CaM_Ca2_CaNAB_Ca4_PP1_D34 => CaM_Ca2_CaNAB_Ca4 + PP1_D; spine*kcat_CaM_Ca2_CaNAB_Ca4_PP1_D34*CaM_Ca2_CaNAB_Ca4_PP1_D34;
  CaM_Ca2_CaNAB_Ca4_PP1_D34_75_formation: CaM_Ca2_CaNAB_Ca4 + PP1_D34_75 -> CaM_Ca2_CaNAB_Ca4_PP1_D34_75; spine*(kf_enz(kcat_CaM_Ca2_CaNAB_Ca4_PP1_D34_75, KM_CaM_Ca2_CaNAB_Ca4_PP1_D34_75)*CaM_Ca2_CaNAB_Ca4*PP1_D34_75 - kb_enz(kcat_CaM_Ca2_CaNAB_Ca4_PP1_D34_75)*CaM_Ca2_CaNAB_Ca4_PP1_D34_75);
  CaM_Ca2_CaNAB_Ca4_PP1_D75_release: CaM_Ca2_CaNAB_Ca4_PP1_D34_75 => CaM_Ca2_CaNAB_Ca4 + PP1_D75; spine*kcat_CaM_Ca2_CaNAB_Ca4_PP1_D34_75*CaM_Ca2_CaNAB_Ca4_PP1_D34_75;
  CaM_Ca2_CaNAB_Ca4_PP1_D34_137_formation: CaM_Ca2_CaNAB_Ca4 + PP1_D34_137 -> CaM_Ca2_CaNAB_Ca4_PP1_D34_137; spine*(kf_enz(kcat_CaM_Ca2_CaNAB_Ca4_PP1_D34_137, KM_CaM_Ca2_CaNAB_Ca4_PP1_D34_137)*CaM_Ca2_CaNAB_Ca4*PP1_D34_137 - kb_enz(kcat_CaM_Ca2_CaNAB_Ca4_PP1_D34_137)*CaM_Ca2_CaNAB_Ca4_PP1_D34_137);
  CaM_Ca2_CaNAB_Ca4_PP1_D137_release: CaM_Ca2_CaNAB_Ca4_PP1_D34_137 => CaM_Ca2_CaNAB_Ca4 + PP1_D137; spine*kcat_CaM_Ca2_CaNAB_Ca4_PP1_D34_137*CaM_Ca2_CaNAB_Ca4_PP1_D34_137;
  CaM_Ca2_CaNAB_Ca4_PP1_D34_75_137_formation: CaM_Ca2_CaNAB_Ca4 + PP1_D34_75_137 -> CaM_Ca2_CaNAB_Ca4_PP1_D34_75_137; spine*(kf_enz(kcat_CaM_Ca2_CaNAB_Ca4_PP1_D34_75_137, KM_CaM_Ca2_CaNAB_Ca4_PP1_D34_75_137)*CaM_Ca2_CaNAB_Ca4*PP1_D34_75_137 - kb_enz(kcat_CaM_Ca2_CaNAB_Ca4_PP1_D34_75_137)*CaM_Ca2_CaNAB_Ca4_PP1_D34_75_137);
  CaM_Ca2_CaNAB_Ca4_PP1_D75_137_release: CaM_Ca2_CaNAB_Ca4_PP1_D34_75_137 => CaM_Ca2_CaNAB_Ca4 + PP1_D75_137; spine*kcat_CaM_Ca2_CaNAB_Ca4_PP1_D34_75_137*CaM_Ca2_CaNAB_Ca4_PP1_D34_75_137;
  CaM_Ca2_CaNAB_Ca4_I1_p_formation: CaM_Ca2_CaNAB_Ca4 + I1_p -> CaM_Ca2_CaNAB_Ca4_I1_p; spine*(kf_enz(kcat_CaM_Ca2_CaNAB_Ca4_I1_p, KM_CaM_Ca2_CaNAB_Ca4_I1_p)*CaM_Ca2_CaNAB_Ca4*I1_p - kb_enz(kcat_CaM_Ca2_CaNAB_Ca4_I1_p)*CaM_Ca2_CaNAB_Ca4_I1_p);
  CaM_Ca2_CaNAB_Ca4_I1_release: CaM_Ca2_CaNAB_Ca4_I1_p => CaM_Ca2_CaNAB_Ca4 + I1; spine*kcat_CaM_Ca2_CaNAB_Ca4_I1_p*CaM_Ca2_CaNAB_Ca4_I1_p;
  CaM_Ca2_CaNAB_Ca4_PP1_I1_p_formation: CaM_Ca2_CaNAB_Ca4 + PP1_I1_p -> CaM_Ca2_CaNAB_Ca4_PP1_I1_p; spine*(kf_enz(kcat_CaM_Ca2_CaNAB_Ca4_PP1_I1_p, KM_CaM_Ca2_CaNAB_Ca4_PP1_I1_p)*CaM_Ca2_CaNAB_Ca4*PP1_I1_p - kb_enz(kcat_CaM_Ca2_CaNAB_Ca4_PP1_I1_p)*CaM_Ca2_CaNAB_Ca4_PP1_I1_p);
  CaM_Ca2_CaNAB_Ca4_PP1_I1_release: CaM_Ca2_CaNAB_Ca4_PP1_I1_p => CaM_Ca2_CaNAB_Ca4 + PP1_I1; spine*kcat_CaM_Ca2_CaNAB_Ca4_PP1_I1_p*CaM_Ca2_CaNAB_Ca4_PP1_I1_p;
  CaM_Ca2_CaNAB_Ca4_CK1p_formation: CaM_Ca2_CaNAB_Ca4 + CK1p -> CaM_Ca2_CaNAB_Ca4_CK1p; spine*(kf_enz(kcat_CaM_Ca2_CaNAB_Ca4_CK1p, KM_CaM_Ca2_CaNAB_Ca4_CK1p)*CaM_Ca2_CaNAB_Ca4*CK1p - kb_enz(kcat_CaM_Ca2_CaNAB_Ca4_CK1p)*CaM_Ca2_CaNAB_Ca4_CK1p);
  CaM_Ca2_CaNAB_Ca4_CK1_release: CaM_Ca2_CaNAB_Ca4_CK1p => CaM_Ca2_CaNAB_Ca4 + CK1; spine*kcat_CaM_Ca2_CaNAB_Ca4_CK1p*CaM_Ca2_CaNAB_Ca4_CK1p;
  CaM_Ca3_CaNAB_Ca4_D34_formation: CaM_Ca3_CaNAB_Ca4 + D34 -> CaM_Ca3_CaNAB_Ca4_D34; spine*(kf_enz(kcat_CaM_Ca3_CaNAB_Ca4_D34, KM_CaM_Ca3_CaNAB_Ca4_D34)*CaM_Ca3_CaNAB_Ca4*D34 - kb_enz(kcat_CaM_Ca3_CaNAB_Ca4_D34)*CaM_Ca3_CaNAB_Ca4_D34);
  CaM_Ca3_CaNAB_Ca4_D_release: CaM_Ca3_CaNAB_Ca4_D34 => CaM_Ca3_CaNAB_Ca4 + D; spine*kcat_CaM_Ca3_CaNAB_Ca4_D34*CaM_Ca3_CaNAB_Ca4_D34;
  CaM_Ca3_CaNAB_Ca4_D34_75_formation: CaM_Ca3_CaNAB_Ca4 + D34_75 -> CaM_Ca3_CaNAB_Ca4_D34_75; spine*(kf_enz(kcat_CaM_Ca3_CaNAB_Ca4_D34_75, KM_CaM_Ca3_CaNAB_Ca4_D34_75)*CaM_Ca3_CaNAB_Ca4*D34_75 - kb_enz(kcat_CaM_Ca3_CaNAB_Ca4_D34_75)*CaM_Ca3_CaNAB_Ca4_D34_75);
  CaM_Ca3_CaNAB_Ca4_D75_release: CaM_Ca3_CaNAB_Ca4_D34_75 => CaM_Ca3_CaNAB_Ca4 + D75; spine*kcat_CaM_Ca3_CaNAB_Ca4_D34_75*CaM_Ca3_CaNAB_Ca4_D34_75;
  CaM_Ca3_CaNAB_Ca4_D34_137_formation: CaM_Ca3_CaNAB_Ca4 + D34_137 -> CaM_Ca3_CaNAB_Ca4_D34_137; spine*(kf_enz(kcat_CaM_Ca3_CaNAB_Ca4_D34_137, KM_CaM_Ca3_CaNAB_Ca4_D34_137)*CaM_Ca3_CaNAB_Ca4*D34_137 - kb_enz(kcat_CaM_Ca3_CaNAB_Ca4_D34_137)*CaM_Ca3_CaNAB_Ca4_D34_137);
  CaM_Ca3_CaNAB_Ca4_D137_release: CaM_Ca3_CaNAB_Ca4_D34_137 => CaM_Ca3_CaNAB_Ca4 + D137; spine*kcat_CaM_Ca3_CaNAB_Ca4_D34_137*CaM_Ca3_CaNAB_Ca4_D34_137;
  CaM_Ca3_CaNAB_Ca4_D34_75_137_formation: CaM_Ca3_CaNAB_Ca4 + D34_75_137 -> CaM_Ca3_CaNAB_Ca4_D34_75_137; spine*(kf_enz(kcat_CaM_Ca3_CaNAB_Ca4_D34_75_137, KM_CaM_Ca3_CaNAB_Ca4_D34_75_137)*CaM_Ca3_CaNAB_Ca4*D34_75_137 - kb_enz(kcat_CaM_Ca3_CaNAB_Ca4_D34_75_137)*CaM_Ca3_CaNAB_Ca4_D34_75_137);
  CaM_Ca3_CaNAB_Ca4_D75_137_release: CaM_Ca3_CaNAB_Ca4_D34_75_137 => CaM_Ca3_CaNAB_Ca4 + D75_137; spine*kcat_CaM_Ca3_CaNAB_Ca4_D34_75_137*CaM_Ca3_CaNAB_Ca4_D34_75_137;
  CaM_Ca3_CaNAB_Ca4_PP1_D34_formation: CaM_Ca3_CaNAB_Ca4 + PP1_D34 -> CaM_Ca3_CaNAB_Ca4_PP1_D34; spine*(kf_enz(kcat_CaM_Ca3_CaNAB_Ca4_PP1_D34, KM_CaM_Ca3_CaNAB_Ca4_PP1_D34)*CaM_Ca3_CaNAB_Ca4*PP1_D34 - kb_enz(kcat_CaM_Ca3_CaNAB_Ca4_PP1_D34)*CaM_Ca3_CaNAB_Ca4_PP1_D34);
  CaM_Ca3_CaNAB_Ca4_PP1_D_release: CaM_Ca3_CaNAB_Ca4_PP1_D34 => CaM_Ca3_CaNAB_Ca4 + PP1_D; spine*kcat_CaM_Ca3_CaNAB_Ca4_PP1_D34*CaM_Ca3_CaNAB_Ca4_PP1_D34;
  CaM_Ca3_CaNAB_Ca4_PP1_D34_75_formation: CaM_Ca3_CaNAB_Ca4 + PP1_D34_75 -> CaM_Ca3_CaNAB_Ca4_PP1_D34_75; spine*(kf_enz(kcat_CaM_Ca3_CaNAB_Ca4_PP1_D34_75, KM_CaM_Ca3_CaNAB_Ca4_PP1_D34_75)*CaM_Ca3_CaNAB_Ca4*PP1_D34_75 - kb_enz(kcat_CaM_Ca3_CaNAB_Ca4_PP1_D34_75)*CaM_Ca3_CaNAB_Ca4_PP1_D34_75);
  CaM_Ca3_CaNAB_Ca4_PP1_D75_release: CaM_Ca3_CaNAB_Ca4_PP1_D34_75 => CaM_Ca3_CaNAB_Ca4 + PP1_D75; spine*kcat_CaM_Ca3_CaNAB_Ca4_PP1_D34_75*CaM_Ca3_CaNAB_Ca4_PP1_D34_75;
  CaM_Ca3_CaNAB_Ca4_PP1_D34_137_formation: CaM_Ca3_CaNAB_Ca4 + PP1_D34_137 -> CaM_Ca3_CaNAB_Ca4_PP1_D34_137; spine*(kf_enz(kcat_CaM_Ca3_CaNAB_Ca4_PP1_D34_137, KM_CaM_Ca3_CaNAB_Ca4_PP1_D34_137)*CaM_Ca3_CaNAB_Ca4*PP1_D34_137 - kb_enz(kcat_CaM_Ca3_CaNAB_Ca4_PP1_D34_137)*CaM_Ca3_CaNAB_Ca4_PP1_D34_137);
  CaM_Ca3_CaNAB_Ca4_PP1_D137_release: CaM_Ca3_CaNAB_Ca4_PP1_D34_137 => CaM_Ca3_CaNAB_Ca4 + PP1_D137; spine*kcat_CaM_Ca3_CaNAB_Ca4_PP1_D34_137*CaM_Ca3_CaNAB_Ca4_PP1_D34_137;
  CaM_Ca3_CaNAB_Ca4_PP1_D34_75_137_formation: CaM_Ca3_CaNAB_Ca4 + PP1_D34_75_137 -> CaM_Ca3_CaNAB_Ca4_PP1_D34_75_137; spine*(kf_enz(kcat_CaM_Ca3_CaNAB_Ca4_PP1_D34_75_137, KM_CaM_Ca3_CaNAB_Ca4_PP1_D34_75_137)*CaM_Ca3_CaNAB_Ca4*PP1_D34_75_137 - kb_enz(kcat_CaM_Ca3_CaNAB_Ca4_PP1_D34_75_137)*CaM_Ca3_CaNAB_Ca4_PP1_D34_75_137);
  CaM_Ca3_CaNAB_Ca4_PP1_D75_137_release: CaM_Ca3_CaNAB_Ca4_PP1_D34_75_137 => CaM_Ca3_CaNAB_Ca4 + PP1_D75_137; spine*kcat_CaM_Ca3_CaNAB_Ca4_PP1_D34_75_137*CaM_Ca3_CaNAB_Ca4_PP1_D34_75_137;
  CaM_Ca3_CaNAB_Ca4_I1_p_formation: CaM_Ca3_CaNAB_Ca4 + I1_p -> CaM_Ca3_CaNAB_Ca4_I1_p; spine*(kf_enz(kcat_CaM_Ca3_CaNAB_Ca4_I1_p, KM_CaM_Ca3_CaNAB_Ca4_I1_p)*CaM_Ca3_CaNAB_Ca4*I1_p - kb_enz(kcat_CaM_Ca3_CaNAB_Ca4_I1_p)*CaM_Ca3_CaNAB_Ca4_I1_p);
  CaM_Ca3_CaNAB_Ca4_I1_release: CaM_Ca3_CaNAB_Ca4_I1_p => CaM_Ca3_CaNAB_Ca4 + I1; spine*kcat_CaM_Ca3_CaNAB_Ca4_I1_p*CaM_Ca3_CaNAB_Ca4_I1_p;
  CaM_Ca3_CaNAB_Ca4_PP1_I1_p_formation: CaM_Ca3_CaNAB_Ca4 + PP1_I1_p -> CaM_Ca3_CaNAB_Ca4_PP1_I1_p; spine*(kf_enz(kcat_CaM_Ca3_CaNAB_Ca4_PP1_I1_p, KM_CaM_Ca3_CaNAB_Ca4_PP1_I1_p)*CaM_Ca3_CaNAB_Ca4*PP1_I1_p - kb_enz(kcat_CaM_Ca3_CaNAB_Ca4_PP1_I1_p)*CaM_Ca3_CaNAB_Ca4_PP1_I1_p);
  CaM_Ca3_CaNAB_Ca4_PP1_I1_release: CaM_Ca3_CaNAB_Ca4_PP1_I1_p => CaM_Ca3_CaNAB_Ca4 + PP1_I1; spine*kcat_CaM_Ca3_CaNAB_Ca4_PP1_I1_p*CaM_Ca3_CaNAB_Ca4_PP1_I1_p;
  CaM_Ca3_CaNAB_Ca4_CK1p_formation: CaM_Ca3_CaNAB_Ca4 + CK1p -> CaM_Ca3_CaNAB_Ca4_CK1p; spine*(kf_enz(kcat_CaM_Ca3_CaNAB_Ca4_CK1p, KM_CaM_Ca3_CaNAB_Ca4_CK1p)*CaM_Ca3_CaNAB_Ca4*CK1p - kb_enz(kcat_CaM_Ca3_CaNAB_Ca4_CK1p)*CaM_Ca3_CaNAB_Ca4_CK1p);
  CaM_Ca3_CaNAB_Ca4_CK1_release: CaM_Ca3_CaNAB_Ca4_CK1p => CaM_Ca3_CaNAB_Ca4 + CK1; spine*kcat_CaM_Ca3_CaNAB_Ca4_CK1p*CaM_Ca3_CaNAB_Ca4_CK1p;
  CaM_Ca4_CaNAB_Ca4_D34_formation: CaM_Ca4_CaNAB_Ca4 + D34 -> CaM_Ca4_CaNAB_Ca4_D34; spine*(kf_enz(kcat_CaM_Ca4_CaNAB_Ca4_D34, KM_CaM_Ca4_CaNAB_Ca4_D34)*CaM_Ca4_CaNAB_Ca4*D34 - kb_enz(kcat_CaM_Ca4_CaNAB_Ca4_D34)*CaM_Ca4_CaNAB_Ca4_D34);
  CaM_Ca4_CaNAB_Ca4_D_release: CaM_Ca4_CaNAB_Ca4_D34 => CaM_Ca4_CaNAB_Ca4 + D; spine*kcat_CaM_Ca4_CaNAB_Ca4_D34*CaM_Ca4_CaNAB_Ca4_D34;
  CaM_Ca4_CaNAB_Ca4_D34_75_formation: CaM_Ca4_CaNAB_Ca4 + D34_75 -> CaM_Ca4_CaNAB_Ca4_D34_75; spine*(kf_enz(kcat_CaM_Ca4_CaNAB_Ca4_D34_75, KM_CaM_Ca4_CaNAB_Ca4_D34_75)*CaM_Ca4_CaNAB_Ca4*D34_75 - kb_enz(kcat_CaM_Ca4_CaNAB_Ca4_D34_75)*CaM_Ca4_CaNAB_Ca4_D34_75);
  CaM_Ca4_CaNAB_Ca4_D75_release: CaM_Ca4_CaNAB_Ca4_D34_75 => CaM_Ca4_CaNAB_Ca4 + D75; spine*kcat_CaM_Ca4_CaNAB_Ca4_D34_75*CaM_Ca4_CaNAB_Ca4_D34_75;
  CaM_Ca4_CaNAB_Ca4_D34_137_formation: CaM_Ca4_CaNAB_Ca4 + D34_137 -> CaM_Ca4_CaNAB_Ca4_D34_137; spine*(kf_enz(kcat_CaM_Ca4_CaNAB_Ca4_D34_137, KM_CaM_Ca4_CaNAB_Ca4_D34_137)*CaM_Ca4_CaNAB_Ca4*D34_137 - kb_enz(kcat_CaM_Ca4_CaNAB_Ca4_D34_137)*CaM_Ca4_CaNAB_Ca4_D34_137);
  CaM_Ca4_CaNAB_Ca4_D137_release: CaM_Ca4_CaNAB_Ca4_D34_137 => CaM_Ca4_CaNAB_Ca4 + D137; spine*kcat_CaM_Ca4_CaNAB_Ca4_D34_137*CaM_Ca4_CaNAB_Ca4_D34_137;
  CaM_Ca4_CaNAB_Ca4_D34_75_137_formation: CaM_Ca4_CaNAB_Ca4 + D34_75_137 -> CaM_Ca4_CaNAB_Ca4_D34_75_137; spine*(kf_enz(kcat_CaM_Ca4_CaNAB_Ca4_D34_75_137, KM_CaM_Ca4_CaNAB_Ca4_D34_75_137)*CaM_Ca4_CaNAB_Ca4*D34_75_137 - kb_enz(kcat_CaM_Ca4_CaNAB_Ca4_D34_75_137)*CaM_Ca4_CaNAB_Ca4_D34_75_137);
  CaM_Ca4_CaNAB_Ca4_D75_137_release: CaM_Ca4_CaNAB_Ca4_D34_75_137 => CaM_Ca4_CaNAB_Ca4 + D75_137; spine*kcat_CaM_Ca4_CaNAB_Ca4_D34_75_137*CaM_Ca4_CaNAB_Ca4_D34_75_137;
  CaM_Ca4_CaNAB_Ca4_PP1_D34_formation: CaM_Ca4_CaNAB_Ca4 + PP1_D34 -> CaM_Ca4_CaNAB_Ca4_PP1_D34; spine*(kf_enz(kcat_CaM_Ca4_CaNAB_Ca4_PP1_D34, KM_CaM_Ca4_CaNAB_Ca4_PP1_D34)*CaM_Ca4_CaNAB_Ca4*PP1_D34 - kb_enz(kcat_CaM_Ca4_CaNAB_Ca4_PP1_D34)*CaM_Ca4_CaNAB_Ca4_PP1_D34);
  CaM_Ca4_CaNAB_Ca4_PP1_D_release: CaM_Ca4_CaNAB_Ca4_PP1_D34 => CaM_Ca4_CaNAB_Ca4 + PP1_D; spine*kcat_CaM_Ca4_CaNAB_Ca4_PP1_D34*CaM_Ca4_CaNAB_Ca4_PP1_D34;
  CaM_Ca4_CaNAB_Ca4_PP1_D34_75_formation: CaM_Ca4_CaNAB_Ca4 + PP1_D34_75 -> CaM_Ca4_CaNAB_Ca4_PP1_D34_75; spine*(kf_enz(kcat_CaM_Ca4_CaNAB_Ca4_PP1_D34_75, KM_CaM_Ca4_CaNAB_Ca4_PP1_D34_75)*CaM_Ca4_CaNAB_Ca4*PP1_D34_75 - kb_enz(kcat_CaM_Ca4_CaNAB_Ca4_PP1_D34_75)*CaM_Ca4_CaNAB_Ca4_PP1_D34_75);
  CaM_Ca4_CaNAB_Ca4_PP1_D75_release: CaM_Ca4_CaNAB_Ca4_PP1_D34_75 => CaM_Ca4_CaNAB_Ca4 + PP1_D75; spine*kcat_CaM_Ca4_CaNAB_Ca4_PP1_D34_75*CaM_Ca4_CaNAB_Ca4_PP1_D34_75;
  CaM_Ca4_CaNAB_Ca4_PP1_D34_137_formation: CaM_Ca4_CaNAB_Ca4 + PP1_D34_137 -> CaM_Ca4_CaNAB_Ca4_PP1_D34_137; spine*(kf_enz(kcat_CaM_Ca4_CaNAB_Ca4_PP1_D34_137, KM_CaM_Ca4_CaNAB_Ca4_PP1_D34_137)*CaM_Ca4_CaNAB_Ca4*PP1_D34_137 - kb_enz(kcat_CaM_Ca4_CaNAB_Ca4_PP1_D34_137)*CaM_Ca4_CaNAB_Ca4_PP1_D34_137);
  CaM_Ca4_CaNAB_Ca4_PP1_D137_release: CaM_Ca4_CaNAB_Ca4_PP1_D34_137 => CaM_Ca4_CaNAB_Ca4 + PP1_D137; spine*kcat_CaM_Ca4_CaNAB_Ca4_PP1_D34_137*CaM_Ca4_CaNAB_Ca4_PP1_D34_137;
  CaM_Ca4_CaNAB_Ca4_PP1_D34_75_137_formation: CaM_Ca4_CaNAB_Ca4 + PP1_D34_75_137 -> CaM_Ca4_CaNAB_Ca4_PP1_D34_75_137; spine*(kf_enz(kcat_CaM_Ca4_CaNAB_Ca4_PP1_D34_75_137, KM_CaM_Ca4_CaNAB_Ca4_PP1_D34_75_137)*CaM_Ca4_CaNAB_Ca4*PP1_D34_75_137 - kb_enz(kcat_CaM_Ca4_CaNAB_Ca4_PP1_D34_75_137)*CaM_Ca4_CaNAB_Ca4_PP1_D34_75_137);
  CaM_Ca4_CaNAB_Ca4_PP1_D75_137_release: CaM_Ca4_CaNAB_Ca4_PP1_D34_75_137 => CaM_Ca4_CaNAB_Ca4 + PP1_D75_137; spine*kcat_CaM_Ca4_CaNAB_Ca4_PP1_D34_75_137*CaM_Ca4_CaNAB_Ca4_PP1_D34_75_137;
  CaM_Ca4_CaNAB_Ca4_I1_p_formation: CaM_Ca4_CaNAB_Ca4 + I1_p -> CaM_Ca4_CaNAB_Ca4_I1_p; spine*(kf_enz(kcat_CaM_Ca4_CaNAB_Ca4_I1_p, KM_CaM_Ca4_CaNAB_Ca4_I1_p)*CaM_Ca4_CaNAB_Ca4*I1_p - kb_enz(kcat_CaM_Ca4_CaNAB_Ca4_I1_p)*CaM_Ca4_CaNAB_Ca4_I1_p);
  CaM_Ca4_CaNAB_Ca4_I1_release: CaM_Ca4_CaNAB_Ca4_I1_p => CaM_Ca4_CaNAB_Ca4 + I1; spine*kcat_CaM_Ca4_CaNAB_Ca4_I1_p*CaM_Ca4_CaNAB_Ca4_I1_p;
  CaM_Ca4_CaNAB_Ca4_PP1_I1_p_formation: CaM_Ca4_CaNAB_Ca4 + PP1_I1_p -> CaM_Ca4_CaNAB_Ca4_PP1_I1_p; spine*(kf_enz(kcat_CaM_Ca4_CaNAB_Ca4_PP1_I1_p, KM_CaM_Ca4_CaNAB_Ca4_PP1_I1_p)*CaM_Ca4_CaNAB_Ca4*PP1_I1_p - kb_enz(kcat_CaM_Ca4_CaNAB_Ca4_PP1_I1_p)*CaM_Ca4_CaNAB_Ca4_PP1_I1_p);
  CaM_Ca4_CaNAB_Ca4_PP1_I1_release: CaM_Ca4_CaNAB_Ca4_PP1_I1_p => CaM_Ca4_CaNAB_Ca4 + PP1_I1; spine*kcat_CaM_Ca4_CaNAB_Ca4_PP1_I1_p*CaM_Ca4_CaNAB_Ca4_PP1_I1_p;
  CaM_Ca4_CaNAB_Ca4_CK1p_formation: CaM_Ca4_CaNAB_Ca4 + CK1p -> CaM_Ca4_CaNAB_Ca4_CK1p; spine*(kf_enz(kcat_CaM_Ca4_CaNAB_Ca4_CK1p, KM_CaM_Ca4_CaNAB_Ca4_CK1p)*CaM_Ca4_CaNAB_Ca4*CK1p - kb_enz(kcat_CaM_Ca4_CaNAB_Ca4_CK1p)*CaM_Ca4_CaNAB_Ca4_CK1p);
  CaM_Ca4_CaNAB_Ca4_CK1_release: CaM_Ca4_CaNAB_Ca4_CK1p => CaM_Ca4_CaNAB_Ca4 + CK1; spine*kcat_CaM_Ca4_CaNAB_Ca4_CK1p*CaM_Ca4_CaNAB_Ca4_CK1p;
  tot_CaM_CAMKII_CaMKII_CaM_formation: tot_CaM_CAMKII + CaMKII_CaM -> tot_CaM_CAMKII_CaMKII_CaM; spine*(kf_enz(kcat_tot_CaM_CAMKII_CaMKII_CaM, KM_tot_CaM_CAMKII_CaMKII_CaM)*tot_CaM_CAMKII*CaMKII_CaM - kb_enz(kcat_tot_CaM_CAMKII_CaMKII_CaM)*tot_CaM_CAMKII_CaMKII_CaM);
  tot_CaM_CAMKII_CaMKII_Thr286p_CaM_release: tot_CaM_CAMKII_CaMKII_CaM => tot_CaM_CAMKII + CaMKII_Thr286p_CaM; spine*kcat_tot_CaM_CAMKII_CaMKII_CaM*tot_CaM_CAMKII_CaMKII_CaM;
  tot_CaM_CAMKII_CaMKII_Thr286_formation: tot_CaM_CAMKII + CaMKII_Thr286 -> tot_CaM_CAMKII_CaMKII_Thr286; spine*(kf_enz(kcat_tot_CaM_CAMKII_CaMKII_Thr286, KM_tot_CaM_CAMKII_CaMKII_Thr286)*tot_CaM_CAMKII*CaMKII_Thr286 - kb_enz(kcat_tot_CaM_CAMKII_CaMKII_Thr286)*tot_CaM_CAMKII_CaMKII_Thr286);
  tot_CaM_CAMKII_CaMKII_Thr286_305_release: tot_CaM_CAMKII_CaMKII_Thr286 => tot_CaM_CAMKII + CaMKII_Thr286_305; spine*kcat_tot_CaM_CAMKII_CaMKII_Thr286*tot_CaM_CAMKII_CaMKII_Thr286;
  tot_autonomous_CaMKII_CaMKII_CaM_formation: $tot_autonomous_CaMKII + CaMKII_CaM -> tot_autonomous_CaMKII_CaMKII_CaM; spine*(kf_enz(kcat_tot_autonomous_CaMKII_CaMKII_CaM, KM_tot_autonomous_CaMKII_CaMKII_CaM)*tot_autonomous_CaMKII*CaMKII_CaM - kb_enz(kcat_tot_autonomous_CaMKII_CaMKII_CaM)*tot_autonomous_CaMKII_CaMKII_CaM);
  tot_autonomous_CaMKII_CaMKII_Thr286p_CaM_release: tot_autonomous_CaMKII_CaMKII_CaM => $tot_autonomous_CaMKII + CaMKII_Thr286p_CaM; spine*kcat_tot_autonomous_CaMKII_CaMKII_CaM*tot_autonomous_CaMKII_CaMKII_CaM;
  tot_autonomous_CaMKII_CaMKII_Thr286_formation: $tot_autonomous_CaMKII + CaMKII_Thr286 -> tot_autonomous_CaMKII_CaMKII_Thr286; spine*(kf_enz(kcat_tot_autonomous_CaMKII_CaMKII_Thr286, KM_tot_autonomous_CaMKII_CaMKII_Thr286)*tot_autonomous_CaMKII*CaMKII_Thr286 - kb_enz(kcat_tot_autonomous_CaMKII_CaMKII_Thr286)*tot_autonomous_CaMKII_CaMKII_Thr286);
  tot_autonomous_CaMKII_CaMKII_Thr286_305_release: tot_autonomous_CaMKII_CaMKII_Thr286 => $tot_autonomous_CaMKII + CaMKII_Thr286_305; spine*kcat_tot_autonomous_CaMKII_CaMKII_Thr286*tot_autonomous_CaMKII_CaMKII_Thr286;
  CaMKII_act_GluR_845p_formation: $CaMKII_act + GluR_845p -> CaMKII_act_GluR_845p; spine*(kf_enz(kcat_CaMKII_act_GluR_845p, KM_CaMKII_act_GluR_845p)*CaMKII_act*GluR_845p - kb_enz(kcat_CaMKII_act_GluR_845p)*CaMKII_act_GluR_845p);
  CaMKII_act_GluR_831p_845p_release: CaMKII_act_GluR_845p => $CaMKII_act + GluR_831p_845p; spine*kcat_CaMKII_act_GluR_845p*CaMKII_act_GluR_845p;
  CaMKII_act_GluR_I_845p_formation: $CaMKII_act + GluR_I_845p -> CaMKII_act_GluR_I_845p; spine*(kf_enz(kcat_CaMKII_act_GluR_I_845p, KM_CaMKII_act_GluR_I_845p)*CaMKII_act*GluR_I_845p - kb_enz(kcat_CaMKII_act_GluR_I_845p)*CaMKII_act_GluR_I_845p);
  CaMKII_act_GluR_I_831p_845p_release: CaMKII_act_GluR_I_845p => $CaMKII_act + GluR_I_831p_845p; spine*kcat_CaMKII_act_GluR_I_845p*CaMKII_act_GluR_I_845p;
  CK1p_D_formation: CK1p + D -> CK1p_D; spine*(kf_enz(kcat_CK1p_D, KM_CK1p_D)*CK1p*D - kb_enz(kcat_CK1p_D)*CK1p_D);
  CK1p_D137_release: CK1p_D => CK1p + D137; spine*kcat_CK1p_D*CK1p_D;
  CK1p_D34_formation: CK1p + D34 -> CK1p_D34; spine*(kf_enz(kcat_CK1p_D34, KM_CK1p_D34)*CK1p*D34 - kb_enz(kcat_CK1p_D34)*CK1p_D34);
  CK1p_D34_137_release: CK1p_D34 => CK1p + D34_137; spine*kcat_CK1p_D34*CK1p_D34;
  CK1p_D75_formation: CK1p + D75 -> CK1p_D75; spine*(kf_enz(kcat_CK1p_D75, KM_CK1p_D75)*CK1p*D75 - kb_enz(kcat_CK1p_D75)*CK1p_D75);
  CK1p_D75_137_release: CK1p_D75 => CK1p + D75_137; spine*kcat_CK1p_D75*CK1p_D75;
  CK1p_D34_75_formation: CK1p + D34_75 -> CK1p_D34_75; spine*(kf_enz(kcat_CK1p_D34_75, KM_CK1p_D34_75)*CK1p*D34_75 - kb_enz(kcat_CK1p_D34_75)*CK1p_D34_75);
  CK1p_D34_75_137_release: CK1p_D34_75 => CK1p + D34_75_137; spine*kcat_CK1p_D34_75*CK1p_D34_75;
  CK1p_CDK5_formation: CK1p + CDK5 -> CK1p_CDK5; spine*(kf_enz(kcat_CK1p_CDK5, KM_CK1p_CDK5)*CK1p*CDK5 - kb_enz(kcat_CK1p_CDK5)*CK1p_CDK5);
  CK1p_CDK5p_release: CK1p_CDK5 => CK1p + CDK5p; spine*kcat_CK1p_CDK5*CK1p_CDK5;
  CDK5p_D_formation: CDK5p + D -> CDK5p_D; spine*(kf_enz(kcat_CDK5p_D, KM_CDK5p_D)*CDK5p*D - kb_enz(kcat_CDK5p_D)*CDK5p_D);
  CDK5p_D75_release: CDK5p_D => CDK5p + D75; spine*kcat_CDK5p_D*CDK5p_D;
  CDK5p_D34_formation: CDK5p + D34 -> CDK5p_D34; spine*(kf_enz(kcat_CDK5p_D34, KM_CDK5p_D34)*CDK5p*D34 - kb_enz(kcat_CDK5p_D34)*CDK5p_D34);
  CDK5p_D34_75_release: CDK5p_D34 => CDK5p + D34_75; spine*kcat_CDK5p_D34*CDK5p_D34;
  CDK5p_D137_formation: CDK5p + D137 -> CDK5p_D137; spine*(kf_enz(kcat_CDK5p_D137, KM_CDK5p_D137)*CDK5p*D137 - kb_enz(kcat_CDK5p_D137)*CDK5p_D137);
  CDK5p_D75_137_release: CDK5p_D137 => CDK5p + D75_137; spine*kcat_CDK5p_D137*CDK5p_D137;
  CDK5p_D34_137_formation: CDK5p + D34_137 -> CDK5p_D34_137; spine*(kf_enz(kcat_CDK5p_D34_137, KM_CDK5p_D34_137)*CDK5p*D34_137 - kb_enz(kcat_CDK5p_D34_137)*CDK5p_D34_137);
  CDK5p_D34_75_137_release: CDK5p_D34_137 => CDK5p + D34_75_137; spine*kcat_CDK5p_D34_137*CDK5p_D34_137;
  PP2C_D137_formation: PP2C + D137 -> PP2C_D137; spine*(kf_enz(kcat_PP2C_D137, KM_PP2C_D137)*PP2C*D137 - kb_enz(kcat_PP2C_D137)*PP2C_D137);
  PP2C_D_release: PP2C_D137 => PP2C + D; spine*kcat_PP2C_D137*PP2C_D137;
  PP2C_D34_137_formation: PP2C + D34_137 -> PP2C_D34_137; spine*(kf_enz(kcat_PP2C_D34_137, KM_PP2C_D34_137)*PP2C*D34_137 - kb_enz(kcat_PP2C_D34_137)*PP2C_D34_137);
  PP2C_D34_release: PP2C_D34_137 => PP2C + D34; spine*kcat_PP2C_D34_137*PP2C_D34_137;
  PP2C_D75_137_formation: PP2C + D75_137 -> PP2C_D75_137; spine*(kf_enz(kcat_PP2C_D75_137, KM_PP2C_D75_137)*PP2C*D75_137 - kb_enz(kcat_PP2C_D75_137)*PP2C_D75_137);
  PP2C_D75_release: PP2C_D75_137 => PP2C + D75; spine*kcat_PP2C_D75_137*PP2C_D75_137;
  PP2C_D34_75_137_formation: PP2C + D34_75_137 -> PP2C_D34_75_137; spine*(kf_enz(kcat_PP2C_D34_75_137, KM_PP2C_D34_75_137)*PP2C*D34_75_137 - kb_enz(kcat_PP2C_D34_75_137)*PP2C_D34_75_137);
  PP2C_D34_75_release: PP2C_D34_75_137 => PP2C + D34_75; spine*kcat_PP2C_D34_75_137*PP2C_D34_75_137;
  bind_D1R__DA: D1R + $DA -> D1R_DA; spine*(kf_D1R__DA*D1R*DA - kb_D1R__DA*D1R_DA);
  bind_D1R_Gs__DA: D1R_Gs + $DA -> D1R_DA_Gs; spine*(kf_D1R_Gs__DA*D1R_Gs*DA - kb_D1R_Gs__DA*D1R_DA_Gs);
  bind_D1R__Gs_GDP: D1R + Gs_GDP -> D1R_Gs; spine*(kf_D1R__Gs_GDP*D1R*Gs_GDP - kb_D1R__Gs_GDP*D1R_Gs);
  bind_D1R_DA__Gs_GDP: D1R_DA + Gs_GDP -> D1R_DA_Gs; spine*(kf_D1R_DA__Gs_GDP*D1R_DA*Gs_GDP - kb_D1R_DA__Gs_GDP*D1R_DA_Gs);
  bind_D1R_DA_Gs: D1R_DA_Gs => D1R_DA + Gsa_GTP + bc; spine*(kf_D1R_DA_Gs*D1R_DA_Gs - kb_D1R_DA_Gs*D1R_DA*Gsa_GTP*bc);
  bind_Gs_GTP: Gs_GTP => Gs_GDP; spine*(kf_Gs_GTP*Gs_GTP - kb_Gs_GTP*Gs_GDP);
  bind_Gsa_GDP__bc: Gsa_GDP + bc => Gs_GDP; spine*(kf_Gsa_GDP__bc*Gsa_GDP*bc - kb_Gsa_GDP__bc*Gs_GDP);
  bind_AC__Ca: AC + $Ca -> AC_Ca; spine*(kf_AC__Ca*AC*Ca - kb_AC__Ca*AC_Ca);
  bind_AC__Gsa_GTP: AC + Gsa_GTP -> AC_Gsa; spine*(kf_AC__Gsa_GTP*AC*Gsa_GTP - kb_AC__Gsa_GTP*AC_Gsa);
  bind_AC_Ca__Gsa_GTP: AC_Ca + Gsa_GTP -> ACGsa_Ca; spine*(kf_AC_Ca__Gsa_GTP*AC_Ca*Gsa_GTP - kb_AC_Ca__Gsa_GTP*ACGsa_Ca);
  bind_AC_Gsa__ATP: AC_Gsa + $ATP -> AC_Gsa_ATP; spine*(kf_AC_Gsa__ATP*AC_Gsa*ATP - kb_AC_Gsa__ATP*AC_Gsa_ATP);
  bind_ACGsa_Ca__ATP: ACGsa_Ca + $ATP -> ACGsa_Ca_ATP; spine*(kf_ACGsa_Ca__ATP*ACGsa_Ca*ATP - kb_ACGsa_Ca__ATP*ACGsa_Ca_ATP);
  bind_AC_Gsa_ATP: AC_Gsa_ATP -> cAMP + AC_Gsa; spine*(kf_AC_Gsa_ATP*AC_Gsa_ATP - kb_AC_Gsa_ATP*cAMP*AC_Gsa);
  bind_ACGsa_Ca_ATP: ACGsa_Ca_ATP -> cAMP + ACGsa_Ca; spine*(kf_ACGsa_Ca_ATP*ACGsa_Ca_ATP - kb_ACGsa_Ca_ATP*cAMP*ACGsa_Ca);
  bind_PDE1__CaM: PDE1 + CaM -> PDE1_CaM; spine*(kf_PDE1__CaM*PDE1*CaM - kb_PDE1__CaM*PDE1_CaM);
  bind_PDE2_p: PDE2_p => PDE2; spine*(kf_PDE2_p*PDE2_p - kb_PDE2_p*PDE2);
  bind_R2C2__cAMP: R2C2 + 2 cAMP -> R2C2_cAMP2; spine*(kf_R2C2__cAMP*R2C2*cAMP^2 - kb_R2C2__cAMP*R2C2_cAMP2);
  bind_R2C2_cAMP2__cAMP: R2C2_cAMP2 + 2 cAMP -> R2C2_cAMP4; spine*(kf_R2C2_cAMP2__cAMP*R2C2_cAMP2*cAMP^2 - kb_R2C2_cAMP2__cAMP*R2C2_cAMP4);
  bind_R2C2_cAMP4: R2C2_cAMP4 -> 2 PKA_act + R2_cAMP4; spine*(kf_R2C2_cAMP4*R2C2_cAMP4 - kb_R2C2_cAMP4*PKA_act^2*R2_cAMP4);
  bind_PKA_act__D75: PKA_act + D75 -> PKA_D75; spine*(kf_PKA_act__D75*PKA_act*D75 - kb_PKA_act__D75*PKA_D75);
  bind_PKA_act__D75_137: PKA_act + D75_137 -> PKA_D75_137; spine*(kf_PKA_act__D75_137*PKA_act*D75_137 - kb_PKA_act__D75_137*PKA_D75_137);
  bind_PP1_I1: PP1_I1 => PP1_act + I1; spine*(kf_PP1_I1*PP1_I1 - kb_PP1_I1*PP1_act*I1);
  bind_PP1_act__I1_p: PP1_act + I1_p -> PP1_I1_p; spine*(kf_PP1_act__I1_p*PP1_act*I1_p - kb_PP1_act__I1_p*PP1_I1_p);
  bind_PP1_act__D34: PP1_act + D34 -> PP1_D34; spine*(kf_PP1_act__D34*PP1_act*D34 - kb_PP1_act__D34*PP1_D34);
  bind_PP1_act__D34_75: PP1_act + D34_75 -> PP1_D34_75; spine*(kf_PP1_act__D34_75*PP1_act*D34_75 - kb_PP1_act__D34_75*PP1_D34_75);
  bind_PP1_act__D34_137: PP1_act + D34_137 -> PP1_D34_137; spine*(kf_PP1_act__D34_137*PP1_act*D34_137 - kb_PP1_act__D34_137*PP1_D34_137);
  bind_PP1_act__D34_75_137: PP1_act + D34_75_137 -> PP1_D34_75_137; spine*(kf_PP1_act__D34_75_137*PP1_act*D34_75_137 - kb_PP1_act__D34_75_137*PP1_D34_75_137);
  bind_PP1_D: PP1_D => PP1_act + D; spine*(kf_PP1_D*PP1_D - kb_PP1_D*PP1_act*D);
  bind_PP1_D75: PP1_D75 => PP1_act + D75; spine*(kf_PP1_D75*PP1_D75 - kb_PP1_D75*PP1_act*D75);
  bind_PP1_D137: PP1_D137 => PP1_act + D137; spine*(kf_PP1_D137*PP1_D137 - kb_PP1_D137*PP1_act*D137);
  bind_PP1_D75_137: PP1_D75_137 => PP1_act + D75_137; spine*(kf_PP1_D75_137*PP1_D75_137 - kb_PP1_D75_137*PP1_act*D75_137);
  bind_PP2A_B1__Ca: PP2A_B1 + 2 $Ca -> PP2A_B1_2Ca; spine*(kf_PP2A_B1__Ca*PP2A_B1*Ca^2 - kb_PP2A_B1__Ca*PP2A_B1_2Ca);
  bind_PP2A_B2p: PP2A_B2p => PP2A_B2; spine*(kf_PP2A_B2p*PP2A_B2p - kb_PP2A_B2p*PP2A_B2);
  bind_PP2A__PP2A_B2p: PP2A + PP2A_B2p -> PP2A_PKA; spine*(kf_PP2A__PP2A_B2p*PP2A*PP2A_B2p - kb_PP2A__PP2A_B2p*PP2A_PKA);
  bind_PP2A__PP2A_B1_2Ca: PP2A + PP2A_B1_2Ca -> PP2A_Ca; spine*(kf_PP2A__PP2A_B1_2Ca*PP2A*PP2A_B1_2Ca - kb_PP2A__PP2A_B1_2Ca*PP2A_Ca);
  bind_Ca__CaNAB: $Ca + CaNAB -> CaNAB_Ca2; spine*(kf_Ca__CaNAB*Ca*CaNAB - kb_Ca__CaNAB*CaNAB_Ca2);
  bind_Ca__CaNAB_Ca2: $Ca + CaNAB_Ca2 -> CaNAB_Ca4; spine*(kf_Ca__CaNAB_Ca2*Ca*CaNAB_Ca2 - kb_Ca__CaNAB_Ca2*CaNAB_Ca4);
  bind_CaM_Ca2__CaNAB_Ca4: CaM_Ca2 + CaNAB_Ca4 -> CaM_Ca2_CaNAB_Ca4; spine*(kf_CaM_Ca2__CaNAB_Ca4*CaM_Ca2*CaNAB_Ca4 - kb_CaM_Ca2__CaNAB_Ca4*CaM_Ca2_CaNAB_Ca4);
  bind_CaM_Ca3__CaNAB_Ca4: CaM_Ca3 + CaNAB_Ca4 -> CaM_Ca3_CaNAB_Ca4; spine*(kf_CaM_Ca3__CaNAB_Ca4*CaM_Ca3*CaNAB_Ca4 - kb_CaM_Ca3__CaNAB_Ca4*CaM_Ca3_CaNAB_Ca4);
  bind_CaM_Ca4__CaNAB_Ca4: CaM_Ca4 + CaNAB_Ca4 -> CaM_Ca4_CaNAB_Ca4; spine*(kf_CaM_Ca4__CaNAB_Ca4*CaM_Ca4*CaNAB_Ca4 - kb_CaM_Ca4__CaNAB_Ca4*CaM_Ca4_CaNAB_Ca4);
  bind_CaMKII: CaMKII => CaMKII_Thr286; spine*(kf_CaMKII*CaMKII - kb_CaMKII*CaMKII_Thr286);
  bind_CaMKII__CaM: CaMKII + CaM -> CaMKII_CaM; spine*(kf_CaMKII__CaM*CaMKII*CaM - kb_CaMKII__CaM*CaMKII_CaM);
  bind_CaMKII_Thr286__CaM: CaMKII_Thr286 + CaM -> CaMKII_Thr286p_CaM; spine*(kf_CaMKII_Thr286__CaM*CaMKII_Thr286*CaM - kb_CaMKII_Thr286__CaM*CaMKII_Thr286p_CaM);
  bind_CaM__Ca: CaM + $Ca -> CaM_Ca2; spine*(kf_CaM__Ca*CaM*Ca - kb_CaM__Ca*CaM_Ca2);
  bind_CaM_Ca2__Ca: CaM_Ca2 + $Ca -> CaM_Ca3; spine*(kf_CaM_Ca2__Ca*CaM_Ca2*Ca - kb_CaM_Ca2__Ca*CaM_Ca3);
  bind_CaM_Ca3__Ca: CaM_Ca3 + $Ca -> CaM_Ca4; spine*(kf_CaM_Ca3__Ca*CaM_Ca3*Ca - kb_CaM_Ca3__Ca*CaM_Ca4);
  bind_GluR: GluR => IR + Anchor; spine*(kf_GluR*GluR - kb_GluR*IR*Anchor);
  bind_IR__Anchor: IR + Anchor -> GluR_831p_845p; spine*(kf_IR__Anchor*IR*Anchor - kb_IR__Anchor*GluR_831p_845p);
  bind_GluR_I: GluR_I -> $Bulk_AMPAR; spine*(kf_GluR_I*GluR_I - kb_GluR_I*Bulk_AMPAR);
  bind_GluR_I_845p: GluR_I_845p => $Bulk_AMPAR; spine*(kf_GluR_I_845p*GluR_I_845p - kb_GluR_I_845p*Bulk_AMPAR);
  bind_GluR_I_831p_845p: GluR_I_831p_845p => $Bulk_AMPAR; spine*(kf_GluR_I_831p_845p*GluR_I_831p_845p - kb_GluR_I_831p_845p*Bulk_AMPAR);
  bind_CK1: CK1 => CK1p; spine*(kf_CK1*CK1 - kb_CK1*CK1p);
  bind_CDK5p: CDK5p => CDK5; spine*(kf_CDK5p*CDK5p - kb_CDK5p*CDK5);

  // Unit definitions:
  unit substance = 1e-6 mole; substance is "uM";
end
