// SBML level 2 version 1

model DiVentura2011_Min_System_E_coli()
  // This is an SBML version with MesoRD annotations of the model described in:
  // Self-organized partitioning of dynamically localized proteins in bacterial cell division.
  // Barbara Di Ventura and Victor Sourjik. Molecular Systems Biology 7:457 Jan 2011 doi: 10.1038/msb.2010.111
  // Abstract:
  // How cells manage to get equal distribution of their structures and molecules at cell division is a crucial issue in biology. In principle, a feedback mechanism could always ensure equality by measuring and correcting the distribution in the progeny. However, an elegant alternative could be a mechanism relying on self-organization, with the interplay between system properties and cell geometry leading to the emergence of equal partitioning. The problem is exemplified by the bacterial Min system that defines the division site by oscillating from pole to pole. Unequal partitioning of Min proteins at division could negatively impact system performance and cell growth because of loss of Min oscillations and imprecise mid-cell determination. In this study, we combine live cell and computational analyses to show that known properties of the Min system together with the gradual reduction of protein exchange through the constricting septum are sufficient to explain the observed highly precise spontaneous protein partitioning. Our findings reveal a novel and effective mechanism of protein partitioning in dividing cells and emphasize the importance of self-organization in basic cellular processes.
  // This version of the model was downloaded from the MSB webpage ( http://www.nature.com/msb/journal/v7/n1/datafiles/msb2010111-df5a.xml ). It contains information necessary for simulation encoded in annotations specific to the tool MesoRD ( http://mesord.sourceforge.net/ ).
  // This model originates from BioModels Database: A Database of Annotated Published Models (http://www.ebi.ac.uk/biomodels/). It is copyright (c) 2005-2011 The BioModels.net Team.
  // To the extent possible under law, all copyright and related or neighbouring rights to this encoded model have been dedicated to the public domain worldwide. Please refer to CC0 Public Domain Dedication for more information.
  // In summary, you are entitled to use this encoded model in absolutely any manner you deem suitable, verbatim, or with modification, alone or embedded it in a larger context, redistribute it, commercially or not, in a restricted way or not..
  // To cite BioModels Database, please use: Li C, Donizelli M, Rodriguez N, Dharuri H, Endler L, Chelliah V, Li L, He E, Henry A, Stefan MI, Snoep JL, Hucka M, Le Novère N, Laibe C (2010) BioModels Database: An enhanced, curated and annotated resource for published quantitative kinetic models. BMC Syst Biol., 4:92.
  // biomodels.db:MODEL1101180000
  // isDescribedBy pubmed:21206490
  // biomodels.db:MODEL1101180000
  // isDescribedBy pubmed:21206490
  // biomodels.db:MODEL1101180000
  // biomodels.db:MODEL1101180000

  // Compartments:
  compartment septum_left; septum_left has litre;
  compartment septum_right; septum_right has litre;
  compartment cytosole; cytosole has litre;
  compartment membrane; membrane has litre;

  // Species:
  species D_ADP1 in cytosole = 8.18e-7; D_ADP1 is "D_ADP_II";  // substance in mole
  species D_ATP1 in cytosole = 8.18e-7; D_ATP1 is "D_ATP_II";  // substance in mole
  species E1 in cytosole = 4.25e-7; E1 is "E_II";  // substance in mole
  substanceOnly species D1 in cytosole = 0; D1 is "D_II";  // substance in item
  substanceOnly species DE1 in cytosole = 0; DE1 is "DE_II";  // substance in item
  species D_ADP2 in membrane = 8.18e-7; D_ADP2 is "D_ADP_II";  // substance in mole
  species D_ATP2 in membrane = 8.18e-7; D_ATP2 is "D_ATP_II";  // substance in mole
  species E2 in membrane = 4.25e-7; E2 is "E_II";  // substance in mole
  substanceOnly species D2 in membrane = 0; D2 is "D_II";  // substance in item
  substanceOnly species DE2 in membrane = 0; DE2 is "DE_II";  // substance in item
  species D_ADP3 in septum_left = 8.18e-7; D_ADP3 is "D_ADP_II";  // substance in mole
  species D_ATP3 in septum_left = 8.18e-7; D_ATP3 is "D_ATP_II";  // substance in mole
  species E3 in septum_left = 4.25e-7; E3 is "E_II";  // substance in mole
  substanceOnly species D3 in septum_left = 0; D3 is "D_II";  // substance in item
  substanceOnly species DE3 in septum_left = 0; DE3 is "DE_II";  // substance in item
  species D_ADP4 in septum_right = 8.18e-7; D_ADP4 is "D_ADP_II";  // substance in mole
  species D_ATP4 in septum_right = 8.18e-7; D_ATP4 is "D_ATP_II";  // substance in mole
  species E4 in septum_right = 4.25e-7; E4 is "E_II";  // substance in mole
  substanceOnly species D4 in septum_right = 0; D4 is "D_II";  // substance in item
  substanceOnly species DE4 in septum_right = 0; DE4 is "DE_II";  // substance in item

  // Parameters:
  sigma_d = 0.0125 umps;
  sigma_dD = 9000000 pMps;
  sigma_de = 0.7 ps;
  sigma_E = 55800000 pMps;
  sigma_D_ADP_ATP = 0.5 ps;

  // Reactions:
  Reaction1_1: D_ATP2 => D2; sigma_d/size_subVolume*D_ATP2;
  Reaction1_2: D_ATP3 => D3; sigma_d/size_subVolume*D_ATP3;
  Reaction1_3: D_ATP4 => D4; sigma_d/size_subVolume*D_ATP4;
  Reaction2_1: D_ATP2 => D2; sigma_dD*D2*D_ATP2;
  Reaction2_2: D_ATP3 => D3; sigma_dD*D3*D_ATP3;
  Reaction2_3: D_ATP4 => D4; sigma_dD*D4*D_ATP4;
  Reaction3_1: D2 + E2 => DE2; sigma_E*E2*D2;
  Reaction3_2: D3 + E3 => DE3; sigma_E*E3*D3;
  Reaction3_3: D4 + E4 => DE4; sigma_E*E4*D4;
  Reaction4_1: DE2 => D_ADP2 + E2; sigma_de*DE2;
  Reaction4_2: DE3 => D_ADP3 + E3; sigma_de*DE3;
  Reaction4_3: DE4 => D_ADP4 + E4; sigma_de*DE4;
  Reaction5_1: D_ADP1 => D_ATP1; sigma_D_ADP_ATP*D_ADP1;
  Reaction5_2: D_ADP2 => D_ATP2; sigma_D_ADP_ATP*D_ADP2;
  Reaction5_3: D_ADP3 => D_ATP3; sigma_D_ADP_ATP*D_ADP3;
  Reaction5_4: D_ADP4 => D_ATP4; sigma_D_ADP_ATP*D_ADP4;

  // Unit definitions:
  unit um = 1e-6 metre;
  unit pMps = litre / (mole * second);
  unit cm2ps = (0.01 metre)^2 / second;
  unit ps = 1 / second;
  unit umps = 1e-6 metre / second;
end
