// SBML level 2 version 4

model Wei2011_MLCactivationPathway_EndothelialPermeability()
  // This model is from the article:
  // An Integrated Mathematical Model of Thrombin-, Histamine-and VEGF-Mediated Signalling in Endothelial Permeability.
  // Wei X, Han B, Zhang J, Liu X, Tan C, Jiang Y, Low B, Tidor B, Chen Y. BMC Syst Biol. 2011 Jul 15;5:112. 21756365 ,
  // Abstract:
  // Endothelial permeability is involved in injury, inflammation, diabetes and cancer. It is partly regulated by the thrombin-, histamine-, and VEGF-mediated myosin-light-chain (MLC) activation pathways. While these pathways have been investigated, questions such as temporal effects and the dynamics of multi-mediator regulation remain to be fully studied. Mathematical modeling of these pathways facilitates such studies. Based on the published ordinary differential equation models of the pathway components, we developed an integrated model of thrombin-, histamine-, and VEGF-mediated MLC activation pathways. RESULTS: Our model was validated against experimental data for calcium release and thrombin-, histamine-, and VEGF-mediated MLC activation. The simulated effects of PAR-1, Rho GTPase, ROCK, VEGF and VEGFR2 over-expression on MLC activation, and the collective modulation by thrombin and histamine are consistent with experimental findings. Our model was used to predict enhanced MLC activation by CPI-17 over-expression and by synergistic action of thrombin and VEGF at low mediator levels. These may have impact in endothelial permeability and metastasis in cancer patients with blood coagulation. CONCLUSION: Our model was validated against a number of experimental findings and the observed synergistic effects of low concentrations of thrombin and histamine in mediating the activation of MLC. It can be used to predict the effects of altered pathway components, collective actions of multiple mediators and the potential impact to various diseases. Similar to the published models of other pathways, our model can potentially be used to identify important disease genes through sensitivity analysis of signalling components.
  // This model originates from BioModels Database: A Database of Annotated Published Models (http://www.ebi.ac.uk/biomodels/). It is copyright (c) 2005-2011 The BioModels.net Team.
  // To the extent possible under law, all copyright and related or neighbouring rights to this encoded model have been dedicated to the public domain worldwide. Please refer to CC0 Public Domain Dedication for more information.
  // In summary, you are entitled to use this encoded model in absolutely any manner you deem suitable, verbatim, or with modification, alone or embedded it in a larger context, redistribute it, commercially or not, in a restricted way or not..
  // To cite BioModels Database, please use: Li C, Donizelli M, Rodriguez N, Dharuri H, Endler L, Chelliah V, Li L, He E, Henry A, Stefan MI, Snoep JL, Hucka M, Le Novère N, Laibe C (2010) BioModels Database: An enhanced, curated and annotated resource for published quantitative kinetic models. BMC Syst Biol., 4:92.
  // biomodels.db:MODEL1102210000
  // isDescribedBy pubmed:21756365
  // biomodels.db:MODEL1102210000
  // isDescribedBy pubmed:21756365
  // biomodels.db:MODEL1102210000
  // biomodels.db:MODEL1102210000

  // Compartments:
  compartment Default = 1;
  compartment cytosoler_2_plus_endsuper_ext_leak = 1;
  compartment Defaulter_2_plus_endsuper_ext_leak = 1;
  compartment Default_leak = 1;
  compartment cytosol_leak = 1;
  compartment cytosol in Default = 1;
  compartment ER in cytosol = 0.1;

  // Species:
  species $thrombin in Default = 0;
  species $Ca2plus_1 in Default = 0;
  species Hisatamine in Default = 0;
  species Ca2plus_2 in cytosoler_2_plus_endsuper_ext_leak = 0;
  species Ca2plus_3 in cytosoler_2_plus_endsuper_ext_leak = 0;
  species Ca2plus_4 in Defaulter_2_plus_endsuper_ext_leak = 0;
  species Ca2plus_5 in Default_leak = 0;
  species Ca2plus_6 in cytosol_leak = 0;
  species thrombin_R in cytosol = 0;
  species pro_thrombinR in cytosol = 0.05;
  species thrombinR_active in cytosol = 0;
  species RGS in cytosol = 0.2;
  species Inositol in cytosol = 0;
  species degradation in cytosol = 0;
  species RGSGq_alpha_GTP in cytosol = 0; RGSGq_alpha_GTP is "RGS-Gq_alpha_GTP";
  species GTP in cytosol = 50;
  species Gq_alpha_GTP in cytosol = 0;
  species GDP in cytosol = 5;
  species IP3R in cytosol = 0.33;
  species IP3IP3R in cytosol = 0; IP3IP3R is "IP3-IP3R";
  species p115RhoGEF in cytosol = 0.25;
  species RhoGAP in cytosol = 0.15;
  species DAG in cytosol = 0;
  species IP3 in cytosol = 0;
  species RhoGTP in cytosol = 0; RhoGTP is "Rho-GTP";
  species PIP2 in cytosol = 10;
  species PC in cytosol = 0;
  species RhoGDP in cytosol = 0.1; RhoGDP is "Rho-GDP";
  species Ca2plus_CaM in cytosol = 0;
  species CaM2Ca2plus in cytosol = 0; CaM2Ca2plus is "CaM-2Ca2plus";
  species CaM3Ca2plus in cytosol = 0; CaM3Ca2plus is "CaM-3Ca2plus";
  species CaM4Ca2plus in cytosol = 0; CaM4Ca2plus is "CaM-4Ca2plus";
  species MLCK in cytosol = 0.69;
  species MLCK_Ca2plus_CaM in cytosol = 0;
  species MLCK_3Ca2plus_CaM in cytosol = 0;
  species MLCK_4Ca2plus_CaM in cytosol = 0;
  species PKC in cytosol = 0.2;
  species PKC_active_3 in cytosol = 0;
  species PKC_active_3CPI17 in cytosol = 0; PKC_active_3CPI17 is "PKC active_3-CPI-17";
  species CPI17MYPT1_PPase in cytosol = 0; CPI17MYPT1_PPase is "CPI-17-MYPT1_PPase";
  species pCPI17MYPT1_PPasep in cytosol = 0; pCPI17MYPT1_PPasep is "pCPI-17-MYPT1_PPasep";
  species CPI17 in cytosol = 0.08; CPI17 is "CPI-17";
  species MLC in cytosol = 4.2;
  species pMLC in cytosol = 0.6;
  species pCPI17 in cytosol = 0; pCPI17 is "pCPI-17";
  species Ca2plus in cytosol = 0.0083;
  species CaM in cytosol = 20;
  species G_beta_gamma_2 in cytosol = 0;
  species PLC_beta in cytosol = 0.57;
  species Ca2plus_trunsp in cytosol = 20;
  species Ca2plus_pump in cytosol = 0.08;
  species G12_alpha_GDP in cytosol = 0;
  species G12_alpha_GTP in cytosol = 0;
  species Gq_alpha_GDP in cytosol = 0;
  species PLC_beta_Gq_alpha_GTP in cytosol = 0;
  species Ca2plus_trunsp_2Ca2plus in cytosol = 0;
  species Ca2plus_pump_Ca2plus in cytosol = 0;
  species ppMLC in cytosol = 0.8;
  species MYPT1_PPasepMLC in cytosol = 0; MYPT1_PPasepMLC is "MYPT1_PPase-pMLC";
  species MYPT1_PPaseppMLC in cytosol = 0; MYPT1_PPaseppMLC is "MYPT1_PPase-ppMLC";
  species MLCKMLC in cytosol = 0; MLCKMLC is "MLCK-MLC";
  species MLCKpMLC in cytosol = 0; MLCKpMLC is "MLCK-pMLC";
  species MLCK_4Ca2plus_CaM_MLC in cytosol = 0;
  species MLCK_3Ca2plus_CaM_MLC in cytosol = 0;
  species MLCK_4Ca2plus_CaM_pMLC in cytosol = 0;
  species MLCK_3Ca2plus_CaM_pMLC in cytosol = 0;
  species MLCK_2Ca2plus_CaMMLC in cytosol = 0; MLCK_2Ca2plus_CaMMLC is "MLCK_2Ca2plus_CaM-MLC";
  species MLCK_2Ca2plus_CaM_pMLC in cytosol = 0;
  species MLCK_Ca2plus_CaM_MLC in cytosol = 0;
  species MLCK_Ca2plus_CaM_pMLC in cytosol = 0;
  species PLC_beta_Gq_alpha_GTP_Ca2plus in cytosol = 0;
  species PKCCa2plus_DAG in cytosol = 0; PKCCa2plus_DAG is "PKC-Ca2plus_DAG";
  species PKCCa2plus in cytosol = 0; PKCCa2plus is "PKC-Ca2plus";
  species PLC_beta_Ca2plus in cytosol = 0;
  species MYPT1_PPase in cytosol = 0.4;
  species pMYPT1_PPase in cytosol = 0.01;
  species thrombin_pro_thrombinR in cytosol = 0;
  species G12_alpha_beta_gamma_1_GDP in cytosol = 0.4;
  species G12_alpha_beta_gamma_1_GDPthrombinR_active in cytosol = 0; G12_alpha_beta_gamma_1_GDPthrombinR_active is "G12_alpha_beta_gamma_1_GDP-thrombinR active";
  species G_beta_gamma_1 in cytosol = 0;
  species Gq_alpha_beta_gamma_2_GDP in cytosol = 0.5;
  species Gq_alpha_beta_gamma_2_GDPthrombinR_active in cytosol = 0; Gq_alpha_beta_gamma_2_GDPthrombinR_active is "Gq_alpha_beta_gamma_2_GDP-thrombinR active";
  species p115RhoGEFG12_alpha_GTP in cytosol = 0; p115RhoGEFG12_alpha_GTP is "p115RhoGEF-G12_alpha_GTP";
  species p115RhoGEFG12_alpha_GTPRhoGDP in cytosol = 0; p115RhoGEFG12_alpha_GTPRhoGDP is "p115RhoGEF-G12_alpha_GTP-Rho-GDP";
  species RhoGTPRhoGAP in cytosol = 0; RhoGTPRhoGAP is "Rho-GTP-RhoGAP";
  species PLC_beta_Ca2plus_PIP2 in cytosol = 0;
  species PLC_beta_Gq_alpha_GTPCa2plus_PIP2 in cytosol = 0; PLC_beta_Gq_alpha_GTPCa2plus_PIP2 is "PLC_beta_Gq_alpha_GTP-Ca2plus_PIP2";
  species MLCK2Ca2plus_CaM in cytosol = 0; MLCK2Ca2plus_CaM is "MLCK-2Ca2plus_CaM";
  species pMYPT1_PPaseppMLC in cytosol = 0; pMYPT1_PPaseppMLC is "pMYPT1_PPase-ppMLC";
  species pMYPT1_PPasepMLC in cytosol = 0; pMYPT1_PPasepMLC is "pMYPT1_PPase-pMLC";
  species Ca2plus_extleak in cytosol = 4;
  species Ca2plus_IP3_IP3R in cytosol = 0;
  species Ca2plus_ext1 in cytosol = 0;
  species Ca2plus_intleak in cytosol = 0.8;
  species Ca2plus_int1 in cytosol = 0;
  species RhoGDI in cytosol = 0.05;
  species RhoGDPRhoGDI in cytosol = 0; RhoGDPRhoGDI is "Rho-GDP-RhoGDI";
  species pROCK in cytosol = 0;
  species ROCK in cytosol = 0.16;
  species RhoGTPROCK in cytosol = 0; RhoGTPROCK is "Rho-GTP-ROCK";
  species pROCKMLC in cytosol = 0; pROCKMLC is "pROCK-MLC";
  species pROCKpMLC in cytosol = 0; pROCKpMLC is "pROCK-pMLC";
  species RhoGTPROCKMLC in cytosol = 0; RhoGTPROCKMLC is "Rho-GTP-ROCK-MLC";
  species RhoGTPROCKpMLC in cytosol = 0; RhoGTPROCKpMLC is "Rho-GTP-ROCK-pMLC";
  species pROCKMYPT1_PPase in cytosol = 0; pROCKMYPT1_PPase is "pROCK-MYPT1_PPase";
  species RhoGTPROCKMYPT1_PPase in cytosol = 0; RhoGTPROCKMYPT1_PPase is "Rho-GTP-ROCK-MYPT1_PPase";
  species VEGF in cytosol = 0.02;
  species VEGFR2 in cytosol = 0.02;
  species VEGFVEGFR2 in cytosol = 0; VEGFVEGFR2 is "VEGF-VEGFR2";
  species VEGFVEGFR22 in cytosol = 0; VEGFVEGFR22 is "VEGF-VEGFR2-2";
  species VEGFpVEGFR22 in cytosol = 0; VEGFpVEGFR22 is "VEGF-pVEGFR2-2";
  species VEGFpVEGFR22Shc in cytosol = 0; VEGFpVEGFR22Shc is "VEGF-pVEGFR2-2-Shc";
  species VEGFpVEGFR22pShc in cytosol = 0; VEGFpVEGFR22pShc is "VEGF-pVEGFR2-2-pShc";
  species pShc in cytosol = 0;
  species pShcSHP in cytosol = 0; pShcSHP is "pShc-SHP";
  species SHP in cytosol = 0.25;
  species Grb2 in cytosol = 0.15;
  species VEGFpVEGFR22pShcGrb2 in cytosol = 0; VEGFpVEGFR22pShcGrb2 is "VEGF-pVEGFR2-2-pShc-Grb2";
  species Sos in cytosol = 0.12;
  species VEGFpVEGFR22pShcGrb2SOS in cytosol = 0; VEGFpVEGFR22pShcGrb2SOS is "VEGF-pVEGFR2-2-pShc-Grb2-SOS";
  species Grb2Sos in cytosol = 0; Grb2Sos is "Grb2-Sos";
  species RasGDP in cytosol = 0.5;
  species VEGFpVEGFR22pShcGrb2SOSRasGDP in cytosol = 0; VEGFpVEGFR22pShcGrb2SOSRasGDP is "VEGF-pVEGFR2-2-pShc-Grb2-SOS-RasGDP";
  species VEGFpVEGFR22Grb2 in cytosol = 0; VEGFpVEGFR22Grb2 is "VEGF-pVEGFR2-2-Grb2";
  species VEGFpVEGFR22Grb2SOS in cytosol = 0; VEGFpVEGFR22Grb2SOS is "VEGF-pVEGFR2-2-Grb2-SOS";
  species VEGFpVEGFR22Grb2SOSRasGDP in cytosol = 0; VEGFpVEGFR22Grb2SOSRasGDP is "VEGF-pVEGFR2-2-Grb2-SOS-RasGDP";
  species Shc in cytosol = 0.5;
  species RasGTP in cytosol = 0;
  species Raf in cytosol = 0.5;
  species RasGTPRaf in cytosol = 0; RasGTPRaf is "RasGTP-Raf";
  species pRaf in cytosol = 0;
  species MEK in cytosol = 0.05;
  species pRafMEK in cytosol = 0; pRafMEK is "pRaf-MEK";
  species pMEK in cytosol = 0;
  species pRafpMEK in cytosol = 0; pRafpMEK is "pRaf-pMEK";
  species ppMEK in cytosol = 0;
  species ERK in cytosol = 0.05;
  species ppMEKERK in cytosol = 0; ppMEKERK is "ppMEK-ERK";
  species pERK in cytosol = 0;
  species ppMEKpERK in cytosol = 0; ppMEKpERK is "ppMEK-pERK";
  species ppERK in cytosol = 0;
  species Pase in cytosol = 0.5;
  species pRafPase in cytosol = 0; pRafPase is "pRaf-Pase";
  species PP2A in cytosol = 0.02;
  species ppMEKPP2A in cytosol = 0; ppMEKPP2A is "ppMEK-PP2A";
  species pMEKPP2A in cytosol = 0; pMEKPP2A is "pMEK-PP2A";
  species MKP3 in cytosol = 0.01;
  species ppERKMKP3 in cytosol = 0; ppERKMKP3 is "ppERK-MKP3";
  species pERKMKP3 in cytosol = 0; pERKMKP3 is "pERK-MKP3";
  species ppERKMLCK in cytosol = 0; ppERKMLCK is "ppERK-MLCK";
  species RasGAP in cytosol = 0.8;
  species RasGTPRasGAP in cytosol = 0; RasGTPRasGAP is "RasGTP-RasGAP";
  species pMLCK in cytosol = 0;
  species ppERKpMLCK in cytosol = 0; ppERKpMLCK is "ppERK-pMLCK";
  species ppMLCK in cytosol = 0;
  species ppMLCKMLC in cytosol = 0; ppMLCKMLC is "ppMLCK-MLC";
  species ppMLCKpMLC in cytosol = 0; ppMLCKpMLC is "ppMLCK-pMLC";
  species PLC_gamma in cytosol = 0.57;
  species PLC_gammaCa2plus in cytosol = 0; PLC_gammaCa2plus is "PLC_gamma-Ca2plus";
  species PLC_gammaCa2plus_PIP2 in cytosol = 0; PLC_gammaCa2plus_PIP2 is "PLC_gamma-Ca2plus_PIP2";
  species VEGFpVEGFR22PLC_gammaCa2plus in cytosol = 0; VEGFpVEGFR22PLC_gammaCa2plus is "VEGF-pVEGFR2-2-PLC_gamma-Ca2plus";
  species VEGFpVEGFR22PLC_gammaCa2plus_PIP2 in cytosol = 0; VEGFpVEGFR22PLC_gammaCa2plus_PIP2 is "VEGF-pVEGFR2-2-PLC_gamma-Ca2plus_PIP2";
  species VEGFpVEGFR22PLC_gamma in cytosol = 0; VEGFpVEGFR22PLC_gamma is "VEGF-pVEGFR2-2-PLC_gamma";
  species eNOS in cytosol = 0.33;
  species PKCCa2plus_eNOS in cytosol = 0; PKCCa2plus_eNOS is "PKC-Ca2plus_eNOS";
  species eNOSactive in cytosol = 0; eNOSactive is "eNOS-active";
  species NO in cytosol = 0;
  species GC in cytosol = 0.05;
  species NOGC in cytosol = 0; NOGC is "NO-GC";
  species NOGCGTP in cytosol = 0; NOGCGTP is "NO-GC-GTP";
  species cGMP in cytosol = 0;
  species PKG in cytosol = 0.015;
  species cGMPPKG in cytosol = 0; cGMPPKG is "cGMP-PKG";
  species PKGactive in cytosol = 0; PKGactive is "PKG-active";
  species PKGRaf in cytosol = 0; PKGRaf is "PKG-Raf";
  species LArg in cytosol = 0.55; LArg is "L-Arg";
  species eNOSactiveLArg in cytosol = 0; eNOSactiveLArg is "eNOS-active-L-Arg";
  species LCit in cytosol = 0; LCit is "L-Cit";
  species NO1 in cytosol = 0;
  species NO2 in cytosol = 0;
  species NO3 in cytosol = 0;
  species ppERKpMLCKMLC in cytosol = 0; ppERKpMLCKMLC is "ppERK-pMLCK-MLC";
  species ppERKpMLCKpMLC in cytosol = 0; ppERKpMLCKpMLC is "ppERK-pMLCK-pMLC";
  species ppERKVEGFpVEGFR22pShcGrb2SOS in cytosol = 0; ppERKVEGFpVEGFR22pShcGrb2SOS is "ppERK-VEGF-pVEGFR2-2-pShc-Grb2-SOS";
  species pSOS in cytosol = 0;
  species ppERKVEGFpVEGFR22Grb2SOS in cytosol = 0; ppERKVEGFpVEGFR22Grb2SOS is "ppERK-VEGF-pVEGFR2-2-Grb2-SOS";
  species H1R in cytosol = 0.35;
  species HistamineH1R in cytosol = 0; HistamineH1R is "Histamine-H1R";
  species H1Ractive in cytosol = 0; H1Ractive is "H1R-active";
  species G_sub_q_endsub_alpha_beta_gamma_2_GDPH1Ractive in cytosol = 0; G_sub_q_endsub_alpha_beta_gamma_2_GDPH1Ractive is "G_sub_q_endsub_alpha_beta_gamma_2_GDP-H1R-active";
  species PKGROCK in cytosol = 0; PKGROCK is "PKG-ROCK";
  species Ca2plus_store in ER = 0;

  // Reactions:
  _002: thrombin_pro_thrombinR => thrombinR_active + $thrombin; _002_kcat*thrombin_pro_thrombinR;
    _002_kcat = 0.8;
  _003: thrombinR_active + G12_alpha_beta_gamma_1_GDP -> G12_alpha_beta_gamma_1_GDPthrombinR_active; _003_kf*thrombinR_active*G12_alpha_beta_gamma_1_GDP - _003_kb*G12_alpha_beta_gamma_1_GDPthrombinR_active;
    _003_kf = 0.6; _003_kb = 0.0006;
  _004: G12_alpha_beta_gamma_1_GDPthrombinR_active + GTP => G_beta_gamma_1 + G12_alpha_GTP + GTP + thrombin_R; _004_kf*G12_alpha_beta_gamma_1_GDPthrombinR_active*GTP;
    _004_kf = 0.1;
  _006: Gq_alpha_beta_gamma_2_GDPthrombinR_active + GTP -> thrombin_R + GDP + Gq_alpha_GTP + G_beta_gamma_2; _006_kf*Gq_alpha_beta_gamma_2_GDPthrombinR_active*GTP - _006_kb*thrombin_R*GDP*Gq_alpha_GTP*G_beta_gamma_2;
    _006_kf = 0.08; _006_kb = 0;
  _005: thrombinR_active + Gq_alpha_beta_gamma_2_GDP -> Gq_alpha_beta_gamma_2_GDPthrombinR_active; _005_kf*thrombinR_active*Gq_alpha_beta_gamma_2_GDP - _005_kb*Gq_alpha_beta_gamma_2_GDPthrombinR_active;
    _005_kb = 0.006; _005_kf = 0.68;
  _007: RGS + Gq_alpha_GTP -> RGSGq_alpha_GTP; _007_kf*RGS*Gq_alpha_GTP - _007_kb*RGSGq_alpha_GTP;
    _007_kf = 0.8; _007_kb = 1e-5;
  _009: thrombinR_active -> degradation; _009_kf*thrombinR_active - _009_kb*degradation;
    _009_kf = 0.002; _009_kb = 0;
  _012: G_beta_gamma_1 + G12_alpha_GDP -> G12_alpha_beta_gamma_1_GDP; _012_kf*G_beta_gamma_1*G12_alpha_GDP - _012_kb*G12_alpha_beta_gamma_1_GDP;
    _012_kf = 0.01; _012_kb = 0;
  _011: Gq_alpha_GTP -> Gq_alpha_GDP; _011_kf*Gq_alpha_GTP - _011_kb*Gq_alpha_GDP;
    _011_kf = 0.0133; _011_kb = 0;
  _013: G_beta_gamma_2 + Gq_alpha_GDP -> Gq_alpha_beta_gamma_2_GDP; _013_kf*G_beta_gamma_2*Gq_alpha_GDP - _013_kb*Gq_alpha_beta_gamma_2_GDP;
    _013_kf = 0.01; _013_kb = 0;
  _014: p115RhoGEF + G12_alpha_GTP -> p115RhoGEFG12_alpha_GTP; _014_kf*p115RhoGEF*G12_alpha_GTP - _014_kb*p115RhoGEFG12_alpha_GTP;
    _014_kf = 1; _014_kb = 0.1;
  _016: RhoGDP + p115RhoGEFG12_alpha_GTP -> p115RhoGEFG12_alpha_GTPRhoGDP; _016_kf*RhoGDP*p115RhoGEFG12_alpha_GTP - _016_kb*p115RhoGEFG12_alpha_GTPRhoGDP;
    _016_kf = 7.6; _016_kb = 0.001;
  _017: p115RhoGEFG12_alpha_GTPRhoGDP => RhoGTP + p115RhoGEFG12_alpha_GTP; _017_kcat*p115RhoGEFG12_alpha_GTPRhoGDP;
    _017_kcat = 0.07;
  _018: RhoGTP + RhoGAP -> RhoGTPRhoGAP; _018_kf*RhoGTP*RhoGAP - _018_kb*RhoGTPRhoGAP;
    _018_kf = 0.0008; _018_kb = 0.0001;
  _019: RhoGTPRhoGAP => RhoGDP + RhoGAP; _019_kcat*RhoGTPRhoGAP;
    _019_kcat = 0.08;
  _015: p115RhoGEFG12_alpha_GTP -> G12_alpha_GDP + p115RhoGEF; _015_kf*p115RhoGEFG12_alpha_GTP - _015_kb*G12_alpha_GDP*p115RhoGEF;
    _015_kf = 0.0117; _015_kb = 0;
  _020: RhoGTP => RhoGDP; _020_kcat*RhoGTP;
    _020_kcat = 0.0003667;
  _025: PLC_beta + Ca2plus -> PLC_beta_Ca2plus; _025_kf*PLC_beta*Ca2plus - _025_kb*PLC_beta_Ca2plus;
    _025_kf = 0.8; _025_kb = 0.001;
  _028: PLC_beta_Ca2plus + Gq_alpha_GTP -> PLC_beta_Gq_alpha_GTP_Ca2plus; _028_kf*PLC_beta_Ca2plus*Gq_alpha_GTP - _028_kb*PLC_beta_Gq_alpha_GTP_Ca2plus;
    _028_kf = 1; _028_kb = 1e-5;
  _026: PLC_beta_Ca2plus + PIP2 -> PLC_beta_Ca2plus_PIP2; _026_kf*PLC_beta_Ca2plus*PIP2 - _026_kb*PLC_beta_Ca2plus_PIP2;
    _026_kf = 0.8; _026_kb = 0.0001;
  _027: PLC_beta_Ca2plus_PIP2 => IP3 + PLC_beta_Ca2plus + DAG; _027_kcat*PLC_beta_Ca2plus_PIP2;
    _027_kcat = 0.8;
  _029: PLC_beta_Gq_alpha_GTP_Ca2plus + PIP2 -> PLC_beta_Gq_alpha_GTPCa2plus_PIP2; _029_kf*PLC_beta_Gq_alpha_GTP_Ca2plus*PIP2 - _029_kb*PLC_beta_Gq_alpha_GTPCa2plus_PIP2;
    _029_kf = 0.7; _029_kb = 0.0004;
  _030: PLC_beta_Gq_alpha_GTPCa2plus_PIP2 => PLC_beta_Gq_alpha_GTP_Ca2plus + IP3 + DAG; _030_kcat*PLC_beta_Gq_alpha_GTPCa2plus_PIP2;
    _030_kcat = 0.68;
  _031: PLC_beta + Gq_alpha_GTP -> PLC_beta_Gq_alpha_GTP; _031_kf*PLC_beta*Gq_alpha_GTP - _031_kb*PLC_beta_Gq_alpha_GTP;
    _031_kf = 1.5201; _031_kb = 0.5;
  _032: PLC_beta_Gq_alpha_GTP + Ca2plus -> PLC_beta_Gq_alpha_GTP_Ca2plus; _032_kf*PLC_beta_Gq_alpha_GTP*Ca2plus - _032_kb*PLC_beta_Gq_alpha_GTP_Ca2plus;
    _032_kf = 1.6; _032_kb = 0.1;
  _033: PLC_beta_Gq_alpha_GTP_Ca2plus -> Gq_alpha_GDP + PLC_beta_Ca2plus; _033_kf*PLC_beta_Gq_alpha_GTP_Ca2plus - _033_kb*Gq_alpha_GDP*PLC_beta_Ca2plus;
    _033_kf = 0.0133; _033_kb = 0;
  _034: DAG -> PC; _034_kf*DAG - _034_kb*PC;
    _034_kf = 0.15; _034_kb = 0;
  _035: IP3 -> Inositol; _035_kf*IP3 - _035_kb*Inositol;
    _035_kf = 0.01; _035_kb = 0;
  _036: IP3R + IP3 + IP3 + IP3 -> IP3IP3R; _036_kf*IP3R*IP3*IP3*IP3 - _036_kb*IP3IP3R;
    _036_kf = 0.5; _036_kb = 10;
  _043: Ca2plus_pump + Ca2plus -> Ca2plus_pump_Ca2plus; _043_kf*Ca2plus_pump*Ca2plus - _043_kb*Ca2plus_pump_Ca2plus;
    _043_kf = 6; _043_kb = 0.0001;
  _044: Ca2plus_pump_Ca2plus => Ca2plus_pump + $Ca2plus_1; _044_kcat*Ca2plus_pump_Ca2plus;
    _044_kcat = 10;
  _045: Ca2plus + Ca2plus + Ca2plus_trunsp -> Ca2plus_trunsp_2Ca2plus; _045_kf*Ca2plus*Ca2plus*Ca2plus_trunsp - _045_kb*Ca2plus_trunsp_2Ca2plus;
    _045_kf = 10; _045_kb = 0.3;
  _046: Ca2plus_trunsp_2Ca2plus + Ca2plus_trunsp -> Ca2plus_store; _046_kf*Ca2plus_trunsp_2Ca2plus*Ca2plus_trunsp - _046_kb*Ca2plus_store;
    _046_kf = 5; _046_kb = 1;
  _047: CaM + Ca2plus -> Ca2plus_CaM; _047_kf*CaM*Ca2plus - _047_kb*Ca2plus_CaM;
    _047_kf = 10; _047_kb = 45;
  _051: Ca2plus_CaM + MLCK -> MLCK_Ca2plus_CaM; _051_kf*Ca2plus_CaM*MLCK - _051_kb*MLCK_Ca2plus_CaM;
    _051_kf = 0.03; _051_kb = 0.08;
  _048: Ca2plus_CaM + Ca2plus -> CaM2Ca2plus; _048_kf*Ca2plus_CaM*Ca2plus - _048_kb*CaM2Ca2plus;
    _048_kf = 8; _048_kb = 40;
  _049: CaM2Ca2plus + Ca2plus -> CaM3Ca2plus; _049_kf*CaM2Ca2plus*Ca2plus - _049_kb*CaM3Ca2plus;
    _049_kf = 10; _049_kb = 170;
  _050: CaM3Ca2plus + Ca2plus -> CaM4Ca2plus; _050_kf*CaM3Ca2plus*Ca2plus - _050_kb*CaM4Ca2plus;
    _050_kf = 10; _050_kb = 500;
  _052: CaM2Ca2plus + MLCK -> MLCK2Ca2plus_CaM; _052_kf*CaM2Ca2plus*MLCK - _052_kb*MLCK2Ca2plus_CaM;
    _052_kf = 0.04; _052_kb = 0.15;
  _053: CaM3Ca2plus + MLCK -> MLCK_3Ca2plus_CaM; _053_kf*CaM3Ca2plus*MLCK - _053_kb*MLCK_3Ca2plus_CaM;
    _053_kf = 1; _053_kb = 0.0007;
  _054: CaM4Ca2plus + MLCK -> MLCK_4Ca2plus_CaM; _054_kf*CaM4Ca2plus*MLCK - _054_kb*MLCK_4Ca2plus_CaM;
    _054_kf = 10; _054_kb = 0.01;
  _055: PKC + Ca2plus -> PKCCa2plus; _055_kf*PKC*Ca2plus - _055_kb*PKCCa2plus;
    _055_kf = 0.3; _055_kb = 0.01;
  _056: PKCCa2plus + DAG -> PKCCa2plus_DAG; _056_kf*PKCCa2plus*DAG - _056_kb*PKCCa2plus_DAG;
    _056_kf = 0.3; _056_kb = 0.001;
  _057: PKCCa2plus_DAG -> PKC_active_3; _057_kf*PKCCa2plus_DAG - _057_kb*PKC_active_3;
    _057_kf = 1.78; _057_kb = 0.01;
  _058: PKC_active_3 -> degradation; _058_kf*PKC_active_3 - _058_kb*degradation;
    _058_kf = 0.000463; _058_kb = 0;
  _059: PKC_active_3 + CPI17 -> PKC_active_3CPI17; _059_kf*PKC_active_3*CPI17 - _059_kb*PKC_active_3CPI17;
    _059_kf = 3.2; _059_kb = 0.01;
  _060: PKC_active_3CPI17 => PKC_active_3 + pCPI17; _060_kcat*PKC_active_3CPI17;
    _060_kcat = 1.68;
  _061: pCPI17 -> CPI17; _061_kf*pCPI17 - _061_kb*CPI17;
    _061_kf = 0.5; _061_kb = 0.001;
  _062: MYPT1_PPase + pCPI17 -> pCPI17MYPT1_PPasep; _062_kf*MYPT1_PPase*pCPI17 - _062_kb*pCPI17MYPT1_PPasep;
    _062_kf = 7.2; _062_kb = 0.62;
  _063: MYPT1_PPase + CPI17 -> CPI17MYPT1_PPase; _063_kf*MYPT1_PPase*CPI17 - _063_kb*CPI17MYPT1_PPase;
    _063_kf = 0.01; _063_kb = 0.001;
  _064: pCPI17MYPT1_PPasep -> CPI17MYPT1_PPase; _064_kf*pCPI17MYPT1_PPasep - _064_kb*CPI17MYPT1_PPase;
    _064_kf = 0.005; _064_kb = 0.001;
  _065: MLC + pROCK -> pROCKMLC; _065_kf*MLC*pROCK - _065_kb*pROCKMLC;
    _065_kf = 2.02; _065_kb = 0.001;
  _066: pROCKMLC => pMLC + pROCK; _066_kcat*pROCKMLC;
    _066_kcat = 1.35;
  _067: pMLC + pROCK -> pROCKpMLC; _067_kf*pMLC*pROCK - _067_kb*pROCKpMLC;
    _067_kf = 1.38; _067_kb = 0.001;
  _068: pROCKpMLC => pROCK + ppMLC; _068_kcat*pROCKpMLC;
    _068_kcat = 0.07;
  _069: MLC + RhoGTPROCK -> RhoGTPROCKMLC; _069_kf*MLC*RhoGTPROCK - _069_kb*RhoGTPROCKMLC;
    _069_kf = 0.05; _069_kb = 0.0001;
  _070: RhoGTPROCKMLC => pMLC + RhoGTPROCK; _070_kcat*RhoGTPROCKMLC;
    _070_kcat = 0.06;
  _071: pMLC + RhoGTPROCK -> RhoGTPROCKpMLC; _071_kf*pMLC*RhoGTPROCK - _071_kb*RhoGTPROCKpMLC;
    _071_kf = 1.36; _071_kb = 0.0002;
  _072: RhoGTPROCKpMLC => ppMLC + RhoGTPROCK; _072_kcat*RhoGTPROCKpMLC;
    _072_kcat = 1.6;
  _073: MLCK_Ca2plus_CaM + MLC -> MLCK_Ca2plus_CaM_MLC; _073_kf*MLCK_Ca2plus_CaM*MLC - _073_kb*MLCK_Ca2plus_CaM_MLC;
    _073_kf = 0.8; _073_kb = 0.0001;
  _074: MLCK_Ca2plus_CaM_MLC => MLCK_Ca2plus_CaM + pMLC; _074_kcat*MLCK_Ca2plus_CaM_MLC;
    _074_kcat = 0.35;
  _075: MLCK_Ca2plus_CaM + pMLC -> MLCK_Ca2plus_CaM_pMLC; _075_kf*MLCK_Ca2plus_CaM*pMLC - _075_kb*MLCK_Ca2plus_CaM_pMLC;
    _075_kf = 0.082; _075_kb = 0.0001;
  _076: MLCK_Ca2plus_CaM_pMLC => ppMLC + MLCK_Ca2plus_CaM; _076_kcat*MLCK_Ca2plus_CaM_pMLC;
    _076_kcat = 0.25;
  _077: MLCK2Ca2plus_CaM + MLC -> MLCK_2Ca2plus_CaMMLC; _077_kf*MLCK2Ca2plus_CaM*MLC - _077_kb*MLCK_2Ca2plus_CaMMLC;
    _077_kf = 0.5; _077_kb = 0.006;
  _078: MLCK_2Ca2plus_CaMMLC => MLCK2Ca2plus_CaM + pMLC; _078_kcat*MLCK_2Ca2plus_CaMMLC;
    _078_kcat = 2;
  _079: MLCK2Ca2plus_CaM + pMLC -> MLCK_2Ca2plus_CaM_pMLC; _079_kf*MLCK2Ca2plus_CaM*pMLC - _079_kb*MLCK_2Ca2plus_CaM_pMLC;
    _079_kf = 1; _079_kb = 0.1;
  _080: MLCK_2Ca2plus_CaM_pMLC => MLCK2Ca2plus_CaM + ppMLC; _080_kcat*MLCK_2Ca2plus_CaM_pMLC;
    _080_kcat = 1.6;
  _081: MLCK_3Ca2plus_CaM + MLC -> MLCK_3Ca2plus_CaM_MLC; _081_kf*MLCK_3Ca2plus_CaM*MLC - _081_kb*MLCK_3Ca2plus_CaM_MLC;
    _081_kf = 0.8; _081_kb = 1e-5;
  _082: MLCK_3Ca2plus_CaM_MLC => pMLC + MLCK_3Ca2plus_CaM; _082_kcat*MLCK_3Ca2plus_CaM_MLC;
    _082_kcat = 0.3;
  _083: MLCK_3Ca2plus_CaM + pMLC -> MLCK_3Ca2plus_CaM_pMLC; _083_kf*MLCK_3Ca2plus_CaM*pMLC - _083_kb*MLCK_3Ca2plus_CaM_pMLC;
    _083_kf = 0.4; _083_kb = 0.0001;
  _084: MLCK_3Ca2plus_CaM_pMLC => ppMLC; _084_kcat*MLCK_3Ca2plus_CaM_pMLC;
    _084_kcat = 1.2;
  _085: MLCK_4Ca2plus_CaM + MLC -> MLCK_4Ca2plus_CaM_MLC; _085_kf*MLCK_4Ca2plus_CaM*MLC - _085_kb*MLCK_4Ca2plus_CaM_MLC;
    _085_kf = 0.5; _085_kb = 0.05;
  _086: MLCK_4Ca2plus_CaM_MLC => pMLC + MLCK_4Ca2plus_CaM; _086_kcat*MLCK_4Ca2plus_CaM_MLC;
    _086_kcat = 1.5;
  _087: pMLC + MLCK_4Ca2plus_CaM -> MLCK_4Ca2plus_CaM_pMLC; _087_kf*pMLC*MLCK_4Ca2plus_CaM - _087_kb*MLCK_4Ca2plus_CaM_pMLC;
    _087_kf = 1; _087_kb = 0.02;
  _088: MLCK_4Ca2plus_CaM_pMLC => ppMLC + MLCK_4Ca2plus_CaM; _088_kcat*MLCK_4Ca2plus_CaM_pMLC;
    _088_kcat = 1.35;
  _089: MLCK + MLC -> MLCKMLC; _089_kf*MLCK*MLC - _089_kb*MLCKMLC;
    _089_kf = 0.16; _089_kb = 0.01;
  _090: MLCKMLC => pMLC + MLCK; _090_kcat*MLCKMLC;
    _090_kcat = 0.6;
  _091: MLCK + pMLC -> MLCKpMLC; _091_kf*MLCK*pMLC - _091_kb*MLCKpMLC;
    _091_kf = 0.55; _091_kb = 1e-5;
  _092: MLCKpMLC => ppMLC + MLCK; _092_kcat*MLCKpMLC;
    _092_kcat = 0.2;
  _093: MYPT1_PPase + ppMLC -> MYPT1_PPaseppMLC; _093_kf*MYPT1_PPase*ppMLC - _093_kb*MYPT1_PPaseppMLC;
    _093_kf = 0.15; _093_kb = 0.0001;
  _094: MYPT1_PPaseppMLC => MYPT1_PPase + pMLC; _094_kcat*MYPT1_PPaseppMLC;
    _094_kcat = 0.2;
  _095: MYPT1_PPase + pMLC -> MYPT1_PPasepMLC; _095_kf*MYPT1_PPase*pMLC - _095_kb*MYPT1_PPasepMLC;
    _095_kf = 4.5; _095_kb = 0.001;
  _096: MYPT1_PPasepMLC => MLC + MYPT1_PPase; _096_kcat*MYPT1_PPasepMLC;
    _096_kcat = 1.68;
  _097: pMYPT1_PPase + ppMLC -> pMYPT1_PPaseppMLC; _097_kf*pMYPT1_PPase*ppMLC - _097_kb*pMYPT1_PPaseppMLC;
    _097_kf = 0.08; _097_kb = 0.0001;
  _098: pMYPT1_PPaseppMLC => pMLC + pMYPT1_PPase; _098_kcat*pMYPT1_PPaseppMLC;
    _098_kcat = 0.3;
  _099: pMYPT1_PPase + pMLC -> pMYPT1_PPasepMLC; _099_kf*pMYPT1_PPase*pMLC - _099_kb*pMYPT1_PPasepMLC;
    _099_kf = 0.25; _099_kb = 0.0001;
  _100: pMYPT1_PPasepMLC => MLC + pMYPT1_PPase; _100_kcat*pMYPT1_PPasepMLC;
    _100_kcat = 0.7;
  _101: MYPT1_PPase + RhoGTPROCK -> RhoGTPROCKMYPT1_PPase; _101_kf*MYPT1_PPase*RhoGTPROCK - _101_kb*RhoGTPROCKMYPT1_PPase;
    _101_kf = 1; _101_kb = 0.005;
  _102: RhoGTPROCKMYPT1_PPase => pMYPT1_PPase + RhoGTPROCK; _102_kcat*RhoGTPROCKMYPT1_PPase;
    _102_kcat = 2.5;
  _103: MYPT1_PPase + pROCK -> pROCKMYPT1_PPase; _103_kf*MYPT1_PPase*pROCK - _103_kb*pROCKMYPT1_PPase;
    _103_kf = 1.43; _103_kb = 0.0001;
  _104: pROCKMYPT1_PPase => pMYPT1_PPase + pROCK; _104_kcat*pROCKMYPT1_PPase;
    _104_kcat = 0.72;
  _105: pMYPT1_PPase -> MYPT1_PPase; _105_kf*pMYPT1_PPase - _105_kb*MYPT1_PPase;
    _105_kf = 0.2; _105_kb = 0;
  _008: RGSGq_alpha_GTP => RGS + Gq_alpha_GDP; _008_kcat*RGSGq_alpha_GTP;
    _008_kcat = 0.88;
  _038: Ca2plus_IP3_IP3R => IP3IP3R + Ca2plus; _038_kcat*Ca2plus_IP3_IP3R;
    _038_kcat = 3;
  _037: Ca2plus_store + IP3IP3R -> Ca2plus_IP3_IP3R; _037_kf*Ca2plus_store*IP3IP3R - _037_kb*Ca2plus_IP3_IP3R;
    _037_kf = 17; _037_kb = 0.001;
  _039: Ca2plus_extleak + $Ca2plus_1 -> Ca2plus_ext1; _039_kf*Ca2plus_extleak*Ca2plus_1 - _039_kb*Ca2plus_ext1;
    _039_kf = 0.008; _039_kb = 0.0001;
  _040: Ca2plus_ext1 => Ca2plus + Ca2plus_extleak; _040_kcat*Ca2plus_ext1;
    _040_kcat = 0.5;
  _041: Ca2plus_store + Ca2plus_intleak -> Ca2plus_int1; _041_kf*Ca2plus_store*Ca2plus_intleak - _041_kb*Ca2plus_int1;
    _041_kf = 5; _041_kb = 0.0001;
  _042: Ca2plus_int1 => Ca2plus_intleak + Ca2plus; _042_kcat*Ca2plus_int1;
    _042_kcat = 0.5;
  _010: G12_alpha_GTP -> G12_alpha_GDP; _010_kf*G12_alpha_GTP - _010_kb*G12_alpha_GDP;
    _010_kf = 0.00533; _010_kb = 0;
  _001: $thrombin + pro_thrombinR -> thrombin_pro_thrombinR; _001_kf*thrombin*pro_thrombinR - _001_kb*thrombin_pro_thrombinR;
    _001_kf = 3; _001_kb = 0.01;
  _021: RhoGTP + ROCK -> RhoGTPROCK; _021_kf*RhoGTP*ROCK - _021_kb*RhoGTPROCK;
    _021_kf = 0.05; _021_kb = 0.0005;
  _022: RhoGTPROCK => pROCK + RhoGTP; _022_kcat*RhoGTPROCK;
    _022_kcat = 0.085;
  _023: RhoGDP + RhoGDI -> RhoGDPRhoGDI; _023_kf*RhoGDP*RhoGDI - _023_kb*RhoGDPRhoGDI;
    _023_kf = 5; _023_kb = 0.05;
  _024: pROCK => degradation; _024_kcat*pROCK;
    _024_kcat = 0.0008;
  _106: VEGFR2 + VEGF -> VEGFVEGFR2; _106_kf*VEGFR2*VEGF - _106_kb*VEGFVEGFR2;
    _106_kf = 8; _106_kb = 0.0001;
  _107: VEGFVEGFR2 + VEGFVEGFR2 -> VEGFVEGFR22; _107_kf*VEGFVEGFR2*VEGFVEGFR2 - _107_kb*VEGFVEGFR22;
    _107_kf = 0.6; _107_kb = 0.001;
  _108: VEGFVEGFR22 => VEGFpVEGFR22; _108_kcat*VEGFVEGFR22;
    _108_kcat = 2.01;
  _109: VEGFpVEGFR22 + Shc -> VEGFpVEGFR22Shc; _109_kf*VEGFpVEGFR22*Shc - _109_kb*VEGFpVEGFR22Shc;
    _109_kf = 0.3; _109_kb = 0.006;
  _110: VEGFpVEGFR22Shc => VEGFpVEGFR22pShc; _110_kcat*VEGFpVEGFR22Shc;
    _110_kcat = 0.5838;
  _111: VEGFpVEGFR22pShc -> pShc + VEGFpVEGFR22; _111_kf*VEGFpVEGFR22pShc - _111_kb*pShc*VEGFpVEGFR22;
    _111_kf = 0.022; _111_kb = 0.0001;
  _112: pShc + SHP -> pShcSHP; _112_kf*pShc*SHP - _112_kb*pShcSHP;
    _112_kf = 0.05; _112_kb = 0.0001;
  _113: pShcSHP => Shc + SHP; _113_kcat*pShcSHP;
    _113_kcat = 0.28;
  _114: VEGFpVEGFR22pShc + Grb2 -> VEGFpVEGFR22pShcGrb2; _114_kf*VEGFpVEGFR22pShc*Grb2 - _114_kb*VEGFpVEGFR22pShcGrb2;
    _114_kf = 3; _114_kb = 0.1;
  _115: VEGFpVEGFR22pShcGrb2 + Sos -> VEGFpVEGFR22pShcGrb2SOS; _115_kf*VEGFpVEGFR22pShcGrb2*Sos - _115_kb*VEGFpVEGFR22pShcGrb2SOS;
    _115_kf = 1; _115_kb = 0.0214;
  _116: Grb2Sos + VEGFpVEGFR22pShc -> VEGFpVEGFR22pShcGrb2SOS; _116_kf*Grb2Sos*VEGFpVEGFR22pShc - _116_kb*VEGFpVEGFR22pShcGrb2SOS;
    _116_kf = 1; _116_kb = 0.045;
  _117: VEGFpVEGFR22pShcGrb2SOS + RasGDP -> VEGFpVEGFR22pShcGrb2SOSRasGDP; _117_kf*VEGFpVEGFR22pShcGrb2SOS*RasGDP - _117_kb*VEGFpVEGFR22pShcGrb2SOSRasGDP;
    _117_kf = 9.2; _117_kb = 0.0018;
  _118: VEGFpVEGFR22Grb2SOSRasGDP => VEGFpVEGFR22Grb2SOS + RasGTP; _118_kcat*VEGFpVEGFR22Grb2SOSRasGDP;
    _118_kcat = 10.56;
  _122: VEGFpVEGFR22 + Grb2 -> VEGFpVEGFR22Grb2; _122_kf*VEGFpVEGFR22*Grb2 - _122_kb*VEGFpVEGFR22Grb2;
    _122_kf = 1.67; _122_kb = 0.02;
  _123: VEGFpVEGFR22Grb2 + Sos -> VEGFpVEGFR22Grb2SOS; _123_kf*VEGFpVEGFR22Grb2*Sos - _123_kb*VEGFpVEGFR22Grb2SOS;
    _123_kf = 6; _123_kb = 0.03;
  _124: Grb2Sos + VEGFpVEGFR22 -> VEGFpVEGFR22Grb2SOS; _124_kf*Grb2Sos*VEGFpVEGFR22 - _124_kb*VEGFpVEGFR22Grb2SOS;
    _124_kf = 2.67; _124_kb = 0.01;
  _125: VEGFpVEGFR22Grb2SOS + RasGDP -> VEGFpVEGFR22Grb2SOSRasGDP; _125_kf*VEGFpVEGFR22Grb2SOS*RasGDP - _125_kb*VEGFpVEGFR22Grb2SOSRasGDP;
    _125_kf = 12.22; _125_kb = 0.0016;
  _126: VEGFpVEGFR22Grb2SOSRasGDP => VEGFpVEGFR22Grb2SOS + RasGTP; _126_kcat*VEGFpVEGFR22Grb2SOSRasGDP;
    _126_kcat = 6.8;
  _127: Grb2 + Sos -> Grb2Sos; _127_kf*Grb2*Sos - _127_kb*Grb2Sos;
    _127_kf = 0.1; _127_kb = 0.0015;
  _128: RasGTP + Raf -> RasGTPRaf; _128_kf*RasGTP*Raf - _128_kb*RasGTPRaf;
    _128_kf = 1.8; _128_kb = 0.05;
  _129: RasGTPRaf => pRaf + RasGTP; _129_kcat*RasGTPRaf;
    _129_kcat = 0.7624;
  _130: MEK + pRaf -> pRafMEK; _130_kf*MEK*pRaf - _130_kb*pRafMEK;
    _130_kf = 4; _130_kb = 0.01833;
  _131: pRafMEK => pMEK + pRaf; _131_kcat*pRafMEK;
    _131_kcat = 0.65;
  _132: pRaf + pMEK -> pRafpMEK; _132_kf*pRaf*pMEK - _132_kb*pRafpMEK;
    _132_kf = 4; _132_kb = 0.01833;
  _133: pRafpMEK => pRaf + ppMEK; _133_kcat*pRafpMEK;
    _133_kcat = 2.9;
  _134: ppMEK + ERK -> ppMEKERK; _134_kf*ppMEK*ERK - _134_kb*ppMEKERK;
    _134_kf = 0.86; _134_kb = 0.0033;
  _135: ppMEKERK => ppMEK + pERK; _135_kcat*ppMEKERK;
    _135_kcat = 2.88;
  _136: ppMEK + pERK -> ppMEKpERK; _136_kf*ppMEK*pERK - _136_kb*ppMEKpERK;
    _136_kf = 3.98; _136_kb = 0.0033;
  _137: ppMEKpERK => ppMEK + ppERK; _137_kcat*ppMEKpERK;
    _137_kcat = 5.7;
  _139: pRaf + Pase -> pRafPase; _139_kf*pRaf*Pase - _139_kb*pRafPase;
    _139_kf = 6; _139_kb = 0.2;
  _140: pRafPase => Pase + Raf; _140_kcat*pRafPase;
    _140_kcat = 1;
  _141: ppMEK + PP2A -> ppMEKPP2A; _141_kf*ppMEK*PP2A - _141_kb*ppMEKPP2A;
    _141_kf = 3; _141_kb = 0.8;
  _142: ppMEKPP2A => pMEK + PP2A; _142_kcat*ppMEKPP2A;
    _142_kcat = 0.1;
  _143: pMEK + PP2A -> pMEKPP2A; _143_kf*pMEK*PP2A - _143_kb*pMEKPP2A;
    _143_kf = 3; _143_kb = 0.8;
  _144: pMEKPP2A => PP2A + MEK; _144_kcat*pMEKPP2A;
    _144_kcat = 0.1;
  _145: MKP3 + ppERK -> ppERKMKP3; _145_kf*MKP3*ppERK - _145_kb*ppERKMKP3;
    _145_kf = 0.8; _145_kb = 0.006;
  _146: ppERKMKP3 => pERK + MKP3; _146_kcat*ppERKMKP3;
    _146_kcat = 0.27;
  _147: pERK + MKP3 -> pERKMKP3; _147_kf*pERK*MKP3 - _147_kb*pERKMKP3;
    _147_kf = 4.25; _147_kb = 0.0005;
  _148: pERKMKP3 => MKP3 + ERK; _148_kcat*pERKMKP3;
    _148_kcat = 0.3;
  _154: ppERK + MLCK -> ppERKMLCK; _154_kf*ppERK*MLCK - _154_kb*ppERKMLCK;
    _154_kf = 0.44; _154_kb = 0.0006;
  _119: RasGTP -> RasGDP; _119_kf*RasGTP - _119_kb*RasGDP;
    _119_kf = 3; _119_kb = 0.0001;
  _120: RasGTP + RasGAP -> RasGTPRasGAP; _120_kf*RasGTP*RasGAP - _120_kb*RasGTPRasGAP;
    _120_kf = 2.88; _120_kb = 0.0001;
  _121: RasGTPRasGAP => RasGAP + RasGDP; _121_kcat*RasGTPRasGAP;
    _121_kcat = 0.8;
  _155: ppERKMLCK => pMLCK + ppERK; _155_kcat*ppERKMLCK;
    _155_kcat = 0.943;
  _156: ppERK + pMLCK -> ppERKpMLCK; _156_kf*ppERK*pMLCK - _156_kb*ppERKpMLCK;
    _156_kf = 0.05; _156_kb = 1e-5;
  _157: ppERKpMLCK => ppMLCK + ppERK; _157_kcat*ppERKpMLCK;
    _157_kcat = 0.003;
  _158: ppMLCK + MLC -> ppMLCKMLC; _158_kf*ppMLCK*MLC - _158_kb*ppMLCKMLC;
    _158_kf = 0.08; _158_kb = 1e-5;
  _159: ppMLCKMLC => ppMLCK + pMLC; _159_kcat*ppMLCKMLC;
    _159_kcat = 0.97;
  _160: ppMLCK + pMLC -> ppMLCKpMLC; _160_kf*ppMLCK*pMLC - _160_kb*ppMLCKpMLC;
    _160_kf = 2.96; _160_kb = 0.0001;
  _161: ppMLCKpMLC => ppMLCK + ppMLC; _161_kcat*ppMLCKpMLC;
    _161_kcat = 0.46;
  _167: PLC_gamma + Ca2plus -> PLC_gammaCa2plus; _167_kf*PLC_gamma*Ca2plus - _167_kb*PLC_gammaCa2plus;
    _167_kf = 0.8; _167_kb = 0.001;
  _168: PIP2 + PLC_gammaCa2plus -> PLC_gammaCa2plus_PIP2; _168_kf*PIP2*PLC_gammaCa2plus - _168_kb*PLC_gammaCa2plus_PIP2;
    _168_kf = 0.78; _168_kb = 0.0001;
  _170: PLC_gammaCa2plus + VEGFpVEGFR22 -> VEGFpVEGFR22PLC_gammaCa2plus; _170_kf*PLC_gammaCa2plus*VEGFpVEGFR22 - _170_kb*VEGFpVEGFR22PLC_gammaCa2plus;
    _170_kf = 1.5; _170_kb = 0.01;
  _172: PIP2 + VEGFpVEGFR22PLC_gammaCa2plus -> VEGFpVEGFR22PLC_gammaCa2plus_PIP2; _172_kf*PIP2*VEGFpVEGFR22PLC_gammaCa2plus - _172_kb*VEGFpVEGFR22PLC_gammaCa2plus_PIP2;
    _172_kf = 0.78; _172_kb = 0.0004;
  _169: PLC_gammaCa2plus_PIP2 => IP3 + DAG + PLC_gammaCa2plus; _169_kcat*PLC_gammaCa2plus_PIP2;
    _169_kcat = 0.8;
  _173: VEGFpVEGFR22PLC_gammaCa2plus_PIP2 => VEGFpVEGFR22PLC_gammaCa2plus + IP3 + DAG; _173_kcat*VEGFpVEGFR22PLC_gammaCa2plus_PIP2;
    _173_kcat = 0.5;
  _174: PLC_gamma + VEGFpVEGFR22 -> VEGFpVEGFR22PLC_gamma; _174_kf*PLC_gamma*VEGFpVEGFR22 - _174_kb*VEGFpVEGFR22PLC_gamma;
    _174_kf = 1.52; _174_kb = 0.1;
  _171: Ca2plus + VEGFpVEGFR22PLC_gamma -> VEGFpVEGFR22PLC_gammaCa2plus; _171_kf*Ca2plus*VEGFpVEGFR22PLC_gamma - _171_kb*VEGFpVEGFR22PLC_gammaCa2plus;
    _171_kf = 1.56; _171_kb = 0.3;
  _175: PKCCa2plus + eNOS -> PKCCa2plus_eNOS; _175_kf*PKCCa2plus*eNOS - _175_kb*PKCCa2plus_eNOS;
    _175_kf = 55; _175_kb = 0.0001;
  _176: PKCCa2plus_eNOS => eNOSactive + PKCCa2plus; _176_kcat*PKCCa2plus_eNOS;
    _176_kcat = 0.25;
  _179: NO + GC -> NOGC; _179_kf*NO*GC - _179_kb*NOGC;
    _179_kf = 10; _179_kb = 0.1;
  _180: NOGC + GTP -> NOGCGTP; _180_kf*NOGC*GTP - _180_kb*NOGCGTP;
    _180_kf = 2.11; _180_kb = 0.05;
  _181: NOGCGTP => NOGC + cGMP; _181_kcat*NOGCGTP;
    _181_kcat = 0.8;
  _182: cGMP + PKG -> cGMPPKG; _182_kf*cGMP*PKG - _182_kb*cGMPPKG;
    _182_kf = 0.68; _182_kb = 0.001;
  _183: cGMPPKG => PKGactive + cGMP; _183_kcat*cGMPPKG;
    _183_kcat = 0.06;
  _184: PKGactive + Raf -> PKGRaf; _184_kf*PKGactive*Raf - _184_kb*PKGRaf;
    _184_kf = 0.22; _184_kb = 0.001;
  _185: PKGRaf => PKGactive + pRaf; _185_kcat*PKGRaf;
    _185_kcat = 0.021;
  _177: eNOSactive + LArg -> eNOSactiveLArg; _177_kf*eNOSactive*LArg - _177_kb*eNOSactiveLArg;
    _177_kf = 20; _177_kb = 0.01;
  _178: eNOSactiveLArg => LCit + eNOSactive + NO; _178_kcat*eNOSactiveLArg;
    _178_kcat = 1.2;
  _186: NO => NO1; _186_kcat*NO;
    _186_kcat = 0.15;
  _187: NO => NO2; _187_kcat*NO;
    _187_kcat = 0.25;
  _188: NO => NO3; _188_kcat*NO;
    _188_kcat = 0.25;
  _189: PKGactive => degradation; _189_kcat*PKGactive;
    _189_kcat = 0.001;
  _138: ppERK => degradation; _138_kcat*ppERK;
    _138_kcat = 0.0025;
  _162: MLC + ppERKpMLCK -> ppERKpMLCKMLC; _162_kf*MLC*ppERKpMLCK - _162_kb*ppERKpMLCKMLC;
    _162_kf = 0.008; _162_kb = 1e-5;
  _163: ppERKpMLCKMLC => ppERKpMLCK + pMLC; _163_kcat*ppERKpMLCKMLC;
    _163_kcat = 0.4;
  _164: ppERKpMLCK + pMLC -> ppERKpMLCKpMLC; _164_kf*ppERKpMLCK*pMLC - _164_kb*ppERKpMLCKpMLC;
    _164_kf = 15.64; _164_kb = 0.001;
  _165: ppERKpMLCKpMLC => ppMLC + ppERKpMLCK; _165_kcat*ppERKpMLCKpMLC;
    _165_kcat = 4.8;
  _149: ppERK + VEGFpVEGFR22pShcGrb2SOS -> ppERKVEGFpVEGFR22pShcGrb2SOS; _149_kf*ppERK*VEGFpVEGFR22pShcGrb2SOS - _149_kb*ppERKVEGFpVEGFR22pShcGrb2SOS;
    _149_kf = 20.898; _149_kb = 1;
  _150: ppERKVEGFpVEGFR22pShcGrb2SOS => ppERK + VEGFpVEGFR22 + pShc + pSOS; _150_kcat*ppERKVEGFpVEGFR22pShcGrb2SOS;
    _150_kcat = 0.0426;
  _151: ppERK + VEGFpVEGFR22Grb2SOS -> ppERKVEGFpVEGFR22Grb2SOS; _151_kf*ppERK*VEGFpVEGFR22Grb2SOS - _151_kb*ppERKVEGFpVEGFR22Grb2SOS;
    _151_kf = 20.898; _151_kb = 1;
  _152: ppERKVEGFpVEGFR22Grb2SOS => ppERK + VEGFpVEGFR22 + Grb2 + pSOS; _152_kcat*ppERKVEGFpVEGFR22Grb2SOS;
    _152_kcat = 0.0426;
  _153: pSOS => Sos; _153_kcat*pSOS;
    _153_kcat = 0.02;
  _166: ppMLCK => degradation; _166_kcat*ppMLCK;
    _166_kcat = 0.0008;
  _190: Hisatamine + H1R -> HistamineH1R; _190_kf*Hisatamine*H1R - _190_kb*HistamineH1R;
    _190_kf = 3; _190_kb = 0.01;
  _191: HistamineH1R => H1Ractive + Hisatamine; _191_kcat*HistamineH1R;
    _191_kcat = 0.8;
  _194: H1Ractive + Gq_alpha_beta_gamma_2_GDP -> G_sub_q_endsub_alpha_beta_gamma_2_GDPH1Ractive; _194_kf*H1Ractive*Gq_alpha_beta_gamma_2_GDP - _194_kb*G_sub_q_endsub_alpha_beta_gamma_2_GDPH1Ractive;
    _194_kf = 0.68; _194_kb = 0.0006;
  _195: GTP + G_sub_q_endsub_alpha_beta_gamma_2_GDPH1Ractive => GDP + Gq_alpha_GTP + G_beta_gamma_2; _195_kcat*GTP*G_sub_q_endsub_alpha_beta_gamma_2_GDPH1Ractive;
    _195_kcat = 0.08;
  _192: H1R => degradation; _192_kcat*H1R;
    _192_kcat = 0.0022;
  _193: H1Ractive => degradation; _193_kcat*H1Ractive;
    _193_kcat = 0.0133;
  _196: ROCK + PKGactive -> PKGROCK; _196_kf*ROCK*PKGactive - _196_kb*PKGROCK;
    _196_kf = 0.35; _196_kb = 0.0001;
  _197: PKGROCK => PKG + pROCK; _197_kcat*PKGROCK;
    _197_kcat = 1.85;
end
