// SBML level 2 version 4

model Telesco2011_HER3ErbB3RTK_SignalingNetwork()
  // Telesco2011_HER3-ErbB3-RTK_SignalingNetwork
  // This model is from the article:
  // A multiscale modeling approach to investigate molecular mechanisms of pseudokinase activation and drug resistance in the HER3/ErbB3 receptor tyrosine kinase signaling network.
  // Telesco SE, Shih AJ, Jia F, Radhakrishnan R. Mol Biosyst. 2011 Jun;7(6):2066-80. 21509365 ,
  // Abstract:
  // Multiscale modeling provides a powerful and quantitative platform for investigating the complexity inherent in intracellular signaling pathways and rationalizing the effects of molecular perturbations on downstream signaling events and ultimately, on the cell phenotype. Here we describe the application of a multiscale modeling scheme to the HER3/ErbB3 receptor tyrosine kinase (RTK) signaling network, which regulates critical cellular processes including proliferation, migration and differentiation. The HER3 kinase is a topic of current interest and investigation, as it has been implicated in mechanisms of resistance to tyrosine kinase inhibition (TKI) of EGFR and HER2 in the treatment of many human malignancies. Moreover, the commonly regarded status of HER3 as a catalytically inactive 'pseudokinase' has recently been challenged by our previous study, which demonstrated robust residual kinase activity for HER3. Through our multiscale model, we investigate the most significant molecular interactions that contribute to potential mechanisms of HER3 activity and the physiological relevance of this activity to mechanisms of drug resistance in an ErbB-driven tumor cell in silico. The results of our molecular-scale simulations support the characterization of HER3 as a weakly active kinase that, in contrast to its fully-active ErbB family members, depends upon a unique hydrophobic interface to coordinate the alignment of specific catalytic residues required for its activity. Translating our molecular simulation results of the uniquely active behavior of the HER3 kinase into a physiologically relevant environment, our HER3 signaling model demonstrates that even a weak level of HER3 activity may be sufficient to induce AKT signaling and TKI resistance in the context of an ErbB signaling-dependent tumor cell, and therefore therapeutic targeting of HER3 may represent a superior treatment strategy for specific ErbB-driven cancers.
  // This model is an extension of the model published by Schoeberl et al., 2009 [PMID:19567914]
  // .
  // This model originates from BioModels Database: A Database of Annotated Published Models (http://www.ebi.ac.uk/biomodels/). It is copyright (c) 2005-2011 The BioModels.net Team.
  // To the extent possible under law, all copyright and related or neighbouring rights to this encoded model have been dedicated to the public domain worldwide. Please refer to CC0 Public Domain Dedication for more information.
  // In summary, you are entitled to use this encoded model in absolutely any manner you deem suitable, verbatim, or with modification, alone or embedded it in a larger context, redistribute it, commercially or not, in a restricted way or not..
  // To cite BioModels Database, please use: Li C, Donizelli M, Rodriguez N, Dharuri H, Endler L, Chelliah V, Li L, He E, Henry A, Stefan MI, Snoep JL, Hucka M, Le Novère N, Laibe C (2010) BioModels Database: An enhanced, curated and annotated resource for published quantitative kinetic models. BMC Syst Biol., 4:92.
  // biomodels.db:MODEL1102210001
  // isDescribedBy pubmed:21509365
  // biomodels.db:MODEL1102210001
  // isDescribedBy pubmed:21509365
  // biomodels.db:MODEL1102210001
  // biomodels.db:MODEL1102210001

  // Compartments:
  compartment Vcell = 1e-12;

  // Species:
  substanceOnly species Her3 in Vcell = 33000;  // substance in molec
  substanceOnly species Her3_Nrg in Vcell = 0;  // substance in molec
  substanceOnly species Nrg in Vcell = 50000000;  // substance in molec
  substanceOnly species Her3_2 in Vcell = 0;  // substance in molec
  substanceOnly species Her3_2_Nrg in Vcell = 0;  // substance in molec
  substanceOnly species Her2 in Vcell = 41000;  // substance in molec
  substanceOnly species pHer3_Nrg in Vcell = 0;  // substance in molec
  substanceOnly species pHer2 in Vcell = 0;  // substance in molec
  substanceOnly species pHer3_2_Nrg in Vcell = 0;  // substance in molec
  substanceOnly species Egfr in Vcell = 178000;  // substance in molec
  substanceOnly species Her3_1_Nrg in Vcell = 0;  // substance in molec
  substanceOnly species pHer3_1_Nrg in Vcell = 0;  // substance in molec
  substanceOnly species pHer2_2 in Vcell = 0;  // substance in molec
  substanceOnly species Her3_1 in Vcell = 0;  // substance in molec
  substanceOnly species Her1_2 in Vcell = 0;  // substance in molec
  substanceOnly species Her1_1 in Vcell = 0;  // substance in molec
  substanceOnly species Her2_2 in Vcell = 0;  // substance in molec
  substanceOnly species phtase in Vcell = 500000;  // substance in molec
  substanceOnly species pHer3_2_Nrg_phtase in Vcell = 0;  // substance in molec
  substanceOnly species pHer3_1_Nrg_phtase in Vcell = 0;  // substance in molec
  substanceOnly species pHer2_2_phtase in Vcell = 0;  // substance in molec
  substanceOnly species Pi3k in Vcell = 800000;  // substance in molec
  substanceOnly species pHer3_2_Nrg_Pi3k in Vcell = 0;  // substance in molec
  substanceOnly species pHer3_1_Nrg_Pi3k in Vcell = 0;  // substance in molec
  substanceOnly species pHer2_2_Pi3k in Vcell = 0;  // substance in molec
  substanceOnly species Pip2 in Vcell = 700000;  // substance in molec
  substanceOnly species pHer3_2_Nrg_Pi3k_Pip2 in Vcell = 0;  // substance in molec
  substanceOnly species pHer3_1_Nrg_Pi3k_Pip2 in Vcell = 0;  // substance in molec
  substanceOnly species pHer2_2_Pi3k_Pip2 in Vcell = 0;  // substance in molec
  substanceOnly species Pip3 in Vcell = 0;  // substance in molec
  substanceOnly species Pten in Vcell = 350000;  // substance in molec
  substanceOnly species Pip3_Pten in Vcell = 0;  // substance in molec
  substanceOnly species Akt in Vcell = 900000;  // substance in molec
  substanceOnly species Pip3_Akt in Vcell = 0;  // substance in molec
  substanceOnly species Pdk1 in Vcell = 9500000;  // substance in molec
  substanceOnly species Pip3_Akt_Pdk1 in Vcell = 0;  // substance in molec
  substanceOnly species Pip3_Pdk1 in Vcell = 0;  // substance in molec
  substanceOnly species pAkt in Vcell = 0;  // substance in molec
  substanceOnly species Pip3_pAkt in Vcell = 0;  // substance in molec
  substanceOnly species Pip3_pAkt_Pdk1 in Vcell = 0;  // substance in molec
  substanceOnly species ppAkt in Vcell = 0;  // substance in molec
  substanceOnly species PP2A in Vcell = 4000;  // substance in molec
  substanceOnly species ppAkt_PP2A in Vcell = 0;  // substance in molec
  substanceOnly species pAkt_PP2A in Vcell = 0;  // substance in molec
  substanceOnly species PP2Aoff in Vcell = 64000;  // substance in molec
  substanceOnly species ppAkt_PP2Aoff in Vcell = 0;  // substance in molec
  substanceOnly species iHer3_Nrg in Vcell = 0;  // substance in molec
  substanceOnly species iHer3_1_Nrg in Vcell = 0;  // substance in molec
  substanceOnly species iNrg in Vcell = 0;  // substance in molec
  substanceOnly species iHer3 in Vcell = 0;  // substance in molec
  substanceOnly species iHer3_2 in Vcell = 0;  // substance in molec
  substanceOnly species iHer3_2_Nrg in Vcell = 0;  // substance in molec
  substanceOnly species iHer2 in Vcell = 0;  // substance in molec
  substanceOnly species iEgfr in Vcell = 0;  // substance in molec
  substanceOnly species iHer3_1 in Vcell = 0;  // substance in molec
  substanceOnly species iHer2_1 in Vcell = 0;  // substance in molec
  substanceOnly species iEgfr_Egfr in Vcell = 0;  // substance in molec
  substanceOnly species iHer2_2 in Vcell = 0;  // substance in molec
  substanceOnly species ipHer3_Nrg in Vcell = 0;  // substance in molec
  substanceOnly species ipHer2 in Vcell = 0;  // substance in molec
  substanceOnly species ipHer3_2_Nrg in Vcell = 0;  // substance in molec
  substanceOnly species ipHer3_2_Nrg_phtase in Vcell = 0;  // substance in molec
  substanceOnly species ipHer3_2_Nrg_Pi3k in Vcell = 0;  // substance in molec
  substanceOnly species ipHer3_2_Nrg_Pi3k_Pip2 in Vcell = 0;  // substance in molec
  substanceOnly species ipHer3_1_Nrg in Vcell = 0;  // substance in molec
  substanceOnly species ipHer3_1_Nrg_phtase in Vcell = 0;  // substance in molec
  substanceOnly species ipHer3_1_Nrg_Pi3k in Vcell = 0;  // substance in molec
  substanceOnly species ipHer3_1_Nrg_Pi3k_Pip2 in Vcell = 0;  // substance in molec
  substanceOnly species ipHer2_2 in Vcell = 0;  // substance in molec
  substanceOnly species ipHer2_2_phtase in Vcell = 0;  // substance in molec
  substanceOnly species ipHer2_2_Pi3k in Vcell = 0;  // substance in molec
  substanceOnly species ipHer2_2_Pi3k_Pip2 in Vcell = 0;  // substance in molec
  substanceOnly species dNrg in Vcell = 0;  // substance in molec
  substanceOnly species dHer3_Nrg in Vcell = 0;  // substance in molec
  substanceOnly species dpHer3_Nrg in Vcell = 0;  // substance in molec
  substanceOnly species dpHer2 in Vcell = 0;  // substance in molec
  substanceOnly species dHer3_2_Nrg in Vcell = 0;  // substance in molec
  substanceOnly species dpHer3_2_Nrg in Vcell = 0;  // substance in molec
  substanceOnly species dpHer3_2_Nrg_phtase in Vcell = 0;  // substance in molec
  substanceOnly species dpHer3_2_Nrg_Pi3k in Vcell = 0;  // substance in molec
  substanceOnly species dpHer3_2_Nrg_Pi3k_Pip2 in Vcell = 0;  // substance in molec
  substanceOnly species dpHer2_2 in Vcell = 0;  // substance in molec
  substanceOnly species dpHer2_2_phtase in Vcell = 0;  // substance in molec
  substanceOnly species dpHer2_2_Pi3k in Vcell = 0;  // substance in molec
  substanceOnly species dpHer2_2_Pi3k_Pip2 in Vcell = 0;  // substance in molec
  substanceOnly species dHer3_1_Nrg in Vcell = 0;  // substance in molec
  substanceOnly species dpHer3_1_Nrg in Vcell = 0;  // substance in molec
  substanceOnly species dpHer3_1_Nrg_phtase in Vcell = 0;  // substance in molec
  substanceOnly species dpHer3_1_Nrg_Pi3k in Vcell = 0;  // substance in molec
  substanceOnly species dpHer3_1_Nrg_Pi3k_Pip2 in Vcell = 0;  // substance in molec
  substanceOnly species Her3_3 in Vcell = 0;  // substance in molec
  substanceOnly species Her3_3_Nrg in Vcell = 0;  // substance in molec
  substanceOnly species pHer3_3_Nrg in Vcell = 0;  // substance in molec
  substanceOnly species pHer3_3_Nrg_phtase in Vcell = 0;  // substance in molec
  substanceOnly species pHer3_3_Nrg_Pi3k in Vcell = 0;  // substance in molec
  substanceOnly species pHer3_3_Nrg_Pi3k_Pip2 in Vcell = 0;  // substance in molec
  substanceOnly species iHer3_3_Nrg in Vcell = 0;  // substance in molec
  substanceOnly species ipHer3_3_Nrg in Vcell = 0;  // substance in molec
  substanceOnly species ipHer3_3_Nrg_phtase in Vcell = 0;  // substance in molec
  substanceOnly species ipHer3_3_Nrg_Pi3k in Vcell = 0;  // substance in molec
  substanceOnly species ipHer3_3_Nrg_Pi3k_Pip2 in Vcell = 0;  // substance in molec
  substanceOnly species dHer3_3_Nrg in Vcell = 0;  // substance in molec
  substanceOnly species dpHer3_3_Nrg in Vcell = 0;  // substance in molec
  substanceOnly species dpHer3_3_Nrg_phtase in Vcell = 0;  // substance in molec
  substanceOnly species dpHer3_3_Nrg_Pi3k in Vcell = 0;  // substance in molec
  substanceOnly species dpHer3_3_Nrg_Pi3k_Pip2 in Vcell = 0;  // substance in molec
  substanceOnly species lap_Egfr in Vcell = 0;  // substance in molec
  substanceOnly species lap_Her2 in Vcell = 0;  // substance in molec
  substanceOnly species lap_Egfr_Egfr in Vcell = 0;  // substance in molec
  substanceOnly species lap_Egfr_Her2 in Vcell = 0;  // substance in molec
  substanceOnly species lap_Egfr_Her3 in Vcell = 0;  // substance in molec
  substanceOnly species lap_Her2_2 in Vcell = 0;  // substance in molec
  substanceOnly species lap_Her2_3 in Vcell = 0;  // substance in molec
  substanceOnly species lap_lap_Egfr_Egfr in Vcell = 0;  // substance in molec
  substanceOnly species lap_lap_Egfr_Her2 in Vcell = 0;  // substance in molec
  substanceOnly species lap_lap_Her2_Her2 in Vcell = 0;  // substance in molec
  substanceOnly species lap_Nrg_Her2_3 in Vcell = 0;  // substance in molec
  substanceOnly species lap_Nrg_Her3_1 in Vcell = 0;  // substance in molec
  substanceOnly species lap in Vcell = 0;  // substance in molec

  // Parameters:
  kf1 = 5e-11 per_molec_sec;
  kr1 = 0.001 per_sec;
  kf2 = 5e-11 per_molec_sec;
  kr2 = 0.001 per_sec;
  kf7 = 3e-6 per_molec_sec;
  kr7 = 0.001 per_sec;
  kf10 = 3e-8 per_molec_sec;
  kf12 = 4.2e-9 per_molec_sec;
  kr12 = 0.001 per_sec;
  kf30 = 1 per_sec;
  kf38 = 5e-6 per_molec_sec;
  kr38 = 0.1 per_sec;
  kf45 = 1 per_sec;
  kf52 = 3e-6 per_molec_sec;
  kr52 = 0.1 per_sec;
  kf54 = 7.5e-7 per_molec_sec;
  kr54 = 0.1 per_sec;
  kf59 = 5e-6 per_molec_sec;
  kr59 = 0.1 per_sec;
  kf61 = 5e-7 per_molec_sec;
  kr61 = 0.1 per_sec;
  kf66 = 0.2 per_sec;
  kf68 = 0.013 per_sec;
  kf73 = 5e-6 per_molec_sec;
  kr73 = 0.1 per_sec;
  kf74 = 0.1 per_sec;
  kf75 = 0.00026 per_molec_sec;
  kr75 = 0.1 per_sec;
  kf76 = 6.7e-5 per_molec_sec;
  kr76 = 0.1 per_sec;
  kf77 = 1 per_sec;
  kf78 = 0.2 per_sec;
  kf81 = 1 per_sec;
  kf82 = 1.7e-6 per_molec_sec;
  kr82 = 0.1 per_sec;
  kf83 = 1.5 per_sec;
  kf86 = 8.3e-9 per_molec_sec;
  kr86 = 0.5 per_sec;
  kf87 = 0.1 per_sec;
  kf88 = 0.1 per_sec;
  kr88 = 0.005 per_sec;
  kf93 = 0.005 per_sec;
  kr93 = 0.005 per_sec;
  kf98 = 0.005 per_sec;
  kr98 = 0.005 per_sec;
  kf127 = 0.038 per_molec_sec;
  kf185 = 0.002 per_sec;
  kf187 = 0.002 per_sec;
  kf192 = 0.002 per_sec;
  kf201 = 0.002 per_sec;
  kf30_weak = 0.001 per_sec;
  kf10_weak = 3e-11 per_molec_sec;
  kflap1 = 6.4e-12 per_molec_sec;
  krlap1 = 3.83e-5 per_sec;
  kflap2 = 1.5e-12 per_molec_sec;
  krlap2 = 3.83e-5 per_sec;
  kflap3 = 1.28e-11 per_molec_sec;
  kflap4 = 3e-12 per_molec_sec;

  // Reactions:
  R1: Nrg + Her3 -> Her3_Nrg; kf1*Nrg*Her3 - kr1*Her3_Nrg;
  R2: Nrg + Her3_2 -> Her3_2_Nrg; kf2*Nrg*Her3_2 - kr2*Her3_2_Nrg;
  R7: Her3_Nrg + Her2 -> Her3_2_Nrg; kf7*Her3_Nrg*Her2 - kr7*Her3_2_Nrg;
  R8: pHer3_Nrg + pHer2 -> pHer3_2_Nrg; kf7*pHer3_Nrg*pHer2 - kr7*pHer3_2_Nrg;
  R9: pHer3_Nrg + Her2 => pHer3_2_Nrg; kf7*pHer3_Nrg*Her2;
  R10: Her3_Nrg + Egfr -> Her3_1_Nrg; kf10*Her3_Nrg*Egfr - kr7*Her3_1_Nrg;
  R11: pHer3_Nrg + Egfr -> pHer3_1_Nrg; kf10*pHer3_Nrg*Egfr - kr7*pHer3_1_Nrg;
  R12: pHer2 + Her2 => pHer2_2; kf12*pHer2*Her2;
  R13: 2 pHer2 -> pHer2_2; kf12*pHer2*pHer2 - kr12*pHer2_2;
  R25: Her3 + Her2 -> Her3_2; kf12*Her3*Her2 - kr12*Her3_2;
  R26: Her3 + Egfr -> Her3_1; kf12*Her3*Egfr - kr12*Her3_1;
  R27: Egfr + Her2 -> Her1_2; kf12*Egfr*Her2 - kr12*Her1_2;
  R28: 2 Egfr -> Her1_1; kf12*Egfr*Egfr - kr12*Her1_1;
  R29: 2 Her2 -> Her2_2; kf12*Her2*Her2 - kr12*Her2_2;
  R30: Her3_2_Nrg => pHer3_2_Nrg; kf30*Her3_2_Nrg;
  R31: Her3_1_Nrg => pHer3_1_Nrg; kf30*Her3_1_Nrg;
  R36: pHer3_Nrg => Her3 + Nrg; kr1*pHer3_Nrg;
  R38: pHer3_2_Nrg + phtase -> pHer3_2_Nrg_phtase; kf38*pHer3_2_Nrg*phtase - kr38*pHer3_2_Nrg_phtase;
  R39: pHer3_1_Nrg + phtase -> pHer3_1_Nrg_phtase; kf38*pHer3_1_Nrg*phtase - kr38*pHer3_1_Nrg_phtase;
  R44: pHer2_2 + phtase -> pHer2_2_phtase; kf38*pHer2_2*phtase - kr38*pHer2_2_phtase;
  R45: pHer3_2_Nrg_phtase => Her3_2_Nrg + phtase; kf45*pHer3_2_Nrg_phtase;
  R46: pHer3_1_Nrg_phtase => Her3_1_Nrg + phtase; kf45*pHer3_1_Nrg_phtase;
  R51: pHer2_2_phtase => Her2_2 + phtase; kf45*pHer2_2_phtase;
  R52: pHer3_2_Nrg + Pi3k -> pHer3_2_Nrg_Pi3k; kf52*pHer3_2_Nrg*Pi3k - kr52*pHer3_2_Nrg_Pi3k;
  R53: pHer3_1_Nrg + Pi3k -> pHer3_1_Nrg_Pi3k; kf52*pHer3_1_Nrg*Pi3k - kr52*pHer3_1_Nrg_Pi3k;
  R54: pHer2_2 + Pi3k -> pHer2_2_Pi3k; kf54*pHer2_2*Pi3k - kr54*pHer2_2_Pi3k;
  R59: pHer3_2_Nrg_Pi3k + Pip2 -> pHer3_2_Nrg_Pi3k_Pip2; kf59*pHer3_2_Nrg_Pi3k*Pip2 - kr59*pHer3_2_Nrg_Pi3k_Pip2;
  R60: pHer3_1_Nrg_Pi3k + Pip2 -> pHer3_1_Nrg_Pi3k_Pip2; kf59*pHer3_1_Nrg_Pi3k*Pip2 - kr59*pHer3_1_Nrg_Pi3k_Pip2;
  R61: pHer2_2_Pi3k + Pip2 -> pHer2_2_Pi3k_Pip2; kf61*pHer2_2_Pi3k*Pip2 - kr61*pHer2_2_Pi3k_Pip2;
  R66: pHer3_2_Nrg_Pi3k_Pip2 => pHer3_2_Nrg_Pi3k + Pip3; kf66*pHer3_2_Nrg_Pi3k_Pip2;
  R67: pHer3_1_Nrg_Pi3k_Pip2 => pHer3_1_Nrg_Pi3k + Pip3; kf66*pHer3_1_Nrg_Pi3k_Pip2;
  R68: pHer2_2_Pi3k_Pip2 => pHer2_2_Pi3k + Pip3; kf68*pHer2_2_Pi3k_Pip2;
  R73: Pip3 + Pten -> Pip3_Pten; kf73*Pip3*Pten - kr73*Pip3_Pten;
  R74: Pip3_Pten => Pip2 + Pten; kf74*Pip3_Pten;
  R75: Pip3 + Akt -> Pip3_Akt; kf75*Pip3*Akt - kr75*Pip3_Akt;
  R76: Pip3_Akt + Pdk1 -> Pip3_Akt_Pdk1; kf76*Pip3_Akt*Pdk1 - kr76*Pip3_Akt_Pdk1;
  R77: Pip3_Akt_Pdk1 => Pip3_Pdk1 + pAkt; kf77*Pip3_Akt_Pdk1;
  R78: Pip3_Pdk1 => Pip3 + Pdk1; kf78*Pip3_Pdk1;
  R79: Pip3 + pAkt -> Pip3_pAkt; kf75*Pip3*pAkt - kr75*Pip3_pAkt;
  R80: Pip3_pAkt + Pdk1 -> Pip3_pAkt_Pdk1; kf76*Pip3_pAkt*Pdk1 - kr76*Pip3_pAkt_Pdk1;
  R81: Pip3_pAkt_Pdk1 => Pip3_Pdk1 + ppAkt; kf81*Pip3_pAkt_Pdk1;
  R82: ppAkt + PP2A -> ppAkt_PP2A; kf82*ppAkt*PP2A - kr82*ppAkt_PP2A;
  R83: ppAkt_PP2A => pAkt + PP2A; kf83*ppAkt_PP2A;
  R84: pAkt + PP2A -> pAkt_PP2A; kf82*pAkt*PP2A - kr82*pAkt_PP2A;
  R85: pAkt_PP2A => Akt + PP2A; kf83*pAkt_PP2A;
  R86: ppAkt + PP2Aoff -> ppAkt_PP2Aoff; kf86*ppAkt*PP2Aoff - kr86*ppAkt_PP2Aoff;
  R87: ppAkt_PP2Aoff => ppAkt + PP2A; kf87*ppAkt_PP2Aoff;
  R88: Her3_Nrg -> iHer3_Nrg; kf88*Her3_Nrg - kr88*iHer3_Nrg;
  R89: pHer3_Nrg -> ipHer3_Nrg; kf88*pHer3_Nrg - kr88*ipHer3_Nrg;
  R90: pHer2 -> ipHer2; kf88*pHer2 - kr88*ipHer2;
  R93: Her3_2_Nrg -> iHer3_2_Nrg; kf93*Her3_2_Nrg - kr93*iHer3_2_Nrg;
  R94: pHer3_2_Nrg -> ipHer3_2_Nrg; kf93*pHer3_2_Nrg - kr93*ipHer3_2_Nrg;
  R95: pHer3_2_Nrg_phtase -> ipHer3_2_Nrg_phtase; kf93*pHer3_2_Nrg_phtase - kr93*ipHer3_2_Nrg_phtase;
  R96: pHer3_2_Nrg_Pi3k -> ipHer3_2_Nrg_Pi3k; kf93*pHer3_2_Nrg_Pi3k - kr93*ipHer3_2_Nrg_Pi3k;
  R97: pHer3_2_Nrg_Pi3k_Pip2 -> ipHer3_2_Nrg_Pi3k_Pip2; kf93*pHer3_2_Nrg_Pi3k_Pip2 - kr93*ipHer3_2_Nrg_Pi3k_Pip2;
  R98: Her3_1_Nrg -> iHer3_1_Nrg; kf98*Her3_1_Nrg - kr98*iHer3_1_Nrg;
  R99: pHer3_1_Nrg -> ipHer3_1_Nrg; kf98*pHer3_1_Nrg - kr98*ipHer3_1_Nrg;
  R100: pHer3_1_Nrg_phtase -> ipHer3_1_Nrg_phtase; kf98*pHer3_1_Nrg_phtase - kr98*ipHer3_1_Nrg_phtase;
  R101: pHer3_1_Nrg_Pi3k -> ipHer3_1_Nrg_Pi3k; kf98*pHer3_1_Nrg_Pi3k - kr98*ipHer3_1_Nrg_Pi3k;
  R102: pHer3_1_Nrg_Pi3k_Pip2 -> ipHer3_1_Nrg_Pi3k_Pip2; kf98*pHer3_1_Nrg_Pi3k_Pip2 - kr98*ipHer3_1_Nrg_Pi3k_Pip2;
  R103: pHer2_2 -> ipHer2_2; kf93*pHer2_2 - kr93*ipHer2_2;
  R104: pHer2_2_phtase -> ipHer2_2_phtase; kf93*pHer2_2_phtase - kr93*ipHer2_2_phtase;
  R105: pHer2_2_Pi3k -> ipHer2_2_Pi3k; kf93*pHer2_2_Pi3k - kr93*ipHer2_2_Pi3k;
  R106: pHer2_2_Pi3k_Pip2 -> ipHer2_2_Pi3k_Pip2; kf93*pHer2_2_Pi3k_Pip2 - kr93*ipHer2_2_Pi3k_Pip2;
  R127: iNrg + iHer3 -> iHer3_Nrg; kf127*iNrg*iHer3 - kr1*iHer3_Nrg;
  R128: iNrg + iHer3_2 -> iHer3_2_Nrg; kf127*iNrg*iHer3_2 - kr1*iHer3_2_Nrg;
  R133: iHer3_Nrg + iHer2 -> iHer3_2_Nrg; kf7*iHer3_Nrg*iHer2 - kr7*iHer3_2_Nrg;
  R134: ipHer3_Nrg + ipHer2 -> ipHer3_2_Nrg; kf7*ipHer3_Nrg*ipHer2 - kr7*ipHer3_2_Nrg;
  R135: ipHer3_Nrg + iHer2 => ipHer3_2_Nrg; kf7*ipHer3_Nrg*iHer2;
  R136: iHer3_Nrg + iEgfr -> iHer3_1_Nrg; kf10*iHer3_Nrg*iEgfr - kr7*iHer3_1_Nrg;
  R137: ipHer3_Nrg + iEgfr -> ipHer3_1_Nrg; kf10*ipHer3_Nrg*iEgfr - kr7*ipHer3_1_Nrg;
  R138: ipHer2 + iHer2 => ipHer2_2; kf12*ipHer2*iHer2;
  R139: 2 ipHer2 -> ipHer2_2; kf12*ipHer2*ipHer2 - kr12*ipHer2_2;
  R151: iHer3 + iHer2 -> iHer3_2; kf12*iHer3*iHer2 - kr12*iHer3_2;
  R152: iHer3 + iEgfr -> iHer3_1; kf12*iHer3*iEgfr - kr12*iHer3_1;
  R153: iHer2 + iEgfr -> iHer2_1; kf12*iHer2*iEgfr - kr12*iHer2_1;
  R154: 2 iEgfr -> iEgfr_Egfr; kf12*iEgfr*iEgfr - kr12*iEgfr_Egfr;
  R155: 2 iHer2 -> iHer2_2; kf12*iHer2*iHer2 - kr12*iHer2_2;
  R156: iHer3_2_Nrg => ipHer3_2_Nrg; kf30*iHer3_2_Nrg;
  R157: iHer3_1_Nrg => ipHer3_1_Nrg; kf30*iHer3_1_Nrg;
  R162: ipHer3_Nrg => iHer3 + iNrg; kr1*ipHer3_Nrg;
  R164: ipHer3_2_Nrg + phtase -> ipHer3_2_Nrg_phtase; kf38*ipHer3_2_Nrg*phtase - kr38*ipHer3_2_Nrg_phtase;
  R165: ipHer3_1_Nrg + phtase -> ipHer3_1_Nrg_phtase; kf38*ipHer3_1_Nrg*phtase - kr38*ipHer3_1_Nrg_phtase;
  R166: ipHer2_2 + phtase -> ipHer2_2_phtase; kf38*ipHer2_2*phtase - kr38*ipHer2_2_phtase;
  R171: ipHer3_2_Nrg_phtase => iHer3_2_Nrg + phtase; kf45*ipHer3_2_Nrg_phtase;
  R172: ipHer3_1_Nrg_phtase => iHer3_1_Nrg + phtase; kf45*ipHer3_1_Nrg_phtase;
  R173: ipHer2_2_phtase => iHer2_2 + phtase; kf45*ipHer2_2_phtase;
  R178: ipHer3_2_Nrg + Pi3k -> ipHer3_2_Nrg_Pi3k; kf52*ipHer3_2_Nrg*Pi3k - kr52*ipHer3_2_Nrg_Pi3k;
  R179: ipHer3_1_Nrg + Pi3k -> ipHer3_1_Nrg_Pi3k; kf52*ipHer3_1_Nrg*Pi3k - kr52*ipHer3_1_Nrg_Pi3k;
  R180: ipHer2_2 + Pi3k -> ipHer2_2_Pi3k; kf54*ipHer2_2*Pi3k - kr54*ipHer2_2_Pi3k;
  R185: iNrg => dNrg; kf185*iNrg;
  R187: iHer3_Nrg => dHer3_Nrg; kf187*iHer3_Nrg;
  R189: ipHer3_Nrg => dpHer3_Nrg; kf187*ipHer3_Nrg;
  R191: ipHer2 => dpHer2; kf187*ipHer2;
  R192: iHer3_2_Nrg => dHer3_2_Nrg; kf192*iHer3_2_Nrg;
  R193: ipHer3_2_Nrg => dpHer3_2_Nrg; kf192*ipHer3_2_Nrg;
  R194: ipHer3_2_Nrg_phtase => dpHer3_2_Nrg_phtase; kf192*ipHer3_2_Nrg_phtase;
  R195: ipHer3_2_Nrg_Pi3k => dpHer3_2_Nrg_Pi3k; kf192*ipHer3_2_Nrg_Pi3k;
  R196: ipHer3_2_Nrg_Pi3k_Pip2 => dpHer3_2_Nrg_Pi3k_Pip2; kf192*ipHer3_2_Nrg_Pi3k_Pip2;
  R197: ipHer2_2 => dpHer2_2; kf192*ipHer2_2;
  R198: ipHer2_2_phtase => dpHer2_2_phtase; kf192*ipHer2_2_phtase;
  R199: ipHer2_2_Pi3k => dpHer2_2_Pi3k; kf192*ipHer2_2_Pi3k;
  R200: ipHer2_2_Pi3k_Pip2 => dpHer2_2_Pi3k_Pip2; kf192*ipHer2_2_Pi3k_Pip2;
  R201: iHer3_1_Nrg => dHer3_1_Nrg; kf201*iHer3_1_Nrg;
  R202: ipHer3_1_Nrg => dpHer3_1_Nrg; kf201*ipHer3_1_Nrg;
  R203: ipHer3_1_Nrg_phtase => dpHer3_1_Nrg_phtase; kf201*ipHer3_1_Nrg_phtase;
  R204: ipHer3_1_Nrg_Pi3k => dpHer3_1_Nrg_Pi3k; kf201*ipHer3_1_Nrg_Pi3k;
  R205: ipHer3_1_Nrg_Pi3k_Pip2 => dpHer3_1_Nrg_Pi3k_Pip2; kf201*ipHer3_1_Nrg_Pi3k_Pip2;
  R206: 2 Her3 -> Her3_3; kf12*Her3*Her3 - kr12*Her3_3;
  R207: Her3_3 + Nrg -> Her3_3_Nrg; kf1*Nrg*Her3_3 - kr1*Her3_3_Nrg;
  R208: Her3_Nrg + Her3 -> Her3_3_Nrg; kf7*Her3_Nrg*Her3 - kr7*Her3_3_Nrg;
  R209: Her3_3_Nrg => pHer3_3_Nrg; kf30_weak*Her3_3_Nrg;
  R210: pHer3_3_Nrg + phtase -> pHer3_3_Nrg_phtase; kf38*pHer3_3_Nrg*phtase - kr38*pHer3_3_Nrg_phtase;
  R211: pHer3_3_Nrg_phtase => Her3_3_Nrg + phtase; kf45*pHer3_3_Nrg_phtase;
  R212: pHer3_3_Nrg + Pi3k -> pHer3_3_Nrg_Pi3k; kf52*pHer3_3_Nrg*Pi3k - kr52*pHer3_3_Nrg_Pi3k;
  R213: pHer3_3_Nrg_Pi3k + Pip2 -> pHer3_3_Nrg_Pi3k_Pip2; kf59*pHer3_3_Nrg_Pi3k*Pip2 - kr59*pHer3_3_Nrg_Pi3k_Pip2;
  R214: pHer3_3_Nrg_Pi3k_Pip2 => pHer3_3_Nrg_Pi3k + Pip3; kf66*pHer3_3_Nrg_Pi3k_Pip2;
  R215: pHer3_Nrg + Her3 -> pHer3_3_Nrg; kf10_weak*pHer3_Nrg*Her3 - kr7*pHer3_3_Nrg;
  R216: Her3_3_Nrg -> iHer3_3_Nrg; kf93*Her3_3_Nrg - kr93*iHer3_3_Nrg;
  R217: pHer3_3_Nrg -> ipHer3_3_Nrg; kf93*pHer3_3_Nrg - kr93*ipHer3_3_Nrg;
  R218: pHer3_3_Nrg_phtase -> ipHer3_3_Nrg_phtase; kf93*pHer3_3_Nrg_phtase - kr93*ipHer3_3_Nrg_phtase;
  R219: pHer3_3_Nrg_Pi3k -> ipHer3_3_Nrg_Pi3k; kf93*pHer3_3_Nrg_Pi3k - kr93*ipHer3_3_Nrg_Pi3k;
  R220: pHer3_3_Nrg_Pi3k_Pip2 -> ipHer3_3_Nrg_Pi3k_Pip2; kf93*pHer3_3_Nrg_Pi3k_Pip2 - kr93*ipHer3_3_Nrg_Pi3k_Pip2;
  R221: iHer3_3_Nrg => dHer3_3_Nrg; kf192*iHer3_3_Nrg;
  R222: ipHer3_3_Nrg => dpHer3_3_Nrg; kf192*ipHer3_3_Nrg;
  R223: ipHer3_3_Nrg_phtase => dpHer3_3_Nrg_phtase; kf192*ipHer3_3_Nrg_phtase;
  R224: ipHer3_3_Nrg_Pi3k => dpHer3_3_Nrg_Pi3k; kf192*ipHer3_3_Nrg_Pi3k;
  R225: ipHer3_3_Nrg_Pi3k_Pip2 => dpHer3_3_Nrg_Pi3k_Pip2; kf192*ipHer3_3_Nrg_Pi3k_Pip2;
  R226: Egfr + lap -> lap_Egfr; kflap1*lap*Egfr - krlap1*lap_Egfr;
  R227: Her2 + lap -> lap_Her2; kflap2*lap*Her2 - krlap2*lap_Her2;
  R228: Her1_1 + lap -> lap_Egfr_Egfr; kflap3*lap*Her1_1 - krlap1*lap_Egfr_Egfr;
  R229: Her1_2 + lap -> lap_Egfr_Her2; kflap3*lap*Her1_2 - krlap1*lap_Egfr_Her2;
  R230: Her3_1 + lap -> lap_Egfr_Her3; kflap1*lap*Her3_1 - krlap1*lap_Egfr_Her3;
  R231: Her2_2 + lap -> lap_Her2_2; kflap4*lap*Her2_2 - krlap2*lap_Her2_2;
  R232: Her3_2 + lap -> lap_Her2_3; kflap2*lap*Her3_2 - krlap2*lap_Her2_3;
  R233: lap + lap_Egfr_Egfr -> lap_lap_Egfr_Egfr; kflap1*lap*lap_Egfr_Egfr - krlap1*lap_lap_Egfr_Egfr;
  R234: lap_Egfr_Her2 + lap -> lap_lap_Egfr_Her2; kflap1*lap*lap_Egfr_Her2 - krlap1*lap_lap_Egfr_Her2;
  R235: lap + lap_Her2_2 -> lap_lap_Her2_Her2; kflap2*lap*lap_Her2_2 - krlap2*lap_lap_Her2_Her2;
  R236: Her3_2_Nrg + lap -> lap_Nrg_Her2_3; kflap2*lap*Her3_2_Nrg - krlap2*lap_Nrg_Her2_3;
  R237: Her3_1_Nrg + lap -> lap_Nrg_Her3_1; kflap1*lap*Her3_1_Nrg - krlap1*lap_Nrg_Her3_1;
  R238: lap_Egfr + Egfr -> lap_Egfr_Egfr; kf12*lap_Egfr*Egfr - kr12*lap_Egfr_Egfr;
  R239: Her2 + lap_Egfr -> lap_Egfr_Her2; kf12*lap_Egfr*Her2 - kr12*lap_Egfr_Her2;
  R240: Her3 + lap_Egfr -> lap_Egfr_Her3; kf12*lap_Egfr*Her3 - kr12*lap_Egfr_Her3;
  R241: Egfr + lap_Her2 -> lap_Egfr_Her2; kf12*lap_Her2*Egfr - kr12*lap_Egfr_Her2;
  R242: Her3 + lap_Her2 -> lap_Her2_3; kf12*lap_Her2*Her3 - kr12*lap_Her2_3;
  R243: 2 lap_Egfr -> lap_lap_Egfr_Egfr; kf12*lap_Egfr*lap_Egfr - kr12*lap_lap_Egfr_Egfr;
  R244: lap_Egfr + lap_Her2 -> lap_lap_Egfr_Her2; kf12*lap_Egfr*lap_Her2 - kr12*lap_lap_Egfr_Her2;
  R245: 2 lap_Her2 -> lap_lap_Her2_Her2; kf12*lap_Her2*lap_Her2 - kr12*lap_lap_Her2_Her2;
  R246: lap_Her2 + Her3_Nrg -> lap_Nrg_Her2_3; kf7*lap_Her2*Her3_Nrg - kr7*lap_Nrg_Her2_3;
  R247: lap_Egfr + Her3_Nrg -> lap_Nrg_Her3_1; kf10*lap_Egfr*Her3_Nrg - kr7*lap_Nrg_Her3_1;
  R248: Nrg + lap_Her2_3 -> lap_Nrg_Her2_3; kf2*lap_Her2_3*Nrg - kr1*lap_Nrg_Her2_3;

  // Unit definitions:
  unit per_sec = 1 / second;
  unit per_molec_sec = 1 / (6.022e23 mole * second);
  unit molec = 6.022e23 mole;
end
