// SBML level 2 version 4

model Jamshidi01_RBC_MetabolicNetwork()
  // Dynamic simulation of the human red blood cell metabolic network
  // Neema Jamshidi, Jeremy S. Edwards, Tom Fahland, George M. Church, Bernhard O. Palsson, Bioinformatics 2001 17:286-287
  // This SBML file was created from run_kinetic.m (very kindly provided by Keren Yizhak) - a Matlab implementation of the original Mathematica workbook .
  // This model originates from BioModels Database: A Database of Annotated Published Models (http://www.ebi.ac.uk/biomodels/). It is copyright (c) 2005-2011 The BioModels.net Team.
  // To the extent possible under law, all copyright and related or neighbouring rights to this encoded model have been dedicated to the public domain worldwide. Please refer to CC0 Public Domain Dedication for more information.
  // In summary, you are entitled to use this encoded model in absolutely any manner you deem suitable, verbatim, or with modification, alone or embedded it in a larger context, redistribute it, commercially or not, in a restricted way or not. .
  // To cite BioModels Database, please use: Li C, Donizelli M, Rodriguez N, Dharuri H, Endler L, Chelliah V, Li L, He E, Henry A, Stefan MI, Snoep JL, Hucka M, Le Novère N, Laibe C (2010) BioModels Database: An enhanced, curated and annotated resource for published quantitative kinetic models. BMC Syst Biol., 4:92.
  // biomodels.db:MODEL1103210001
  // occursIn taxonomy:9606
  // isDescribedBy pubmed:11294796
  // biomodels.db:MODEL1103210001
  // isDescribedBy pubmed:11294796
  // biomodels.db:MODEL1103210001

  // Compartments:
  compartment cell = 1;  // GO:0005622
  compartment extracellular = 1;  // GO:0005576

  // Species:
  species ADE in cell = 0.00103; ADE is "adenine";
  species ADO in cell = 5.19e-5; ADO is "adenosine";
  species ADP in cell = 0.492; ADP is "adenosine di-phosphate";
  species AMP in cell = 0.148; AMP is "adensoine mono-phosphate";
  species ATP in cell = 2.401; ATP is "adenosine tri-phosphate";
  species DHAP in cell = 0.147; DHAP is "dihydroxy acetone phosphate";
  species DPG13 in cell = 0.000228; DPG13 is "1,2 diphosphoglycerate (bis phosphoglycerate)";
  species DPG23 in cell = 4.65; DPG23 is "2,3 diphosphoglycerate (bis phosphoglycerate)";
  species E4P in cell = 0.00507; E4P is "erythrose 4 phosphate";
  species F6P in cell = 0.0272; F6P is "fructose 6 phosphate";
  species FDP in cell = 0.01386; FDP is "fructose diphosphate (bisphosphate)";
  species G6P in cell = 0.066; G6P is "glucose 6 phosphate";
  species GAP in cell = 0.00669; GAP is "glyceraldehyde 3 phosphate";
  species GL6P in cell = 0.001759; GL6P is "6 phosphogluconolactone";
  species GO6P in cell = 0.0374; GO6P is "6 phosphogluconate";
  species GSH in cell = 3.312; GSH is "glutathione - reduced form";
  species HX in cell = 0.000226; HX is "hypoxanthine";
  species IMP in cell = 0.0192; IMP is "inosine monophosphate";
  species INO in cell = 4.27e-5; INO is "inosine";
  species KI in cell = 139.882; KI is "internal potassium concentration";
  species LAC in cell = 1.398; LAC is "lactate";
  species MG in cell = 0.233836; MG is "uncomplexed magnesium";
  species MGADP in cell = 0.110216; MGADP is "magnesium complexed with ADP";
  species MGAMP in cell = 0.00154265; MGAMP is "magnesium complexed with AMP";
  species MGATP in cell = 1.78328; MGATP is "magnesium complexed with ATP";
  species MGDPG23 in cell = 0.571129; MGDPG23 is "magnesium complexed with 2,3 DPG";
  species NADH in cell = 0.030592; NADH is "nicotinamide dinucleotide - reduced";
  species NADPH in cell = 0.0659; NADPH is "nicotinamide dinucleotide phosphate - reduced";
  species NAI in cell = 14.135; NAI is "internal sodium concentration";
  species PEP in cell = 0.02087; PEP is "phosphoenolpyruvate";
  species PG2 in cell = 0.01226; PG2 is "2 phsophoglycerate";
  species PG3 in cell = 0.0839; PG3 is "3 phosphoglycerate";
  species PRPP in cell = 0.0136; PRPP is "phosphoribosyl pyrophosphate";
  species PYR in cell = 0.062; PYR is "pyruvate";
  species R1P in cell = 0.0117; R1P is "ribose 1 phosphate";
  species R5P in cell = 0.01266; R5P is "ribose 5 phosphate";
  species RU5P in cell = 0.00493; RU5P is "ribulose 5 phosphate";
  species S7P in cell = 0.02398; S7P is "seduheptulose 7 phosphate";
  species X5P in cell = 0.01478; X5P is "xylulose 5 phosphate";
  species $LACEXT in extracellular = 1.2;
  species $PYREXT in extracellular = 0.06;
  species $adoex in extracellular = 8e-5;
  species $adeex in extracellular = 0.0013;
  species $inoex in extracellular = 0.0002;
  species $GSHex in extracellular = 0;
  species $HXex in extracellular = 0;
  species $KLEak in extracellular = 0;
  species $NALEak in extracellular = 0;

  // Parameters:
  PHE = 7.4;
  CO2 = 1.2;
  TEMP = 310;
  RT = 0.6;
  NADHT = 0.089;
  NADPHT = 0.066;
  GSSGT = 3.32;
  GLC = 5;
  MGT = 2.7;
  PI = 1.2;
  KE = 5;
  NAE = 140;
  S = 1.55e-6;
  V = 8.7e-11;
  KMGATP = 1.13;
  KMGAMG = 1.14;
  KMG = 1.03;
  KG6P = 0.334;
  KPG23 = 2.7;
  KMGPG = 3.44;
  CONSTHK = 1.55;
  KMAGLC = 0.051;
  KGLC = 0.04;
  Kglcg6p = 0.069;
  G16P = 0.16;
  KG16P = 0.334;
  kpgi1 = 60290;
  KPGI = 0.41;
  pfkKMG = 0.44;
  pfkKF6P = 0.1;
  pfkKAMP = 0.033;
  pfkLO = 0.001072;
  aldkeq = 0.081;
  aldK1 = 38500000;
  aldK2 = 838800;
  aldK3 = 6840000;
  aldK4 = 40320000;
  aldK5 = 252000;
  aldK6 = 23076000;
  tpiEPSI = 200;
  tpiKTPI = 22;
  tpiKTP1 = 31056;
  KGAPDH = 1.1294e-6;
  KGA1 = 115975;
  KPG = 1800;
  kpgk1 = 8633310;
  KPGM1 = 5000;
  KPGM = 0.1470588;
  KEN = 1.708543;
  KEN1 = 50000;
  pkKADP = 0.474;
  pkKPEP = 0.225;
  pkKFDP = 0.005;
  pkKATP = 3.39;
  KLDH = 44.64;
  KLD1 = 3.086422e5;
  KLAC = 12.8;
  adaKII = 1.3;
  adkK1 = 0.081;
  adkK2 = 0.81;
  adkK3 = 22.2;
  adkk0 = 0.22933781;
  adkKAP1 = 54.4;
  ampdaKIMP = 2.5;
  ETG6PD = 9.3e-8;
  KG6PD1 = 110000000;
  KG6PD2 = 870;
  KG6PD3 = 26000000;
  KG6PD4 = 300;
  KG6PD5 = 750;
  KG6PD6 = 2000;
  KG6PD7 = 220000;
  KG6PD8 = 1100000000;
  KG6PD9 = 10000;
  KG6PD10 = 1400000000;
  ETG16PD = 2.1e-6;
  KG16PD1 = 1200000;
  KG16PD2 = 410;
  KG16PD3 = 1000000000;
  KG16PD4 = 26000;
  KG16PD5 = 48;
  KG16PD6 = 30;
  KG16PD7 = 630;
  KG16PD8 = 36000;
  KG16PD9 = 800;
  KG16PD10 = 450000;
  KG16PD11 = 300;
  KG16PD12 = 9900000;
  gssgK3 = 100000000;
  gssgET = 1.25e-7;
  gssgK1 = 85000000;
  gssgK2 = 510;
  gssgK4 = 7200;
  gssgK5 = 810;
  gssgK6 = 1000;
  gssgK7 = 1000000;
  gssgK8 = 50000000;
  gssgK9 = 1000000;
  gssgK10 = 50000000;
  gssgK11 = 7000;
  gssgK12 = 100000000;
  tkiKEQ = 1.2;
  tkiK1 = 777600;
  tkiK4 = 561600;
  tkiK5 = 1184400;
  tkiK8 = 161280;
  tkiK2 = 136800;
  tkiK3 = 122400;
  tkiK6 = 630000;
  tkiK7 = 144000;
  KEQTKII = 10.3;
  KTKII1 = 777600;
  KTKII2 = 136800;
  KTKII3 = 122400;
  KTKII4 = 561600;
  KTKII5 = 806400;
  KTKII6 = 630000;
  KTKII7 = 144000;
  KTKII8 = 76680;
  KALD1 = 2088000;
  KALD2 = 163080;
  KALD3 = 58680;
  KALD4 = 3636000;
  KALD5 = 1764000;
  KALD6 = 216000;
  KALD7 = 61200;
  KALD8 = 284400;
  KEQALD = 1.05;
  pnpaseKeq = 0.09;
  pnpaseKA1 = 1950;
  prmKeq = 13.3;
  prmKA1 = 427.59;
  kPK = 3.564e-7;
  kKM = 4;
  kFMAXK = 3.115;
  PNA = 3.96e-7;
  naKM = 21;
  FMAXN = 2.8166;
  KSPPUMP = 0.1328;
  KSPUMP = 0.0617;
  PSIPUMP = 0.7114;
  KPUMP1 = 0.0082;
  KPUMP2 = 0.0501;
  KNAPUMP = 6.2672;
  kAss = 10000;

  // Assignment rules:
  SV := S/V;
  GSSG := 0.5*(GSSGT - GSH);
  NADP := NADPHT - NADPH;
  ATPF := ATP - MGATP;
  HE := 10^(-PHE)*1000;
  HI := HE/(92/100*RT);
  PHI := -log10(HI) + 3;
  NAD := NADHT - NADH;
  KDPGM := 2.75*10^5*exp(16.907 - 5236.7/TEMP);
  VM1HK := 7.5095/(1 + HI/(2.2718*10^(-4)) + 4.6015*10^(-6)/HI)*exp(18.21 - 5637.9/TEMP);
  N1HK := 1 + GLC/KGLC + (1 + GLC/KMAGLC)*MGATP/KMGATP + (1 + GLC/KGLC)*MG/KMG + (1 + GLC/KMAGLC)*MGATP*MG/KMGATP/KMGAMG + (G6P/KG6P + GLC*G6P/KGLC/Kglcg6p + G16P/KG16P + GLC/KGLC*CONSTHK)*(1 + MG/KMG) + (1 + GLC/KGLC)*(DPG23/KPG23 + MG*DPG23/KMG/KMGPG);
  kpgi2 := kpgi1/KPGI;
  pfkKATP := exp(-5.8693*10^(-2) + 0.32796*PHI)/1000;
  pfkVM := 250*exp(13.474 - 4174.8/TEMP);
  LPFK := pfkLO*(1 + ATPF/pfkKATP)^4*(1 + MG/pfkKMG)^4/((1 + F6P/pfkKF6P)^4*(1 + AMP/pfkKAMP)^4);
  aldN1 := aldK1*aldK3*aldK5;
  aldN2 := aldN1/aldkeq;
  aldD1 := aldK5*(aldK3 + aldK2);
  aldD2 := aldK1*(aldK3 + aldK5);
  aldD3 := aldK2*aldK4;
  aldD4 := aldK6*(aldK3 + aldK2);
  aldD5 := aldK1*aldK4;
  aldD6 := aldK4*aldK6;
  tpiKTP2 := tpiKTP1*tpiKTPI;
  KGA2 := KGA1/KGAPDH;
  kpgk2 := kpgk1/KPG;
  dpgmk := 17778/10000*exp(-144503/10000 + 148/100*PHI);
  dpgasek := 0.5208*exp(-8.0287 + 0.98217*PHI);
  KPGM2 := KPGM1/KPGM;
  KEN2 := KEN1/KEN;
  pkDEN1 := MGADP/(pkKADP + MGADP)*PEP/(pkKPEP + PEP);
  pkDEN2 := (1 + ATP/pkKATP)^4;
  pkDEN3 := (1 + PEP/pkKPEP)^4*(1 + FDP/pkKFDP)^4;
  KLD2 := KLD1/KLDH;
  VLAC := -KLAC*(LACEXT - LAC);
  KAMPAS := 1.648/(1 + HI/(2.5642*10^(-3)) + 1.2159*10^(-6)/HI);
  adaVM := 36.348/(1 + HI/(1.995*10^(-4)) + 3.162*10^(-5)/HI)*exp(19.876 - 6152.2/TEMP);
  akVM := 8.6229/(1 + 1.636*10^(-4)/HI)*exp(19.876 - 6152.2/TEMP);
  adkKADK := adkk0*(MG + adkK1)*(MG + adkK3)/(MG + adkK2)/(MG + adkK2);
  adkKAP2 := adkKAP1/adkKADK;
  katpase := 0.4149938/(1 + HI/(3.7342*10^(-3)) + 8.2714*10^(-7)/HI)*exp(14.543 - 4501.5/TEMP);
  adprtVM := 0.202/(1 + HI/(3.981*10^(-5)) + 3.162*10^(-7)/HI)*exp(23.356 - 7240.2/TEMP);
  MG6PD1 := KG6PD1*KG6PD3*KG6PD5*KG6PD7*KG6PD9*1.1631/(1 + HI/(3.867*10^(-4)))*exp(14.167 - 4380.4/TEMP)*ETG6PD;
  MG6PD2 := KG6PD2*KG6PD4*KG6PD6*KG6PD8*KG6PD10*1.1631/(1 + HI/(3.867*10^(-4)))*exp(14.167 - 4380.4/TEMP)*ETG6PD;
  DG6PD1 := KG6PD2*KG6PD9*(KG6PD4*KG6PD6 + KG6PD4*KG6PD7 + KG6PD5*KG6PD7);
  DG6PD2 := KG6PD1*KG6PD9*(KG6PD4*KG6PD6 + KG6PD4*KG6PD7 + KG6PD5*KG6PD7);
  DG6PD5 := KG6PD2*KG6PD10*(KG6PD4*KG6PD6 + KG6PD4*KG6PD7 + KG6PD5*KG6PD7);
  DG6PD3 := KG6PD3*KG6PD5*KG6PD7*KG6PD9;
  DG6PD4 := KG6PD2*KG6PD4*KG6PD6*KG6PD8;
  DG6PD6 := KG6PD1*KG6PD3*(KG6PD5*KG6PD7 + KG6PD5*KG6PD9 + KG6PD6*KG6PD9 + KG6PD7*KG6PD9);
  DG6PD7 := KG6PD1*KG6PD4*KG6PD6*KG6PD8;
  DG6PD8 := KG6PD3*KG6PD5*KG6PD7*KG6PD10;
  DG6PD9 := KG6PD8*KG6PD10*(KG6PD2*KG6PD4 + KG6PD2*KG6PD5 + KG6PD2*KG6PD6 + KG6PD4*KG6PD6);
  DG6PD10 := KG6PD1*KG6PD3*KG6PD8*(KG6PD5 + KG6PD6);
  DG6PD11 := KG6PD3*KG6PD8*KG6PD10*(KG6PD5 + KG6PD6);
  NUMG6PDH := (MG6PD1*NADP*G6P - MG6PD2*GL6P*NADPH)*1*10^(-6);
  DENG6PD1 := DG6PD1 + (DG6PD2*NADP + DG6PD3*G6P + DG6PD4*GL6P + DG6PD5*NADPH)*1*10^(-3);
  DENG6PD2 := (DG6PD6*NADP*G6P + DG6PD7*NADP*GL6P + DG6PD8*G6P*NADPH)*1*10^(-6);
  DENG6PD3 := DG6PD9*GL6P*NADPH*1*10^(-6) + DG6PD10*NADP*G6P*GL6P*1*10^(-9);
  DENG6PD4 := DG6PD11*G6P*GL6P*NADPH*1*10^(-9);
  DENG6PDH := DENG6PD1 + DENG6PD2 + DENG6PD3 + DENG6PD4;
  MG16PD1 := KG16PD1*KG16PD3*KG16PD5*KG16PD7*KG16PD9*KG16PD11*exp(17.896 - 5546.8/TEMP)*ETG16PD;
  MG16PD2 := KG16PD2*KG16PD4*KG16PD6*KG16PD8*KG16PD10*KG16PD12*exp(17.896 - 5546.8/TEMP)*ETG16PD;
  DG16PD1 := KG16PD2*KG16PD9*KG16PD11*(KG16PD4*KG16PD6 + KG16PD4*KG16PD7 + KG16PD5*KG16PD7);
  DG16PD2 := KG16PD1*KG16PD9*KG16PD11*(KG16PD4*KG16PD6 + KG16PD4*KG16PD7 + KG16PD5*KG16PD7);
  DG16PD3 := KG16PD3*KG16PD5*KG16PD7*KG16PD9*KG16PD11;
  DG16PD4 := KG16PD2*KG16PD4*KG16PD6*KG16PD8*KG16PD11;
  DG16PD5 := KG16PD2*KG16PD9*KG16PD12*(KG16PD4*KG16PD6 + KG16PD4*KG16PD7 + KG16PD5*KG16PD7);
  AG16PD1 := KG16PD1*KG16PD3*(KG16PD5*KG16PD9*KG16PD11 + KG16PD6*KG16PD9*KG16PD11);
  BG16PD1 := KG16PD1*KG16PD3*(KG16PD7*KG16PD9*KG16PD11 + KG16PD5*KG16PD7*KG16PD9);
  CG16PD1 := KG16PD1*KG16PD3*KG16PD5*KG16PD7*KG16PD11;
  DG16PD6 := AG16PD1 + BG16PD1 + CG16PD1;
  DG16PD7 := KG16PD1*KG16PD4*KG16PD6*KG16PD8*KG16PD11;
  DG16PD8 := KG16PD3*KG16PD5*KG16PD7*KG16PD9*KG16PD12;
  DG16PD9 := KG16PD2*KG16PD4*KG16PD6*KG16PD8*KG16PD10;
  DG16PD10 := KG16PD2*KG16PD4*KG16PD6*KG16PD8*KG16PD12;
  DG16PD11 := KG16PD2*KG16PD10*KG16PD12*(KG16PD4*KG16PD6 + KG16PD4*KG16PD7 + KG16PD5*KG16PD7);
  DG16PD12 := KG16PD1*KG16PD3*KG16PD8*KG16PD11*(KG16PD5 + KG16PD6);
  DG16PD13 := KG16PD1*KG16PD3*KG16PD5*KG16PD7*KG16PD10;
  DG16PD14 := KG16PD1*KG16PD4*KG16PD6*KG16PD8*KG16PD10;
  DG16PD15 := KG16PD3*KG16PD5*KG16PD7*KG16PD10*KG16PD12;
  DG16PD16 := KG16PD8*KG16PD10*KG16PD12*(KG16PD2*KG16PD4 + KG16PD2*KG16PD5 + KG16PD2*KG16PD6 + KG16PD4*KG16PD6);
  DG16PD17 := KG16PD1*KG16PD3*KG16PD8*KG16PD10*(KG16PD5 + KG16PD6);
  DG16PD18 := KG16PD3*KG16PD8*KG16PD10*KG16PD12*(KG16PD5 + KG16PD6);
  NUMG16PD := MG16PD1*NADP*GO6P*36.7065*10^(-3) - MG16PD2*CO2*RU5P*NADPH*36.7065*10^(-6);
  DENG16PD1 := DG16PD1 + (DG16PD2*NADP + DG16PD3*GO6P + DG16PD4*CO2 + DG16PD5*NADPH)*1*10^(-3);
  DENG16PD2 := (DG16PD6*NADP*GO6P + DG16PD7*NADP*CO2 + DG16PD8*GO6P*NADPH)*1*10^(-6);
  DENG16PD3 := (DG16PD9*CO2*RU5P + DG16PD10*CO2*NADPH + DG16PD11*RU5P*NADPH)*1*10^(-6);
  DENG16PD4 := (DG16PD12*NADP*GO6P*CO2 + DG16PD13*NADP*GO6P*RU5P)*1*10^(-9);
  DENG16PD5 := (DG16PD14*NADP*CO2*RU5P + DG16PD15*GO6P*RU5P*NADPH)*1*10^(-9);
  DENG16PD6A := DG16PD16*CO2*RU5P*NADPH*1*10^(-9);
  DENG16PD6B := DG16PD17*NADP*GO6P*CO2*RU5P*1*10^(-12);
  DENG16PD6 := DENG16PD6A + DENG16PD6B;
  DENG16PD7 := DG16PD18*GO6P*CO2*RU5P*NADPH*1*10^(-12);
  DENG16PD := DENG16PD1 + DENG16PD2 + DENG16PD3 + DENG16PD4 + DENG16PD5 + DENG16PD6 + DENG16PD7;
  gssgM1 := gssgK1*gssgK3*gssgK5*gssgK7*gssgK9*gssgK11*exp(15.136 - 4690.8/TEMP)*gssgET*15455.6;
  gssgM2 := gssgK2*gssgK4*gssgK6*gssgK8*gssgK10*gssgK12*exp(15.136 - 4690.8/TEMP)*gssgET*15455.6;
  gssgD1 := gssgK2*gssgK9*gssgK11*(gssgK4*gssgK6 + gssgK4*gssgK7 + gssgK5*gssgK7);
  gssgD2 := gssgK1*gssgK9*gssgK11*(gssgK4*gssgK6 + gssgK4*gssgK7 + gssgK5*gssgK7);
  gssgD3 := gssgK3*gssgK5*gssgK7*gssgK9*gssgK11;
  gssgD4 := gssgK2*gssgK4*gssgK6*gssgK8*gssgK11;
  gssgD5 := gssgK2*gssgK9*gssgK12*(gssgK4*gssgK6 + gssgK4*gssgK7 + gssgK5*gssgK7);
  gssgD6 := gssgK1*gssgK3*(gssgK5*gssgK9*gssgK11 + gssgK6*gssgK9*gssgK11 + gssgK7*gssgK9*gssgK11 + gssgK5*gssgK7*gssgK9 + gssgK5*gssgK7*gssgK11);
  gssgD7 := gssgK1*gssgK4*gssgK6*gssgK8*gssgK11;
  gssgD8 := gssgK3*gssgK5*gssgK7*gssgK9*gssgK12;
  gssgD9 := gssgK2*gssgK4*gssgK6*gssgK8*gssgK10;
  gssgD10 := gssgK2*gssgK4*gssgK6*gssgK8*gssgK12;
  gssgD11 := gssgK2*gssgK10*gssgK12*(gssgK4*gssgK6 + gssgK4*gssgK7 + gssgK5*gssgK7);
  gssgD12 := gssgK1*gssgK3*gssgK8*gssgK11*(gssgK5 + gssgK6);
  gssgD13 := gssgK1*gssgK3*gssgK5*gssgK7*gssgK10;
  gssgD14 := gssgK1*gssgK4*gssgK6*gssgK8*gssgK10;
  gssgD15 := gssgK3*gssgK5*gssgK7*gssgK10*gssgK12;
  gssgD16 := gssgK8*gssgK10*gssgK12*(gssgK2*gssgK4 + gssgK2*gssgK5 + gssgK2*gssgK6 + gssgK4*gssgK6);
  gssgD17 := gssgK1*gssgK3*gssgK8*gssgK10*(gssgK5 + gssgK6);
  gssgD18 := gssgK3*gssgK8*gssgK10*gssgK12*(gssgK5 + gssgK6);
  gssgNUM := gssgM1*NADPH*GSSG - gssgM2*GSH*GSH*NADP;
  gssgDEN1 := gssgD1 + (gssgD2*NADPH + gssgD3*GSSG + gssgD4*GSH + gssgD5*NADP)*1*10^(-3);
  gssgDEN2 := (gssgD6*NADPH*GSSG + gssgD7*NADPH*GSH + gssgD8*GSSG*NADP)*1*10^(-6);
  gssgDEN3 := gssgD9*GSH*GSH*1*10^(-6) + (gssgD10 + gssgD11)*GSH*NADP*1*10^(-6);
  gssgDEN4 := (gssgD12 + gssgD13)*NADPH*GSSG*GSH*1*10^(-9);
  gssgDEN5 := (gssgD14*NADPH*GSH*GSH + gssgD15*GSSG*GSH*NADP)*1*10^(-9);
  gssgDEN6 := gssgD16*GSH*GSH*NADP*1*10^(-9) + gssgD17*NADPH*GSSG*GSH*GSH*1*10^(-12);
  gssgDEN7 := gssgD18*GSSG*GSH*GSH*NADP*1*10^(-12);
  gssgDEN := gssgDEN1 + gssgDEN2 + gssgDEN3 + gssgDEN4 + gssgDEN5 + gssgDEN6 + gssgDEN7;
  gshconst := 1.1429*10^(-3)*exp(5.0476 - 1567.2/TEMP);
  tkiN1 := tkiK1*tkiK3*tkiK5*tkiK7;
  tkiN2 := tkiN1/tkiKEQ;
  tkiD1 := tkiK1*tkiK3*(tkiK6 + tkiK7);
  tkiD3 := tkiK2*tkiK4*(tkiK6 + tkiK7);
  tkiD5 := tkiK1*tkiK5*(tkiK3 + tkiK7);
  tkiD7 := tkiK5*tkiK8*(tkiK2 + tkiK3);
  tkiD2 := tkiK5*tkiK7*(tkiK2 + tkiK3);
  tkiD4 := tkiK6*tkiK8*(tkiK2 + tkiK3);
  tkiD6 := tkiK4*tkiK8*(tkiK2 + tkiK6);
  tkiD8 := tkiK1*tkiK4*(tkiK6 + tkiK7);
  tkiD := tkiD1*X5P + tkiD2*R5P + tkiD3*GAP + tkiD4*S7P + tkiD5*X5P*R5P + tkiD6*GAP*S7P + tkiD7*R5P*S7P + tkiD8*X5P*GAP;
  NTKII1 := KTKII1*KTKII3*KTKII5*KTKII7;
  NTKII2 := NTKII1/KEQTKII;
  DTKII1 := KTKII1*KTKII3*(KTKII6 + KTKII7);
  DTKII2 := KTKII5*KTKII7*(KTKII2 + KTKII3);
  DTKII3 := KTKII2*KTKII4*(KTKII6 + KTKII7);
  DTKII4 := KTKII6*KTKII8*(KTKII2 + KTKII3);
  DTKII5 := KTKII1*KTKII5*(KTKII3 + KTKII7);
  DTKII6 := KTKII4*KTKII8*(KTKII2 + KTKII6);
  DTKII7 := KTKII5*KTKII8*(KTKII2 + KTKII3);
  DTKII8 := KTKII1*KTKII4*(KTKII6 + KTKII7);
  DENTKII := DTKII1*X5P + DTKII2*E4P + DTKII3*GAP + DTKII4*F6P + DTKII5*X5P*E4P + DTKII6*GAP*F6P + DTKII7*E4P*F6P + DTKII8*X5P*GAP;
  NALD1 := KALD1*KALD3*KALD5*KALD7;
  NALD2 := NALD1/KEQALD;
  DALD1 := KALD1*KALD3*(KALD6 + KALD7);
  DALD3 := KALD2*KALD4*(KALD6 + KALD7);
  DALD5 := KALD1*KALD5*(KALD3 + KALD7);
  DALD7 := KALD5*KALD8*(KALD2 + KALD3);
  DALD2 := KALD5*KALD7*(KALD2 + KALD3);
  DALD4 := KALD6*KALD8*(KALD2 + KALD3);
  DALD6 := KALD4*KALD8*(KALD2 + KALD6);
  DALD8 := KALD1*KALD4*(KALD6 + KALD7);
  DENTALD := DALD1*S7P + DALD2*GAP + DALD3*E4P + DALD4*F6P + DALD5*S7P*GAP + DALD6*E4P*F6P + DALD7*GAP*F6P + DALD8*S7P*E4P;
  KIASE := 0.09*1.0431/(1 + HI/(2.5642*10^(-3)) + 1.2159*10^(-6)/HI);
  pnpaseKA2 := pnpaseKA1/pnpaseKeq;
  prmKA2 := prmKA1/prmKeq;
  VMPRPPSYN := 0.5054*1.6548/(1 + HI/(1.0099*10^(-4)) + 1.8835*10^(-6)/HI);
  VRPRPPSYN := VMPRPPSYN/7.5;
  kV1 := kPK*SV*ln(RT)/(RT - 1)*(KE - RT*KI);
  kV2 := kFMAXK*(KE/(kKM + KE) - KI*RT/(KI*RT + kKM));
  naV1 := PNA*SV*ln(RT)/(RT - 1)*(NAE - RT*NAI);
  naV2 := FMAXN*(NAE/(naKM + NAE) - NAI*RT/(NAI*RT + naKM));
  VMPUMP := 2.318/(1 + HI/(3.7342*10^(-3)) + 8.2714*10^(-7)/HI);
  NUMPUMP := VMPUMP*(KE^2 + KSPPUMP*KE*PSIPUMP*0.5);
  DENPUMP1 := KSPUMP*KSPPUMP + 2*KSPPUMP*KE + KE^2;
  DENPUMP2 := (KNAPUMP/NAI + 1)^3;
  DENPUMP3 := KPUMP1*KSPUMP*KSPPUMP + KPUMP2*(KE^2 + PSIPUMP*KSPPUMP*KE);
  DENPUMP := DENPUMP1 + DENPUMP2*DENPUMP3;
  FATP := ATP/(ATP + 0.04);
  pkVM := (300 - 90.9*(PHI - 7.2))*exp(20.61 - 6379.6/TEMP)*250/300;

  // Reactions:
  ADA: ADO -> INO; scaleada*adaVM*ADO/(adaKA + ADO); ADA is "adenosine deaminase";
    adaKA = 0.052; scaleada = 1;
  ADEEX: ADE -> $adeex; scaleadeex*vmade*(ADE/(kmade + ADE) - adeex/(kmade + adeex)); ADEEX is "adenine transport channel";
    kmade = 2.6; vmade = 90; scaleadeex = 1;
  ADK: 2 ADP -> AMP + ATP; scaleadk*(adkKAP1*ADP^2 - adkKAP2*ATP*AMP)*exp(19.876 - 6152.2/TEMP); ADK is "adenylate kinase";
    scaleadk = 1;
  ADOEX: ADO -> $adoex; scaleadoex*vmaex*(ADO/(kmaex + ADO) - adoex/(kmaex + adoex)); ADOEX is "adenosine transport channel";
    vmaex = 61.2; kmaex = 0.13; scaleadoex = 1;
  ADPRT: ADE + PRPP -> AMP; scaleadprt*adprtVM*(ADE/(adprtKADE + ADE))*(PRPP/(PRPP + adprtKPRPP)); ADPRT is "adenosine phosphoribosyl transferase";
    adprtKADE = 0.0023; adprtKPRPP = 0.0195; scaleadprt = 1;
  AK: ADO + ATP -> ADP + AMP; scaleak*akVM*ATP/(ATP + akKMGATP)*ADO/(ADO + akKA); AK is "adenosine kinase";
    akKMGATP = 0.8; akKA = 0.0004; scaleak = 1;
  ALD: FDP -> DHAP + GAP; scaleald*(aldN1*FDP - aldN2*GAP*DHAP)*aldET/(aldD1 + aldD2*FDP + aldD3*GAP + aldD4*DHAP + aldD5*FDP*GAP + aldD6*GAP*DHAP); ALD is "aldolase";
    aldET = 0.00037; scaleald = 1;
  AMPase: AMP -> ADO; scaleampase*KAMPAS*AMP*exp(19.876 - 6152.2/TEMP); AMPase is "adenosine mono-phosphate phosphatase";
    scaleampase = 1;
  AMPDA: AMP -> IMP; scaleampda*ampdaVM*AMP/(ampdaKAMP + AMP)*exp(19.876 - 6152.2/TEMP); AMPDA is "adenosine mono-phosphate deaminase";
    ampdaVM = 0.01; ampdaKAMP = 0.8; scaleampda = 1;
  ATPase: ATP -> ADP; scaleatpase*katpase*ATP; ATPase is "adenosine tri-phosphate phosphatase";
    scaleatpase = 1;
  DPGase: DPG23 -> PG3; scaledpgase*dpgaseVM*DPG23/(dpgasek + DPG23); DPGase is "diphosphoglycerate phosphatase";
    dpgaseVM = 0.52; scaledpgase = 1;
  DPGM: DPG13 -> DPG23; scaledpgm*KDPGM*DPG13/(1 + DPG23/dpgmk); DPGM is "diphosphoglycerate mutase";
    scaledpgm = 1;
  EN: PG2 -> PEP; scaleen*(KEN1*PG2 - KEN2*PEP)*exp(19.876 - 6152.2/TEMP); EN is "enolase";
    scaleen = 1;
  G6PDH: G6P -> GL6P + NADPH; scaleg6pd*NUMG6PDH*3600/DENG6PDH/(1*10^(-3)); G6PDH is "glucose 6 phosphate dehydrogenase";
    scaleg6pd = 1;
  GAPDH: GAP -> DPG13 + NADH; scalegapdh*(KGA1*pi*GAP*(NADHT - NADH) - KGA2*DPG13*NADH*HI)*exp(16.203 - 5021.3/TEMP); GAPDH is "glyceraldehyde phosphate dehydrogenase";
    scalegapdh = 1;
  GL6PDH: GO6P -> NADPH + RU5P; scalegl6pd*NUMG16PD/DENG16PD*(160.84 - 39.173*HI + 4.1322*HI*HI); GL6PDH is "phosphogluconate dehydrogenase";
    scalegl6pd = 1;
  GSHR: GSH -> $GSHex; scalegshr*gshconst*GSH*(-2880 + 902.33*PHI - 65.272*PHI*PHI); GSHR is "glutathione oxidase";
    scalegshr = 1;
  GSSGR: NADPH -> 2 GSH; scalegssgr*gssgNUM/gssgDEN*(-2880 + 902.33*PHI - 65.272*PHI*PHI)/233.075; GSSGR is "glutathione reducatase";
    scalegssgr = 1;
  HGPRT: HX + PRPP -> IMP; scalehgprt*hgprtVM*(PRPP/(PRPP + hgprtKPRPP))*(HX/(HX + hgprtKHX))*exp(14.543 - 4501.5/TEMP); HGPRT is "hypoxanthine-guanine phosphoribosyl transferase";
    hgprtVM = 0.2011; hgprtKPRPP = 0.005; hgprtKHX = 0.22; scalehgprt = 1;
  HK: ATP -> ADP + G6P; scalehk*VM1HK*GLC/KMAGLC*MGATP/KMGATP*(1 + 2.1187*MG/KMGAMG)/N1HK; HK is "hexokinase";  // modifiers: MG, MGATP
    scalehk = 1;
  HXEX: HX -> $HXex; scalehxex*(hxexPM*HX + hxexVM*HX/(HX + hxexKM))*exp(14.543 - 4501.5/TEMP); HXEX is "hypoxanthine transport channel";
    hxexPM = 37.8; hxexVM = 151.6; hxexKM = 0.4; scalehxex = 1;
  IMPase: IMP -> INO; scaleimpase*KIASE*IMP/(1 + INO/KINO)*exp(14.543 - 4501.5/TEMP); IMPase is "inosine mono-phosphate phosphatase";
    KINO = 25; scaleimpase = 1;
  INOEX: INO -> $inoex; vmino*(INO/(kmino + INO) - inoex/(kmino + inoex));
    kmino = 0.13; vmino = 61.2;
  KLEAK: $KLEak -> KI; scalekleak*(kV1 + kV2)*(-1.16 + 0.3*PHI)*exp(22.7283 - 7045.7976/TEMP); KLEAK is "potassium leak channel";
    scalekleak = 1;
  LDH: NADH + PYR -> LAC; scaleldh*(KLD1*PYR*NADH - KLD2*LAC*(NADHT - NADH))*exp(20.237 - 6267.2/TEMP); LDH is "lactate dehydrogenase";
    scaleldh = 1;
  LEX: LAC -> $LACEXT; scalelex*VLAC*exp(14.543 - 4501.5/TEMP); LEX is "lactate transport channel";
    scalelex = 1;
  NALEAK: $NALEak -> NAI; scalenaleak*(naV1 + naV2)*(-1.16 + 0.3*PHI)*exp(29.2222 - 9058.88/TEMP); NALEAK is "sodium leak channel";
    scalenaleak = 1;
  MGADPass: ADP + MG -> MGADP; kAss*(ADP*MG/(mgadpk + MG) - MGADP);
    mgadpk = 0.81;
  MGAMPass: AMP + MG -> MGAMP; kAss*(AMP*MG/(mgampk + MG) - MGAMP);
    mgampk = 22.2;
  MGATPass: ATP + MG -> MGATP; kAss*(ATP*MG/(mgatpk + MG) - MGATP);
    mgatpk = 0.081;
  MGDPG23ass: DPG23 + MG -> MGDPG23; kAss*(DPG23*MG/(mgdpgk + MG) - MGDPG23);
    mgdpgk = 1.67;
  PEX: PYR -> $PYREXT; -scalepex*KPYR*(PYREXT - PYR)*exp(14.52096 - 4501.5/TEMP); PEX is "pyruvate transport channel";
    KPYR = 63.8; scalepex = 1;
  PFK: ATP + F6P -> ADP + FDP; scalepfk*pfkVM*F6P/(pfkKF6P + F6P)*MGATP/(pfkKMGATP + MGATP)/(1 + LPFK); PFK is "phosphofructokinase";  // modifiers: MGATP
    pfkKMGATP = 0.068; scalepfk = 1;
  PGI: G6P -> F6P; scalepgi*(kpgi1*G6P - kpgi2*F6P)*exp(13.042 - 4040.7/TEMP); PGI is "phosphoglucoisomerase";
    scalepgi = 1;
  PGK: ADP + DPG13 -> ATP + PG3; scalepgk*(kpgk1*DPG13*ADP - kpgk2*PG3*ATP)*exp(12.56 - 3895.3/TEMP); PGK is "phosphoglycerate kinase";
    scalepgk = 1;
  PGLase: GL6P -> GO6P; scalepglase*pglaseVM*GL6P/(pglaseKM + GL6P)*exp(14.167 - 4380.4/TEMP); PGLase is "6 phosphogluconolactonase";
    pglaseKM = 0.08; pglaseVM = 9.93; scalepglase = 1;
  PGM: PG3 -> PG2; scalepgm*(KPGM1*PG3 - KPGM2*PG2)*exp(16.907 - 5236.7/TEMP); PGM is "phosphoglycerate mutase";
    scalepgm = 1;
  PK: ADP + PEP -> ATP + PYR; scalepk*pkVM*pkDEN1/(1 + pkL0*(pkDEN2/pkDEN3)); PK is "pyruvate kinase";
    pkL0 = 19; scalepk = 1;
  PNPase: INO -> HX + R1P; scalepnpase*(pnpaseKA1*INO*pi - pnpaseKA2*HX*R1P)*exp(14.543 - 4501.5/TEMP); PNPase is "purine nucleotide phosphorylase";
    scalepnpase = 1;
  PRM: R1P -> R5P; scaleprm*(prmKA1*R1P - prmKA2*R5P)*exp(14.543 - 4501.5/TEMP); PRM is "phosphoribomutase";
    scaleprm = 1;
  PRPPSYN: ATP + R5P -> AMP + PRPP; scaleprppsyn*VMPRPPSYN*VRPRPPSYN*(R5P*ATP - PRPP*AMP/KEQPRPPSYN)/(VRPRPPSYN*KR5PPRPPSYN*ATP + VRPRPPSYN*KATPPRPPSYN*R5P + VMPRPPSYN*KAMPPRPPSYN*PRPP/KEQPRPPSYN + VMPRPPSYN*KPRPPPRPPSYN*AMP/KEQPRPPSYN + VRPRPPSYN*R5P*ATP + VMPRPPSYN*PRPP*AMP/KEQPRPPSYN)*exp(14.543 - 4501.5/TEMP); PRPPSYN is "phosphoribosyl pyrophosphate synthase";
    KATPPRPPSYN = 0.17; KR5PPRPPSYN = 0.65; KEQPRPPSYN = 28.6; KPRPPPRPPSYN = 0.09; KAMPPRPPSYN = 0.275; scaleprppsyn = 1;
  PUMP: ATP + 3 NAI -> ADP + 2 KI; scalepump*FATP*NUMPUMP*0.5/DENPUMP*exp(40.7298 - 12626.2626/TEMP); PUMP is "sodium/potassium ATPase pump";
    scalepump = 1;
  RU5PI: RU5P -> R5P; scaleru5pi*ru5iVF*(RU5P - R5P/ru5iKEQ)/(ru5iK1 + RU5P + ru5iK1/ru5iK2*R5P); RU5PI is "ribulose 5 phosphate isomerase";
    ru5iVF = 1702.296; ru5iKEQ = 2.57; ru5iK1 = 0.78; ru5iK2 = 2.2; scaleru5pi = 1;
  TALD: GAP + S7P -> E4P + F6P; scaletald*(NALD1*S7P*GAP - NALD2*E4P*F6P)*ETALD/DENTALD; TALD is "transaldolase";
    ETALD = 0.00069; scaletald = 1;
  TKI: R5P + X5P -> GAP + S7P; scaletki*(tkiN1*X5P*R5P - tkiN2*GAP*S7P)*tkiET/tkiD; TKI is "transketolase";
    tkiET = 0.00033; scaletki = 1;
  TKII: E4P + X5P -> F6P + GAP; scaletkii*(NTKII1*X5P*E4P - NTKII2*GAP*F6P)*ETTKII/DENTKII; TKII is "transketolase";
    ETTKII = 0.00033; scaletkii = 1;
  TPI: DHAP -> GAP; scaletpi*(tpiKTP1*DHAP - tpiKTP2*GAP)*exp(18.475 - 5726.8/TEMP); TPI is "triose phosphate isomerase";
    scaletpi = 1;
  XU5PE: RU5P -> X5P; scalexu5pe*xu5eVF*(RU5P - X5P/xu5eKEQ)/(xu5eK1 + RU5P + xu5eK1/xu5eK2*X5P); XU5PE is "xylulose 5 phosphate epimerase";
    xu5eVF = 4633.56; xu5eKEQ = 3; xu5eK1 = 0.19; xu5eK2 = 1.5; scalexu5pe = 1;
end
