// SBML level 2 version 4

model model01()
  // Jesty1993_ProteolyticPositiveFeedback
  // This model originates from BioModels Database: A Database of Annotated Published Models (http://www.ebi.ac.uk/biomodels/). It is copyright (c) 2005-2011 The BioModels.net Team.
  // To the extent possible under law, all copyright and related or neighbouring rights to this encoded model have been dedicated to the public domain worldwide. Please refer to CC0 Public Domain Dedication for more information.
  // In summary, you are entitled to use this encoded model in absolutely any manner you deem suitable, verbatim, or with modification, alone or embedded it in a larger context, redistribute it, commercially or not, in a restricted way or not..
  // To cite BioModels Database, please use: Li C, Donizelli M, Rodriguez N, Dharuri H, Endler L, Chelliah V, Li L, He E, Henry A, Stefan MI, Snoep JL, Hucka M, Le Novère N, Laibe C (2010) BioModels Database: An enhanced, curated and annotated resource for published quantitative kinetic models. BMC Syst Biol., 4:92.
  // biomodels.db:MODEL1108260010
  // isDescribedBy pubmed:8512937
  // biomodels.db:MODEL1108260010
  // isDescribedBy pubmed:8512937
  // biomodels.db:MODEL1108260010
  // biomodels.db:MODEL1108260010

  // Compartments:
  compartment compartment_1;

  // Species:
  species Z1 in compartment_1 = E1Z10 - E1E1Z10*E1Z10;
  species Z2 in compartment_1 = 100;
  species E1 in compartment_1 = E1E1Z10*E1Z10;
  species E2 in compartment_1 = 0;

  // Parameters:
  kcat1 = 10;
  Km1 = 10;
  kcat2 = 200;
  Km2 = 200;
  ki1 = 1;
  ki2 = 1;
  E1Z10 = 0.1; E1Z10 is "(E1+Z1)_0";
  E1E1Z10 = 0.001; E1E1Z10 is "E1_0/(E1+Z1)_0";

  // Reactions:
  R1: Z1 => E1; compartment_1*(kcat1*E2*Z1/(Km1 + Z1));  // modifiers: E2
  R2: Z2 => E2; compartment_1*(kcat2*E1*Z2/(Km2 + Z2));  // modifiers: E1
  E1_degradation: E1 => ; compartment_1*ki1*E1;
  E2_degradation: E2 => ; compartment_1*ki2*E2;
end
