// SBML level 2 version 4

function function_1(k1, substrate1, substrate2, k2, epsilon, product)
  k1*substrate1*substrate2 - k2*product/epsilon;
end
function_1 is "Platelet-dependent Mass action (reversible)";

model Model_1()
  // Chatterjee2010_BloodCoagulation
  // This model originates from BioModels Database: A Database of Annotated Published Models (http://www.ebi.ac.uk/biomodels/). It is copyright (c) 2005-2011 The BioModels.net Team.
  // To the extent possible under law, all copyright and related or neighbouring rights to this encoded model have been dedicated to the public domain worldwide. Please refer to CC0 Public Domain Dedication for more information.
  // In summary, you are entitled to use this encoded model in absolutely any manner you deem suitable, verbatim, or with modification, alone or embedded it in a larger context, redistribute it, commercially or not, in a restricted way or not..
  // To cite BioModels Database, please use: Li C, Donizelli M, Rodriguez N, Dharuri H, Endler L, Chelliah V, Li L, He E, Henry A, Stefan MI, Snoep JL, Hucka M, Le Novère N, Laibe C (2010) BioModels Database: An enhanced, curated and annotated resource for published quantitative kinetic models. BMC Syst Biol., 4:92.
  // biomodels.db:MODEL1108260014
  // isDescribedBy pubmed:20941387
  // biomodels.db:MODEL1108260014
  // isDescribedBy pubmed:20941387
  // biomodels.db:MODEL1108260014
  // biomodels.db:MODEL1108260014

  // Compartments:
  compartment compartment_1 = 1;

  // Species:
  species TF in compartment_1 = 5e-12;
  species TF_VII in compartment_1 = 0;
  species VII in compartment_1 = 1e-8;
  species TF_VIIa in compartment_1 = 0;
  species VIIa in compartment_1 = 1e-10;
  species Xa in compartment_1 = 0;
  species IIa_compartment_1 in compartment_1 = 0;
  species TF_VIIa_X in compartment_1 = 0;
  species X in compartment_1 = 1.6e-7;
  species TF_VIIa_Xa in compartment_1 = 0;
  species IX in compartment_1 = 9e-8;
  species TF_VIIa_IX in compartment_1 = 0;
  species IXa in compartment_1 = 0;
  species II in compartment_1 = 1.4e-6;
  species VIII in compartment_1 = 7e-10;
  species VIIIa in compartment_1 = 0;
  species IXa_VIIIa in compartment_1 = 0;
  species IXa_VIIIa_X in compartment_1 = 0;
  species VIIIa1_L in compartment_1 = 0;
  species VIIIa2 in compartment_1 = 0;
  species V in compartment_1 = 2e-8;
  species Va in compartment_1 = 0;
  species Xa_Va in compartment_1 = 0;
  species Xa_Va_IIa in compartment_1 = 0;
  species mIIa in compartment_1 = 0;
  species TFPI in compartment_1 = 2.5e-9;
  species Xa_TFPI in compartment_1 = 0;
  species TF_VIIa_Xa_TFPI in compartment_1 = 0;
  species ATIII in compartment_1 = 3.4e-6;
  species Xa_ATIII in compartment_1 = 0;
  species mIIa_ATIII in compartment_1 = 0;
  species IXa_ATIII in compartment_1 = 0;
  species IIa_ATIII in compartment_1 = 0;
  species TF_VIIa_ATIII in compartment_1 = 0;
  species AMC in compartment_1 = 0;
  species Boc_VPR_MCA in compartment_1 = 1e-5;
  species Boc_VPR_MCA_IIa in compartment_1 = 0;
  species Boc_VPR in compartment_1 = 0;
  species XII in compartment_1 = 3.4e-7;
  species XIIa in compartment_1 = 0;
  species XIIa_XII in compartment_1 = 0;
  species PK in compartment_1 = 4.5e-7;
  species XIIa_PK in compartment_1 = 0;
  species K in compartment_1 = 0;
  species XII_K in compartment_1 = 0;
  species K_inhibited in compartment_1 = 0; K_inhibited is "K.inhibited";
  species CTI in compartment_1 = 4.2e-6;
  species XIIa_CTI in compartment_1 = 0;
  species C1inh in compartment_1 = 2.5e-6;
  species XIIa_ATIII in compartment_1 = 0;
  species XI in compartment_1 = 3.1e-8;
  species XI_IIa in compartment_1 = 0;
  species XIa in compartment_1 = 0;
  species XIIa_XI in compartment_1 = 0;
  species XIa_C1inh in compartment_1 = 0;
  species XIa_alpha1AT in compartment_1 = 0;
  species alpha1AT in compartment_1 = 4.5e-5;
  species XIa_alpha2AP in compartment_1 = 0;
  species alpha2AP in compartment_1 = 1e-6;
  species XIa_IX in compartment_1 = 0;
  species IXa_X in compartment_1 = 0;
  species Xa_VIII in compartment_1 = 0;
  species VIIa_IX in compartment_1 = 0;
  species VIIa_X in compartment_1 = 0;
  species Fbg in compartment_1 = 9e-6;
  species Fbg_IIa in compartment_1 = 0;
  species FPA in compartment_1 = 0;
  species Fbn1 in compartment_1 = 0;
  species Fbn1_IIa in compartment_1 = 0;
  species FPB in compartment_1 = 0;
  species Fbn2 in compartment_1 = 0;
  species Fbn1x2 in compartment_1 = 0;
  species Fbn1x2_IIa in compartment_1 = 0;
  species Fbn2x2 in compartment_1 = 0;
  species Fbn2_IIa in compartment_1 = 0;
  species Fbn1x2_IIa_ATIII in compartment_1 = 0;
  species Fbn1_IIa_ATIII in compartment_1 = 0;
  species Fbn2_IIa_ATIII in compartment_1 = 0;
  species Xa_Va_II in compartment_1 = 0;
  species XIIa_C1inh in compartment_1 = 0;
  species XIa_ATIII in compartment_1 = 0;

  // Parameters:
  IIa = 0; IIa is "IIa*";
  var f_IIa; f_IIa is "f_IIa*";
  epsilon = epsilon_max_0;
  var epsilon_max;
  k = 0.005;
  epsilon_max_0 = 0.01;

  // Assignment rules:
  f_IIa := IIa^1.6123/(IIa^1.6123 + 2.4279e-9^1.6123);
  epsilon_max := epsilon_max_0 + (1 - epsilon_max_0)*f_IIa;

  // Rate rules:
  epsilon' = k*(epsilon_max - epsilon);

  // Reactions:
  R1: TF + VII -> TF_VII; compartment_1*(R1_k1*TF*VII - R1_k2*TF_VII);
    R1_k1 = 3200000; R1_k2 = 0.031;
  R2: TF + VIIa -> TF_VIIa; compartment_1*(R2_k1*TF*VIIa - R2_k2*TF_VIIa);
    R2_k1 = 23000000; R2_k2 = 3.1e-5;
  R3: TF_VIIa + VII => TF_VIIa + VIIa; compartment_1*R3_k1*TF_VIIa*VII;
    R3_k1 = 440000;
  R4: Xa + VII => Xa + VIIa; compartment_1*R4_k1*Xa*VII;
    R4_k1 = 13000000;
  R5: IIa_compartment_1 + VII => IIa_compartment_1 + VIIa; compartment_1*R5_k1*IIa_compartment_1*VII;
    R5_k1 = 23000;
  R6: TF_VIIa + X -> TF_VIIa_X; compartment_1*(R6_k1*TF_VIIa*X - R6_k2*TF_VIIa_X);
    R6_k1 = 25000000; R6_k2 = 0.0105;
  R6b: TF_VIIa_X => TF_VIIa_Xa; compartment_1*R6b_k1*TF_VIIa_X;
    R6b_k1 = 6;
  R7: TF_VIIa + Xa -> TF_VIIa_Xa; compartment_1*(R7_k1*TF_VIIa*Xa - R7_k2*TF_VIIa_Xa);
    R7_k1 = 22000000; R7_k2 = 19;
  R8: TF_VIIa + IX -> TF_VIIa_IX; compartment_1*(R8_k1*TF_VIIa*IX - R8_k2*TF_VIIa_IX);
    R8_k1 = 10000000; R8_k2 = 2.4;
  R8b: TF_VIIa_IX => TF_VIIa + IXa; compartment_1*R8b_k1*TF_VIIa_IX;
    R8b_k1 = 1.8;
  R9: II + Xa => IIa_compartment_1 + Xa; compartment_1*R9_k1*II*Xa;
    R9_k1 = 7500;
  R10: IIa_compartment_1 + VIII => IIa_compartment_1 + VIIIa; compartment_1*R10_k1*IIa_compartment_1*VIII;
    R10_k1 = 20000000;
  R11: VIIIa + IXa -> IXa_VIIIa; compartment_1*function_1(R11_k1, VIIIa, IXa, R11_k2, epsilon, IXa_VIIIa);
    R11_k1 = 10000000; R11_k2 = 0.0001;
  R12: IXa_VIIIa + X -> IXa_VIIIa_X; compartment_1*function_1(R12_k1, IXa_VIIIa, X, R12_k2, epsilon, IXa_VIIIa_X);
    R12_k1 = 100000000; R12_k2 = 1e-5;
  R12b: IXa_VIIIa_X => IXa_VIIIa + Xa; compartment_1*R12b_k1*IXa_VIIIa_X;
    R12b_k1 = 8.2;
  R13: VIIIa1_L + VIIIa2 -> VIIIa; compartment_1*function_1(R13_k1, VIIIa1_L, VIIIa2, R13_k2, epsilon, VIIIa);
    R13_k1 = 22000; R13_k2 = 6e-5;
  R14: IXa_VIIIa_X => VIIIa1_L + VIIIa2 + X + IXa; compartment_1*R14_k1*IXa_VIIIa_X;
    R14_k1 = 0.001;
  R15: IXa_VIIIa => VIIIa1_L + VIIIa2 + IXa; compartment_1*R15_k1*IXa_VIIIa;
    R15_k1 = 0.001;
  R16: IIa_compartment_1 + V => IIa_compartment_1 + Va; compartment_1*R16_k1*IIa_compartment_1*V;
    R16_k1 = 20000000;
  R17: Xa + Va -> Xa_Va; compartment_1*function_1(R17_k1, Xa, Va, R17_k2, epsilon, Xa_Va);
    R17_k1 = 400000000; R17_k2 = 0.008;
  R18: Xa_Va + II -> Xa_Va_II; compartment_1*function_1(R18_k1, Xa_Va, II, R18_k2, epsilon, Xa_Va_II);
    R18_k1 = 100000000; R18_k2 = 2.06;
  R18b: Xa_Va_II => Xa_Va + mIIa; compartment_1*R18b_k1*Xa_Va_II;
    R18b_k1 = 63.5;
  R19: Xa_Va + mIIa => Xa_Va + IIa_compartment_1; compartment_1*R19_k1*Xa_Va*mIIa;
    R19_k1 = 15000000;
  R20: Xa + TFPI -> Xa_TFPI; compartment_1*function_1(R20_k1, Xa, TFPI, R20_k2, epsilon, Xa_TFPI);
    R20_k1 = 900000; R20_k2 = 0.00036;
  R21: TF_VIIa_Xa + TFPI -> TF_VIIa_Xa_TFPI; compartment_1*(R21_k1*TF_VIIa_Xa*TFPI - R21_k2*TF_VIIa_Xa_TFPI);
    R21_k1 = 320000000; R21_k2 = 0.011;
  R22: TF_VIIa + Xa_TFPI => TF_VIIa_Xa_TFPI; compartment_1*R22_k1*TF_VIIa*Xa_TFPI;
    R22_k1 = 50000000;
  R23: Xa + ATIII => Xa_ATIII; compartment_1*R23_k1*Xa*ATIII;
    R23_k1 = 1500;
  R24: mIIa + ATIII => mIIa_ATIII; compartment_1*R24_k1*mIIa*ATIII;
    R24_k1 = 7100;
  R25: IXa + ATIII => IXa_ATIII; compartment_1*R25_k1*IXa*ATIII;
    R25_k1 = 490;
  R26: IIa_compartment_1 + ATIII => IIa_ATIII; compartment_1*R26_k1*IIa_compartment_1*ATIII;
    R26_k1 = 7100;
  R27: TF_VIIa + ATIII => TF_VIIa_ATIII; compartment_1*R27_k1*TF_VIIa*ATIII;
    R27_k1 = 230;
  R28: Boc_VPR_MCA + IIa_compartment_1 -> Boc_VPR_MCA_IIa; compartment_1*(R28_k1*Boc_VPR_MCA*IIa_compartment_1 - R28_k2*Boc_VPR_MCA_IIa);
    R28_k1 = 100000000; R28_k2 = 6100;
  R28b: Boc_VPR_MCA_IIa => Boc_VPR + AMC + IIa_compartment_1; compartment_1*R28b_k1*Boc_VPR_MCA_IIa;
    R28b_k1 = 53.8;
  R29: XII => XIIa; compartment_1*R29_k1*XII;
    R29_k1 = 0.0005;
  R30: XIIa + XII -> XIIa_XII; compartment_1*function_1(R30_k1, XIIa, XII, R30_k2, epsilon, XIIa_XII);
    R30_k1 = 100000000; R30_k2 = 750;
  R30b: XIIa_XII => 2 XIIa; compartment_1*R30b_k1*XIIa_XII;
    R30b_k1 = 0.033;
  R31: XIIa + PK -> XIIa_PK; compartment_1*function_1(R31_k1, XIIa, PK, R31_k2, epsilon, XIIa_PK);
    R31_k1 = 100000000; R31_k2 = 3600;
  R31b: XIIa_PK => XIIa + K; compartment_1*R31b_k1*XIIa_PK;
    R31b_k1 = 40;
  R32: XII + K -> XII_K; compartment_1*function_1(R32_k1, XII, K, R32_k2, epsilon, XII_K);
    R32_k1 = 100000000; R32_k2 = 45.3;
  R32b: XII_K => XIIa + K; compartment_1*R32b_k1*XII_K;
    R32b_k1 = 5.7;
  R33: PK + K => 2 K; compartment_1*R33_k1*PK*K;
    R33_k1 = 27000;
  R34: K => K_inhibited; compartment_1*R34_k1*K;
    R34_k1 = 0.011;
  R35: XIIa + CTI -> XIIa_CTI; compartment_1*(R35_k1*XIIa*CTI - R35_k2*XIIa_CTI);
    R35_k1 = 100000000; R35_k2 = 2.4;
  R36: XIIa + C1inh => XIIa_C1inh; compartment_1*R36_k1*XIIa*C1inh;
    R36_k1 = 3600;
  R37: XIIa + ATIII => XIIa_ATIII; compartment_1*R37_k1*XIIa*ATIII;
    R37_k1 = 21.6;
  R38: XI + IIa_compartment_1 -> XI_IIa; compartment_1*(R38_k1*XI*IIa_compartment_1 - R38_k2*XI_IIa);
    R38_k1 = 100000000; R38_k2 = 5;
  R38b: XI_IIa => XIa + IIa_compartment_1; compartment_1*R38b_k1*XI_IIa;
    R38b_k1 = 0.00013;
  R39: XIIa + XI -> XIIa_XI; compartment_1*function_1(R39_k1, XIIa, XI, R39_k2, epsilon, XIIa_XI);
    R39_k1 = 100000000; R39_k2 = 200;
  R39b: XIIa_XI => XIIa + XIa; compartment_1*R39b_k1*XIIa_XI;
    R39b_k1 = 0.00057;
  R40: XIa + XI => 2 XIa; compartment_1*R40_k1*XIa*XI;
    R40_k1 = 3190000;
  R41: XIa + ATIII => XIa_ATIII; compartment_1*R41_k1*XIa*ATIII;
    R41_k1 = 320;
  R42: XIa + C1inh => XIa_C1inh; compartment_1*R42_k1*XIa*C1inh;
    R42_k1 = 1800;
  R43: XIa + alpha1AT => XIa_alpha1AT; compartment_1*R43_k1*XIa*alpha1AT;
    R43_k1 = 100;
  R44: XIa + alpha2AP => XIa_alpha2AP; compartment_1*R44_k1*XIa*alpha2AP;
    R44_k1 = 4300;
  R45: XIa + IX -> XIa_IX; compartment_1*function_1(R45_k1, XIa, IX, R45_k2, epsilon, XIa_IX);
    R45_k1 = 100000000; R45_k2 = 41;
  R45b: XIa_IX => XIa + IXa; compartment_1*R45b_k1*XIa_IX;
    R45b_k1 = 7.7;
  R46: IXa + X -> IXa_X; compartment_1*function_1(R46_k1, IXa, X, R46_k2, epsilon, IXa_X);
    R46_k1 = 100000000; R46_k2 = 0.64;
  R46b: IXa_X => IXa + Xa; compartment_1*R46b_k1*IXa_X;
    R46b_k1 = 0.0007;
  R47: Xa + VIII -> Xa_VIII; compartment_1*function_1(R47_k1, Xa, VIII, R47_k2, epsilon, Xa_VIII);
    R47_k1 = 100000000; R47_k2 = 2.1;
  R47b: Xa_VIII => Xa + VIIIa; compartment_1*R47b_k1*Xa_VIII;
    R47b_k1 = 0.023;
  R48: VIIa + IX -> VIIa_IX; compartment_1*(R48_k1*VIIa*IX - R48_k2*VIIa_IX);
    R48_k1 = 100000000; R48_k2 = 0.9;
  R48b: VIIa_IX => VIIa + IXa; compartment_1*R48b_k1*VIIa_IX;
    R48b_k1 = 3.6e-5;
  R49: VIIa + X -> VIIa_X; compartment_1*function_1(R49_k1, VIIa, X, R49_k2, epsilon, VIIa_X);
    R49_k1 = 100000000; R49_k2 = 210;
  R49b: VIIa_X => VIIa + Xa; compartment_1*R49b_k1*VIIa_X;
    R49b_k1 = 1.6e-6;
  R50: Fbg + IIa_compartment_1 -> Fbg_IIa; compartment_1*(R50_k1*Fbg*IIa_compartment_1 - R50_k2*Fbg_IIa);
    R50_k1 = 100000000; R50_k2 = 636;
  R50b: Fbg_IIa => Fbn1 + IIa_compartment_1 + FPA; compartment_1*R50b_k1*Fbg_IIa;
    R50b_k1 = 84;
  R51: Fbn1 + IIa_compartment_1 -> Fbn1_IIa; compartment_1*(R51_k1*Fbn1*IIa_compartment_1 - R51_k2*Fbn1_IIa);
    R51_k1 = 100000000; R51_k2 = 742.6;
  R51b: Fbn1_IIa => Fbn2 + IIa_compartment_1 + FPB; compartment_1*R51b_k1*Fbn1_IIa;
    R51b_k1 = 7.4;
  R52: 2 Fbn1 -> Fbn1x2; compartment_1*(R52_k1*Fbn1^2 - R52_k2*Fbn1x2);
    R52_k1 = 1000000; R52_k2 = 0.064;
  R53: Fbn1x2 + IIa_compartment_1 -> Fbn1x2_IIa; compartment_1*(R53_k1*Fbn1x2*IIa_compartment_1 - R53_k2*Fbn1x2_IIa);
    R53_k1 = 100000000; R53_k2 = 701;
  R53b: Fbn1x2_IIa => Fbn2x2 + IIa_compartment_1 + FPB; compartment_1*R53b_k1*Fbn1x2_IIa;
    R53b_k1 = 49;
  R54: Fbn2 + IIa_compartment_1 -> Fbn2_IIa; compartment_1*(R54_k1*Fbn2*IIa_compartment_1 - R54_k2*Fbn2_IIa);
    R54_k1 = 100000000; R54_k2 = 1000;
  R55: Fbn1x2_IIa + ATIII => Fbn1x2_IIa_ATIII; compartment_1*R55_k1*Fbn1x2_IIa*ATIII;
    R55_k1 = 16000;
  R56: Fbn1_IIa + ATIII => Fbn1_IIa_ATIII; compartment_1*R56_k1*Fbn1_IIa*ATIII;
    R56_k1 = 16000;
  R57: Fbn2_IIa + ATIII => Fbn2_IIa_ATIII; compartment_1*R57_k1*Fbn2_IIa*ATIII;
    R57_k1 = 10000;

  // Events:
  event_1: at (sin(time*100) > 0): IIa = piecewise(IIa_compartment_1, IIa < IIa_compartment_1, IIa); event_1 is "max";
  dilution_event: at (time > 0): compartment_1 = compartment_1*5;
end
