// SBML level 2 version 4

model model01()
  // Qiao2004_ThrombinGeneration
  // This model originates from BioModels Database: A Database of Annotated Published Models (http://www.ebi.ac.uk/biomodels/). It is copyright (c) 2005-2011 The BioModels.net Team.
  // To the extent possible under law, all copyright and related or neighbouring rights to this encoded model have been dedicated to the public domain worldwide. Please refer to CC0 Public Domain Dedication for more information.
  // In summary, you are entitled to use this encoded model in absolutely any manner you deem suitable, verbatim, or with modification, alone or embedded it in a larger context, redistribute it, commercially or not, in a restricted way or not..
  // To cite BioModels Database, please use: Li C, Donizelli M, Rodriguez N, Dharuri H, Endler L, Chelliah V, Li L, He E, Henry A, Stefan MI, Snoep JL, Hucka M, Le Novère N, Laibe C (2010) BioModels Database: An enhanced, curated and annotated resource for published quantitative kinetic models. BMC Syst Biol., 4:92.
  // biomodels.db:MODEL1108260015
  // isDescribedBy pubmed:15121060
  // biomodels.db:MODEL1108260015
  // isDescribedBy pubmed:15121060
  // biomodels.db:MODEL1108260015
  // biomodels.db:MODEL1108260015

  // Compartments:
  compartment compartment_1;

  // Species:
  species IXa in compartment_1 = 0.01;
  species VIIIa in compartment_1 = 0.01;
  species Xa in compartment_1 = 0.01;
  species Va in compartment_1 = 0.01;
  species APC in compartment_1 = 0.01;
  species IIa in compartment_1 = 0.01;

  // Parameters:
  k1 = 15;
  k2 = 2.3;
  k3 = 1.4;
  k4 = 4;
  k5 = 221;
  k6 = 2.6;
  k7 = 0.5;
  k8 = 0.87;
  k9 = 1900;
  h1 = 0.01;
  h2 = 0.35;
  h3 = 0.33;
  h4 = 0.4;
  h5 = 0.34;
  h6 = 0.35;
  b1 = 11;
  b2 = 23;
  b3 = 6.1;
  b4 = 250;
  beta = 0;

  // Rate rules:
  IXa' = compartment_1*(k1*beta - h1*IXa);
  VIIIa' = compartment_1*(k2*IIa + k3*Xa - k4*APC*VIIIa/(b1 + VIIIa) - h2*VIIIa);
  Xa' = compartment_1*(k5*IXa*VIIIa/(b2 + VIIIa) - h3*Xa);
  Va' = compartment_1*(k6*IIa - k7*APC*Va/(b3 + Va) - h4*Va);
  APC' = compartment_1*(k8*IIa - h5*APC);
  IIa' = compartment_1*(k9*Xa*Va/(b4 + Va) - h6*IIa);
end
