// SBML level 2 version 4

function Rate_Law_for_Inflow(kflow, SUBSTRATE_initial)
  kflow*SUBSTRATE_initial;
end

function function_2(kc2_act_times_Ae2, S1, S2)
  kc2_act_times_Ae2*S1 + 0*S2;
end
function_2 is "Rate Law for Platelet activation by thrombin";

function Rate_Law_for_Membrane_binding(SUBSTRATE, k1, k2, PRODUCT, BSITE, Z_MTOT, E_MTOT)
  k1*SUBSTRATE*(BSITE - Z_MTOT - E_MTOT) - k2*PRODUCT;
end

function Modifier_Flow(MODIFIER)
  MODIFIER;
end

model Model_1()
  // Kuharsky2001_BloodCoagulation
  // This model originates from BioModels Database: A Database of Annotated Published Models (http://www.ebi.ac.uk/biomodels/). It is copyright (c) 2005-2011 The BioModels.net Team.
  // To the extent possible under law, all copyright and related or neighbouring rights to this encoded model have been dedicated to the public domain worldwide. Please refer to CC0 Public Domain Dedication for more information.
  // In summary, you are entitled to use this encoded model in absolutely any manner you deem suitable, verbatim, or with modification, alone or embedded it in a larger context, redistribute it, commercially or not, in a restricted way or not..
  // To cite BioModels Database, please use: Li C, Donizelli M, Rodriguez N, Dharuri H, Endler L, Chelliah V, Li L, He E, Henry A, Stefan MI, Snoep JL, Hucka M, Le Novère N, Laibe C (2010) BioModels Database: An enhanced, curated and annotated resource for published quantitative kinetic models. BMC Syst Biol., 4:92.
  // biomodels.db:MODEL1109150000
  // isDescribedBy pubmed:11222273
  // biomodels.db:MODEL1109150000
  // isDescribedBy pubmed:11222273
  // biomodels.db:MODEL1109150000
  // biomodels.db:MODEL1109150000

  // Compartments:
  compartment plasma = 1;
  compartment platelet_surface = 1;
  compartment subendothelium = 1;

  // Species:
  species Z7 in plasma = Z7out;
  species E7 in plasma = E7out;
  species Z7m in plasma = 0;
  species E7m in plasma = 0;
  species E10 in plasma = 0;
  species Z7m_E10 in plasma = 0;
  species E2 in plasma = 0;
  species Z7m_E2 in plasma = 0;
  species Z10 in plasma = Z10out;
  species Z10_E7m in plasma = 0;
  species Z9 in plasma = Z9out;
  species Z9_E7m in plasma = 0;
  species E9 in plasma = 0;
  species PL in plasma = 0;
  species PLas in plasma = 0;
  species Psub in plasma = 2.2e-10;
  species PLav in plasma = 0;
  species APC in plasma = 0;
  species APC_E8m in plasma = 0;
  species E8m in plasma = 0;
  species APC_E5m in plasma = 0;
  species E5m in plasma = 0;
  species TFPI in plasma = TFPIout;
  species TFPI_E10 in plasma = 0;
  species TFPI_E10_E7m in plasma = 0;
  species E10m in plasma = 0;
  species Z5m in plasma = 0;
  species Z5m_E10m in plasma = 0;
  species E2m in plasma = 0;
  species Z5m_E2m in plasma = 0;
  species Z8m in plasma = 0;
  species Z8m_E10m in plasma = 0;
  species Z8m_E2m in plasma = 0;
  species species_34 in plasma = 0; species_34 is "E9m";
  species species_35 in plasma = 0; species_35 is "TEN";
  species species_36 in plasma = 0; species_36 is "E9m*";
  species PRO in plasma = 0;
  species Z10m in plasma = 0;
  species species_39 in plasma = 0; species_39 is "Z10m_TEN";
  species species_40 in plasma = 0; species_40 is "TEN*";
  species species_41 in plasma = 0; species_41 is "Z10m_TEN*";
  species Z2m in plasma = 0;
  species Z2m_PRO in plasma = 0;
  species $species_44 in plasma; species_44 is "P9";
  species Z9m in plasma = 0;
  species $species_46 in plasma; species_46 is "P9*";
  species $P10 in plasma;
  species $P5 in plasma;
  species Z5 in plasma = Z5out;
  species E5 in plasma = 0;
  species $P8 in plasma;
  species Z8 in plasma = Z8out;
  species E8 in plasma = 0;
  species $P2 in plasma;
  species Z2 in plasma = Z2out;
  species Z7_E10 in plasma = 0;
  species Z7_E2 in plasma = 0;
  species Z5_E2 in plasma = 0;
  species Z8_E2 in plasma = 0;
  species TF in subendothelium = 15*1e-17/hbar;

  // Parameters:
  Z2out = 1.4e-6;
  Z5out = 1e-8;
  Z7out = 1e-8;
  E7out = 1e-10;
  Z8out = 1e-9;
  Z9out = 9e-8;
  Z10out = 1.7e-7;
  TFPIout = 2.5e-9;
  PLout = 250000;
  N2pl = 2000;
  N5pl = 3000;
  N8pl = 450;
  parameter_13 = 250; parameter_13 is "N9pl";
  parameter_14 = 250; parameter_14 is "N9pl*";
  N10pl = 2700;
  L = 1e-5;
  D = 5e-7;
  hbar = 3/4*(2*L*D/shear_rate)^(1/3);
  kc_flow = hbar*shear_rate/(2*L);
  kp_flow = shear_rate*2.5/(2*L);
  shear_rate = 500;
  var Z2_mtot;
  var E2_mtot;
  var Z5_mtot;
  var E5_mtot;
  var Z8_mtot;
  var E8_mtot;
  var Z9_mtot;
  var E9_mtot;
  var E9__mtot; E9__mtot is "E9*_mtot";
  var Z10_mtot;
  var E10_mtot;
  var Z7_mtot;
  var E7_mtot;
  p_prime_1_p = 0; p_prime_1_p is "p_prime/(1-p)";

  // Assignment rules:
  species_44 := parameter_13*(PLas + PLav);
  species_46 := parameter_14*(PLas + PLav);
  P10 := N10pl*(PLas + PLav);
  P5 := N5pl*(PLas + PLav);
  P8 := N8pl*(PLas + PLav);
  P2 := N2pl*(PLas + PLav);
  Z2_mtot := Z2m + Z2m_PRO;
  E2_mtot := E2m + Z5m_E2m + Z8m_E2m;
  Z5_mtot := Z5m + Z5m_E2m + Z5m_E10m;
  E5_mtot := E5m + APC_E5m;
  Z8_mtot := Z8m + Z8m_E10m + Z8m_E2m;
  E8_mtot := APC_E8m + E8m;
  Z9_mtot := Z9m;
  E9_mtot := species_34 + species_35 + species_39;
  E9__mtot := species_36 + species_40 + species_41;
  Z10_mtot := Z10m + species_39 + species_41;
  E10_mtot := E10m + Z5m_E10m + Z8m_E10m;
  Z7_mtot := Z7m + Z7m_E10 + Z7m_E2;
  E7_mtot := E7m + Z10_E7m + Z9_E7m + TFPI_E10_E7m;

  // Reactions:
  S_VII_binding_with_TF: Z7 -> Z7m; plasma*Rate_Law_for_Membrane_binding(Z7, S_VII_binding_with_TF_k1, S_VII_binding_with_TF_k2, Z7m, TF, Z7_mtot, E7_mtot); S_VII_binding_with_TF is "S: VII binding with TF";  // modifiers: TF
    S_VII_binding_with_TF_k1 = 50000000; S_VII_binding_with_TF_k2 = 0.005;
  S_VIIa_binding_with_TF: E7 -> E7m; plasma*Rate_Law_for_Membrane_binding(E7, S_VIIa_binding_with_TF_k1, S_VIIa_binding_with_TF_k2, E7m, TF, Z7_mtot, E7_mtot); S_VIIa_binding_with_TF is "S: VIIa binding with TF";  // modifiers: TF
    S_VIIa_binding_with_TF_k1 = 50000000; S_VIIa_binding_with_TF_k2 = 0.005;
  S_Xa_binding_of_TF_VII: E10 + Z7m -> Z7m_E10; plasma*(S_Xa_binding_of_TF_VII_k1*E10*Z7m - S_Xa_binding_of_TF_VII_k2*Z7m_E10); S_Xa_binding_of_TF_VII is "S: Xa binding of TF:VII";
    S_Xa_binding_of_TF_VII_k1 = 5000000; S_Xa_binding_of_TF_VII_k2 = 1;
  S_Xa_activation_of_TF_VII: Z7m_E10 => E7m + E10; plasma*S_Xa_activation_of_TF_VII_k1*Z7m_E10; S_Xa_activation_of_TF_VII is "S: Xa activation of TF:VII";
    S_Xa_activation_of_TF_VII_k1 = 5;
  S_IIa_binding_of_TF_VII: E2 + Z7m -> Z7m_E2; plasma*(S_IIa_binding_of_TF_VII_k1*E2*Z7m - S_IIa_binding_of_TF_VII_k2*Z7m_E2); S_IIa_binding_of_TF_VII is "S: IIa binding of TF:VII";
    S_IIa_binding_of_TF_VII_k1 = 392000; S_IIa_binding_of_TF_VII_k2 = 1;
  S_IIa_activation_of_TF_VII: Z7m_E2 => E7m + E2; plasma*S_IIa_activation_of_TF_VII_k1*Z7m_E2; S_IIa_activation_of_TF_VII is "S: IIa activation of TF:VII";
    S_IIa_activation_of_TF_VII_k1 = 0.061;
  S_TF_VIIa_binding_of_X: E7m + Z10 -> Z10_E7m; plasma*(S_TF_VIIa_binding_of_X_k1*E7m*Z10 - S_TF_VIIa_binding_of_X_k2*Z10_E7m); S_TF_VIIa_binding_of_X is "S: TF:VIIa binding of X";
    S_TF_VIIa_binding_of_X_k1 = 8950000; S_TF_VIIa_binding_of_X_k2 = 1;
  S_TF_VIIa_activation_of_X: Z10_E7m => E10 + E7m; plasma*S_TF_VIIa_activation_of_X_k1*Z10_E7m; S_TF_VIIa_activation_of_X is "S: TF:VIIa activation of X";
    S_TF_VIIa_activation_of_X_k1 = 1.15;
  S_TF_VIIa_binding_of_IX: E7m + Z9 -> Z9_E7m; plasma*(S_TF_VIIa_binding_of_IX_k1*E7m*Z9 - S_TF_VIIa_binding_of_IX_k2*Z9_E7m); S_TF_VIIa_binding_of_IX is "S: TF:VIIa binding of IX";
    S_TF_VIIa_binding_of_IX_k1 = 8950000; S_TF_VIIa_binding_of_IX_k2 = 1;
  S_TF_VIIa_activation_of_IX: Z9_E7m => E9 + E7m; plasma*S_TF_VIIa_activation_of_IX_k1*Z9_E7m; S_TF_VIIa_activation_of_IX is "S: TF:VIIa activation of IX";
    S_TF_VIIa_activation_of_IX_k1 = 1.15;
  P_Xa_binding_of_VII: Z7 + E10 -> Z7_E10; plasma*(P_Xa_binding_of_VII_k1*Z7*E10 - P_Xa_binding_of_VII_k2*Z7_E10); P_Xa_binding_of_VII is "P: Xa binding of VII";
    P_Xa_binding_of_VII_k1 = 5000000; P_Xa_binding_of_VII_k2 = 1;
  P_Xa_activation_of_VII: Z7_E10 => E7 + E10; plasma*P_Xa_activation_of_VII_k1*Z7_E10; P_Xa_activation_of_VII is "P: Xa activation of VII";
    P_Xa_activation_of_VII_k1 = 5;
  P_IIa_binding_of_VII: Z7 + E2 -> Z7_E2; plasma*(P_IIa_binding_of_VII_k1*Z7*E2 - P_IIa_binding_of_VII_k2*Z7_E2); P_IIa_binding_of_VII is "P: IIa binding of VII";
    P_IIa_binding_of_VII_k1 = 392000; P_IIa_binding_of_VII_k2 = 1;
  P_IIa_activation_of_VII: Z7_E2 => E7 + E2; plasma*P_IIa_activation_of_VII_k1*Z7_E2; P_IIa_activation_of_VII is "P: IIa activation of VII";
    P_IIa_activation_of_VII_k1 = 0.061;
  P_IIa_binding_of_V: Z5 + E2 -> Z5_E2; plasma*(P_IIa_binding_of_V_k1*Z5*E2 - P_IIa_binding_of_V_k2*Z5_E2); P_IIa_binding_of_V is "P: IIa binding of V";
    P_IIa_binding_of_V_k1 = 17300000; P_IIa_binding_of_V_k2 = 1;
  P_IIa_activation_of_V: Z5_E2 => E5 + E2; plasma*P_IIa_activation_of_V_k1*Z5_E2; P_IIa_activation_of_V is "P: IIa activation of V";
    P_IIa_activation_of_V_k1 = 0.23;
  P_IIa_binding_of_VIII: Z8 + E2 -> Z8_E2; plasma*(P_IIa_binding_of_VIII_k1*Z8*E2 - P_IIa_binding_of_VIII_k2*Z8_E2); P_IIa_binding_of_VIII is "P: IIa binding of VIII";
    P_IIa_binding_of_VIII_k1 = 26400000; P_IIa_binding_of_VIII_k2 = 1;
  P_IIa_activation_of_VIII: Z8_E2 => E8 + E2; plasma*P_IIa_activation_of_VIII_k1*Z8_E2; P_IIa_activation_of_VIII is "P: IIa activation of VIII";
    P_IIa_activation_of_VIII_k1 = 0.9;
  BPS_Factors_IX: Z9 -> Z9m; plasma*Rate_Law_for_Membrane_binding(Z9, BPS_Factors_IX_k1, BPS_Factors_IX_k2, Z9m, species_44, Z9_mtot, E9_mtot); BPS_Factors_IX is "BPS: Factors IX";  // modifiers: species_44
    BPS_Factors_IX_k1 = 10000000; BPS_Factors_IX_k2 = 0.025;
  reaction_20: E9 -> species_34; plasma*Rate_Law_for_Membrane_binding(E9, reaction_20_k1, reaction_20_k2, species_34, species_44, Z9_mtot, E9_mtot); reaction_20 is "BPS: Factors IXa";  // modifiers: species_44
    reaction_20_k1 = 10000000; reaction_20_k2 = 0.025;
  reaction_21: E9 -> species_36; plasma*Rate_Law_for_Membrane_binding(E9, reaction_21_k1, reaction_21_k2, species_36, species_46, Z_MTOT, E9__mtot); reaction_21 is "BPS: Factors IXa*";  // modifiers: species_46
    reaction_21_k1 = 10000000; reaction_21_k2 = 0.025; Z_MTOT = 0;
  BPS_Factors_X: Z10 -> Z10m; plasma*Rate_Law_for_Membrane_binding(Z10, BPS_Factors_X_k1, BPS_Factors_X_k2, Z10m, P10, Z10_mtot, E10_mtot); BPS_Factors_X is "BPS: Factors X";  // modifiers: P10
    BPS_Factors_X_k1 = 10000000; BPS_Factors_X_k2 = 0.025;
  BPS_Factors_Xa: E10 -> E10m; plasma*Rate_Law_for_Membrane_binding(E10, BPS_Factors_Xa_k1, BPS_Factors_Xa_k2, E10m, P10, Z10_mtot, E10_mtot); BPS_Factors_Xa is "BPS: Factors Xa";  // modifiers: P10
    BPS_Factors_Xa_k1 = 10000000; BPS_Factors_Xa_k2 = 0.025;
  BPS_Factors_V: Z5 -> Z5m; plasma*Rate_Law_for_Membrane_binding(Z5, BPS_Factors_V_k1, BPS_Factors_V_k2, Z5m, P5, Z5_mtot, E5_mtot); BPS_Factors_V is "BPS: Factors V";  // modifiers: P5
    BPS_Factors_V_k1 = 57000000; BPS_Factors_V_k2 = 0.17;
  BPS_Factors_Va: E5 -> E5m; plasma*Rate_Law_for_Membrane_binding(E5, BPS_Factors_Va_k1, BPS_Factors_Va_k2, E5m, P5, Z5_mtot, E5_mtot); BPS_Factors_Va is "BPS: Factors Va";  // modifiers: P5
    BPS_Factors_Va_k1 = 57000000; BPS_Factors_Va_k2 = 0.17;
  BPS_Factors_VIII: Z8 -> Z8m; plasma*Rate_Law_for_Membrane_binding(Z8, BPS_Factors_VIII_k1, BPS_Factors_VIII_k2, Z8m, P8, Z8_mtot, E8_mtot); BPS_Factors_VIII is "BPS: Factors VIII";  // modifiers: P8
    BPS_Factors_VIII_k1 = 50000000; BPS_Factors_VIII_k2 = 0.17;
  BPS_Factors_VIIIa: E8 -> E8m; plasma*Rate_Law_for_Membrane_binding(E8, BPS_Factors_VIIIa_k1, BPS_Factors_VIIIa_k2, E8m, P8, Z8_mtot, E8_mtot); BPS_Factors_VIIIa is "BPS: Factors VIIIa";  // modifiers: P8
    BPS_Factors_VIIIa_k1 = 50000000; BPS_Factors_VIIIa_k2 = 0.17;
  BPS_Factors_II: Z2 -> Z2m; plasma*Rate_Law_for_Membrane_binding(Z2, BPS_Factors_II_k1, BPS_Factors_II_k2, Z2m, P2, Z2_mtot, E2_mtot); BPS_Factors_II is "BPS: Factors II";  // modifiers: P2
    BPS_Factors_II_k1 = 10000000; BPS_Factors_II_k2 = 5.9;
  BPS_Factors_IIa: E2 -> E2m; plasma*Rate_Law_for_Membrane_binding(E2, BPS_Factors_IIa_k1, BPS_Factors_IIa_k2, E2m, P2, Z2_mtot, E2_mtot); BPS_Factors_IIa is "BPS: Factors IIa";  // modifiers: P2
    BPS_Factors_IIa_k1 = 10000000; BPS_Factors_IIa_k2 = 5.9;
  RPS_Xa_binding_of_V: Z5m + E10m -> Z5m_E10m; plasma*(RPS_Xa_binding_of_V_k1*Z5m*E10m - RPS_Xa_binding_of_V_k2*Z5m_E10m); RPS_Xa_binding_of_V is "RPS: Xa binding of V";
    RPS_Xa_binding_of_V_k1 = 100000000; RPS_Xa_binding_of_V_k2 = 1;
  RPS_Xa_activation_of_V: Z5m_E10m => E5m + E10m; plasma*RPS_Xa_activation_of_V_k1*Z5m_E10m; RPS_Xa_activation_of_V is "RPS: Xa activation of V";
    RPS_Xa_activation_of_V_k1 = 0.046;
  RPS_IIa_binding_of_V: Z5m + E2m -> Z5m_E2m; plasma*(RPS_IIa_binding_of_V_k1*Z5m*E2m - RPS_IIa_binding_of_V_k2*Z5m_E2m); RPS_IIa_binding_of_V is "RPS: IIa binding of V";
    RPS_IIa_binding_of_V_k1 = 17300000; RPS_IIa_binding_of_V_k2 = 1;
  RPS_IIa_activation_of_V: Z5m_E2m => E5m + E2m; plasma*RPS_IIa_activation_of_V_k1*Z5m_E2m; RPS_IIa_activation_of_V is "RPS: IIa activation of V";
    RPS_IIa_activation_of_V_k1 = 0.23;
  RPS_Xa_binding_of_VIII: Z8m + E10m -> Z8m_E10m; plasma*(RPS_Xa_binding_of_VIII_k1*Z8m*E10m - RPS_Xa_binding_of_VIII_k2*Z8m_E10m); RPS_Xa_binding_of_VIII is "RPS: Xa binding of VIII";
    RPS_Xa_binding_of_VIII_k1 = 51000000; RPS_Xa_binding_of_VIII_k2 = 1;
  RPS_Xa_activation_of_VIII: Z8m_E10m => E8m + E10m; plasma*RPS_Xa_activation_of_VIII_k1*Z8m_E10m; RPS_Xa_activation_of_VIII is "RPS: Xa activation of VIII";
    RPS_Xa_activation_of_VIII_k1 = 0.023;
  RPS_IIa_binding_of_VIII: Z8m + E2m -> Z8m_E2m; plasma*(RPS_IIa_binding_of_VIII_k1*Z8m*E2m - RPS_IIa_binding_of_VIII_k2*Z8m_E2m); RPS_IIa_binding_of_VIII is "RPS: IIa binding of VIII";
    RPS_IIa_binding_of_VIII_k1 = 26400000; RPS_IIa_binding_of_VIII_k2 = 1;
  RPS_IIa_activation_of_VIII: Z8m_E2m => E8m + E2m; plasma*RPS_IIa_activation_of_VIII_k1*Z8m_E2m; RPS_IIa_activation_of_VIII is "RPS: IIa activation of VIII";
    RPS_IIa_activation_of_VIII_k1 = 0.9;
  reaction_38: E8m + species_34 -> species_35; plasma*(reaction_38_k1*E8m*species_34 - reaction_38_k2*species_35); reaction_38 is "RPS: VIIIa binding with IXa";
    reaction_38_k1 = 100000000; reaction_38_k2 = 0.01;
  reaction_39: E8m + species_36 -> species_40; plasma*(reaction_39_k1*E8m*species_36 - reaction_39_k2*species_40); reaction_39 is "RPS: VIIIa binding with IXa*";
    reaction_39_k1 = 100000000; reaction_39_k2 = 0.01;
  RPS_Va_binding_with_Xa: E5m + E10m -> PRO; plasma*(RPS_Va_binding_with_Xa_k1*E5m*E10m - RPS_Va_binding_with_Xa_k2*PRO); RPS_Va_binding_with_Xa is "RPS: Va binding with Xa";
    RPS_Va_binding_with_Xa_k1 = 100000000; RPS_Va_binding_with_Xa_k2 = 0.01;
  reaction_41: Z10m + species_35 -> species_39; plasma*(reaction_41_k1*Z10m*species_35 - reaction_41_k2*species_39); reaction_41 is "RPS: VIIIa:IXa binding of X";
    reaction_41_k1 = 131000000; reaction_41_k2 = 1;
  reaction_42: species_39 => E10m + species_35; plasma*reaction_42_k1*species_39; reaction_42 is "RPS: VIIIa:IXa activation of X";
    reaction_42_k1 = 20;
  reaction_43: Z10m + species_40 -> species_41; plasma*(reaction_43_k1*Z10m*species_40 - reaction_43_k2*species_41); reaction_43 is "RPS: VIIIa:IXa* binding of X";
    reaction_43_k1 = 131000000; reaction_43_k2 = 1;
  reaction_44: species_41 => E10m + species_40; plasma*reaction_44_k1*species_41; reaction_44 is "RPS: VIIIa:IXa* activation of X";
    reaction_44_k1 = 20;
  RPS_Va_Xa_binding_of_II: Z2m + PRO -> Z2m_PRO; plasma*(RPS_Va_Xa_binding_of_II_k1*Z2m*PRO - RPS_Va_Xa_binding_of_II_k2*Z2m_PRO); RPS_Va_Xa_binding_of_II is "RPS: Va:Xa binding of II";
    RPS_Va_Xa_binding_of_II_k1 = 103000000; RPS_Va_Xa_binding_of_II_k2 = 1;
  RPS_Va_Xa_activation_of_II: Z2m_PRO => E2m + PRO; plasma*RPS_Va_Xa_activation_of_II_k1*Z2m_PRO; RPS_Va_Xa_activation_of_II is "RPS: Va:Xa activation of II";
    RPS_Va_Xa_activation_of_II_k1 = 30;
  IR_APC_binding_of_VIIIa: APC + E8m -> APC_E8m; plasma*(IR_APC_binding_of_VIIIa_k1*APC*E8m - IR_APC_binding_of_VIIIa_k2*APC_E8m); IR_APC_binding_of_VIIIa is "IR: APC binding of VIIIa";
    IR_APC_binding_of_VIIIa_k1 = 120000000; IR_APC_binding_of_VIIIa_k2 = 1;
  IR_APC_inactivation_of_VIIIa: APC_E8m => APC; plasma*IR_APC_inactivation_of_VIIIa_k1*APC_E8m; IR_APC_inactivation_of_VIIIa is "IR: APC inactivation of VIIIa";
    IR_APC_inactivation_of_VIIIa_k1 = 0.5;
  IR_APC_binding_of_Va: APC + E5m -> APC_E5m; plasma*(IR_APC_binding_of_Va_k1*APC*E5m - IR_APC_binding_of_Va_k2*APC_E5m); IR_APC_binding_of_Va is "IR: APC binding of Va";
    IR_APC_binding_of_Va_k1 = 120000000; IR_APC_binding_of_Va_k2 = 1;
  IR_APC_inactivation_of_Va: APC_E5m => APC; plasma*IR_APC_inactivation_of_Va_k1*APC_E5m; IR_APC_inactivation_of_Va is "IR: APC inactivation of Va";
    IR_APC_inactivation_of_Va_k1 = 0.5;
  IR_TFPI_binding_with_Xa: TFPI + E10 -> TFPI_E10; plasma*(IR_TFPI_binding_with_Xa_k1*TFPI*E10 - IR_TFPI_binding_with_Xa_k2*TFPI_E10); IR_TFPI_binding_with_Xa is "IR: TFPI binding with Xa";
    IR_TFPI_binding_with_Xa_k1 = 16000000; IR_TFPI_binding_with_Xa_k2 = 0.00033;
  IR_TFPI_Xa_binding_with_TF_VIIa: TFPI_E10 + E7m -> TFPI_E10_E7m; plasma*(IR_TFPI_Xa_binding_with_TF_VIIa_k1*TFPI_E10*E7m - IR_TFPI_Xa_binding_with_TF_VIIa_k2*TFPI_E10_E7m); IR_TFPI_Xa_binding_with_TF_VIIa is "IR: TFPI:Xa binding with TF:VIIa";
    IR_TFPI_Xa_binding_with_TF_VIIa_k1 = 10000000; IR_TFPI_Xa_binding_with_TF_VIIa_k2 = 0.0011;
  IR_ATIII_inactivation_of_IXa: E9 => ; plasma*IR_ATIII_inactivation_of_IXa_k1*E9; IR_ATIII_inactivation_of_IXa is "IR: ATIII inactivation of IXa";
    IR_ATIII_inactivation_of_IXa_k1 = 0.1;
  IR_ATIII_inactivation_of_Xa: E10 => ; plasma*IR_ATIII_inactivation_of_Xa_k1*E10; IR_ATIII_inactivation_of_Xa is "IR: ATIII inactivation of Xa";
    IR_ATIII_inactivation_of_Xa_k1 = 0.1;
  IR_ATIII_inactivation_of_IIa: E2 => ; plasma*IR_ATIII_inactivation_of_IIa_k1*E2; IR_ATIII_inactivation_of_IIa is "IR: ATIII inactivation of IIa";
    IR_ATIII_inactivation_of_IIa_k1 = 0.2;
  reaction_56: PL + Psub -> PLas; plasma*(reaction_56_k1*PL*Psub - reaction_56_k2*PLas); reaction_56 is "PR: Unactivated platelet binding to SE";
    reaction_56_k1 = 2e10; reaction_56_k2 = 0;
  reaction_57: PLav + Psub -> PLas; plasma*(reaction_57_k1*PLav*Psub - reaction_57_k2*PLas); reaction_57 is "PR: Activated platelet binding to SE";
    reaction_57_k1 = 2e10; reaction_57_k2 = 0;
  reaction_58: PL + PLav => 2 PLav; plasma*reaction_58_k1*PL*PLav; reaction_58 is "PR: Platelet activation by platelet in solution";
    reaction_58_k1 = 300000000;
  reaction_59: PL + PLas => PLav + PLas; plasma*reaction_59_k1*PL*PLas; reaction_59 is "PR: Platelet activation by platelet on SE";
    reaction_59_k1 = 300000000;
  reaction_60: PL + E2 => PLav + E2; plasma*function_2(kc2_act_times_Ae2, PL, E2); reaction_60 is "PR: Platelet activation by thrombin";
    kc2_act_times_Ae2 = 0.5;
  Flow_II: Z2 => ; plasma*kc_flow*Z2; Flow_II is "Flow: II";
  Flow_IIa: E2 => ; plasma*kc_flow*E2; Flow_IIa is "Flow: IIa";
  Flow_V: Z5 => ; plasma*kc_flow*Z5; Flow_V is "Flow: V";
  Flow_Va: E5 => ; plasma*kc_flow*E5; Flow_Va is "Flow: Va";
  Flow_VII: Z7 => ; plasma*kc_flow*Z7; Flow_VII is "Flow: VII";
  Flow_VIIa: E7 => ; plasma*kc_flow*E7; Flow_VIIa is "Flow: VIIa";
  Flow_VIII: Z8 => ; plasma*kc_flow*Z8; Flow_VIII is "Flow: VIII";
  Flow_VIIIa: E8 => ; plasma*kc_flow*E8; Flow_VIIIa is "Flow: VIIIa";
  Flow_IX: Z9 => ; plasma*kc_flow*Z9; Flow_IX is "Flow: IX";
  Flow_IXa: E9 => ; plasma*kc_flow*E9; Flow_IXa is "Flow: IXa";
  Flow_X: Z10 => ; plasma*kc_flow*Z10; Flow_X is "Flow: X";
  Flow_Xa: E10 => ; plasma*kc_flow*E10; Flow_Xa is "Flow: Xa";
  Flow_TFPI: TFPI => ; plasma*kc_flow*TFPI; Flow_TFPI is "Flow: TFPI";
  Flow_APC: APC => ; plasma*kc_flow*APC; Flow_APC is "Flow: APC";
  Flow_V_IIa_complex: Z5_E2 => ; plasma*kc_flow*Z5_E2; Flow_V_IIa_complex is "Flow: V:IIa complex";
  Flow_VII_IIa_complex: Z7_E2 => ; plasma*kc_flow*Z7_E2; Flow_VII_IIa_complex is "Flow: VII:IIa complex";
  Flow_VII_X_complex: Z7_E10 => ; plasma*kc_flow*Z7_E10; Flow_VII_X_complex is "Flow: VII:X complex";
  Flow_VIII_IIa_complex: Z8_E2 => ; plasma*kc_flow*Z8_E2; Flow_VIII_IIa_complex is "Flow: VIII:IIa complex";
  Flow_PL: PL => ; plasma*kp_flow*PL; Flow_PL is "Flow: PL";
  Flow_TFPI_Xa_complex: TFPI_E10 => ; plasma*kc_flow*TFPI_E10; Flow_TFPI_Xa_complex is "Flow: TFPI:Xa complex";
  MF_VII: Z7m => ; plasma*p_prime_1_p*Z7m; MF_VII is "MF: VII";
  MF_VIIa: E7m => ; plasma*p_prime_1_p*E7m; MF_VIIa is "MF: VIIa";
  MF_VII_IIa_complex: Z7m_E2 => ; plasma*p_prime_1_p*Z7m_E2; MF_VII_IIa_complex is "MF: VII:IIa complex";
  MF_VII_Xa_complex: Z7m_E10 => ; plasma*p_prime_1_p*Z7m_E10; MF_VII_Xa_complex is "MF: VII:Xa complex";
  MF_IX_VIIa_complex: Z9_E7m => ; plasma*p_prime_1_p*Z9_E7m; MF_IX_VIIa_complex is "MF: IX:VIIa complex";
  MF_X_VIIa_complex: Z10_E7m => ; plasma*p_prime_1_p*Z10_E7m; MF_X_VIIa_complex is "MF: X:VIIa complex";
  MF_TFPI_Xa_VIIa_complex: TFPI_E10_E7m => ; plasma*p_prime_1_p*TFPI_E10_E7m; MF_TFPI_Xa_VIIa_complex is "MF: TFPI:Xa:VIIa complex";
  MF_TF: TF => ; subendothelium*p_prime_1_p*TF; MF_TF is "MF: TF";
  MF_V_release: => Z5; plasma*Modifier_Flow(P5); MF_V_release is "MF: V release";  // modifiers: P5
  Inflow_II: => Z2; plasma*Rate_Law_for_Inflow(kc_flow, Z2out); Inflow_II is "Inflow: II";
  Inflow_V: => Z5; plasma*Rate_Law_for_Inflow(kc_flow, Z5out); Inflow_V is "Inflow: V";
  Inflow_VII: => Z7; plasma*Rate_Law_for_Inflow(kc_flow, Z7out); Inflow_VII is "Inflow: VII";
  Inflow_VIIa: => E7; plasma*Rate_Law_for_Inflow(kc_flow, E7out); Inflow_VIIa is "Inflow: VIIa";
  Inflow_VIII: => Z8; plasma*Rate_Law_for_Inflow(kc_flow, Z8out); Inflow_VIII is "Inflow: VIII";
  Inflow_IX: => Z9; plasma*Rate_Law_for_Inflow(kc_flow, Z9out); Inflow_IX is "Inflow: IX";
  Inflow_X: => Z10; plasma*Rate_Law_for_Inflow(kc_flow, Z10out); Inflow_X is "Inflow: X";
  Inflow_TFPI: => TFPI; plasma*Rate_Law_for_Inflow(kc_flow, TFPIout); Inflow_TFPI is "Inflow: TFPI";
  Inflow_PL: => PL; plasma*Rate_Law_for_Inflow(kp_flow, PLout); Inflow_PL is "Inflow: PL";
end
