// SBML level 2 version 4

model Model_1()
  // Leipold1995_ThrombinFormation+inhibitors
  // This model originates from BioModels Database: A Database of Annotated Published Models (http://www.ebi.ac.uk/biomodels/). It is copyright (c) 2005-2011 The BioModels.net Team.
  // To the extent possible under law, all copyright and related or neighbouring rights to this encoded model have been dedicated to the public domain worldwide. Please refer to CC0 Public Domain Dedication for more information.
  // In summary, you are entitled to use this encoded model in absolutely any manner you deem suitable, verbatim, or with modification, alone or embedded it in a larger context, redistribute it, commercially or not, in a restricted way or not..
  // To cite BioModels Database, please use: Li C, Donizelli M, Rodriguez N, Dharuri H, Endler L, Chelliah V, Li L, He E, Henry A, Stefan MI, Snoep JL, Hucka M, Le Novère N, Laibe C (2010) BioModels Database: An enhanced, curated and annotated resource for published quantitative kinetic models. BMC Syst Biol., 4:92.
  // biomodels.db:MODEL1109150002
  // isDescribedBy pubmed:7592704
  // biomodels.db:MODEL1109150002
  // isDescribedBy pubmed:7592704
  // biomodels.db:MODEL1109150002
  // biomodels.db:MODEL1109150002

  // Compartments:
  compartment compartment_1 = 1;

  // Species:
  species IX in compartment_1 = 90;
  species TF_VIIa in compartment_1 = 0.0043;
  species TF_VIIa_IX in compartment_1 = 0;
  species IXa in compartment_1 = 0;
  species TF_VIIa_X in compartment_1 = 0;
  species X in compartment_1 = 170;
  species Xa in compartment_1 = 0;
  species species_8 in compartment_1 = 0.7; species_8 is "VIII";
  species VIII_IXa in compartment_1 = 0;
  species species_10 in compartment_1 = 0; species_10 is "VIIIa(Xa)";
  species VIIIa_Xa__IXa in compartment_1 = 0; VIIIa_Xa__IXa is "VIIIa(Xa)_IXa";
  species species_12 in compartment_1 = 0; species_12 is "VIIIa(IIa)";
  species VIIIa_IIa__IXa in compartment_1 = 0; VIIIa_IIa__IXa is "VIIIa(IIa)_IXa";
  species VIIIa_Xa__IXa_X in compartment_1 = 0; VIIIa_Xa__IXa_X is "VIIIa(Xa)_IXa_X";
  species VIIIa_IIa__IXa_X in compartment_1 = 0; VIIIa_IIa__IXa_X is "VIIIa(IIa)_IXa_X";
  species species_16 in compartment_1 = 0; species_16 is "VIII*";
  species species_17 in compartment_1 = 0; species_17 is "VIIIa(Xa)*";
  species species_18 in compartment_1 = 0; species_18 is "VIIIa(IIa)*";
  species V in compartment_1 = 20;
  species Xa_V in compartment_1 = 0;
  species Va in compartment_1 = 0;
  species Xa_VIII in compartment_1 = 0;
  species Va_Xa in compartment_1 = 0;
  species II in compartment_1 = totalThrombin;
  species Va_Xa_II in compartment_1 = 0;
  species Va_Xa_mIIa in compartment_1 = 0;
  species mIIa in compartment_1 = 0;
  species IIa in compartment_1 = 0;
  species mIIa_V in compartment_1 = 0;
  species Va_IIa in compartment_1 = 0; Va_IIa is "Va(IIa)";
  species mIIa_VIII in compartment_1 = 0;
  species IIa_V in compartment_1 = 0;
  species IIa_VIII in compartment_1 = 0;
  species I in compartment_1 = 10;
  species TF_VIIa_I in compartment_1 = 0;
  species IXa_I in compartment_1 = 0;
  species VIII_IXa_I in compartment_1 = 0;
  species VIIIa_Xa__IXa_I in compartment_1 = 0; VIIIa_Xa__IXa_I is "VIIIa(Xa)_IXa_I";
  species VIIIa_IIa__IXa_I in compartment_1 = 0; VIIIa_IIa__IXa_I is "VIIIa(IIa)_IXa_I";
  species Xa_I in compartment_1 = 0;
  species Va_Xa_I in compartment_1 = 0;
  species mIIa_I in compartment_1 = 0;
  species Va_Xa_mIIa_I in compartment_1 = 0;
  species IIa_I in compartment_1 = 0;

  // Parameters:
  k1 = 0.1;
  k2 = 2.2;
  k3 = 0.47;
  k4 = 0.1;
  k5 = 5.5;
  k6 = 1.4;
  k7 = 0.1;
  k8 = 0.4;
  k9 = 0.1;
  k10 = 0.17;
  k11 = 0.1;
  k12 = 19;
  k13 = 17;
  k14 = 29;
  k15 = 0.00021;
  k16 = 8e-5;
  k17 = 0.00022;
  k18 = 0.0011;
  k19 = 0.1;
  k20 = 1;
  k21 = 0.043;
  k22 = 0.1;
  k23 = 2.1;
  k24 = 0.023;
  k25 = 1;
  k26 = 1;
  k27 = 0.1;
  k28 = 46;
  k29 = 13;
  k30 = 0.1;
  k31 = 66;
  k32 = 15;
  k33 = 0.1;
  k34 = 7.2;
  k35 = 1.3;
  k36 = 0.1;
  k37 = 15;
  k38 = 0.9;
  k39 = 0.1;
  k40 = 7.2;
  k41 = 0.26;
  k42 = 0.1;
  k43 = 15;
  k44 = 0.9;
  k45 = 0.1;
  k46 = k45*Ki_VIIa;
  k47 = k45*Ki_IXa;
  k48 = k45*Ki_Xa;
  k49 = k45*Ki_IIa;
  Ki_VIIa = 1000;
  Ki_IXa = 1000;
  Ki_Xa = 1000;
  Ki_IIa = 1000;
  time_80_Thrombin = 0; time_80_Thrombin is "time_80%Thrombin";
  totalThrombin = 1400;

  // Reactions:
  TF_VIIa_IX_binding: TF_VIIa + IX -> TF_VIIa_IX; compartment_1*(k1*TF_VIIa*IX - k2*TF_VIIa_IX); TF_VIIa_IX_binding is "TF_VIIa-IX binding";
  TF_VIIa_IX_activation: TF_VIIa_IX => TF_VIIa + IXa; compartment_1*k3*TF_VIIa_IX; TF_VIIa_IX_activation is "TF_VIIa-IX activation";
  TF_VIIa_X_binding: TF_VIIa + X -> TF_VIIa_X; compartment_1*(k4*TF_VIIa*X - k5*TF_VIIa_X); TF_VIIa_X_binding is "TF_VIIa-X binding";
  TF_VIIa_X_activation: TF_VIIa_X => TF_VIIa + Xa; compartment_1*k6*TF_VIIa_X; TF_VIIa_X_activation is "TF_VIIa-X activation";
  VIII_IXa_binding: species_8 + IXa -> VIII_IXa; compartment_1*(k7*species_8*IXa - k8*VIII_IXa); VIII_IXa_binding is "VIII-IXa binding";
  VIIIa_Xa_IXa_binding: species_10 + IXa -> VIIIa_Xa__IXa; compartment_1*(k9*species_10*IXa - k10*VIIIa_Xa__IXa); VIIIa_Xa_IXa_binding is "VIIIa(Xa)-IXa binding";
  VIIIa_IIa_IXa_binding: species_12 + IXa -> VIIIa_IIa__IXa; compartment_1*(k9*species_12*IXa - k10*VIIIa_IIa__IXa); VIIIa_IIa_IXa_binding is "VIIIa(IIa)-IXa binding";
  VIIIa_Xa__IXa_X_binding: VIIIa_Xa__IXa + X -> VIIIa_Xa__IXa_X; compartment_1*(k11*VIIIa_Xa__IXa*X - k12*VIIIa_Xa__IXa_X); VIIIa_Xa__IXa_X_binding is "VIIIa(Xa)_IXa-X binding";
  VIIIa_Xa__IXa_X_activation: VIIIa_Xa__IXa_X => VIIIa_Xa__IXa + Xa; compartment_1*k13*VIIIa_Xa__IXa_X; VIIIa_Xa__IXa_X_activation is "VIIIa(Xa)_IXa-X activation";
  VIIIa_IIa__IXa_X_binding: VIIIa_IIa__IXa + X -> VIIIa_IIa__IXa_X; compartment_1*(k11*VIIIa_IIa__IXa*X - k12*VIIIa_IIa__IXa_X); VIIIa_IIa__IXa_X_binding is "VIIIa(IIa)_IXa-X binding";
  VIIIa_IIa__IXa_X_activation: VIIIa_IIa__IXa_X => VIIIa_IIa__IXa + Xa; compartment_1*k14*VIIIa_IIa__IXa_X; VIIIa_IIa__IXa_X_activation is "VIIIa(IIa)_IXa-X activation";
  VIII_IXa_inactivation: VIII_IXa => species_16 + IXa; compartment_1*k15*VIII_IXa;
  VIIIa_Xa__IXa_inactivation: VIIIa_Xa__IXa => species_17 + IXa; compartment_1*k16*VIIIa_Xa__IXa; VIIIa_Xa__IXa_inactivation is "VIIIa(Xa)_IXa inactivation";
  VIIIa_IIa__IXa_inactivation: VIIIa_IIa__IXa => species_18 + IXa; compartment_1*k16*VIIIa_IIa__IXa; VIIIa_IIa__IXa_inactivation is "VIIIa(IIa)_IXa inactivation";
  VIIIa_Xa_inactivation: species_10 => species_17; compartment_1*k17*species_10; VIIIa_Xa_inactivation is "VIIIa(Xa) inactivation";
  VIIIa_IIa_inactivation: species_12 => species_18; compartment_1*k18*species_12; VIIIa_IIa_inactivation is "VIIIa(IIa) inactivation";
  Xa_V_binding: Xa + V -> Xa_V; compartment_1*(k19*Xa*V - k20*Xa_V); Xa_V_binding is "Xa-V binding";
  Xa_V_activation: Xa_V => Xa + Va; compartment_1*k21*Xa_V; Xa_V_activation is "Xa-V activation";
  Xa_VIII_binding: Xa + species_8 -> Xa_VIII; compartment_1*(k22*Xa*species_8 - k23*Xa_VIII); Xa_VIII_binding is "Xa-VIII binding";
  Xa_VIII_activation: Xa_VIII => Xa + species_10; compartment_1*k24*Xa_VIII; Xa_VIII_activation is "Xa-VIII activation";
  Va_Xa_binding: Va + Xa -> Va_Xa; compartment_1*(k25*Va*Xa - k26*Va_Xa); Va_Xa_binding is "Va-Xa binding";
  Va_Xa_II_binding: Va_Xa + II -> Va_Xa_II; compartment_1*(k27*Va_Xa*II - k28*Va_Xa_II); Va_Xa_II_binding is "Va_Xa-II binding";
  Va_Xa_mIIa_binding: Va_Xa + mIIa -> Va_Xa_mIIa; compartment_1*(k30*Va_Xa*mIIa - k31*Va_Xa_mIIa); Va_Xa_mIIa_binding is "Va_Xa-mIIa binding";
  reaction_24: Va_Xa_II => Va_Xa_mIIa; compartment_1*k29*Va_Xa_II; reaction_24 is "Va_Xa_II meizothrombin conversion";
  Va_Xa_mIIa_thrombin_conversion: Va_Xa_mIIa => Va_Xa + IIa; compartment_1*k32*Va_Xa_mIIa;
  mIIa_V_binding: mIIa + V -> mIIa_V; compartment_1*(k33*mIIa*V - k34*mIIa_V); mIIa_V_binding is "mIIa-V binding";
  mIIa_V_activation: mIIa_V => mIIa + Va_IIa; compartment_1*k35*mIIa_V; mIIa_V_activation is "mIIa-V activation";
  mIIa_VIII_binding: mIIa + species_8 -> mIIa_VIII; compartment_1*(k36*mIIa*species_8 - k36*mIIa_VIII); mIIa_VIII_binding is "mIIa-VIII binding";
  mIIa_VIII_activation: mIIa_VIII => mIIa + species_12; compartment_1*k38*mIIa_VIII; mIIa_VIII_activation is "mIIa-VIII activation";
  IIa_V_binding: IIa + V -> IIa_V; compartment_1*(k39*IIa*V - k40*IIa_V); IIa_V_binding is "IIa-V binding";
  IIa_V_activation: IIa_V => IIa + Va_IIa; compartment_1*k41*IIa_V; IIa_V_activation is "IIa-V activation";
  IIa_VIII_binding: IIa + species_8 -> IIa_VIII; compartment_1*(k42*IIa*species_8 - k43*IIa_VIII); IIa_VIII_binding is "IIa-VIII binding";
  IIa_VIII_activation: IIa_VIII => IIa + species_12; compartment_1*k44*IIa_VIII; IIa_VIII_activation is "IIa-VIII activation";
  TF_VIIa_inhibition: TF_VIIa + I -> TF_VIIa_I; compartment_1*(k45*TF_VIIa*I - k46*TF_VIIa_I);
  IXa_inhibition: IXa + I -> IXa_I; compartment_1*(k45*IXa*I - k47*IXa_I);
  VIII_inhibition_by_IXa_I: species_8 + IXa_I -> VIII_IXa_I; compartment_1*(k7*species_8*IXa_I - k7*VIII_IXa_I);
  VIII_IXa_inhibition: VIII_IXa + I -> VIII_IXa_I; compartment_1*(k45*VIII_IXa*I - k47*VIII_IXa_I);
  VIIIa_Xa_inhibition_by_IXa_I: species_10 + IXa_I -> VIIIa_Xa__IXa_I; compartment_1*(k9*species_10*IXa_I - k10*VIIIa_Xa__IXa_I); VIIIa_Xa_inhibition_by_IXa_I is "VIIIa(Xa) inhibition by IXa_I";
  VIIIa_IIa_inhibition_by_IXa_I: species_12 + IXa_I -> VIIIa_IIa__IXa_I; compartment_1*(k9*species_12*IXa_I - k10*VIIIa_IIa__IXa_I); VIIIa_IIa_inhibition_by_IXa_I is "VIIIa(IIa) inhibition by IXa_I";
  VIIIa_Xa__IXa_inhibition: VIIIa_Xa__IXa + I -> VIIIa_Xa__IXa_I; compartment_1*(k45*VIIIa_Xa__IXa*I - k47*VIIIa_Xa__IXa_I); VIIIa_Xa__IXa_inhibition is "VIIIa(Xa)_IXa inhibition";
  VIIIa_IIa__IXa_inhibition: VIIIa_IIa__IXa + I -> VIIIa_IIa__IXa_I; compartment_1*(k45*VIIIa_IIa__IXa*I - k47*VIIIa_IIa__IXa_I); VIIIa_IIa__IXa_inhibition is "VIIIa(IIa)_IXa inhibition";
  Xa_inhibition: Xa + I -> Xa_I; compartment_1*(k45*Xa*I - k48*Xa_I);
  Va_inhibition_by_Xa_I: Va + Xa_I -> Va_Xa_I; compartment_1*(k25*Va*Xa_I - k26*Va_Xa_I);
  Va_Xa_inhibition: Va_Xa + I -> Va_Xa_I; compartment_1*(k45*Va_Xa*I - k48*Va_Xa_I);
  mIIa_inhibition: mIIa + I -> mIIa_I; compartment_1*(k45*mIIa*I - k49*mIIa_I);
  Va_Xa_inhibition_by_mIIa_I: Va_Xa + mIIa_I -> Va_Xa_mIIa_I; compartment_1*(k30*Va_Xa*mIIa_I - k31*Va_Xa_mIIa_I);
  Va_Xa_mIIa_inhibition: Va_Xa_mIIa + I -> Va_Xa_mIIa_I; compartment_1*(k45*Va_Xa_mIIa*I - k49*Va_Xa_mIIa_I);
  IIa_inhibition: IIa + I -> IIa_I; compartment_1*(k45*IIa*I - k49*IIa_I);

  // Unit definitions:
  unit substance = 1e-9 mole;
end
