// SBML level 2 version 4

function function_1(kcat, E, S, Km)
  kcat*E*S/(Km + S);
end
function_1 is "Henri-Michaelis-Menten (irreversible, kcat)";

model Model_1()
  // Kogan2001_aPTT_preincubation
  // This model originates from BioModels Database: A Database of Annotated Published Models (http://www.ebi.ac.uk/biomodels/). It is copyright (c) 2005-2011 The BioModels.net Team.
  // To the extent possible under law, all copyright and related or neighbouring rights to this encoded model have been dedicated to the public domain worldwide. Please refer to CC0 Public Domain Dedication for more information.
  // In summary, you are entitled to use this encoded model in absolutely any manner you deem suitable, verbatim, or with modification, alone or embedded it in a larger context, redistribute it, commercially or not, in a restricted way or not..
  // To cite BioModels Database, please use: Li C, Donizelli M, Rodriguez N, Dharuri H, Endler L, Chelliah V, Li L, He E, Henry A, Stefan MI, Snoep JL, Hucka M, Le Novère N, Laibe C (2010) BioModels Database: An enhanced, curated and annotated resource for published quantitative kinetic models. BMC Syst Biol., 4:92.
  // biomodels.db:MODEL1109160000
  // isDescribedBy pubmed:11248291
  // biomodels.db:MODEL1109160000
  // isDescribedBy pubmed:11248291
  // biomodels.db:MODEL1109160000
  // biomodels.db:MODEL1109160000

  // Compartments:
  compartment compartment_1 = 1;

  // Species:
  species XII in compartment_1 = 0.3;
  species XIIa in compartment_1 = 2.3e-9;
  species ATIII in compartment_1 = 3.4;
  species alpha1AT in compartment_1 = 24.5;
  species alpha2M in compartment_1 = 3.5;
  species C1inh in compartment_1 = 1.7;
  species XIa in compartment_1 = 0;
  species XIa_C1inh in compartment_1 = 0;
  species XIa_alpha1AT in compartment_1 = 0;
  species XIa_alpha2AP in compartment_1 = 0;
  species alpha2AP in compartment_1 = 0.9;
  species PAI1 in compartment_1 = 0.00046;
  species XIa_PAI1 in compartment_1 = 0;
  species XIa_ATIII in compartment_1 = 0;
  species XIIa_C1inh in compartment_1 = 0;
  species XIIa_alpha2AP in compartment_1 = 0;
  species XIIa_alpha2M in compartment_1 = 0;
  species XIIa_ATIII in compartment_1 = 0;
  species XIIa_PAI1 in compartment_1 = 0;
  species XIIf in compartment_1 = 0;
  species XIIf_C1inh in compartment_1 = 0;
  species XIIf_alpha2AP in compartment_1 = 0;
  species XIIf_ATIII in compartment_1 = 0;
  species K in compartment_1 = 0;
  species K_C1inh in compartment_1 = 0;
  species K_alpha2M in compartment_1 = 0;
  species K_PAI1 in compartment_1 = 0;
  species K_ATIII in compartment_1 = 0;
  species PK in compartment_1 = 0.58;
  species XI in compartment_1 = 0.025;

  // Reactions:
  R1: XII => XIIa; compartment_1*function_1(R1_kcat, XIIa, XII, R1_Km);
    R1_kcat = 1.98; R1_Km = 11;
  R2: PK => K; compartment_1*function_1(R2_kcat, XIIa, PK, R2_Km);  // modifiers: XIIa
    R2_kcat = 216; R2_Km = 0.091;
  R3: PK => K; compartment_1*function_1(R3_kcat, XIIf, PK, R3_Km);  // modifiers: XIIf
    R3_kcat = 2400; R3_Km = 37;
  R4: XII => XIIa; compartment_1*function_1(R4_kcat, K, XII, R4_Km);  // modifiers: K
    R4_kcat = 342; R4_Km = 0.51;
  R5: XIIa => XIIf; compartment_1*function_1(R5_kcat, K, XIIa, R5_Km);  // modifiers: K
    R5_kcat = 0.34; R5_Km = 0.5;
  R6: XI => XIa; compartment_1*function_1(R6_kcat, XIIa, XI, R6_Km);  // modifiers: XIIa
    R6_kcat = 0.68; R6_Km = 2;
  R7: XII => XIIa; compartment_1*function_1(R7_kcat, XIa, XII, R7_Km);  // modifiers: XIa
    R7_kcat = 34; R7_Km = 0.5;
  R26: XIa + C1inh => XIa_C1inh; compartment_1*R26_k1*XIa*C1inh;
    R26_k1 = 0.001;
  R27: XIa + alpha1AT => XIa_alpha1AT; compartment_1*R27_k1*XIa*alpha1AT;
    R27_k1 = 0.004;
  R28: XIa + ATIII => XIa_ATIII; compartment_1*R28_k1*XIa*ATIII;
    R28_k1 = 0.01;
  R29: XIa + alpha2AP => XIa_alpha2AP; compartment_1*R29_k1*XIa*alpha2AP;
    R29_k1 = 0.03;
  R30: XIa + PAI1 => XIa_PAI1; compartment_1*R30_k1*XIa*PAI1;
    R30_k1 = 12.6;
  R31: XIIa + C1inh => XIIa_C1inh; compartment_1*R31_k1*XIIa*C1inh;
    R31_k1 = 0.046;
  R32: XIIa + alpha2AP => XIIa_alpha2AP; compartment_1*R32_k1*XIIa*alpha2AP;
    R32_k1 = 0.011;
  R33: XIIa + alpha2M => XIIa_alpha2M; compartment_1*R33_k1*XIIa*alpha2M;
    R33_k1 = 0.005;
  R34: XIIa + ATIII => XIIa_ATIII; compartment_1*R34_k1*XIIa*ATIII;
    R34_k1 = 0.0013;
  R35: XIIa + PAI1 => XIIa_PAI1; compartment_1*R35_k1*XIIa*PAI1;
    R35_k1 = 0.96;
  R36: XIIf + C1inh => XIIf_C1inh; compartment_1*R36_k1*XIIf*C1inh;
    R36_k1 = 0.185;
  R37: XIIf + alpha2AP => XIIf_alpha2AP; compartment_1*R37_k1*XIIf*alpha2AP;
    R37_k1 = 0.0091;
  R38: XIIf + ATIII => XIIf_ATIII; compartment_1*R38_k1*XIIf*ATIII;
    R38_k1 = 0.0032;
  R39: K + C1inh => K_C1inh; compartment_1*R39_k1*K*C1inh;
    R39_k1 = 1;
  R40: K + alpha2M => K_alpha2M; compartment_1*R40_k1*K*alpha2M;
    R40_k1 = 0.29;
  R41: K + PAI1 => K_PAI1; compartment_1*R41_k1*K*PAI1;
    R41_k1 = 3.6;
  R42: K + ATIII => K_ATIII; compartment_1*R42_k1*K*ATIII;
    R42_k1 = 0.0096;
  XIa_degradation: XIa => ; compartment_1*XIa_degradation_k1*XIa;
    XIa_degradation_k1 = 0;

  // Unit definitions:
  unit time = 60 second;
  unit substance = 1e-6 mole;
end
