// SBML level 2 version 4

function function_1(kcat, E, S, Km)
  kcat*E*S/(Km + S);
end
function_1 is "Henri-Michaelis-Menten (irreversible, kcat)";

model Model_1()
  // Kogan2001_aPTT_coagulation
  // This model originates from BioModels Database: A Database of Annotated Published Models (http://www.ebi.ac.uk/biomodels/). It is copyright (c) 2005-2011 The BioModels.net Team.
  // To the extent possible under law, all copyright and related or neighbouring rights to this encoded model have been dedicated to the public domain worldwide. Please refer to CC0 Public Domain Dedication for more information.
  // In summary, you are entitled to use this encoded model in absolutely any manner you deem suitable, verbatim, or with modification, alone or embedded it in a larger context, redistribute it, commercially or not, in a restricted way or not..
  // To cite BioModels Database, please use: Li C, Donizelli M, Rodriguez N, Dharuri H, Endler L, Chelliah V, Li L, He E, Henry A, Stefan MI, Snoep JL, Hucka M, Le Novère N, Laibe C (2010) BioModels Database: An enhanced, curated and annotated resource for published quantitative kinetic models. BMC Syst Biol., 4:92.
  // biomodels.db:MODEL1109160001
  // isDescribedBy pubmed:11248291
  // biomodels.db:MODEL1109160001
  // isDescribedBy pubmed:11248291
  // biomodels.db:MODEL1109160001
  // biomodels.db:MODEL1109160001

  // Compartments:
  compartment compartment_1 = 1;

  // Species:
  species XIIa in compartment_1 = 0.173;
  species Va in compartment_1 = 0;
  species Va_Xa in compartment_1 = 0;
  species Xa in compartment_1 = 0;
  species IXa in compartment_1 = 0;
  species VIIIa in compartment_1 = 0;
  species VIIIa_IXa in compartment_1 = 0;
  species ATIII in compartment_1 = 3.4;
  species IIa in compartment_1 = 0;
  species IIa_ATIII in compartment_1 = 0;
  species IIa_alpha1AT in compartment_1 = 0;
  species alpha1AT in compartment_1 = 24.5;
  species IIa_alpha2M in compartment_1 = 0;
  species alpha2M in compartment_1 = 3.25;
  species Xa_ATIII in compartment_1 = 0;
  species Xa_alpha1AT in compartment_1 = 0;
  species TFPI in compartment_1 = 0.0025;
  species Xa_TFPI in compartment_1 = 0;
  species IXa_ATIII in compartment_1 = 0;
  species C1inh in compartment_1 = 1.27;
  species XIa in compartment_1 = 0.00496;
  species XIa_C1inh in compartment_1 = 0;
  species XIa_alpha1AT in compartment_1 = 0;
  species XIa_alpha2AP in compartment_1 = 0;
  species alpha2AP in compartment_1 = 0.888;
  species PAI1 in compartment_1 = 5.85948e-5;
  species XIa_PAI1 in compartment_1 = 0;
  species XIa_ATIII in compartment_1 = 0;
  species XI in compartment_1 = 0.0174;
  species IX in compartment_1 = 0.09;
  species X in compartment_1 = 0.133;
  species II in compartment_1 = 1.4;
  species V in compartment_1 = 0.021;
  species VIII in compartment_1 = 0.0007;
  species I in compartment_1 = 8.3;
  species Ia in compartment_1 = 0;
  species Xa_Va in compartment_1 = 0;
  species Va_Xa_ATIII in compartment_1 = 0;
  species Va_Xa_alpha1AT in compartment_1 = 0;
  species IXa_VIIIa_ATIII in compartment_1 = 0;

  // Reactions:
  R6: XI => XIa; compartment_1*function_1(R6_kcat, XIIa, XI, R6_Km);  // modifiers: XIIa
    R6_kcat = 0.68; R6_Km = 2;
  R8: IX => IXa; compartment_1*function_1(R8_kcat, XIa, IX, R8_Km);  // modifiers: XIa
    R8_kcat = 225; R8_Km = 0.35;
  R9: X => Xa; compartment_1*function_1(R9_kcat, IXa, X, R9_Km);  // modifiers: IXa
    R9_kcat = 0.04; R9_Km = 2;
  R10: X => Xa; compartment_1*function_1(R10_kcat, VIIIa_IXa, X, R10_Km);  // modifiers: VIIIa_IXa
    R10_kcat = 1740; R10_Km = 0.19;
  R11: II => IIa; compartment_1*function_1(R11_kcat, Xa, II, R11_Km);  // modifiers: Xa
    R11_kcat = 2.25; R11_Km = 0.058;
  R12: II => IIa; compartment_1*function_1(R12_kcat, Xa_Va, II, R12_Km);  // modifiers: Xa_Va
    R12_kcat = 200; R12_Km = 1;
  R13: V => Va; compartment_1*function_1(R13_kcat, IIa, V, R13_Km);  // modifiers: IIa
    R13_kcat = 14; R13_Km = 0.0717;
  R14: V => Va; compartment_1*function_1(R14_kcat, Xa, V, R14_Km);  // modifiers: Xa
    R14_kcat = 2.6; R14_Km = 0.0104;
  R15: VIII => VIIIa; compartment_1*function_1(R15_kcat, IIa, VIII, R15_Km);  // modifiers: IIa
    R15_kcat = 60; R15_Km = 0.02;
  R16: I => Ia; compartment_1*function_1(R16_kcat, IIa, I, R16_Km);  // modifiers: IIa
    R16_kcat = 5040; R16_Km = 7.2;
  R17: Va + Xa => Va_Xa; compartment_1*R17_k1*Va*Xa;
    R17_k1 = 10000;
  R18: VIIIa + IXa => VIIIa_IXa; compartment_1*R18_k1*VIIIa*IXa;
    R18_k1 = 10000;
  R19: IIa + ATIII => IIa_ATIII; compartment_1*R19_k1*IIa*ATIII;
    R19_k1 = 0.35;
  R20: IIa + alpha1AT => IIa_alpha1AT; compartment_1*R20_k1*IIa*alpha1AT;
    R20_k1 = 0.0047;
  R21: IIa + alpha2M => IIa_alpha2M; compartment_1*R21_k1*IIa*alpha2M;
    R21_k1 = 0.0293;
  R22: Xa + ATIII => Xa_ATIII; compartment_1*R22_k1*Xa*ATIII;
    R22_k1 = 0.11;
  R23: Xa + alpha1AT => Xa_alpha1AT; compartment_1*R23_k1*Xa*alpha1AT;
    R23_k1 = 0.0157;
  R24: Xa + TFPI => Xa_TFPI; compartment_1*R24_k1*Xa*TFPI;
    R24_k1 = 960;
  R25: IXa + ATIII => IXa_ATIII; compartment_1*R25_k1*IXa*ATIII;
    R25_k1 = 0.0294;
  R26: XIa + C1inh => XIa_C1inh; compartment_1*R26_k1*XIa*C1inh;
    R26_k1 = 0.001;
  R27: XIa + alpha1AT => XIa_alpha1AT; compartment_1*R27_k1*XIa*alpha1AT;
    R27_k1 = 0.004;
  R28: XIa + ATIII => XIa_ATIII; compartment_1*R28_k1*XIa*ATIII;
    R28_k1 = 0.01;
  R29: XIa + alpha2AP => XIa_alpha2AP; compartment_1*R29_k1*XIa*alpha2AP;
    R29_k1 = 0.03;
  R30: XIa + PAI1 => XIa_PAI1; compartment_1*R30_k1*XIa*PAI1;
    R30_k1 = 12.6;
  Va_Xa_inactivation_by_ATIII: Va_Xa + ATIII => Va_Xa_ATIII; compartment_1*Va_Xa_inactivation_by_ATIII_k1*Va_Xa*ATIII;
    Va_Xa_inactivation_by_ATIII_k1 = 0.11;
  Va_Xa_inactivation_by_alpha1AT: Va_Xa + alpha1AT => Va_Xa_alpha1AT; compartment_1*Va_Xa_inactivation_by_alpha1AT_k1*Va_Xa*alpha1AT;
    Va_Xa_inactivation_by_alpha1AT_k1 = 0.0157;
  VIIIa_IXa_inactivation_by_ATIII: VIIIa_IXa + ATIII => IXa_VIIIa_ATIII; compartment_1*VIIIa_IXa_inactivation_by_ATIII_k1*VIIIa_IXa*ATIII; VIIIa_IXa_inactivation_by_ATIII is "VIIIa-IXa inactivation by ATIII";
    VIIIa_IXa_inactivation_by_ATIII_k1 = 0.0294;

  // Unit definitions:
  unit time = 60 second;
  unit substance = 1e-6 mole;
end
