// SBML level 2 version 4

model Kiselyov2009_InsulinReceptorModel()
  // This a model from the article:
  // Harmonic oscillator model of the insulin and IGF1 receptors' allosteric binding and activation.
  // Kiselyov VV, Versteyhe S, Gauguin L, De Meyts P. Mol Syst Biol. 2009;5:243. 19225456 ,
  // Abstract:
  // The insulin and insulin-like growth factor 1 receptors activate overlapping signalling pathways that are critical for growth, metabolism, survival and longevity. Their mechanism of ligand binding and activation displays complex allosteric properties, which no mathematical model has been able to account for. Modelling these receptors' binding and activation in terms of interactions between the molecular components is problematical due to many unknown biochemical and structural details. Moreover, substantial combinatorial complexity originating from multivalent ligand binding further complicates the problem. On the basis of the available structural and biochemical information, we develop a physically plausible model of the receptor binding and activation, which is based on the concept of a harmonic oscillator. Modelling a network of interactions among all possible receptor intermediaries arising in the context of the model (35, for the insulin receptor) accurately reproduces for the first time all the kinetic properties of the receptor, and provides unique and robust estimates of the kinetic parameters. The harmonic oscillator model may be adaptable for many other dimeric/dimerizing receptor tyrosine kinases, cytokine receptors and G-protein-coupled receptors where ligand crosslinking occurs.
  // This model originates from BioModels Database: A Database of Annotated Published Models (http://www.ebi.ac.uk/biomodels/). It is copyright (c) 2005-2011 The BioModels.net Team.
  // To the extent possible under law, all copyright and related or neighbouring rights to this encoded model have been dedicated to the public domain worldwide. Please refer to CC0 Public Domain Dedication for more information.
  // In summary, you are entitled to use this encoded model in absolutely any manner you deem suitable, verbatim, or with modification, alone or embedded it in a larger context, redistribute it, commercially or not, in a restricted way or not..
  // To cite BioModels Database, please use: Li C, Donizelli M, Rodriguez N, Dharuri H, Endler L, Chelliah V, Li L, He E, Henry A, Stefan MI, Snoep JL, Hucka M, Le Novère N, Laibe C (2010) BioModels Database: An enhanced, curated and annotated resource for published quantitative kinetic models. BMC Syst Biol., 4:92.
  // biomodels.db:MODEL1112050000
  // isDescribedBy pubmed:19225456
  // biomodels.db:MODEL1112050000
  // isDescribedBy pubmed:19225456
  // biomodels.db:MODEL1112050000
  // biomodels.db:MODEL1112050000

  // Compartments:
  compartment cell = 1;

  // Species:
  species $im in cell; im is "monomeric insulin";
  species $id in cell; id is "dimeric insulin";
  species $itot in cell = 1e-12; itot is "total insulin";
  species $r0 in cell = 1/cell;
  species $r1 in cell = 0;
  species $r2 in cell = 0;
  species $r3 in cell = 0;
  species $r4 in cell = 0;
  species $r1x2 in cell = 0;
  species $r14 in cell = 0;
  species $r13 in cell = 0;
  species $r23 in cell = 0;
  species $r24 in cell = 0;
  species $r3x4 in cell = 0;
  species $r1x23 in cell = 0;
  species $r1x24 in cell = 0;
  species $r13x4 in cell = 0;
  species $r23x4 in cell = 0;
  species $r1x24d in cell = 0;
  species $r2d3x4 in cell = 0;
  species $r1x234 in cell = 0;
  species $r123x4 in cell = 0;
  species $r0cyt in cell = 0;
  species $iend in cell = 0;
  species $r1x2h in cell = 0;
  species $r1h in cell = 0;
  species $r2h in cell = 0;
  species $r1x2h3 in cell = 0;
  species $r1x2h4 in cell = 0;
  species $r1x2h4d in cell = 0;
  species $r1x2h34 in cell = 0;
  species $r1h4 in cell = 0;
  species $r2h4 in cell = 0;
  species $r2h3 in cell = 0;
  species $r1h3 in cell = 0;
  species $r1h3x4 in cell = 0;
  species $r2h3x4 in cell = 0;
  species $r1h23x4 in cell = 0;
  species $r12h3x4 in cell = 0;
  species $r2hd3x4 in cell = 0;
  species ihottot in cell = 100; ihottot is "total hot insulin";

  // Parameters:
  a1 = 490000;
  a2 = 27900;
  d1 = 0.0031;
  d2 = 0.01;
  kend = 12.1; kend is "Endocytosis rate";
  kexo = 8.3; kexo is "Exocytosis rate";
  kcr = 0.33; kcr is "crosslinking constant";
  KD = 7; KD is "dissociation constant";
  k8 = 0;
  k4 = 0;

  // Assignment rules:
  id := (4*itot + KD - (KD^2 + 8*itot*KD)^(1/2))/8;
  im := itot - 2*id;

  // Rate rules:
  r0' = -a1*r0*im + d1*r1 - a2*r0*im + d2*r4 - a1*r0*im + d1*r3 - a2*r0*im + d2*r2 + kexo*r0cyt;
  r1' = -kcr*r1 + d2*r1x2 - a1*r1*im + d1*r13 - a2*r1*im + d2*r14 - d1*r1 + a1*r0*im;
  r2' = -kcr*r2 + d1*r1x2 - a1*r2*im + d1*r23 - a2*r2*im + d2*r24 - d2*r2 + a2*r0*im;
  r3' = -kcr*r3 + d2*r3x4 - a1*r3*im + d1*r13 - a2*r3*im + d2*r23 - d1*r3 + a1*r0*im;
  r4' = -kcr*r4 + d1*r3x4 - a1*r4*im + d1*r14 - a2*r4*im + d2*r24 - d2*r4 + a2*r0*im;
  r1x2' = -d2*r1x2 + kcr*r1 - a2*r1x2*id + d2*r1x24d - a2*r1x2*im + d2*r1x24 - a1*r1x2*im + d1*r1x23 - d1*r1x2 + kcr*r2 - kend*r1x2;
  r14' = d2*r14 + a2*r1*im - kcr*r14 + d2*r1x24 - kcr*r14 + d1*r13x4 - d1*r14 + a1*r4*im;
  r13' = -d1*r13 + a1*r1*im - kcr*r13 + d2*r1x23 - kcr*r13 + d2*r13x4 - d1*r13 + a1*r3*im;
  r23' = -d1*r23 + a1*r2*im - kcr*r23 + d1*r1x23 - kcr*r23 + d2*r23x4 - d2*r23 + a2*r3*im;
  r24' = -d2*r24 + a2*r2*im - kcr*r24 + d1*r1x24 - kcr*r24 + d1*r23x4 - d2*r24 + a2*r4*im;
  r3x4' = -d2*r3x4 + kcr*r3 - a1*r3x4*im + d1*r13x4 - a2*r3x4*id + d2*r2d3x4 - a2*r3x4*im + d2*r23x4 - d1*r3x4 + kcr*r4 - kend*r1x2;
  r1x23' = -d1*r1x23 + a1*r1x2*im - a2*r1x23*im + d2*r1x234 - d1*r1x23 + kcr*r23 - d2*r1x23 + kcr*r13 - kend*r1x23 - d1*r1x23 + a1*r1x2*im - a2*r1x23*im + d2*r1x234 - d1*r1x23 + kcr*r23 - d2*r1x23 + kcr*r13 - kend*r1x23;
  r1x24' = -d2*r1x24 + a2*r1x2*im - a1*r1x24*im + d1*r1x234 - k4*r1x24*im + k8*r1x24d - d1*r1x24 + kcr*r24 - d2*r1x24 + kcr*r14 - kend*r1x24;
  r13x4' = -d1*r13x4 + a1*r3x4*im - a2*r13x4*im + d2*r123x4 - d2*r13x4 + kcr*r13 - d1*r13x4 + kcr*r14 - kend*r13x4;
  r23x4' = -d2*r23x4 + a2*r3x4*im - a1*r23x4*im + d1*r123x4 - k4*r23x4*im + k8*r2d3x4 - d2*r23x4 + kcr*r23 - d1*r23x4 + kcr*r24 - kend*r23x4;
  r1x24d' = -d2*r1x24d + a2*r1x2*id - k8*r1x24d + k4*r1x24*im - kend*r1x24d;
  r2d3x4' = -d2*r2d3x4 + a2*r3x4*id + k8*r2d3x4 + k4*r23x4 + k4*r23x4*im - kend*r2d3x4;
  r1x234' = -d2*r1x234 + a2*r1x23*im - d1*r1x234 + a1*r1x24*im - kend*r1x234;
  r123x4' = -d2*r123x4 + a2*r13x4*im - d1*r123x4 + a1*r23x4*im - kend*r123x4;
  r0cyt' = -kexo*r0cyt + kend*(r1x2 + r3x4 + r1x23 + r1x24 + r13x4 + r23x4 + r1x24d + r2d3x4 + r1x234 + r123x4 + r1x2h + r1x2h3 + r1x2h4 + r1x2h4d + r1x2h34 + r1h3x4 + r2h3x4 + r1h23x4 + r12h3x4 + r2hd3x4);
  iend' = -kexo*iend + kend*(r1x2h + r1x2h3 + r1x2h4 + r1x2h4d + r1x2h34 + r1h3x4 + r2h3x4 + r1h23x4 + r12h3x4 + r2hd3x4);
  r1x2h' = -kend*r1x2h - a1*r1x2h*im + d1*r1x2h3 - d1*r1x2h + kcr*r2h - d2*r1x2h + kcr*r1h - a2*r1x2h*id + d2*r1x2h4d - a2*r1x2h*im + d2*r1x2h4;
  r1h' = -d1*r1h - a2*r1h*im + d2*r1h4 - a1*r1h*im + d1*r1h3 - kcr*r1h + d2*r1x2h;
  r2h' = -d2*r2h - a2*r2h*im + d2*r2h4 - a1*r2h*im + d1*r2h3 - kcr*r2h + d1*r1x2h;
  r1x2h3' = -kend*r1x2h3 - a2*r1x2h3*im + d2*r1x2h34 - d1*r1x2h3 + kcr*r2h3 - d2*r1x2h3 + kcr*r1h3 - d1*r1x2h3 + a1*r1x2h*im;
  r1x2h4' = -d2*r2h - a2*r2h*im + d2*r2h4 - a1*r2h*im + d1*r2h3 - kcr*r2h + d1*r1x2h;
  r1x2h4d' = -kend*r1x2h4d - d2*r1x2h4d + a2*r1x2h*id - k8*r1x2h4d + k4*r1x2h4*im;
  r1x2h34' = -kend*r1x2h34 - d2*r1x2h34 + a2*r1x2h3*im - d1*r1x2h34 + a1*r1x2h4*im;
  r1h4' = -d1*r1h4 - kcr*r1h4 + d1*r1h3x4 - d2*r1h4 + a2*r1h*im - kcr*r1h4 + d2*r1x2h4;
  r2h4' = -d2*r2h4 - kcr*r2h4 + d1*r2h3x4 - d2*r2h4 + a2*r2h*im - kcr*r2h4 + d1*r1x2h4;
  r2h3' = -d2*r2h3 - kcr*r2h3 + d2*r2h3x4 - d1*r2h3 + a1*r2h*im - kcr*r2h3 + d1*r1x2h3;
  r1h3' = -d1*r1h3 - kcr*r1h3 + d2*r1h3x4 - d1*r1h3 + a1*r1h*im - kcr*r1h3 + d2*r1x2h3;
  r1h3x4' = -kend*r1h3x4 - d1*r1h3x4 - d1*r1h3x4 + kcr*r1h4 - a2*r1h3x4*im + d2*r1h23x4 - d2*r1h3x4 + kcr*r1h3;
  r2h3x4' = -kend*r2hd3x4 - 2*d1*r2hd3x4 + kcr*r2h3 - k4*r2hd3x4*im + k8*r2hd3x4 - a1*r2hd3x4*im + d1*r12h3x4 - d1*r2hd3x4 + kcr*r2h4;
  r1h23x4' = -kend*r1h23x4 - d1*r1h23x4 - d2*r1h23x4 + a2*r1h3x4*im;
  r12h3x4' = -kend*r12h3x4 - d2*r12h3x4 - d1*r12h3x4 + a1*r2h3x4*im;
  r2hd3x4' = -kend*r2hd3x4 - d2*r2hd3x4 - k8*r2hd3x4 + k4*r2h3x4*im;
  itot' = iend + r1 + r2 + r3 + r4 + 2*(r13 + r14 + r23 + r24) + r1x2 + r3x4 + 2*(r1x23 + r1x24 + r13x4 + r23x4) + 3*(r1x234 + r123x4 + r2d3x4 + r1x24d);
  ihottot' = iend + r1x2h + r1h + r2h + r1x2h3 + r1x2h4 + r1x2h34 + r1h4 + r2h4 + r2h3 + r1h3 + r1h3x4 + r2h3x4 + r1h23x4 + r12h3x4 + r1x2h4d + r2hd3x4;
end
