// SBML level 2 version 4

model Liu2009_GlucoseMobilization_UptakeModel()
  // This a model from the article:
  // A molecular mathematical model of glucose mobilization and uptake.
  // Liu W, Hsin C, Tang F. Math Biosci. 2009 Oct;221(2):121-9. 19651146 ,
  // Abstract:
  // A new molecular mathematical model is developed by considering the kinetics of GLUT2, GLUT3, and GLUT4, the process of glucose mobilization by glycogen phosphorylase and glycogen synthase in liver, and the dynamics of the insulin signaling pathway. The new model can qualitatively reproduce the experimental glucose and insulin data. It also enables us to use the Bendixson criterion about the existence of periodic orbits of a two-dimensional dynamical system to mathematically predict that the oscillations of glucose and insulin are not caused by liver, instead they would be caused by the mechanism of insulin secretion from pancreatic beta cells. Furthermore it enables us to conduct a parametric sensitivity analysis. The analysis shows that both glucose and insulin are most sensitive to the rate constant for conversion of PI(3,4,5)P(3) to PI(4,5)P(2), the multiplicative factor modulating the rate constant for conversion of PI(3,4,5)P(3) to PI(4,5)P(2), the multiplicative factor that modulates insulin receptor dephosphorylation rate, and the maximum velocity of GLUT4. Moreover, the sensitivity analysis predicts that an increase of the apparent velocity of GLUT4, a combination of elevated mobilization rate of GLUT4 to the plasma membrane and an extended duration of GLUT4 on the plasma membrane, will result in a decrease in the needs of plasma insulin. On the other hand, an increase of the GLUT4 internalization rate results in an elevated demand of insulin to stimulate the mobilization of GLUT4 from the intracellular store to the plasma membrane.
  // This model originates from BioModels Database: A Database of Annotated Published Models (http://www.ebi.ac.uk/biomodels/). It is copyright (c) 2005-2011 The BioModels.net Team.
  // To the extent possible under law, all copyright and related or neighbouring rights to this encoded model have been dedicated to the public domain worldwide. Please refer to CC0 Public Domain Dedication for more information.
  // In summary, you are entitled to use this encoded model in absolutely any manner you deem suitable, verbatim, or with modification, alone or embedded it in a larger context, redistribute it, commercially or not, in a restricted way or not..
  // To cite BioModels Database, please use: Li C, Donizelli M, Rodriguez N, Dharuri H, Endler L, Chelliah V, Li L, He E, Henry A, Stefan MI, Snoep JL, Hucka M, Le Novère N, Laibe C (2010) BioModels Database: An enhanced, curated and annotated resource for published quantitative kinetic models. BMC Syst Biol., 4:92.
  // biomodels.db:MODEL1112050001
  // isDescribedBy pubmed:19651146
  // biomodels.db:MODEL1112050001
  // isDescribedBy pubmed:19651146
  // biomodels.db:MODEL1112050001
  // biomodels.db:MODEL1112050001

  // Compartments:
  compartment cellsurface = 1;
  compartment intracellular = 1;

  // Species:
  species $h1p in cellsurface = 1.389e-11; h1p is "plasma glucagon";
  species $h2p in cellsurface = 5.38e-10; h2p is "plasma insulin";
  species $h1 in cellsurface = 0; h1 is "cellular glucagon";
  species $glucagon_receptor in cellsurface = 0;
  species $cellular_insulin in cellsurface = 0;
  species $unbound_insulin_receptors in cellsurface = 9e-13;
  species $x3 in cellsurface = 0; x3 is "unphosphorylated once bound receptor";
  species $x4 in cellsurface = 0; x4 is "phosphorylated twice bound receptor";
  species $x5 in cellsurface = 0; x5 is "phosphorylated once bound receptor";
  species $cell_surface_GLUT4 in cellsurface = 10;
  species $gp in cellsurface = 1935; gp is "plasma glucose";
  species $u3 in cellsurface = 25.9; u3 is "exogenous glucose";
  species $x6 in intracellular = 1e-13; x6 is "unbound unphosphorylated receptor";
  species $x7 in intracellular = 0; x7 is "phosphorylated twice bound intracellular receptor";
  species $x8 in intracellular = 0; x8 is "phosphorylated once bound intracellular receptors";
  species $unphosphorylated_IRS1 in intracellular = 1e-12;
  species $phosphorylated_IRS1 in intracellular = 0;
  species $unactive_PI3_kinase in intracellular = 1e-13;
  species $IRS1_PI3_Kinase_complex in intracellular = 0; IRS1_PI3_Kinase_complex is "IRS1-PI3 Kinase complex";
  species $PI_3_4_5_P3 in intracellular = 0.31; PI_3_4_5_P3 is "PI(3,4,5)P3";
  species $PI_4_5_P2 in intracellular = 99.4; PI_4_5_P2 is "PI(4,5)P2";
  species $PI_3_4_P2 in intracellular = 0.29; PI_3_4_P2 is "PI(3,4)P2";
  species $inactive_PKB in intracellular = 100;
  species $activated_PKB in intracellular = 0;
  species $inactivated_PKC in intracellular = 100;
  species $activated_PKC in intracellular = 0;
  species $intracellular_GLUT4 in intracellular = 90;
  species $gy in intracellular = 200; gy is "liver glucagon";
  species $gl in intracellular = 0; gl is "liver glucose";

  // Parameters:
  km2 = 15300;
  km3 = 1530;
  km4 = 774;
  kms = 67;
  kmp = 600;
  vmax2 = 50;
  vmax3 = 10;
  vmax4 = 4;
  vmaxs = 28.4;
  vmaxp = 258;
  R0 = 9e-13;
  a1 = 0.12;
  a2 = 0.3;
  a3 = 0.01;
  a4 = 60000000;
  a5 = 0.2;
  b1 = 0.0151;
  b2 = 0.002;
  b3 = 0.01;
  v = 11;
  vp = 3;
  Gm = 2.23e-10;
  Rm = 4.44e-12;
  C1 = 1162;
  p1 = 0.005;
  p2 = 0.01594;
  q1 = 10;
  q2 = 1.85;
  PTP = 1;
  PTEN = 1;
  SHIP = 1;
  IRp = 8.97e-13;
  PI3K = 5e-15;
  k9sim = 1.39;
  k1 = 60000000;
  k2 = 60000000;
  k3 = 2500;
  k6 = 0.461;
  k7 = 4.16;
  k15 = 0.2;
  k16 = 20;
  k17 = 0.2;
  k18 = 0.003;
  k19 = 0.0021;
  k20 = 0.00021;
  k21 = 1.67e-18;
  k23 = 10;
  k25 = 2.77;
  k28 = 0.167;
  k29 = 0.001155;
  var Igs; Igs is "glycogen synthase activation";
  var U1; U1 is "feedback gulcagon";
  var U2; U2 is "insulin infusion";

  // Assignment rules:
  AP := 100/11;
  a6 := 1000/R0;
  U2 := Rm/(1 + q2*exp(p2*(C1 - gp)));
  U1 := Gm/(1 + q1*exp(p1*(gp - 1000)));
  Igs := 0.2*activated_PKB + 0.8*activated_PKC;
  effect := 11*(0.2*activated_PKB + 0.8*activated_PKC)/100;
  Ig4 := (2/3 - 4/96)*k28*effect;
  k27 := 10*ln(2);
  k26 := 10*ln(2);
  k24 := 94/3.1*k9sim;
  k22 := 2.5/7.45*4.16;
  k14 := 0.96*0.001155;
  k13 := 4/96*0.167;
  k12 := 0.1*k27*(PI_3_4_5_P3 - 0.31)/(3.1 - 0.31);
  k11 := 0.1*k26*(PI_3_4_5_P3 - 0.31)/(3.1 - 0.31);
  k10 := 3.1/2.9*2.77;
  k8 := 10*5/70.775*10000000000000;
  k5 := piecewise(10*k21, x6 + x7 + x8 > 1e-13, 60*k21);
  k4 := 0.003/9;
  k9bas := 0.31/99.4*94/3.1*k9sim;
  k9 := (k9sim - k9bas)*IRS1_PI3_Kinase_complex/PI3K + k9bas;

  // Rate rules:
  h1p' = -(a1 + a2)*h1p + U1;
  h2p' = -(b1 + b2)*h2p + U2;
  h1' = -a4*h1*(R0 - glucagon_receptor) - a3*h1 + a1*vp*h1p/v;
  glucagon_receptor' = a4*h1*(R0 - glucagon_receptor) - a5*glucagon_receptor;
  cellular_insulin' = -k1*cellular_insulin*unbound_insulin_receptors - b3*cellular_insulin + b1*vp*h1p/v;
  unbound_insulin_receptors' = k15*x3 + k17*PTP*x5 - k1*cellular_insulin*unbound_insulin_receptors + k18*x6 - k4*unbound_insulin_receptors;
  x3' = -k15*x3 + k1*cellular_insulin*unbound_insulin_receptors - k3*x3;
  x4' = k2*cellular_insulin*x5 - k16*x4 - k20*x7 - k19*x4;
  x5' = k3*x3 + k16*x4 - k2*cellular_insulin*x5 - activated_PKB*PTP*x5 + k20*x8 - k19*x5;
  cell_surface_GLUT4' = -k28*cell_surface_GLUT4 + (k13 + Ig4)*intracellular_GLUT4;
  gp' = -(cell_surface_GLUT4*vmax4*gp/(km4 + gp)) - vmax2*gp/(km2 + gp) - vmax3*gp/(km3 + gp) + vmax2*gl/(km2 + gl) + u3;
  x6' = k5 - k21*x6 + k6*PTP*(x7 + x8) + k4*unbound_insulin_receptors - k18*x6;
  x7' = k19*x4 - k20*x7 - k6*PTP*x7;
  x8' = k19*x5 - k20*x8 - k6*PTP*k8;
  unphosphorylated_IRS1' = k22*PTP*phosphorylated_IRS1 - k7*unphosphorylated_IRS1*(x4 + x5)/IRp;
  phosphorylated_IRS1' = k7*unphosphorylated_IRS1*(x4 + x5)/IRp + k23*IRS1_PI3_Kinase_complex - (k22*PTP + k8*unactive_PI3_kinase)*phosphorylated_IRS1;
  unactive_PI3_kinase' = k23*IRS1_PI3_Kinase_complex - k8*unactive_PI3_kinase*phosphorylated_IRS1;
  IRS1_PI3_Kinase_complex' = -k23*IRS1_PI3_Kinase_complex + k8*unactive_PI3_kinase*phosphorylated_IRS1;
  PI_3_4_5_P3' = k9*PI_4_5_P2 + k10*PI_3_4_P2 - (k24*PTEN + k25*SHIP)*PI_3_4_5_P3;
  PI_4_5_P2' = k24*PTEN*PI_3_4_5_P3 - k9*PI_4_5_P2;
  PI_3_4_P2' = k25*SHIP*PI_3_4_5_P3 - k10*PI_3_4_P2;
  inactive_PKB' = k26*activated_PKB - k11*inactive_PKB;
  activated_PKB' = -k26*activated_PKB + k11*inactive_PKB;
  inactivated_PKC' = k27*activated_PKC - k12*inactivated_PKC;
  activated_PKC' = -k27*activated_PKC + k12*inactivated_PKC;
  intracellular_GLUT4' = k28*cell_surface_GLUT4 - (k13 + Ig4)*intracellular_GLUT4 - k29*intracellular_GLUT4 + k14;
  gy' = -vmaxp*glucagon_receptor*gy/(R0*(kmp + gy)) + vmaxs*Igs*gl/((1 + a6*glucagon_receptor)*(kms + gl));
  gl' = -(vmaxs*Igs*gl/((1 + a6*glucagon_receptor)*(kms + gl))) - vmax2*gl/(km2 + gl) + vmaxp*glucagon_receptor*gy/(R0*(kmp + gy)) + vmax2*gp/(km2 + gp);
end
