// SBML level 2 version 4

model Alvehag2006_OGTT_GlucoseModel_B()
  // This a model from the article:
  // The Feedback Control of Glucose: On the road to type II diabetes
  // Alvehag, K.; Martin, C. Proceedings of 45th IEEE Conference on Decision and Control 2006,685-690
  // Abstract:
  // This paper develops a mathematical model for the feedback control of glucose regulation in the healthy human being and is based on the work of Sorensen (1985). The proposed model serves as a starting point for modeling type II diabetes. Four agents - glucose and the three hormones insulin, glucagon, and incretins - are assumed to have an effect on glucose metabolism. By letting compartments represent anatomical organs, the model has a close resemblance to a real human body. Mass balance equations that account for blood flows, exchange between compartments, and metabolic sinks and sources are written, and these result in simultaneous dif- ferential equations that are solved numerically. The metabolic sinks and sources - removing or adding glucose, insulin, glucagon, and incretins - describe physiological processes in the body. These processes function as feedback control systems and have nonlinear behaviors. The results of simulations performed for three different clinical test types indicate that the model is successful in simulating intravenous glucose, oral glucose, and meals containing mainly carbohydrates.
  // This model originates from BioModels Database: A Database of Annotated Published Models (http://www.ebi.ac.uk/biomodels/). It is copyright (c) 2005-2011 The BioModels.net Team.
  // To the extent possible under law, all copyright and related or neighbouring rights to this encoded model have been dedicated to the public domain worldwide. Please refer to CC0 Public Domain Dedication for more information.
  // In summary, you are entitled to use this encoded model in absolutely any manner you deem suitable, verbatim, or with modification, alone or embedded it in a larger context, redistribute it, commercially or not, in a restricted way or not..
  // To cite BioModels Database, please use: Li C, Donizelli M, Rodriguez N, Dharuri H, Endler L, Chelliah V, Li L, He E, Henry A, Stefan MI, Snoep JL, Hucka M, Le Novère N, Laibe C (2010) BioModels Database: An enhanced, curated and annotated resource for published quantitative kinetic models. BMC Syst Biol., 4:92.
  // biomodels.db:MODEL1112110001
  // isDescribedBy doi:10.1109/CDC.2006.377192
  // biomodels.db:MODEL1112110001
  // biomodels.db:MODEL1112110001
  // isDescribedBy doi:10.1109%2FCDC.2006.377192

  // Compartments:
  compartment compartment1 = 1;

  // Species:
  species $G_BV in compartment1 = G_BV_0;
  species $G_BI in compartment1 = G_BI_0;
  species $G_H in compartment1 = G_H_0;
  species $G_G in compartment1 = G_G_0;
  species $G_L in compartment1 = G_L_0;
  species $G_K in compartment1 = G_K_0;
  species $G_PV in compartment1 = G_PV_0;
  species $G_PI in compartment1 = G_PI_0;
  species $M_I_HGP in compartment1 = M_I_HGP_0;
  species $f2 in compartment1 = f2_0;
  species $M_I_HGU in compartment1 = M_I_HGU_0;
  species $I_B in compartment1 = I_B_0;
  species $I_H in compartment1 = I_H_0;
  species $I_G in compartment1 = I_G_0;
  species $I_L in compartment1 = I_L_0;
  species $I_K in compartment1 = I_K_0;
  species $I_PV in compartment1 = I_PV_0;
  species $I_PI in compartment1 = I_PI_0;
  species $P in compartment1 = P_0;
  species $I in compartment1 = I_0;
  species $Q in compartment1 = Q_0;
  species $Gamma in compartment1 = 1;
  species $G_PN in compartment1 = G_PN_0;
  species $I_PN in compartment1 = I_PN_0;
  species $R_OGA in compartment1;
  species $GIP_body in compartment1 = 0;
  species $G_gut in compartment1 = 0;
  species $GIP_gut in compartment1 = 0;
  species $r_OGA in compartment1 = 0;

  // Parameters:
  bw = 70;
  pmu = 7.1756;
  G_PV_0 = 89;
  I_PV_0 = 13;
  gluc = 0.84;
  carbs = 100;
  t_meal = 0;
  V_G_BV = 3.5;
  V_BI = 4.5;
  V_G_H = 13.8;
  V_G_L = 23.5;
  V_G_G = 11.2;
  V_G_K = 6.6;
  V_G_PV = 10.4;
  V_G_PI = 63;
  V_G_PN = 1.6;
  Q_G_B = 5.9;
  Q_G_H = 43.7;
  Q_G_A = 2.5;
  Q_G_L = 12.6;
  Q_G_K = 10.1;
  Q_G_P = 15.1;
  Q_G_PN = 0.5;
  T_B = 2.1;
  r_BGU = 70;
  r_GGU = 20;
  r_B_PGU = 35;
  r_B_HGP = 155;
  r_B_HGU = 20;
  tao_I = 25;
  tao_gamma = 65;
  V_I_B = 0.265;
  V_I_H = 0.985;
  V_I_G = 0.945;
  V_I_L = 1.07;
  V_I_K = 0.505;
  V_I_PV = 0.735;
  V_I_PI = 6.3;
  V_I_PN = 0.07;
  Q_I_B = 0.45;
  Q_I_H = 3.12;
  Q_I_A = 0.18;
  Q_I_K = 0.72;
  Q_I_P = 1.05;
  Q_I_L = 0.9;
  Q_I_PN = 0.036;
  Q_I_G = 0.696;
  T_I_P = 20;
  F_LIC = 0.4;
  F_KIC = 0.3;
  F_PIC = 0.15;
  epsilon = 0.03;
  alpha = 0.048229;
  beta = 0.93141;
  K = 0.0079378;
  M1 = 0.007968;
  gamma = 0.57493;
  Q_0 = 6.3294;
  delta = 1.1141;
  fi = 0.003;
  fi2 = 0.0001;
  V_Gamma = 9930;
  r_MGammaC = 910;
  T_A = 22;
  T_GE = 73;
  F = 1;
  xi = 0.009;
  T_GIP = 25;
  V_GIP = 9.93;
  r_M_GIP_C = 0.14;
  r_IVG = 0;
  t_CHO = 4;
  r_RBCU = 10;
  T_G_P = 5;
  M_I_HGP_0 = 1;
  f2_0 = 0;
  M_I_HGU_0 = 1;
  r_OGA_0 = 0;
  var plot1;

  // Assignment rules:
  R_OGA := r_OGA*bw;
  Q_G_G := 10.1 - Q_G_PN;
  M2 := 0.106495 + epsilon;
  X := G_H^3.267/(131.87^3.267 + 5.932*G_H^3.024);
  Y := X^delta + fi*GIP_body;
  M_Gamma0_HGP := 2.7*tanh(0.388*Gamma);
  M_Gamma_HGP := M_Gamma0_HGP - f2;
  P_inf := Y;
  CHO_M := carbs*1000/bw;
  G_EMT_puck := piecewise(1/t_CHO*CHO_M*time, (time < 1) && (time >= 0), piecewise(1/t_CHO*CHO_M, (time >= 1) && (time < 4), piecewise(1/t_CHO*CHO_M - 1/t_CHO*CHO_M*(time - 4), (time >= 4) && (time < 5), 0)));
  g_EMT := G_EMT_puck;
  checkdiff := piecewise(X - I, X > I, 0);
  S := (M1*Y + M2*checkdiff + fi2*GIP_body)*Q;
  r_KGE := piecewise(0, G_K < 0, piecewise(71 + 71*tanh(0.011*(G_K - 460)), G_K < 460, -330 + 0.872*G_K));
  r_PIC := I_PI/((1 - F_PIC)/F_PIC*(1/Q_I_P) - T_I_P/V_I_PI);
  r_LIC := F_LIC*(Q_I_A*I_H + Q_I_G*I_G + Q_I_PN*I_PN);
  r_PGammaC := r_MGammaC*gamma;
  r_KIC := F_KIC*Q_I_K*I_H;
  G_H_0 := G_PV_0 + r_B_PGU/Q_G_P;
  M_G_PGammaR := 2.9285 - 2.095*tanh(4.18*(G_H/G_H_0 - 0.6191));
  G_BV_0 := G_H_0 - r_BGU/Q_G_B;
  X_0 := G_H_0^3.267/(131.87^3.267 + 5.932*G_H_0^3.024);
  Y_0 := X_0^delta;
  G_BI_0 := G_BV_0 - r_BGU*T_B/V_BI;
  G_G_0 := G_H_0 - r_GGU/Q_G_G;
  G_K_0 := G_H_0;
  G_PI_0 := G_PV_0 - r_B_PGU*T_G_P/V_G_PI;
  M_G_PGU := G_PI/G_PI_0;
  I_H_0 := I_PV_0/(1 - F_PIC);
  M_I_PGammaR := 1.3102 - 0.61016*tanh(1.0571*(I_H/I_H_0 - 0.46981));
  I_B_0 := I_H_0;
  I_G_0 := I_H_0;
  I_L_0 := I_H_0/Q_I_L*(Q_I_H - Q_I_P*(1 - F_PIC) - Q_I_K*(1 - F_KIC) - Q_I_B);
  M_Iinf_HGP := 1.2088 - 1.138*tanh(1.699*(I_L/I_L_0 - 0.8885));
  M_Iinf_HGU := 2*tanh(0.549*(I_L/I_L_0));
  I_PI_0 := (1 - T_I_P*F_PIC*Q_I_P/(V_I_PI*(1 - F_PIC)))*I_PV_0;
  M_I_PGU := 7.035 + 6.51623*tanh(0.33827*(I_PI/I_PI_0 - 5.82113));
  R_PGU := M_I_PGU*M_G_PGU*r_B_PGU;
  I_K_0 := I_H_0*(1 - F_KIC);
  I_0 := X_0;
  I_PN_0 := I_H_0/Q_I_PN*(Q_I_H/(1 - F_LIC) - Q_I_A - Q_I_G - (1 - F_PIC)/(1 - F_LIC)*Q_I_P - Q_I_B/(1 - F_LIC) - Q_I_K*(1 - F_KIC)/(1 - F_LIC));
  r_B_PIR := I_H_0*(Q_I_H/(1 - F_LIC) - Q_I_A - Q_I_G - (1 - F_PIC)/(1 - F_LIC)*Q_I_P - Q_I_B/(1 - F_LIC) - Q_I_PN - Q_I_K*(1 - F_KIC)/(1 - F_LIC));
  checkdiff1 := piecewise(X_0 - I_0, X_0 > I_0, 0);
  G_PN_0 := G_H_0;
  G_L_0 := 1/Q_G_L*(Q_G_A*G_H_0 + Q_G_G*G_G_0 + Q_G_PN*G_PN_0 + r_B_HGP - r_B_HGU);
  M_G_HGP := 1.425 - 1.406*tanh(0.6199*(G_L/G_L_0 - 0.4969));
  R_HGP := M_I_HGP*M_Gamma_HGP*M_G_HGP*r_B_HGP;
  M_G_HGU := 5.6648 + 5.6589*tanh(2.4375*(G_L/G_L_0 - 1.48));
  R_HGU := M_I_HGU*M_G_HGU*r_B_HGU;
  P_inf_0 := Y_0;
  P_0 := P_inf_0;
  Qi := (K*Q_0 + gamma*P_0)/(M1*Y_0 + K);
  S_B_G_H := (M1*Y_0 + M2*checkdiff1)*Qi;
  r_PIR := S/S_B_G_H*r_B_PIR;
  plot1 := G_PV*gluc;

  // Rate rules:
  G_BV' = 1/V_G_BV*(Q_G_B*(G_H - G_BV) - V_BI/T_B*(G_BV - G_BI));
  G_BI' = 1/V_BI*(V_BI/T_B*(G_BV - G_BI) - r_BGU);
  G_H' = 1/V_G_H*(Q_G_B*G_BV + Q_G_L*G_L + Q_G_K*G_K + Q_G_P*G_PV - Q_G_H*G_H - r_RBCU + r_IVG);
  G_G' = 1/V_G_G*Q_G_G*(G_H - G_G) - r_GGU + r_OGA*bw;
  G_L' = 1/V_G_L*(Q_G_A*G_H + Q_G_G*G_G - Q_G_L*G_L + Q_G_PN*G_PN + R_HGP - R_HGU);
  G_K' = 1/V_G_K*(Q_G_K*(G_H - G_K) - r_KGE);
  G_PV' = 1/V_G_PV*(Q_G_P*(G_H - G_PV) - V_G_PI/T_G_P*(G_PV - G_PI));
  G_PI' = 1/V_G_PI*(V_G_PI/T_G_P*(G_PV - G_PI) - R_PGU);
  M_I_HGP' = 1/tao_I*(M_Iinf_HGP - M_I_HGP);
  f2' = 1/tao_gamma*((M_Gamma0_HGP - 1)/2 - f2);
  M_I_HGU' = 1/tao_I*(M_Iinf_HGU - M_I_HGU);
  I_B' = 1/V_I_B*Q_I_B*(I_H - I_B);
  I_H' = 1/V_I_H*(Q_I_B*I_B + Q_I_L*I_L + Q_I_K*I_K + Q_I_P*I_PV - Q_I_H*I_H);
  I_G' = Q_I_G*(I_H - I_G)/V_I_G;
  I_L' = 1/V_I_L*(Q_I_A*I_H + Q_I_G*I_G - Q_I_L*I_L + Q_I_PN*I_PN - r_LIC);
  I_K' = 1/V_I_K*(Q_I_K*(I_H - I_K) - r_KIC);
  I_PV' = 1/V_I_PV*(Q_I_P*(I_H - I_PV) - V_I_PI/T_I_P*(I_PV - I_PI));
  I_PI' = 1/V_I_PI*(V_I_PI/T_I_P*(I_PV - I_PI) - r_PIC);
  P' = alpha*(P_inf - P);
  I' = beta*(X - I);
  Q' = K*(Q_0 - Q) + gamma*P - S;
  Gamma' = r_MGammaC/V_Gamma*(M_G_PGammaR*M_I_PGammaR - Gamma);
  G_PN' = 1/V_G_PN*Q_G_PN*(G_H - G_PN);
  I_PN' = 1/V_I_PN*(Q_I_PN*(I_H - I_PN) + r_PIR);
  GIP_body' = 1/V_GIP*(GIP_gut/T_GIP - r_M_GIP_C*GIP_body);
  G_gut' = -(G_gut/T_GE) + g_EMT;
  GIP_gut' = xi*g_EMT*bw - GIP_gut/T_GIP;
  r_OGA' = -(1/T_A)*r_OGA + G_gut/(T_A*T_GE);
end
