// SBML level 2 version 4

model Farhy2009_GlucagonCounterRegulationModel()
  // This a model from the article:
  // Pancreatic network control of glucagon secretion and counterregulation.
  // Farhy LS, McCall AL. Methods Enzymol. 2009;467:547-81. 19897107 ,
  // Abstract:
  // Glucagon counterregulation (GCR) is a key protection against hypoglycemia compromised in insulinopenic diabetes by an unknown mechanism. In this work, we present an interdisciplinary approach to the analysis of the GCR control mechanisms. Our results indicate that a pancreatic network which unifies a few explicit interactions between the major islet peptides and blood glucose (BG) can replicate the normal GCR axis and explain its impairment in diabetes. A key and novel component of this network is an alpha-cell auto-feedback, which drives glucagon pulsatility and mediates triggering of pulsatile GCR by hypoglycemia via a switch-off of the beta-cell suppression of the alpha-cells. We have performed simulations based on our models of the endocrine pancreas which explain the in vivo GCR response to hypoglycemia of the normal pancreas and the enhancement of defective pulsatile GCR in beta-cell deficiency by switch-off of intrapancreatic alpha-cell suppressing signals. The models also predicted that reduced insulin secretion decreases and delays the GCR. In conclusion, based on experimental data we have developed and validated a model of the normal GCR control mechanisms and their dysregulation in insulin deficient diabetes. One advantage of this construct is that all model components are clinically measurable, thereby permitting its transfer, validation, and application to the study of the GCR abnormalities of the human endocrine pancreas in vivo.
  // This model originates from BioModels Database: A Database of Annotated Published Models (http://www.ebi.ac.uk/biomodels/). It is copyright (c) 2005-2011 The BioModels.net Team.
  // To the extent possible under law, all copyright and related or neighbouring rights to this encoded model have been dedicated to the public domain worldwide. Please refer to CC0 Public Domain Dedication for more information.
  // In summary, you are entitled to use this encoded model in absolutely any manner you deem suitable, verbatim, or with modification, alone or embedded it in a larger context, redistribute it, commercially or not, in a restricted way or not..
  // To cite BioModels Database, please use: Li C, Donizelli M, Rodriguez N, Dharuri H, Endler L, Chelliah V, Li L, He E, Henry A, Stefan MI, Snoep JL, Hucka M, Le Novère N, Laibe C (2010) BioModels Database: An enhanced, curated and annotated resource for published quantitative kinetic models. BMC Syst Biol., 4:92.
  // biomodels.db:MODEL1112110002
  // isDescribedBy pubmed:19897107
  // biomodels.db:MODEL1112110002
  // biomodels.db:MODEL1112110002
  // isDescribedBy pubmed:19897107

  // Compartments:
  compartment body = 1;

  // Species:
  species $GL in body = 50;
  species $INS in body = 50;

  // Parameters:
  kGl = 22;
  kINS = 14;
  rGl = 42570;
  rGlbasal = 2128;
  rINS = 80000;
  rINSbasal = 270;
  tGl = 85;
  tBG = 50;
  tBG2 = 400;
  tINS = 20;
  nGl = 5;
  nBG = 5;
  nBG2 = 3;
  DGL = 7.2;
  parameter_1 = 600; parameter_1 is "bg";
  parameter_2 = 600; parameter_2 is "bg'";
  var pluse2;
  var pluse1;

  // Assignment rules:
  BG := piecewise(parameter_1, time < 1, parameter_2);
  pulse := piecewise(10, (time >= 0) && (time <= 0.02), piecewise(10, (time >= 0.11) && (time <= 0.13), piecewise(10, (time >= 0.22) && (time <= 0.24), piecewise(10, (time >= 0.33) && (time <= 0.35), piecewise(10, (time >= 0.44) && (time <= 0.46), piecewise(10, (time >= 0.55) && (time <= 0.57), piecewise(10, (time >= 0.66) && (time <= 0.68), piecewise(10, (time >= 0.77) && (time <= 0.79), piecewise(10, (time >= 0.88) && (time <= 0.9), piecewise(10, (time >= 0.99) && (time <= 1.01), piecewise(10, (time >= 1.1) && (time <= 1.12), piecewise(10, (time >= 1.21) && (time <= 1.23), piecewise(10, (time >= 1.32) && (time <= 1.34), piecewise(10, (time >= 1.43) && (time <= 1.45), piecewise(10, (time >= 1.54) && (time <= 1.56), piecewise(10, (time >= 1.65) && (time <= 1.67), piecewise(10, (time >= 1.76) && (time <= 1.78), piecewise(10, (time >= 1.87) && (time <= 1.89), piecewise(10, (time >= 1.98) && (time <= 2), piecewise(10, (time >= 2.09) && (time <= 2.11), piecewise(10, (time >= 2.2) && (time <= 2.22), piecewise(10, (time >= 2.31) && (time <= 2.33), piecewise(10, (time >= 2.43) && (time <= 2.45), piecewise(10, (time >= 2.54) && (time <= 2.56), piecewise(10, (time >= 2.65) && (time <= 2.67), piecewise(10, (time >= 2.76) && (time <= 2.78), piecewise(10, (time >= 2.87) && (time <= 2.89), piecewise(10, (time >= 2.98) && (time <= 3), piecewise(10, (time >= 3.09) && (time <= 3.11), piecewise(10, (time >= 3.2) && (time <= 3.22), piecewise(10, (time >= 3.31) && (time <= 3.33), piecewise(10, (time >= 3.43) && (time <= 3.45), 0))))))))))))))))))))))))))))))));
  step := piecewise(110, (time <= 1) && (time >= 0), piecewise(60, (time <= 2) && (time > 1), piecewise(45, (time <= 3) && (time > 2), 42)));
  pluse2 := piecewise(10, (time >= 3.54) && (time <= 3.56), piecewise(10, (time >= 3.65) && (time <= 3.67), piecewise(10, (time >= 3.76) && (time <= 3.78), piecewise(10, (time >= 3.87) && (time <= 3.89), piecewise(10, (time >= 3.98) && (time <= 4), piecewise(10, (time >= 4.09) && (time <= 4.11), piecewise(10, (time >= 4.2) && (time <= 4.22), piecewise(10, (time >= 4.31) && (time <= 4.33), piecewise(10, (time >= 4.43) && (time <= 4.45), piecewise(10, (time >= 4.54) && (time <= 4.56), piecewise(10, (time >= 4.65) && (time <= 4.67), piecewise(10, (time >= 4.76) && (time <= 4.78), piecewise(10, (time >= 4.87) && (time <= 4.89), piecewise(10, (time >= 4.98) && (time <= 5), 0))))))))))))));
  pluse1 := pulse + pluse2;

  // Rate rules:
  GL' = -kGl*GL + rGlbasal*(tINS/(tINS + INS)) + rGl*(1/(1 + (BG/tBG)^nBG))*(1/(1 + (GL*(time - DGL)/tGl)^nGl))*(tINS/(tINS + INS));
  INS' = -kINS*INS + (rINS*((BG/tBG2)^nBG2/(1 + (BG/tBG2)^nBG2)) + rINSbasal)*pluse1;
  parameter_2' = -3*parameter_2 + 3*step + 330;
end
