// SBML level 2 version 4

model Gaetano2008_DiabetesProgressionModel()
  // This a model from the article:
  // Mathematical models of diabetes progression.
  // De Gaetano A, Hardy T, Beck B, Abu-Raddad E, Palumbo P, Bue-Valleskey J, Porksen N. Am J Physiol Endocrinol Metab. 2008 Dec;295(6):E1462-79. 18780774 ,
  // Abstract:
  // Few attempts have been made to model mathematically the progression of type 2 diabetes. A realistic representation of the long-term physiological adaptation to developing insulin resistance is necessary for effectively designing clinical trials and evaluating diabetes prevention or disease modification therapies. Writing a good model for diabetes progression is difficult because the long time span of the disease makes experimental verification of modeling hypotheses extremely awkward. In this context, it is of primary importance that the assumptions underlying the model equations properly reflect established physiology and that the mathematical formulation of the model give rise only to physically plausible behavior of the solutions. In the present work, a model of the pancreatic islet compensation is formulated, its physiological assumptions are presented, some fundamental qualitative characteristics of its solutions are established, the numerical values assigned to its parameters are extensively discussed (also with reference to available cross-sectional epidemiologic data), and its performance over the span of a lifetime is simulated under various conditions, including worsening insulin resistance and primary replication defects. The differences with respect to two previously proposed models of diabetes progression are highlighted, and therefore, the model is proposed as a realistic, robust description of the evolution of the compensation of the glucose-insulin system in healthy and diabetic individuals. Model simulations can be run from the authors' web page.
  // This model originates from BioModels Database: A Database of Annotated Published Models (http://www.ebi.ac.uk/biomodels/). It is copyright (c) 2005-2011 The BioModels.net Team.
  // To the extent possible under law, all copyright and related or neighbouring rights to this encoded model have been dedicated to the public domain worldwide. Please refer to CC0 Public Domain Dedication for more information.
  // In summary, you are entitled to use this encoded model in absolutely any manner you deem suitable, verbatim, or with modification, alone or embedded it in a larger context, redistribute it, commercially or not, in a restricted way or not..
  // To cite BioModels Database, please use: Li C, Donizelli M, Rodriguez N, Dharuri H, Endler L, Chelliah V, Li L, He E, Henry A, Stefan MI, Snoep JL, Hucka M, Le Novère N, Laibe C (2010) BioModels Database: An enhanced, curated and annotated resource for published quantitative kinetic models. BMC Syst Biol., 4:92.
  // biomodels.db:MODEL1112110003
  // isDescribedBy pubmed:18780774
  // biomodels.db:MODEL1112110003
  // biomodels.db:MODEL1112110003
  // isDescribedBy pubmed:18780774

  // Compartments:
  compartment body = 1;

  // Species:
  species $B in body = 1000; B is "beta cell mass";
  species $I in body = 262440000; I is "fasting serum insulin";
  species $G in body = 262440001; G is "fasting plasma glucose";
  species $h in body; h is "glucose effect on pancreas";
  species $lamda in body; lamda is "net beta cell growth";
  species $gamma in body; gamma is "insulin resistance";

  // Parameters:
  B0 = 1000; B0 is "initial Beta cell mass";
  I0 = 50; I0 is "insuliemia at t0";
  G0 = 5; G0 is "glycemia at t0";
  Glamda = 1; Glamda is "maximal glycemia sensitivity";
  Tgl = 1; Tgl is "liver glucose output";
  Kxg = 1; Kxg is "glucose uptake rate";
  var TigB; TigB is "maximal insulin secretion";
  Kxi = 0.05; Kxi is "insulin elimination constant";
  Kxistart = 0.05; Kxistart is "insulin elimination basline";
  Kxiend = 1; Kxiend is "insulin elimination end";
  Kxgi0 = 0.0001; Kxgi0 is "KxgI (t0)";
  tI = 1; tI is "midpoint Kxgi";
  vi = 0.25; vi is "exponent in Kxgl";
  var rho; rho is "Ratio of glucose uptake rate constant";
  var ImaxB0; ImaxB0 is "ImaxB (t0)";
  lamdamin = 0.92; lamdamin is "minimum lamda";
  eta0 = 0.04; eta0 is "eta(t0)";
  Teta = 1; Teta is "spontaneous recovery rate";
  KetaG = 0.02; KetaG is "glucose toxicity constant";
  Gh = 9;
  vh = 4;
  A0 = 100;
  var Kag; Kag is "production of HbA1c";
  Kxa = 0.238; Kxa is "elimination of HbA1c";
  t0 = 18; t0 is "starting age";
  teta10 = 1; teta10 is "half life of pancreatic reserve";
  tmax = 90;
  X0 = 1;
  Kxgi = 0.0001; Kxgi is "Insulin sensitivity";
  eta = ;
  A = ;

  // Assignment rules:
  ImaxB0 := 0.0287/0.05;
  rho := Kxg/Kxgi;
  h0 := (G0/Gh)^vh/1 + (G0/Gh)^vh;
  TigB := Kxistart*I0/h0*B0;
  Kag := Kxa*A0/(G0*(100 - A0/100));
  h := (G/Gh)^vh/1 + (G/Gh)^vh;
  x := X0*(G/Glamda);
  lamda := lamdamin + eta*(x^3/1 + x^3);
  gamma := Tgl/Kxgi;
  lamdamax := lamdamin - eta;
  ImaxB := TigB/Kxi;

  // Rate rules:
  B' = lamda*B;
  eta' = -KetaG*eta + Teta;
  A' = -Kxa*A + Kag*G*(100 - A)/100;
  Kxi' = Kxistart + (time - t0/tmax - t0)*(Kxiend - Kxistart);
  G' = gamma/(rho + I);
  I' = h*ImaxB*B;
end
