// SBML level 2 version 4

model Silber2007_IntravenousGlucose_IntegratedGlucoseInsulinModel()
  // This a model from the article:
  // An integrated model for glucose and insulin regulation in healthy volunteers and type 2 diabetic patients following intravenous glucose provocations.
  // Silber HE, Jauslin PM, Frey N, Gieschke R, Simonsson US, Karlsson MO. J Clin Pharmacol. 2007 Sep;47(9):1159-71. 17766701 ,
  // Abstract:
  // An integrated model for the regulation of glucose and insulin concentrations following intravenous glucose provocations in healthy volunteers and type 2 diabetic patients was developed. Data from 72 individuals were included. Total glucose, labeled glucose, and insulin concentrations were determined. Simultaneous analysis of all data by nonlinear mixed effect modeling was performed in NONMEM. Integrated models for glucose, labeled glucose, and insulin were developed. Control mechanisms for regulation of glucose production, insulin secretion, and glucose uptake were incorporated. Physiologically relevant differences between healthy volunteers and patients were identified in the regulation of glucose production, elimination rate of glucose, and secretion of insulin. The model was able to describe the insulin and glucose profiles well and also showed a good ability to simulate data. The features of the present model are likely to be of interest for analysis of data collected in antidiabetic drug development and for optimization of study design.
  // This model originates from BioModels Database: A Database of Annotated Published Models (http://www.ebi.ac.uk/biomodels/). It is copyright (c) 2005-2011 The BioModels.net Team.
  // To the extent possible under law, all copyright and related or neighbouring rights to this encoded model have been dedicated to the public domain worldwide. Please refer to CC0 Public Domain Dedication for more information.
  // In summary, you are entitled to use this encoded model in absolutely any manner you deem suitable, verbatim, or with modification, alone or embedded it in a larger context, redistribute it, commercially or not, in a restricted way or not..
  // To cite BioModels Database, please use: Li C, Donizelli M, Rodriguez N, Dharuri H, Endler L, Chelliah V, Li L, He E, Henry A, Stefan MI, Snoep JL, Hucka M, Le Novère N, Laibe C (2010) BioModels Database: An enhanced, curated and annotated resource for published quantitative kinetic models. BMC Syst Biol., 4:92.
  // biomodels.db:MODEL1112110004
  // isDescribedBy pubmed:17766701
  // biomodels.db:MODEL1112110004
  // isDescribedBy pubmed:17766701
  // biomodels.db:MODEL1112110004
  // biomodels.db:MODEL1112110004

  // Compartments:
  compartment compartment1 = 1;

  // Species:
  species Gp in compartment1 = Gss*Vp;
  species GE1 in compartment1 = Gss;
  species GE2 in compartment1 = Gss;
  species Gc in compartment1 = Gss*Vg;
  species I in compartment1 = Iss*VI;
  species IE in compartment1 = Iss;
  species IFPS in compartment1 = FPS;

  // Parameters:
  Q = 0.442;
  Vg = 9.33;
  Vp = 8.56;
  Gss = 0.891;
  CLG = 0.0894;
  CLGI = 0.00829;
  KGE1 = 0.0573;
  KGE2 = 0.0289;
  GPRG = -2.79;
  CLI = 1.22;
  VI = 6.09;
  Iss = 0.93;
  KIE = 0.0213;
  FPS = 704;
  IPRG = 1.42;
  KIS = 0.384;

  // Assignment rules:
  GPROD0 := Gss*(CLG + CLGI + Iss);
  GCM1 := (GE1/Gss)^GPRG;
  GPROD := GPROD0*GCM1;
  ISEC0 := Iss*CLI;
  GCM2 := (GE2/Gss)^IPRG;
  ISEC := ISEC0*GCM2 + KIS*IFPS;

  // Rate rules:
  Gp' = Q/Vg*Gc - Q/Vp*Gp;
  GE1' = KGE1*(Gc/Vg) - KGE1*GE1;
  GE2' = KGE2*(Gc/Vg) - KGE2;
  Gc' = GPROD + Q/Vp*Gp - (CLG/Vg + CLGI/Vg*IE + Q/Vg)*Gc;
  I' = ISEC - CLI/VI*I;
  IE' = KIE*(I/VI) - KIE*IE;
  IFPS' = -KIS*IFPS;
end
