// SBML level 2 version 4

function Constant_flux_irreversible(v)
  v;
end
Constant_flux_irreversible is "Constant flux (irreversible)";

model Tiemann2011_PhenotypeTransitions()
  // To the extent possible under law, all copyright and related or neighbouring rights to this encoded model have been dedicated to the public domain worldwide. Please refer to CC0 Public Domain Dedication for more information.
  // In summary, you are entitled to use this encoded model in absolutely any manner you deem suitable, verbatim, or with modification, alone or embedded it in a larger context, redistribute it, commercially or not, in a restricted way or not.
  // To cite BioModels Database, please use: Li C, Donizelli M, Rodriguez N, Dharuri H, Endler L, Chelliah V, Li L, He E, Henry A, Stefan MI, Snoep JL, Hucka M, Le Novère N, Laibe C (2010) BioModels Database: An enhanced, curated and annotated resource for published quantitative kinetic models. BMC Syst Biol., 4:92.
  // biomodels.db:MODEL1112150000
  // isDescribedBy pubmed:22029623
  // biomodels.db:MODEL1112150000
  // biomodels.db:MODEL1112150000
  // isDescribedBy pubmed:22029623

  // Compartments:
  compartment Liver = 0.0025;
  compartment Plasma = 0.0025;

  // Species:
  species FC in Liver = 1.9366;
  species CE_cyt in Liver = 0.6624;
  species CE_ER in Liver = 0;
  species TG_cyt in Liver = 3.1832;
  species TG_ER in Liver = 0;
  species TG_plasma in Plasma = 0.46;
  species CE_plasma in Plasma = 0.61;
  species CE_HDL in Plasma = 1.35;
  species $FFA in Plasma = 0.34;

  // Reactions:
  FCprod: => FC; Liver*Constant_flux_irreversible(FCprod_v);
    FCprod_v = 0.0245;
  FCmet: FC => ; Liver*FCmet_k1*FC;
    FCmet_k1 = 0.0488485;
  CEforcyt: FC => CE_cyt; Liver*CEforcyt_k1*FC;
    CEforcyt_k1 = 5.3418;
  CEdefcyt: CE_cyt => FC; Liver*CEdefcyt_k1*CE_cyt;
    CEdefcyt_k1 = 27.0264;
  CEforer: FC => CE_ER; Liver*CEforer_k1*FC;
    CEforer_k1 = 0.252437;
  CEdefer: CE_ER => FC; Liver*CEdefer_k1*CE_ER;
    CEdefer_k1 = 0.610892;
  TGprodcyt: => TG_cyt; Liver*Constant_flux_irreversible(TGprodcyt_v);
    TGprodcyt_v = 1.80635e-5;
  TGmetcyt: TG_cyt => ; Liver*TGmetcyt_k1*TG_cyt;
    TGmetcyt_k1 = 0.701735;
  TGforcyt: TG_ER => TG_cyt; Liver*TGforcyt_k1*TG_ER;
    TGforcyt_k1 = 5.60892;
  TGproder: => TG_ER; Liver*Constant_flux_irreversible(TGproder_v);
    TGproder_v = 1.30725e-5;
  TGmeter: TG_ER => ; Liver*TGmeter_k1*TG_ER;
    TGmeter_k1 = 0.340947;
  TGforer: TG_cyt => TG_ER; Liver*TGforer_k1*TG_cyt;
    TGforer_k1 = 3.05246;
  fFFA: $FFA => TG_cyt; fFFA_k1*FFA;
    fFFA_k1 = 0.0155327;
  VLDLTG: TG_ER => TG_plasma; VLDLTG_k1*TG_ER;
    VLDLTG_k1 = 0.019342;
  VLDLCE: CE_ER => CE_plasma; VLDLCE_k1*CE_ER;
    VLDLCE_k1 = 0.00308588;
  TGupthep: TG_plasma => TG_cyt; TGupthep_k1*TG_plasma;
    TGupthep_k1 = 0.00132591;
  CEupthep: CE_plasma => CE_cyt; CEupthep_k1*CE_plasma;
    CEupthep_k1 = 0.00132591;
  TGuptper: TG_plasma => ; Plasma*TGuptper_k1*TG_plasma;
    TGuptper_k1 = 0.0057377;
  CEuptper: CE_plasma => ; Plasma*CEuptper_k1*CE_plasma;
    CEuptper_k1 = 0.0057377;
  CEforhdl: => CE_HDL; Plasma*Constant_flux_irreversible(CEforhdl_v);
    CEforhdl_v = 0.0736;
  CEupthdl: CE_HDL => CE_cyt; CEupthdl_k1*CE_HDL;
    CEupthdl_k1 = 0.000136296;
  TGhydhep: TG_plasma => TG_cyt; TGhydhep_k1*TG_plasma;
    TGhydhep_k1 = 0.0226027;
  TGhydper: TG_plasma => ; Plasma*TGhydper_k1*TG_plasma;
    TGhydper_k1 = 0.185873;

  // Unit definitions:
  unit time = 3600 second;
  unit substance = 1e-3 mole;
end
