// SBML level 2 version 4

function function_4_1_1(A, K1, Ka, V1, MKKK, M_PP)
  V1*MKKK/K1/(1 + MKKK/K1)*((1 + A*M_PP/Ka)/(1 + M_PP/Ka));
end

function function_4_3_1(K3, KI, k3, MKKK_P, MKK, MKK_P, M_PP)
  k3*MKKK_P*MKK/K3/((1 + MKK/K3 + MKK_P/K3)*(1 + M_PP/KI));
end

function function_4_4_1(K4, KI, k4, MKKK_P, MKK, MKK_P, M_PP)
  k4*MKKK_P*MKK_P/K4/((1 + MKK/K4 + MKK_P/K4)*(1 + M_PP/KI));
end

function function_4_7_1(K7, k7, MKK_PP, M, M_P)
  k7*MKK_PP*M/K7/(1 + M/K7 + M_P/K7);
end

function function_4_8_1(K8, k8, MKK_PP, M, M_P)
  k8*MKK_PP*M_P/K8/(1 + M/K8 + M_P/K8);
end

function function_4_2_1(K2, k2, MKKK_P, P1)
  k2*P1*MKKK_P/K2/(1 + MKKK_P/K2);
end

function function_4_5_1(K5, k5, MKK_P, MKK_PP, P2)
  k5*P2*MKK_PP/K5/(1 + MKK_PP/K5 + MKK_P/K5);
end

function function_4_6_1(K6, k6, MKK_P, MKK_PP, P2)
  k6*P2*MKK_P/K6/(1 + MKK_PP/K6 + MKK_P/K6);
end

function function_4_9_1(K9, k9, P3, M_P, M_PP)
  k9*P3*M_PP/K9/(1 + M_PP/K9 + M_P/K9);
end

function function_4_10_1(K10, k10, P3, M_P, M_PP)
  k10*P3*M_P/K10/(1 + M_PP/K10 + M_P/K10);
end

function function_1(V11, X, K11, A, M_PP, Ka)
  V11*X/K11/(1 + X/K11)*((1 + A*M_PP/Ka)/(1 + M_PP/Ka));
end
function_1 is "11";

function function_2(V12, X_P, K12)
  V12*X_P/(K12 + X_P);
end
function_2 is "12";

model Sarma2012_MAPKcascade3()
  // This model is from the article:
  // Oscillations in MAPK cascade triggered by two distinct designs of coupled positive and negative feedback loops.
  // Sarma U, Ghosh I. BMC Res Notes. 2012 Jun 13;5(1):287. 22694947 ,
  // Abstract:
  // BACKGROUND: Feedback loops, both positive and negative are embedded in the Mitogen Activated Protein Kinase (MAPK) cascade. In the three layer MAPK cascade, both feedback loops originate from the terminal layer and their sites of action are either of the two upstream layers. Recent studies have shown that the cascade uses coupled positive and negative feedback loops in generating oscillations. Two plausible designs of coupled positive and negative feedback loops can be elucidated from the literature; in one design the positive feedback precedes the negative feedback in the direction of signal flow and vice-versa in another. But it remains unexplored how the two designs contribute towards triggering oscillations in MAPK cascade. Thus it is also not known how amplitude, frequency, robustness or nature (analogous/digital) of the oscillations would be shaped by these two designs. RESULTS: We built two models of MAPK cascade that exhibited oscillations as function of two underlying designs of coupled positive and negative feedback loops. Frequency, amplitude and nature (digital/analogous) of oscillations were found to be differentially determined by each design. It was observed that the positive feedback emerging from an oscillating MAPK cascade and functional in an external signal processing module can trigger oscillations in the target module, provided that the target module satisfy certain parametric requirements. The augmentation of the two models was done to incorporate the nuclear-cytoplasmic shuttling of cascade components followed by induction of a nuclear phosphatase. It revealed that the fate of oscillations in the MAPK cascade is governed by the feedback designs. Oscillations were unaffected due to nuclear compartmentalization owing to one design but were completely abolished in the other case. CONCLUSION: The MAPK cascade can utilize two distinct designs of coupled positive and negative feedback loops to trigger oscillations. The amplitude, frequency and robustness of the oscillations in presence or absence of nuclear compartmentalization were differentially determined by two designs of coupled positive and negative feedback loops. A positive feedback from an oscillating MAPK cascade was shown to induce oscillations in an external signal processing module, uncovering a novel regulatory aspect of MAPK signal processing.
  // biomodels.db:MODEL1112190005
  // isDescribedBy pubmed:22694947
  // biomodels.db:MODEL1112190005
  // biomodels.db:MODEL1112190005
  // isDescribedBy pubmed:22694947

  // Compartments:
  compartment compartment_0 = 1;

  // Species:
  species MKKK in compartment_0 = 999.9999;
  species MKKK_P in compartment_0 = 0;
  species MKK in compartment_0 = 4000;
  species MKK_P in compartment_0 = 0;
  species MKK_PP in compartment_0 = 0;
  species M in compartment_0 = 999.9999;
  species M_P in compartment_0 = 0;
  species M_PP in compartment_0 = 0;
  species P1 in compartment_0 = 99.99999;
  species P2 in compartment_0 = 500;
  species P3 in compartment_0 = 500;
  species X in compartment_0 = 99.99999;
  species X_P in compartment_0 = 0;

  // Reactions:
  _1: MKKK => MKKK_P; compartment_0*function_4_1_1(_1_A, K1, _1_Ka, V1, MKKK, M_PP);  // modifiers: M_PP
    _1_A = 100; K1 = 15; _1_Ka = 500; V1 = 6;
  _3: MKK => MKK_P; compartment_0*function_4_3_1(K3, _3_KI, k3, MKKK_P, MKK, MKK_P, M_PP);  // modifiers: MKKK_P, M_PP
    K3 = 20; _3_KI = 9; k3 = 0.1;
  _4: MKK_P => MKK_PP; compartment_0*function_4_4_1(K4, _4_KI, k4, MKKK_P, MKK, MKK_P, M_PP);  // modifiers: MKKK_P, MKK, M_PP
    K4 = 20; _4_KI = 9; k4 = 0.1;
  _7: M => M_P; compartment_0*function_4_7_1(K7, k7, MKK_PP, M, M_P);  // modifiers: MKK_PP
    K7 = 20; k7 = 0.1;
  _8: M_P => M_PP; compartment_0*function_4_8_1(K8, k8, MKK_PP, M, M_P);  // modifiers: MKK_PP, M
    K8 = 20; k8 = 0.1;
  _2: MKKK_P => MKKK; compartment_0*function_4_2_1(K2, k2, MKKK_P, P1);  // modifiers: P1
    K2 = 100; k2 = 0.1;
  _5: MKK_PP => MKK_P; compartment_0*function_4_5_1(K5, k5, MKK_P, MKK_PP, P2);  // modifiers: P2
    K5 = 20; k5 = 0.02;
  _6: MKK_P => MKK; compartment_0*function_4_6_1(K6, k6, MKK_P, MKK_PP, P2);  // modifiers: P2, MKK_PP
    K6 = 20; k6 = 0.02;
  _9: M_PP => M_P; compartment_0*function_4_9_1(K9, k9, P3, M_P, M_PP);  // modifiers: P3, M
    K9 = 20; k9 = 0.02;
  _10: M_P => M; compartment_0*function_4_10_1(K10, k10, P3, M_P, M_PP);  // modifiers: P3, M_PP
    K10 = 20; k10 = 0.02;
  reaction_10: X => X_P; compartment_0*function_1(V11, X, K11, reaction_10_A, M_PP, reaction_10_Ka); reaction_10 is "11";  // modifiers: M_PP
    V11 = 0.1; K11 = 50; reaction_10_A = 100; reaction_10_Ka = 500;
  reaction_11: X_P => X; compartment_0*function_2(V12, X_P, K12); reaction_11 is "12";
    V12 = 0.5; K12 = 50;

  // Unit definitions:
  unit volume = 1e-3 litre;
  unit substance = 1e-9 mole;
end
