// SBML level 2 version 4

model Smith2010_Foxo_PTMs_AgeingRelatedSignallingPathway_A()
  // This a model from the article:
  // Modelling the response of FOXO transcription factors to multiple post-translational modifications made by ageing-related signalling pathways.
  // Smith GR, Shanley DP. PLoS One. 2010 Jun 14;5(6):e11092. 20567500 ,
  // Abstract:
  // FOXO transcription factors are an important, conserved family of regulators of cellular processes including metabolism, cell-cycle progression, apoptosis and stress resistance. They are required for the efficacy of several of the genetic interventions that modulate lifespan. FOXO activity is regulated by multiple post-translational modifications (PTMs) that affect its subcellular localization, half-life, DNA binding and transcriptional activity. Here, we show how a mathematical modelling approach can be used to simulate the effects, singly and in combination, of these PTMs. Our model is implemented using the Systems Biology Markup Language (SBML), generated by an ancillary program and simulated in a stochastic framework. The use of the ancillary program to generate the SBML is necessary because the possibility that many regulatory PTMs may be added, each independently of the others, means that a large number of chemically distinct forms of the FOXO molecule must be taken into account, and the program is used to generate them. Although the model does not yet include detailed representations of events upstream and downstream of FOXO, we show how it can qualitatively, and in some cases quantitatively, reproduce the known effects of certain treatments that induce various single and multiple PTMs, and allows for a complex spatiotemporal interplay of effects due to the activation of multiple PTM-inducing treatments. Thus, it provides an important framework to integrate current knowledge about the behaviour of FOXO. The approach should be generally applicable to other proteins experiencing multiple regulations.
  // This model originates from BioModels Database: A Database of Annotated Published Models (http://www.ebi.ac.uk/biomodels/). It is copyright (c) 2005-2011 The BioModels.net Team.
  // To the extent possible under law, all copyright and related or neighbouring rights to this encoded model have been dedicated to the public domain worldwide. Please refer to CC0 Public Domain Dedication for more information.
  // In summary, you are entitled to use this encoded model in absolutely any manner you deem suitable, verbatim, or with modification, alone or embedded it in a larger context, redistribute it, commercially or not, in a restricted way or not..
  // To cite BioModels Database, please use: Li C, Donizelli M, Rodriguez N, Dharuri H, Endler L, Chelliah V, Li L, He E, Henry A, Stefan MI, Snoep JL, Hucka M, Le Novère N, Laibe C (2010) BioModels Database: An enhanced, curated and annotated resource for published quantitative kinetic models. BMC Syst Biol., 4:92.
  // biomodels.db:MODEL1112260000
  // isDescribedBy pubmed:20567500
  // biomodels.db:MODEL1112260000
  // biomodels.db:MODEL1112260000
  // isDescribedBy pubmed:20567500

  // Compartments:
  compartment extracellular = 8.3e-12;
  compartment cellsurface in extracellular = 6.4e-14;
  compartment cytoplasm in cellsurface = 1.65e-11;
  compartment nucleus in cytoplasm = 5e-13;
  compartment dnabound in nucleus = 1e-13;

  // Species:
  substanceOnly species $null in cytoplasm = 0;
  substanceOnly species $degr_Foxo1 in cytoplasm = 0;
  substanceOnly species cytoplasm_Foxo1_Pa0_pUb0 in cytoplasm = 1000;
  substanceOnly species nucleus_Foxo1_Pa0_pUb0 in nucleus = 0;
  substanceOnly species dnabound_Foxo1_Pa0_pUb0 in dnabound = 0;
  substanceOnly species cytoplasm_Foxo1_Pa0_pUb1 in cytoplasm = 0;
  substanceOnly species nucleus_Foxo1_Pa0_pUb1 in nucleus = 0;
  substanceOnly species dnabound_Foxo1_Pa0_pUb1 in dnabound = 0;
  substanceOnly species cytoplasm_Foxo1_Pa1_pUb0 in cytoplasm = 0;
  substanceOnly species nucleus_Foxo1_Pa1_pUb0 in nucleus = 0;
  substanceOnly species dnabound_Foxo1_Pa1_pUb0 in dnabound = 0;
  substanceOnly species cytoplasm_Foxo1_Pa1_pUb1 in cytoplasm = 0;
  substanceOnly species nucleus_Foxo1_Pa1_pUb1 in nucleus = 0;
  substanceOnly species dnabound_Foxo1_Pa1_pUb1 in dnabound = 0;
  substanceOnly species Foxo1_Pa0_tot in extracellular;
  substanceOnly species Foxo1_Pa1_tot in extracellular;
  substanceOnly species Foxo1_pUb0_tot in extracellular;
  substanceOnly species Foxo1_pUb1_tot in extracellular;
  substanceOnly species cytoplasm_Foxo1_tot in extracellular;
  substanceOnly species nucleus_Foxo1_tot in extracellular;
  substanceOnly species dnabound_Foxo1_tot in extracellular;
  substanceOnly species Foxo1_all in extracellular;
  substanceOnly species nucleus_RNA_Inr in nucleus = 0;
  substanceOnly species cytoplasm_RNA_Inr in cytoplasm = 0;
  substanceOnly species cytoplasm_Inr in cytoplasm = 0;
  substanceOnly species nucleus_RNA_Sod2 in nucleus = 0;
  substanceOnly species cytoplasm_RNA_Sod2 in cytoplasm = 0;
  substanceOnly species cytoplasm_Sod2 in cytoplasm = 0;
  substanceOnly species E2F1 in cytoplasm = 100;
  substanceOnly species Akt in cytoplasm = 25000;
  substanceOnly species SGK in cytoplasm = 0;
  substanceOnly species CDK2 in cytoplasm = 0;
  substanceOnly species AMPK in cytoplasm = 0;
  substanceOnly species IKKb in cytoplasm = 0;
  substanceOnly species JNK in cytoplasm = 0;
  substanceOnly species PP2A in cytoplasm = 10000;
  substanceOnly species CBPP300 in cytoplasm = 0;
  substanceOnly species SIRT1 in cytoplasm = 0;
  substanceOnly species E3 in cytoplasm = 0;
  substanceOnly species USP7 in cytoplasm = 1000;
  substanceOnly species SCF in cytoplasm = 1000;
  substanceOnly species Proteasome in cytoplasm = 1000;

  // Assignment rules:
  Foxo1_Pa0_tot := cytoplasm_Foxo1_Pa0_pUb0 + nucleus_Foxo1_Pa0_pUb0 + dnabound_Foxo1_Pa0_pUb0 + cytoplasm_Foxo1_Pa0_pUb1 + nucleus_Foxo1_Pa0_pUb1 + dnabound_Foxo1_Pa0_pUb1;
  Foxo1_Pa1_tot := cytoplasm_Foxo1_Pa1_pUb0 + nucleus_Foxo1_Pa1_pUb0 + dnabound_Foxo1_Pa1_pUb0 + cytoplasm_Foxo1_Pa1_pUb1 + nucleus_Foxo1_Pa1_pUb1 + dnabound_Foxo1_Pa1_pUb1;
  Foxo1_pUb0_tot := cytoplasm_Foxo1_Pa0_pUb0 + nucleus_Foxo1_Pa0_pUb0 + dnabound_Foxo1_Pa0_pUb0 + cytoplasm_Foxo1_Pa1_pUb0 + nucleus_Foxo1_Pa1_pUb0 + dnabound_Foxo1_Pa1_pUb0;
  Foxo1_pUb1_tot := cytoplasm_Foxo1_Pa0_pUb1 + nucleus_Foxo1_Pa0_pUb1 + dnabound_Foxo1_Pa0_pUb1 + cytoplasm_Foxo1_Pa1_pUb1 + nucleus_Foxo1_Pa1_pUb1 + dnabound_Foxo1_Pa1_pUb1;
  cytoplasm_Foxo1_tot := cytoplasm_Foxo1_Pa0_pUb0 + cytoplasm_Foxo1_Pa0_pUb1 + cytoplasm_Foxo1_Pa1_pUb0 + cytoplasm_Foxo1_Pa1_pUb1;
  nucleus_Foxo1_tot := nucleus_Foxo1_Pa0_pUb0 + nucleus_Foxo1_Pa0_pUb1 + nucleus_Foxo1_Pa1_pUb0 + nucleus_Foxo1_Pa1_pUb1;
  dnabound_Foxo1_tot := dnabound_Foxo1_Pa0_pUb0 + dnabound_Foxo1_Pa0_pUb1 + dnabound_Foxo1_Pa1_pUb0 + dnabound_Foxo1_Pa1_pUb1;
  Foxo1_all := cytoplasm_Foxo1_tot + nucleus_Foxo1_tot + dnabound_Foxo1_tot;

  // Reactions:
  Synthesis: $null => cytoplasm_Foxo1_Pa0_pUb0; E2F1*ksynth;  // modifiers: E2F1
    ksynth = 0.0055;
  R2: cytoplasm_Foxo1_Pa0_pUb0 => nucleus_Foxo1_Pa0_pUb0; cytoplasm_Foxo1_Pa0_pUb0*R2_ktr; R2 is "transport cytoplasm_Foxo1_Pa0_pUb0 to nucleus_Foxo1_Pa0_pUb0";
    R2_ktr = 0.1818182;
  R3: nucleus_Foxo1_Pa0_pUb0 => cytoplasm_Foxo1_Pa0_pUb0; nucleus_Foxo1_Pa0_pUb0*R3_ktr; R3 is "transport nucleus_Foxo1_Pa0_pUb0 to cytoplasm_Foxo1_Pa0_pUb0";
    R3_ktr = 0.055;
  R4: nucleus_Foxo1_Pa0_pUb0 => dnabound_Foxo1_Pa0_pUb0; nucleus_Foxo1_Pa0_pUb0*R4_ktr; R4 is "transport nucleus_Foxo1_Pa0_pUb0 to dnabound_Foxo1_Pa0_pUb0";
    R4_ktr = 0.25;
  R5: dnabound_Foxo1_Pa0_pUb0 => nucleus_Foxo1_Pa0_pUb0; dnabound_Foxo1_Pa0_pUb0*R5_ktr; R5 is "transport dnabound_Foxo1_Pa0_pUb0 to nucleus_Foxo1_Pa0_pUb0";
    R5_ktr = 0.125;
  R6: cytoplasm_Foxo1_Pa0_pUb1 => nucleus_Foxo1_Pa0_pUb1; cytoplasm_Foxo1_Pa0_pUb1*R6_ktr; R6 is "transport cytoplasm_Foxo1_Pa0_pUb1 to nucleus_Foxo1_Pa0_pUb1";
    R6_ktr = 0.1818182;
  R7: nucleus_Foxo1_Pa0_pUb1 => cytoplasm_Foxo1_Pa0_pUb1; nucleus_Foxo1_Pa0_pUb1*R7_ktr; R7 is "transport nucleus_Foxo1_Pa0_pUb1 to cytoplasm_Foxo1_Pa0_pUb1";
    R7_ktr = 0.055;
  R8: nucleus_Foxo1_Pa0_pUb1 => dnabound_Foxo1_Pa0_pUb1; nucleus_Foxo1_Pa0_pUb1*R8_ktr; R8 is "transport nucleus_Foxo1_Pa0_pUb1 to dnabound_Foxo1_Pa0_pUb1";
    R8_ktr = 0.25;
  R9: dnabound_Foxo1_Pa0_pUb1 => nucleus_Foxo1_Pa0_pUb1; dnabound_Foxo1_Pa0_pUb1*R9_ktr; R9 is "transport dnabound_Foxo1_Pa0_pUb1 to nucleus_Foxo1_Pa0_pUb1";
    R9_ktr = 0.125;
  R10: cytoplasm_Foxo1_Pa1_pUb0 => nucleus_Foxo1_Pa1_pUb0; cytoplasm_Foxo1_Pa1_pUb0*R10_ktr; R10 is "transport cytoplasm_Foxo1_Pa1_pUb0 to nucleus_Foxo1_Pa1_pUb0";
    R10_ktr = 0.01818182;
  R11: nucleus_Foxo1_Pa1_pUb0 => cytoplasm_Foxo1_Pa1_pUb0; nucleus_Foxo1_Pa1_pUb0*R11_ktr; R11 is "transport nucleus_Foxo1_Pa1_pUb0 to cytoplasm_Foxo1_Pa1_pUb0";
    R11_ktr = 0.55;
  R12: nucleus_Foxo1_Pa1_pUb0 => dnabound_Foxo1_Pa1_pUb0; nucleus_Foxo1_Pa1_pUb0*R12_ktr; R12 is "transport nucleus_Foxo1_Pa1_pUb0 to dnabound_Foxo1_Pa1_pUb0";
    R12_ktr = 0.125;
  R13: dnabound_Foxo1_Pa1_pUb0 => nucleus_Foxo1_Pa1_pUb0; dnabound_Foxo1_Pa1_pUb0*R13_ktr; R13 is "transport dnabound_Foxo1_Pa1_pUb0 to nucleus_Foxo1_Pa1_pUb0";
    R13_ktr = 0.125;
  R14: cytoplasm_Foxo1_Pa1_pUb1 => nucleus_Foxo1_Pa1_pUb1; cytoplasm_Foxo1_Pa1_pUb1*R14_ktr; R14 is "transport cytoplasm_Foxo1_Pa1_pUb1 to nucleus_Foxo1_Pa1_pUb1";
    R14_ktr = 0.01818182;
  R15: nucleus_Foxo1_Pa1_pUb1 => cytoplasm_Foxo1_Pa1_pUb1; nucleus_Foxo1_Pa1_pUb1*R15_ktr; R15 is "transport nucleus_Foxo1_Pa1_pUb1 to cytoplasm_Foxo1_Pa1_pUb1";
    R15_ktr = 0.55;
  R16: nucleus_Foxo1_Pa1_pUb1 => dnabound_Foxo1_Pa1_pUb1; nucleus_Foxo1_Pa1_pUb1*R16_ktr; R16 is "transport nucleus_Foxo1_Pa1_pUb1 to dnabound_Foxo1_Pa1_pUb1";
    R16_ktr = 0.125;
  R17: dnabound_Foxo1_Pa1_pUb1 => nucleus_Foxo1_Pa1_pUb1; dnabound_Foxo1_Pa1_pUb1*R17_ktr; R17 is "transport dnabound_Foxo1_Pa1_pUb1 to nucleus_Foxo1_Pa1_pUb1";
    R17_ktr = 0.125;
  R18: cytoplasm_Foxo1_Pa0_pUb0 => cytoplasm_Foxo1_Pa1_pUb0; cytoplasm_Foxo1_Pa0_pUb0*Akt*R18_kkin; R18 is "conversion of cytoplasm_Foxo1_Pa0_pUb0 to cytoplasm_Foxo1_Pa1_pUb0 by Akt";  // modifiers: Akt
    R18_kkin = 5e-5;
  R19: nucleus_Foxo1_Pa0_pUb0 => nucleus_Foxo1_Pa1_pUb0; nucleus_Foxo1_Pa0_pUb0*Akt*R19_kkin; R19 is "conversion of nucleus_Foxo1_Pa0_pUb0 to nucleus_Foxo1_Pa1_pUb0 by Akt";  // modifiers: Akt
    R19_kkin = 5e-5;
  R20: dnabound_Foxo1_Pa0_pUb0 => dnabound_Foxo1_Pa1_pUb0; dnabound_Foxo1_Pa0_pUb0*Akt*R20_kkin; R20 is "conversion of dnabound_Foxo1_Pa0_pUb0 to dnabound_Foxo1_Pa1_pUb0 by Akt";  // modifiers: Akt
    R20_kkin = 5e-5;
  R21: cytoplasm_Foxo1_Pa0_pUb1 => cytoplasm_Foxo1_Pa1_pUb1; cytoplasm_Foxo1_Pa0_pUb1*Akt*R21_kkin; R21 is "conversion of cytoplasm_Foxo1_Pa0_pUb1 to cytoplasm_Foxo1_Pa1_pUb1 by Akt";  // modifiers: Akt
    R21_kkin = 5e-5;
  R22: nucleus_Foxo1_Pa0_pUb1 => nucleus_Foxo1_Pa1_pUb1; nucleus_Foxo1_Pa0_pUb1*Akt*R22_kkin; R22 is "conversion of nucleus_Foxo1_Pa0_pUb1 to nucleus_Foxo1_Pa1_pUb1 by Akt";  // modifiers: Akt
    R22_kkin = 5e-5;
  R23: dnabound_Foxo1_Pa0_pUb1 => dnabound_Foxo1_Pa1_pUb1; dnabound_Foxo1_Pa0_pUb1*Akt*R23_kkin; R23 is "conversion of dnabound_Foxo1_Pa0_pUb1 to dnabound_Foxo1_Pa1_pUb1 by Akt";  // modifiers: Akt
    R23_kkin = 5e-5;
  R24: cytoplasm_Foxo1_Pa0_pUb0 => cytoplasm_Foxo1_Pa1_pUb0; cytoplasm_Foxo1_Pa0_pUb0*SGK*R24_kkin; R24 is "conversion of cytoplasm_Foxo1_Pa0_pUb0 to cytoplasm_Foxo1_Pa1_pUb0 by SGK";  // modifiers: SGK
    R24_kkin = 5e-5;
  R25: nucleus_Foxo1_Pa0_pUb0 => nucleus_Foxo1_Pa1_pUb0; nucleus_Foxo1_Pa0_pUb0*SGK*R25_kkin; R25 is "conversion of nucleus_Foxo1_Pa0_pUb0 to nucleus_Foxo1_Pa1_pUb0 by SGK";  // modifiers: SGK
    R25_kkin = 5e-5;
  R26: dnabound_Foxo1_Pa0_pUb0 => dnabound_Foxo1_Pa1_pUb0; dnabound_Foxo1_Pa0_pUb0*SGK*R26_kkin; R26 is "conversion of dnabound_Foxo1_Pa0_pUb0 to dnabound_Foxo1_Pa1_pUb0 by SGK";  // modifiers: SGK
    R26_kkin = 5e-5;
  R27: cytoplasm_Foxo1_Pa0_pUb1 => cytoplasm_Foxo1_Pa1_pUb1; cytoplasm_Foxo1_Pa0_pUb1*SGK*R27_kkin; R27 is "conversion of cytoplasm_Foxo1_Pa0_pUb1 to cytoplasm_Foxo1_Pa1_pUb1 by SGK";  // modifiers: SGK
    R27_kkin = 5e-5;
  R28: nucleus_Foxo1_Pa0_pUb1 => nucleus_Foxo1_Pa1_pUb1; nucleus_Foxo1_Pa0_pUb1*SGK*R28_kkin; R28 is "conversion of nucleus_Foxo1_Pa0_pUb1 to nucleus_Foxo1_Pa1_pUb1 by SGK";  // modifiers: SGK
    R28_kkin = 5e-5;
  R29: dnabound_Foxo1_Pa0_pUb1 => dnabound_Foxo1_Pa1_pUb1; dnabound_Foxo1_Pa0_pUb1*SGK*R29_kkin; R29 is "conversion of dnabound_Foxo1_Pa0_pUb1 to dnabound_Foxo1_Pa1_pUb1 by SGK";  // modifiers: SGK
    R29_kkin = 5e-5;
  R30: cytoplasm_Foxo1_Pa1_pUb0 => cytoplasm_Foxo1_Pa0_pUb0; cytoplasm_Foxo1_Pa1_pUb0*PP2A*R30_kdephos; R30 is "conversion of cytoplasm_Foxo1_Pa1_pUb0 to cytoplasm_Foxo1_Pa0_pUb0 by PP2A";  // modifiers: PP2A
    R30_kdephos = 5e-5;
  R31: nucleus_Foxo1_Pa1_pUb0 => nucleus_Foxo1_Pa0_pUb0; nucleus_Foxo1_Pa1_pUb0*PP2A*R31_kdephos; R31 is "conversion of nucleus_Foxo1_Pa1_pUb0 to nucleus_Foxo1_Pa0_pUb0 by PP2A";  // modifiers: PP2A
    R31_kdephos = 5e-5;
  R32: dnabound_Foxo1_Pa1_pUb0 => dnabound_Foxo1_Pa0_pUb0; dnabound_Foxo1_Pa1_pUb0*PP2A*R32_kdephos; R32 is "conversion of dnabound_Foxo1_Pa1_pUb0 to dnabound_Foxo1_Pa0_pUb0 by PP2A";  // modifiers: PP2A
    R32_kdephos = 5e-5;
  R33: cytoplasm_Foxo1_Pa1_pUb1 => cytoplasm_Foxo1_Pa0_pUb1; cytoplasm_Foxo1_Pa1_pUb1*PP2A*R33_kdephos; R33 is "conversion of cytoplasm_Foxo1_Pa1_pUb1 to cytoplasm_Foxo1_Pa0_pUb1 by PP2A";  // modifiers: PP2A
    R33_kdephos = 5e-5;
  R34: nucleus_Foxo1_Pa1_pUb1 => nucleus_Foxo1_Pa0_pUb1; nucleus_Foxo1_Pa1_pUb1*PP2A*R34_kdephos; R34 is "conversion of nucleus_Foxo1_Pa1_pUb1 to nucleus_Foxo1_Pa0_pUb1 by PP2A";  // modifiers: PP2A
    R34_kdephos = 5e-5;
  R35: dnabound_Foxo1_Pa1_pUb1 => dnabound_Foxo1_Pa0_pUb1; dnabound_Foxo1_Pa1_pUb1*PP2A*R35_kdephos; R35 is "conversion of dnabound_Foxo1_Pa1_pUb1 to dnabound_Foxo1_Pa0_pUb1 by PP2A";  // modifiers: PP2A
    R35_kdephos = 5e-5;
  R36: cytoplasm_Foxo1_Pa0_pUb0 => cytoplasm_Foxo1_Pa0_pUb1; cytoplasm_Foxo1_Pa0_pUb0*SCF*R36_kub; R36 is "conversion of cytoplasm_Foxo1_Pa0_pUb0 to cytoplasm_Foxo1_Pa0_pUb1 by SCF";  // modifiers: SCF
    R36_kub = 1e-6;
  R37: nucleus_Foxo1_Pa0_pUb0 => nucleus_Foxo1_Pa0_pUb1; nucleus_Foxo1_Pa0_pUb0*SCF*R37_kub; R37 is "conversion of nucleus_Foxo1_Pa0_pUb0 to nucleus_Foxo1_Pa0_pUb1 by SCF";  // modifiers: SCF
    R37_kub = 1e-6;
  R38: dnabound_Foxo1_Pa0_pUb0 => dnabound_Foxo1_Pa0_pUb1; dnabound_Foxo1_Pa0_pUb0*SCF*R38_kub; R38 is "conversion of dnabound_Foxo1_Pa0_pUb0 to dnabound_Foxo1_Pa0_pUb1 by SCF";  // modifiers: SCF
    R38_kub = 1e-6;
  R39: cytoplasm_Foxo1_Pa1_pUb0 => cytoplasm_Foxo1_Pa1_pUb1; cytoplasm_Foxo1_Pa1_pUb0*SCF*R39_kub; R39 is "conversion of cytoplasm_Foxo1_Pa1_pUb0 to cytoplasm_Foxo1_Pa1_pUb1 by SCF";  // modifiers: SCF
    R39_kub = 3e-6;
  R40: nucleus_Foxo1_Pa1_pUb0 => nucleus_Foxo1_Pa1_pUb1; nucleus_Foxo1_Pa1_pUb0*SCF*R40_kub; R40 is "conversion of nucleus_Foxo1_Pa1_pUb0 to nucleus_Foxo1_Pa1_pUb1 by SCF";  // modifiers: SCF
    R40_kub = 3e-6;
  R41: dnabound_Foxo1_Pa1_pUb0 => dnabound_Foxo1_Pa1_pUb1; dnabound_Foxo1_Pa1_pUb0*SCF*R41_kub; R41 is "conversion of dnabound_Foxo1_Pa1_pUb0 to dnabound_Foxo1_Pa1_pUb1 by SCF";  // modifiers: SCF
    R41_kub = 3e-6;
  R42: cytoplasm_Foxo1_Pa0_pUb1 => $degr_Foxo1; cytoplasm_Foxo1_Pa0_pUb1*Proteasome*R42_kdeg; R42 is "degradation of cytoplasm_Foxo1_Pa0_pUb1";  // modifiers: Proteasome
    R42_kdeg = 0.0001;
  R43: cytoplasm_Foxo1_Pa1_pUb1 => $degr_Foxo1; cytoplasm_Foxo1_Pa1_pUb1*Proteasome*R43_kdeg; R43 is "degradation of cytoplasm_Foxo1_Pa1_pUb1";  // modifiers: Proteasome
    R43_kdeg = 0.0001;
  R44: $null => nucleus_RNA_Inr; dnabound_Foxo1_Pa0_pUb0*R44_ktranscr; R44 is "transcription of inr by dnabound_Foxo1_Pa0_pUb0";  // modifiers: dnabound_Foxo1_Pa0_pUb0
    R44_ktranscr = 0.3;
  R45: $null => nucleus_RNA_Sod2; dnabound_Foxo1_Pa0_pUb0*R45_ktranscr; R45 is "transcription of sod2 by dnabound_Foxo1_Pa0_pUb0";  // modifiers: dnabound_Foxo1_Pa0_pUb0
    R45_ktranscr = 0.3;
  R46: $null => nucleus_RNA_Inr; dnabound_Foxo1_Pa0_pUb1*R46_ktranscr; R46 is "transcription of inr by dnabound_Foxo1_Pa0_pUb1";  // modifiers: dnabound_Foxo1_Pa0_pUb1
    R46_ktranscr = 0.3;
  R47: $null => nucleus_RNA_Sod2; dnabound_Foxo1_Pa0_pUb1*R47_ktranscr; R47 is "transcription of sod2 by dnabound_Foxo1_Pa0_pUb1";  // modifiers: dnabound_Foxo1_Pa0_pUb1
    R47_ktranscr = 0.3;
  R48: $null => nucleus_RNA_Inr; dnabound_Foxo1_Pa1_pUb0*R48_ktranscr; R48 is "transcription of inr by dnabound_Foxo1_Pa1_pUb0";  // modifiers: dnabound_Foxo1_Pa1_pUb0
    R48_ktranscr = 0.3;
  R49: $null => nucleus_RNA_Sod2; dnabound_Foxo1_Pa1_pUb0*R49_ktranscr; R49 is "transcription of sod2 by dnabound_Foxo1_Pa1_pUb0";  // modifiers: dnabound_Foxo1_Pa1_pUb0
    R49_ktranscr = 0.3;
  R50: $null => nucleus_RNA_Inr; dnabound_Foxo1_Pa1_pUb1*R50_ktranscr; R50 is "transcription of inr by dnabound_Foxo1_Pa1_pUb1";  // modifiers: dnabound_Foxo1_Pa1_pUb1
    R50_ktranscr = 0.3;
  R51: $null => nucleus_RNA_Sod2; dnabound_Foxo1_Pa1_pUb1*R51_ktranscr; R51 is "transcription of sod2 by dnabound_Foxo1_Pa1_pUb1";  // modifiers: dnabound_Foxo1_Pa1_pUb1
    R51_ktranscr = 0.3;
  basal_transcription_of_inr: $null => nucleus_RNA_Inr; basal_transcription_of_inr_k_basal_transcr;
    basal_transcription_of_inr_k_basal_transcr = 3;
  export_of_inr_RNA: nucleus_RNA_Inr => cytoplasm_RNA_Inr; nucleus_RNA_Inr*export_of_inr_RNA_kexp;
    export_of_inr_RNA_kexp = 0.22;
  cyto_degr_of_inr_RNA: cytoplasm_RNA_Inr => $null; cytoplasm_RNA_Inr*cyto_degr_of_inr_RNA_kmdeg;
    cyto_degr_of_inr_RNA_kmdeg = 5.622;
  translation_of_inr: $null => cytoplasm_Inr; cytoplasm_RNA_Inr*translation_of_inr_ktransl;  // modifiers: cytoplasm_RNA_Inr
    translation_of_inr_ktransl = 1.23;
  degradation_of_Inr_protein: cytoplasm_Inr => $null; cytoplasm_Inr*degradation_of_Inr_protein_kpdeg;
    degradation_of_Inr_protein_kpdeg = 0.0019;
  basal_transcription_of_sod2: $null => nucleus_RNA_Sod2; basal_transcription_of_sod2_k_basal_transcr;
    basal_transcription_of_sod2_k_basal_transcr = 3;
  export_of_sod2_RNA: nucleus_RNA_Sod2 => cytoplasm_RNA_Sod2; nucleus_RNA_Sod2*export_of_sod2_RNA_kexp;
    export_of_sod2_RNA_kexp = 0.22;
  cyto_degr_of_sod2_RNA: cytoplasm_RNA_Sod2 => $null; cytoplasm_RNA_Sod2*cyto_degr_of_sod2_RNA_kmdeg;
    cyto_degr_of_sod2_RNA_kmdeg = 5.622;
  translation_of_sod2: $null => cytoplasm_Sod2; cytoplasm_RNA_Sod2*translation_of_sod2_ktransl;  // modifiers: cytoplasm_RNA_Sod2
    translation_of_sod2_ktransl = 1.23;
  degradation_of_Sod2_protein: cytoplasm_Sod2 => $null; cytoplasm_Sod2*degradation_of_Sod2_protein_kpdeg;
    degradation_of_Sod2_protein_kpdeg = 0.0019;

  // Unit definitions:
  unit volume = 1e-3 litre;
  unit substance = item;
  unit time = 60 second;
end
