// SBML level 2 version 4

model Smith2010_Foxo_PTMs_AgeingRelatedSignallingPathway_B()
  // This a model from the article:
  // Modelling the response of FOXO transcription factors to multiple post-translational modifications made by ageing-related signalling pathways.
  // Smith GR, Shanley DP. PLoS One. 2010 Jun 14;5(6):e11092. 20567500 ,
  // Abstract:
  // FOXO transcription factors are an important, conserved family of regulators of cellular processes including metabolism, cell-cycle progression, apoptosis and stress resistance. They are required for the efficacy of several of the genetic interventions that modulate lifespan. FOXO activity is regulated by multiple post-translational modifications (PTMs) that affect its subcellular localization, half-life, DNA binding and transcriptional activity. Here, we show how a mathematical modelling approach can be used to simulate the effects, singly and in combination, of these PTMs. Our model is implemented using the Systems Biology Markup Language (SBML), generated by an ancillary program and simulated in a stochastic framework. The use of the ancillary program to generate the SBML is necessary because the possibility that many regulatory PTMs may be added, each independently of the others, means that a large number of chemically distinct forms of the FOXO molecule must be taken into account, and the program is used to generate them. Although the model does not yet include detailed representations of events upstream and downstream of FOXO, we show how it can qualitatively, and in some cases quantitatively, reproduce the known effects of certain treatments that induce various single and multiple PTMs, and allows for a complex spatiotemporal interplay of effects due to the activation of multiple PTM-inducing treatments. Thus, it provides an important framework to integrate current knowledge about the behaviour of FOXO. The approach should be generally applicable to other proteins experiencing multiple regulations.
  // This model originates from BioModels Database: A Database of Annotated Published Models (http://www.ebi.ac.uk/biomodels/). It is copyright (c) 2005-2011 The BioModels.net Team.
  // To the extent possible under law, all copyright and related or neighbouring rights to this encoded model have been dedicated to the public domain worldwide. Please refer to CC0 Public Domain Dedication for more information.
  // In summary, you are entitled to use this encoded model in absolutely any manner you deem suitable, verbatim, or with modification, alone or embedded it in a larger context, redistribute it, commercially or not, in a restricted way or not..
  // To cite BioModels Database, please use: Li C, Donizelli M, Rodriguez N, Dharuri H, Endler L, Chelliah V, Li L, He E, Henry A, Stefan MI, Snoep JL, Hucka M, Le Novère N, Laibe C (2010) BioModels Database: An enhanced, curated and annotated resource for published quantitative kinetic models. BMC Syst Biol., 4:92.
  // biomodels.db:MODEL1112260001
  // isDescribedBy pubmed:20567500
  // biomodels.db:MODEL1112260001
  // biomodels.db:MODEL1112260001
  // isDescribedBy pubmed:20567500

  // Compartments:
  compartment extracellular = 8.3e-12;
  compartment cellsurface in extracellular = 6.4e-14;
  compartment cytoplasm in cellsurface = 1.65e-11;
  compartment nucleus in cytoplasm = 5e-13;
  compartment dnabound in nucleus = 1e-13;

  // Species:
  substanceOnly species $null in cytoplasm = 0;
  substanceOnly species degr_Foxo1 in cytoplasm = 0;
  substanceOnly species cytoplasm_Foxo1_Pa0_Ac0_pUb0 in cytoplasm = 1000;
  substanceOnly species nucleus_Foxo1_Pa0_Ac0_pUb0 in nucleus = 0;
  substanceOnly species dnabound_Foxo1_Pa0_Ac0_pUb0 in dnabound = 0;
  substanceOnly species cytoplasm_Foxo1_Pa0_Ac0_pUb1 in cytoplasm = 0;
  substanceOnly species nucleus_Foxo1_Pa0_Ac0_pUb1 in nucleus = 0;
  substanceOnly species dnabound_Foxo1_Pa0_Ac0_pUb1 in dnabound = 0;
  substanceOnly species cytoplasm_Foxo1_Pa0_Ac1_pUb0 in cytoplasm = 0;
  substanceOnly species nucleus_Foxo1_Pa0_Ac1_pUb0 in nucleus = 0;
  substanceOnly species dnabound_Foxo1_Pa0_Ac1_pUb0 in dnabound = 0;
  substanceOnly species cytoplasm_Foxo1_Pa0_Ac1_pUb1 in cytoplasm = 0;
  substanceOnly species nucleus_Foxo1_Pa0_Ac1_pUb1 in nucleus = 0;
  substanceOnly species dnabound_Foxo1_Pa0_Ac1_pUb1 in dnabound = 0;
  substanceOnly species cytoplasm_Foxo1_Pa1_Ac0_pUb0 in cytoplasm = 0;
  substanceOnly species nucleus_Foxo1_Pa1_Ac0_pUb0 in nucleus = 0;
  substanceOnly species dnabound_Foxo1_Pa1_Ac0_pUb0 in dnabound = 0;
  substanceOnly species cytoplasm_Foxo1_Pa1_Ac0_pUb1 in cytoplasm = 0;
  substanceOnly species nucleus_Foxo1_Pa1_Ac0_pUb1 in nucleus = 0;
  substanceOnly species dnabound_Foxo1_Pa1_Ac0_pUb1 in dnabound = 0;
  substanceOnly species cytoplasm_Foxo1_Pa1_Ac1_pUb0 in cytoplasm = 0;
  substanceOnly species nucleus_Foxo1_Pa1_Ac1_pUb0 in nucleus = 0;
  substanceOnly species dnabound_Foxo1_Pa1_Ac1_pUb0 in dnabound = 0;
  substanceOnly species cytoplasm_Foxo1_Pa1_Ac1_pUb1 in cytoplasm = 0;
  substanceOnly species nucleus_Foxo1_Pa1_Ac1_pUb1 in nucleus = 0;
  substanceOnly species dnabound_Foxo1_Pa1_Ac1_pUb1 in dnabound = 0;
  substanceOnly species Foxo1_Pa0_tot in extracellular;
  substanceOnly species Foxo1_Pa1_tot in extracellular;
  substanceOnly species Foxo1_Ac0_tot in extracellular;
  substanceOnly species Foxo1_Ac1_tot in extracellular;
  substanceOnly species Foxo1_pUb0_tot in extracellular;
  substanceOnly species Foxo1_pUb1_tot in extracellular;
  substanceOnly species cytoplasm_Foxo1_tot in extracellular;
  substanceOnly species nucleus_Foxo1_tot in extracellular;
  substanceOnly species dnabound_Foxo1_tot in extracellular;
  substanceOnly species Foxo1_all in extracellular;
  substanceOnly species nucleus_RNA_Inr in nucleus = 0;
  substanceOnly species cytoplasm_RNA_Inr in cytoplasm = 0;
  substanceOnly species cytoplasm_Inr in cytoplasm = 0;
  substanceOnly species nucleus_RNA_Sod2 in nucleus = 0;
  substanceOnly species cytoplasm_RNA_Sod2 in cytoplasm = 0;
  substanceOnly species cytoplasm_Sod2 in cytoplasm = 0;
  substanceOnly species E2F1 in cytoplasm = 0;
  substanceOnly species Akt in cytoplasm = 100;
  substanceOnly species SGK in cytoplasm = 0;
  substanceOnly species CDK2 in cytoplasm = 0;
  substanceOnly species AMPK in cytoplasm = 0;
  substanceOnly species IKKb in cytoplasm = 0;
  substanceOnly species JNK in cytoplasm = 0;
  substanceOnly species PP2A in cytoplasm = 10000;
  substanceOnly species CBPP300 in cytoplasm = 1000;
  substanceOnly species SIRT1 in cytoplasm = 10;
  substanceOnly species E3 in cytoplasm = 0;
  substanceOnly species USP7 in cytoplasm = 1000;
  substanceOnly species SCF in cytoplasm = 1000;
  substanceOnly species Proteasome in cytoplasm = 1000;

  // Assignment rules:
  Foxo1_Pa0_tot := cytoplasm_Foxo1_Pa0_Ac0_pUb0 + nucleus_Foxo1_Pa0_Ac0_pUb0 + dnabound_Foxo1_Pa0_Ac0_pUb0 + cytoplasm_Foxo1_Pa0_Ac0_pUb1 + nucleus_Foxo1_Pa0_Ac0_pUb1 + dnabound_Foxo1_Pa0_Ac0_pUb1 + cytoplasm_Foxo1_Pa0_Ac1_pUb0 + nucleus_Foxo1_Pa0_Ac1_pUb0 + dnabound_Foxo1_Pa0_Ac1_pUb0 + cytoplasm_Foxo1_Pa0_Ac1_pUb1 + nucleus_Foxo1_Pa0_Ac1_pUb1 + dnabound_Foxo1_Pa0_Ac1_pUb1;
  Foxo1_Pa1_tot := cytoplasm_Foxo1_Pa1_Ac0_pUb0 + nucleus_Foxo1_Pa1_Ac0_pUb0 + dnabound_Foxo1_Pa1_Ac0_pUb0 + cytoplasm_Foxo1_Pa1_Ac0_pUb1 + nucleus_Foxo1_Pa1_Ac0_pUb1 + dnabound_Foxo1_Pa1_Ac0_pUb1 + cytoplasm_Foxo1_Pa1_Ac1_pUb0 + nucleus_Foxo1_Pa1_Ac1_pUb0 + dnabound_Foxo1_Pa1_Ac1_pUb0 + cytoplasm_Foxo1_Pa1_Ac1_pUb1 + nucleus_Foxo1_Pa1_Ac1_pUb1 + dnabound_Foxo1_Pa1_Ac1_pUb1;
  Foxo1_Ac0_tot := cytoplasm_Foxo1_Pa0_Ac0_pUb0 + nucleus_Foxo1_Pa0_Ac0_pUb0 + dnabound_Foxo1_Pa0_Ac0_pUb0 + cytoplasm_Foxo1_Pa0_Ac0_pUb1 + nucleus_Foxo1_Pa0_Ac0_pUb1 + dnabound_Foxo1_Pa0_Ac0_pUb1 + cytoplasm_Foxo1_Pa1_Ac0_pUb0 + nucleus_Foxo1_Pa1_Ac0_pUb0 + dnabound_Foxo1_Pa1_Ac0_pUb0 + cytoplasm_Foxo1_Pa1_Ac0_pUb1 + nucleus_Foxo1_Pa1_Ac0_pUb1 + dnabound_Foxo1_Pa1_Ac0_pUb1;
  Foxo1_Ac1_tot := cytoplasm_Foxo1_Pa0_Ac1_pUb0 + nucleus_Foxo1_Pa0_Ac1_pUb0 + dnabound_Foxo1_Pa0_Ac1_pUb0 + cytoplasm_Foxo1_Pa0_Ac1_pUb1 + nucleus_Foxo1_Pa0_Ac1_pUb1 + dnabound_Foxo1_Pa0_Ac1_pUb1 + cytoplasm_Foxo1_Pa1_Ac1_pUb0 + nucleus_Foxo1_Pa1_Ac1_pUb0 + dnabound_Foxo1_Pa1_Ac1_pUb0 + cytoplasm_Foxo1_Pa1_Ac1_pUb1 + nucleus_Foxo1_Pa1_Ac1_pUb1 + dnabound_Foxo1_Pa1_Ac1_pUb1;
  Foxo1_pUb0_tot := cytoplasm_Foxo1_Pa0_Ac0_pUb0 + nucleus_Foxo1_Pa0_Ac0_pUb0 + dnabound_Foxo1_Pa0_Ac0_pUb0 + cytoplasm_Foxo1_Pa0_Ac1_pUb0 + nucleus_Foxo1_Pa0_Ac1_pUb0 + dnabound_Foxo1_Pa0_Ac1_pUb0 + cytoplasm_Foxo1_Pa1_Ac0_pUb0 + nucleus_Foxo1_Pa1_Ac0_pUb0 + dnabound_Foxo1_Pa1_Ac0_pUb0 + cytoplasm_Foxo1_Pa1_Ac1_pUb0 + nucleus_Foxo1_Pa1_Ac1_pUb0 + dnabound_Foxo1_Pa1_Ac1_pUb0;
  Foxo1_pUb1_tot := cytoplasm_Foxo1_Pa0_Ac0_pUb1 + nucleus_Foxo1_Pa0_Ac0_pUb1 + dnabound_Foxo1_Pa0_Ac0_pUb1 + cytoplasm_Foxo1_Pa0_Ac1_pUb1 + nucleus_Foxo1_Pa0_Ac1_pUb1 + dnabound_Foxo1_Pa0_Ac1_pUb1 + cytoplasm_Foxo1_Pa1_Ac0_pUb1 + nucleus_Foxo1_Pa1_Ac0_pUb1 + dnabound_Foxo1_Pa1_Ac0_pUb1 + cytoplasm_Foxo1_Pa1_Ac1_pUb1 + nucleus_Foxo1_Pa1_Ac1_pUb1 + dnabound_Foxo1_Pa1_Ac1_pUb1;
  cytoplasm_Foxo1_tot := cytoplasm_Foxo1_Pa0_Ac0_pUb0 + cytoplasm_Foxo1_Pa0_Ac0_pUb1 + cytoplasm_Foxo1_Pa0_Ac1_pUb0 + cytoplasm_Foxo1_Pa0_Ac1_pUb1 + cytoplasm_Foxo1_Pa1_Ac0_pUb0 + cytoplasm_Foxo1_Pa1_Ac0_pUb1 + cytoplasm_Foxo1_Pa1_Ac1_pUb0 + cytoplasm_Foxo1_Pa1_Ac1_pUb1;
  nucleus_Foxo1_tot := nucleus_Foxo1_Pa0_Ac0_pUb0 + nucleus_Foxo1_Pa0_Ac0_pUb1 + nucleus_Foxo1_Pa0_Ac1_pUb0 + nucleus_Foxo1_Pa0_Ac1_pUb1 + nucleus_Foxo1_Pa1_Ac0_pUb0 + nucleus_Foxo1_Pa1_Ac0_pUb1 + nucleus_Foxo1_Pa1_Ac1_pUb0 + nucleus_Foxo1_Pa1_Ac1_pUb1;
  dnabound_Foxo1_tot := dnabound_Foxo1_Pa0_Ac0_pUb0 + dnabound_Foxo1_Pa0_Ac0_pUb1 + dnabound_Foxo1_Pa0_Ac1_pUb0 + dnabound_Foxo1_Pa0_Ac1_pUb1 + dnabound_Foxo1_Pa1_Ac0_pUb0 + dnabound_Foxo1_Pa1_Ac0_pUb1 + dnabound_Foxo1_Pa1_Ac1_pUb0 + dnabound_Foxo1_Pa1_Ac1_pUb1;
  Foxo1_all := cytoplasm_Foxo1_tot + nucleus_Foxo1_tot + dnabound_Foxo1_tot;

  // Reactions:
  Synthesis: $null => cytoplasm_Foxo1_Pa0_Ac0_pUb0; E2F1*ksynth;  // modifiers: E2F1
    ksynth = 0.0055;
  R2: cytoplasm_Foxo1_Pa0_Ac0_pUb0 => nucleus_Foxo1_Pa0_Ac0_pUb0; cytoplasm_Foxo1_Pa0_Ac0_pUb0*R2_ktr; R2 is "transport cytoplasm_Foxo1_Pa0_Ac0_pUb0 to nucleus_Foxo1_Pa0_Ac0_pUb0";
    R2_ktr = 0.1818182;
  R3: nucleus_Foxo1_Pa0_Ac0_pUb0 => cytoplasm_Foxo1_Pa0_Ac0_pUb0; nucleus_Foxo1_Pa0_Ac0_pUb0*R3_ktr; R3 is "transport nucleus_Foxo1_Pa0_Ac0_pUb0 to cytoplasm_Foxo1_Pa0_Ac0_pUb0";
    R3_ktr = 0.055;
  R4: nucleus_Foxo1_Pa0_Ac0_pUb0 => dnabound_Foxo1_Pa0_Ac0_pUb0; nucleus_Foxo1_Pa0_Ac0_pUb0*R4_ktr; R4 is "transport nucleus_Foxo1_Pa0_Ac0_pUb0 to dnabound_Foxo1_Pa0_Ac0_pUb0";
    R4_ktr = 0.25;
  R5: dnabound_Foxo1_Pa0_Ac0_pUb0 => nucleus_Foxo1_Pa0_Ac0_pUb0; dnabound_Foxo1_Pa0_Ac0_pUb0*R5_ktr; R5 is "transport dnabound_Foxo1_Pa0_Ac0_pUb0 to nucleus_Foxo1_Pa0_Ac0_pUb0";
    R5_ktr = 0.125;
  R6: cytoplasm_Foxo1_Pa0_Ac0_pUb1 => nucleus_Foxo1_Pa0_Ac0_pUb1; cytoplasm_Foxo1_Pa0_Ac0_pUb1*R6_ktr; R6 is "transport cytoplasm_Foxo1_Pa0_Ac0_pUb1 to nucleus_Foxo1_Pa0_Ac0_pUb1";
    R6_ktr = 0.1818182;
  R7: nucleus_Foxo1_Pa0_Ac0_pUb1 => cytoplasm_Foxo1_Pa0_Ac0_pUb1; nucleus_Foxo1_Pa0_Ac0_pUb1*R7_ktr; R7 is "transport nucleus_Foxo1_Pa0_Ac0_pUb1 to cytoplasm_Foxo1_Pa0_Ac0_pUb1";
    R7_ktr = 0.055;
  R8: nucleus_Foxo1_Pa0_Ac0_pUb1 => dnabound_Foxo1_Pa0_Ac0_pUb1; nucleus_Foxo1_Pa0_Ac0_pUb1*R8_ktr; R8 is "transport nucleus_Foxo1_Pa0_Ac0_pUb1 to dnabound_Foxo1_Pa0_Ac0_pUb1";
    R8_ktr = 0.25;
  R9: dnabound_Foxo1_Pa0_Ac0_pUb1 => nucleus_Foxo1_Pa0_Ac0_pUb1; dnabound_Foxo1_Pa0_Ac0_pUb1*R9_ktr; R9 is "transport dnabound_Foxo1_Pa0_Ac0_pUb1 to nucleus_Foxo1_Pa0_Ac0_pUb1";
    R9_ktr = 0.125;
  R10: cytoplasm_Foxo1_Pa0_Ac1_pUb0 => nucleus_Foxo1_Pa0_Ac1_pUb0; cytoplasm_Foxo1_Pa0_Ac1_pUb0*R10_ktr; R10 is "transport cytoplasm_Foxo1_Pa0_Ac1_pUb0 to nucleus_Foxo1_Pa0_Ac1_pUb0";
    R10_ktr = 0.1818182;
  R11: nucleus_Foxo1_Pa0_Ac1_pUb0 => cytoplasm_Foxo1_Pa0_Ac1_pUb0; nucleus_Foxo1_Pa0_Ac1_pUb0*R11_ktr; R11 is "transport nucleus_Foxo1_Pa0_Ac1_pUb0 to cytoplasm_Foxo1_Pa0_Ac1_pUb0";
    R11_ktr = 0.055;
  R12: nucleus_Foxo1_Pa0_Ac1_pUb0 => dnabound_Foxo1_Pa0_Ac1_pUb0; nucleus_Foxo1_Pa0_Ac1_pUb0*R12_ktr; R12 is "transport nucleus_Foxo1_Pa0_Ac1_pUb0 to dnabound_Foxo1_Pa0_Ac1_pUb0";
    R12_ktr = 0.125;
  R13: dnabound_Foxo1_Pa0_Ac1_pUb0 => nucleus_Foxo1_Pa0_Ac1_pUb0; dnabound_Foxo1_Pa0_Ac1_pUb0*R13_ktr; R13 is "transport dnabound_Foxo1_Pa0_Ac1_pUb0 to nucleus_Foxo1_Pa0_Ac1_pUb0";
    R13_ktr = 0.125;
  R14: cytoplasm_Foxo1_Pa0_Ac1_pUb1 => nucleus_Foxo1_Pa0_Ac1_pUb1; cytoplasm_Foxo1_Pa0_Ac1_pUb1*R14_ktr; R14 is "transport cytoplasm_Foxo1_Pa0_Ac1_pUb1 to nucleus_Foxo1_Pa0_Ac1_pUb1";
    R14_ktr = 0.1818182;
  R15: nucleus_Foxo1_Pa0_Ac1_pUb1 => cytoplasm_Foxo1_Pa0_Ac1_pUb1; nucleus_Foxo1_Pa0_Ac1_pUb1*R15_ktr; R15 is "transport nucleus_Foxo1_Pa0_Ac1_pUb1 to cytoplasm_Foxo1_Pa0_Ac1_pUb1";
    R15_ktr = 0.055;
  R16: nucleus_Foxo1_Pa0_Ac1_pUb1 => dnabound_Foxo1_Pa0_Ac1_pUb1; nucleus_Foxo1_Pa0_Ac1_pUb1*R16_ktr; R16 is "transport nucleus_Foxo1_Pa0_Ac1_pUb1 to dnabound_Foxo1_Pa0_Ac1_pUb1";
    R16_ktr = 0.125;
  R17: dnabound_Foxo1_Pa0_Ac1_pUb1 => nucleus_Foxo1_Pa0_Ac1_pUb1; dnabound_Foxo1_Pa0_Ac1_pUb1*R17_ktr; R17 is "transport dnabound_Foxo1_Pa0_Ac1_pUb1 to nucleus_Foxo1_Pa0_Ac1_pUb1";
    R17_ktr = 0.125;
  R18: cytoplasm_Foxo1_Pa1_Ac0_pUb0 => nucleus_Foxo1_Pa1_Ac0_pUb0; cytoplasm_Foxo1_Pa1_Ac0_pUb0*R18_ktr; R18 is "transport cytoplasm_Foxo1_Pa1_Ac0_pUb0 to nucleus_Foxo1_Pa1_Ac0_pUb0";
    R18_ktr = 0.01818182;
  R19: nucleus_Foxo1_Pa1_Ac0_pUb0 => cytoplasm_Foxo1_Pa1_Ac0_pUb0; nucleus_Foxo1_Pa1_Ac0_pUb0*R19_ktr; R19 is "transport nucleus_Foxo1_Pa1_Ac0_pUb0 to cytoplasm_Foxo1_Pa1_Ac0_pUb0";
    R19_ktr = 0.55;
  R20: nucleus_Foxo1_Pa1_Ac0_pUb0 => dnabound_Foxo1_Pa1_Ac0_pUb0; nucleus_Foxo1_Pa1_Ac0_pUb0*R20_ktr; R20 is "transport nucleus_Foxo1_Pa1_Ac0_pUb0 to dnabound_Foxo1_Pa1_Ac0_pUb0";
    R20_ktr = 0.125;
  R21: dnabound_Foxo1_Pa1_Ac0_pUb0 => nucleus_Foxo1_Pa1_Ac0_pUb0; dnabound_Foxo1_Pa1_Ac0_pUb0*R21_ktr; R21 is "transport dnabound_Foxo1_Pa1_Ac0_pUb0 to nucleus_Foxo1_Pa1_Ac0_pUb0";
    R21_ktr = 0.125;
  R22: cytoplasm_Foxo1_Pa1_Ac0_pUb1 => nucleus_Foxo1_Pa1_Ac0_pUb1; cytoplasm_Foxo1_Pa1_Ac0_pUb1*R22_ktr; R22 is "transport cytoplasm_Foxo1_Pa1_Ac0_pUb1 to nucleus_Foxo1_Pa1_Ac0_pUb1";
    R22_ktr = 0.01818182;
  R23: nucleus_Foxo1_Pa1_Ac0_pUb1 => cytoplasm_Foxo1_Pa1_Ac0_pUb1; nucleus_Foxo1_Pa1_Ac0_pUb1*R23_ktr; R23 is "transport nucleus_Foxo1_Pa1_Ac0_pUb1 to cytoplasm_Foxo1_Pa1_Ac0_pUb1";
    R23_ktr = 0.55;
  R24: nucleus_Foxo1_Pa1_Ac0_pUb1 => dnabound_Foxo1_Pa1_Ac0_pUb1; nucleus_Foxo1_Pa1_Ac0_pUb1*R24_ktr; R24 is "transport nucleus_Foxo1_Pa1_Ac0_pUb1 to dnabound_Foxo1_Pa1_Ac0_pUb1";
    R24_ktr = 0.125;
  R25: dnabound_Foxo1_Pa1_Ac0_pUb1 => nucleus_Foxo1_Pa1_Ac0_pUb1; dnabound_Foxo1_Pa1_Ac0_pUb1*R25_ktr; R25 is "transport dnabound_Foxo1_Pa1_Ac0_pUb1 to nucleus_Foxo1_Pa1_Ac0_pUb1";
    R25_ktr = 0.125;
  R26: cytoplasm_Foxo1_Pa1_Ac1_pUb0 => nucleus_Foxo1_Pa1_Ac1_pUb0; cytoplasm_Foxo1_Pa1_Ac1_pUb0*R26_ktr; R26 is "transport cytoplasm_Foxo1_Pa1_Ac1_pUb0 to nucleus_Foxo1_Pa1_Ac1_pUb0";
    R26_ktr = 0.01818182;
  R27: nucleus_Foxo1_Pa1_Ac1_pUb0 => cytoplasm_Foxo1_Pa1_Ac1_pUb0; nucleus_Foxo1_Pa1_Ac1_pUb0*R27_ktr; R27 is "transport nucleus_Foxo1_Pa1_Ac1_pUb0 to cytoplasm_Foxo1_Pa1_Ac1_pUb0";
    R27_ktr = 0.55;
  R28: nucleus_Foxo1_Pa1_Ac1_pUb0 => dnabound_Foxo1_Pa1_Ac1_pUb0; nucleus_Foxo1_Pa1_Ac1_pUb0*R28_ktr; R28 is "transport nucleus_Foxo1_Pa1_Ac1_pUb0 to dnabound_Foxo1_Pa1_Ac1_pUb0";
    R28_ktr = 0.0625;
  R29: dnabound_Foxo1_Pa1_Ac1_pUb0 => nucleus_Foxo1_Pa1_Ac1_pUb0; dnabound_Foxo1_Pa1_Ac1_pUb0*R29_ktr; R29 is "transport dnabound_Foxo1_Pa1_Ac1_pUb0 to nucleus_Foxo1_Pa1_Ac1_pUb0";
    R29_ktr = 0.125;
  R30: cytoplasm_Foxo1_Pa1_Ac1_pUb1 => nucleus_Foxo1_Pa1_Ac1_pUb1; cytoplasm_Foxo1_Pa1_Ac1_pUb1*R30_ktr; R30 is "transport cytoplasm_Foxo1_Pa1_Ac1_pUb1 to nucleus_Foxo1_Pa1_Ac1_pUb1";
    R30_ktr = 0.01818182;
  R31: nucleus_Foxo1_Pa1_Ac1_pUb1 => cytoplasm_Foxo1_Pa1_Ac1_pUb1; nucleus_Foxo1_Pa1_Ac1_pUb1*R31_ktr; R31 is "transport nucleus_Foxo1_Pa1_Ac1_pUb1 to cytoplasm_Foxo1_Pa1_Ac1_pUb1";
    R31_ktr = 0.55;
  R32: nucleus_Foxo1_Pa1_Ac1_pUb1 => dnabound_Foxo1_Pa1_Ac1_pUb1; nucleus_Foxo1_Pa1_Ac1_pUb1*R32_ktr; R32 is "transport nucleus_Foxo1_Pa1_Ac1_pUb1 to dnabound_Foxo1_Pa1_Ac1_pUb1";
    R32_ktr = 0.0625;
  R33: dnabound_Foxo1_Pa1_Ac1_pUb1 => nucleus_Foxo1_Pa1_Ac1_pUb1; dnabound_Foxo1_Pa1_Ac1_pUb1*R33_ktr; R33 is "transport dnabound_Foxo1_Pa1_Ac1_pUb1 to nucleus_Foxo1_Pa1_Ac1_pUb1";
    R33_ktr = 0.125;
  R34: cytoplasm_Foxo1_Pa0_Ac0_pUb0 => cytoplasm_Foxo1_Pa1_Ac0_pUb0; cytoplasm_Foxo1_Pa0_Ac0_pUb0*Akt*R34_kkin; R34 is "conversion of cytoplasm_Foxo1_Pa0_Ac0_pUb0 to cytoplasm_Foxo1_Pa1_Ac0_pUb0 by Akt";  // modifiers: Akt
    R34_kkin = 5e-5;
  R35: nucleus_Foxo1_Pa0_Ac0_pUb0 => nucleus_Foxo1_Pa1_Ac0_pUb0; nucleus_Foxo1_Pa0_Ac0_pUb0*Akt*R35_kkin; R35 is "conversion of nucleus_Foxo1_Pa0_Ac0_pUb0 to nucleus_Foxo1_Pa1_Ac0_pUb0 by Akt";  // modifiers: Akt
    R35_kkin = 5e-5;
  R36: dnabound_Foxo1_Pa0_Ac0_pUb0 => dnabound_Foxo1_Pa1_Ac0_pUb0; dnabound_Foxo1_Pa0_Ac0_pUb0*Akt*R36_kkin; R36 is "conversion of dnabound_Foxo1_Pa0_Ac0_pUb0 to dnabound_Foxo1_Pa1_Ac0_pUb0 by Akt";  // modifiers: Akt
    R36_kkin = 5e-5;
  R37: cytoplasm_Foxo1_Pa0_Ac0_pUb1 => cytoplasm_Foxo1_Pa1_Ac0_pUb1; cytoplasm_Foxo1_Pa0_Ac0_pUb1*Akt*R37_kkin; R37 is "conversion of cytoplasm_Foxo1_Pa0_Ac0_pUb1 to cytoplasm_Foxo1_Pa1_Ac0_pUb1 by Akt";  // modifiers: Akt
    R37_kkin = 5e-5;
  R38: nucleus_Foxo1_Pa0_Ac0_pUb1 => nucleus_Foxo1_Pa1_Ac0_pUb1; nucleus_Foxo1_Pa0_Ac0_pUb1*Akt*R38_kkin; R38 is "conversion of nucleus_Foxo1_Pa0_Ac0_pUb1 to nucleus_Foxo1_Pa1_Ac0_pUb1 by Akt";  // modifiers: Akt
    R38_kkin = 5e-5;
  R39: dnabound_Foxo1_Pa0_Ac0_pUb1 => dnabound_Foxo1_Pa1_Ac0_pUb1; dnabound_Foxo1_Pa0_Ac0_pUb1*Akt*R39_kkin; R39 is "conversion of dnabound_Foxo1_Pa0_Ac0_pUb1 to dnabound_Foxo1_Pa1_Ac0_pUb1 by Akt";  // modifiers: Akt
    R39_kkin = 5e-5;
  R40: cytoplasm_Foxo1_Pa0_Ac1_pUb0 => cytoplasm_Foxo1_Pa1_Ac1_pUb0; cytoplasm_Foxo1_Pa0_Ac1_pUb0*Akt*R40_kkin; R40 is "conversion of cytoplasm_Foxo1_Pa0_Ac1_pUb0 to cytoplasm_Foxo1_Pa1_Ac1_pUb0 by Akt";  // modifiers: Akt
    R40_kkin = 5e-5;
  R41: nucleus_Foxo1_Pa0_Ac1_pUb0 => nucleus_Foxo1_Pa1_Ac1_pUb0; nucleus_Foxo1_Pa0_Ac1_pUb0*Akt*R41_kkin; R41 is "conversion of nucleus_Foxo1_Pa0_Ac1_pUb0 to nucleus_Foxo1_Pa1_Ac1_pUb0 by Akt";  // modifiers: Akt
    R41_kkin = 5e-5;
  R42: dnabound_Foxo1_Pa0_Ac1_pUb0 => dnabound_Foxo1_Pa1_Ac1_pUb0; dnabound_Foxo1_Pa0_Ac1_pUb0*Akt*R42_kkin; R42 is "conversion of dnabound_Foxo1_Pa0_Ac1_pUb0 to dnabound_Foxo1_Pa1_Ac1_pUb0 by Akt";  // modifiers: Akt
    R42_kkin = 5e-5;
  R43: cytoplasm_Foxo1_Pa0_Ac1_pUb1 => cytoplasm_Foxo1_Pa1_Ac1_pUb1; cytoplasm_Foxo1_Pa0_Ac1_pUb1*Akt*R43_kkin; R43 is "conversion of cytoplasm_Foxo1_Pa0_Ac1_pUb1 to cytoplasm_Foxo1_Pa1_Ac1_pUb1 by Akt";  // modifiers: Akt
    R43_kkin = 5e-5;
  R44: nucleus_Foxo1_Pa0_Ac1_pUb1 => nucleus_Foxo1_Pa1_Ac1_pUb1; nucleus_Foxo1_Pa0_Ac1_pUb1*Akt*R44_kkin; R44 is "conversion of nucleus_Foxo1_Pa0_Ac1_pUb1 to nucleus_Foxo1_Pa1_Ac1_pUb1 by Akt";  // modifiers: Akt
    R44_kkin = 5e-5;
  R45: dnabound_Foxo1_Pa0_Ac1_pUb1 => dnabound_Foxo1_Pa1_Ac1_pUb1; dnabound_Foxo1_Pa0_Ac1_pUb1*Akt*R45_kkin; R45 is "conversion of dnabound_Foxo1_Pa0_Ac1_pUb1 to dnabound_Foxo1_Pa1_Ac1_pUb1 by Akt";  // modifiers: Akt
    R45_kkin = 5e-5;
  R46: cytoplasm_Foxo1_Pa0_Ac0_pUb0 => cytoplasm_Foxo1_Pa1_Ac0_pUb0; cytoplasm_Foxo1_Pa0_Ac0_pUb0*SGK*R46_kkin; R46 is "conversion of cytoplasm_Foxo1_Pa0_Ac0_pUb0 to cytoplasm_Foxo1_Pa1_Ac0_pUb0 by SGK";  // modifiers: SGK
    R46_kkin = 5e-5;
  R47: nucleus_Foxo1_Pa0_Ac0_pUb0 => nucleus_Foxo1_Pa1_Ac0_pUb0; nucleus_Foxo1_Pa0_Ac0_pUb0*SGK*R47_kkin; R47 is "conversion of nucleus_Foxo1_Pa0_Ac0_pUb0 to nucleus_Foxo1_Pa1_Ac0_pUb0 by SGK";  // modifiers: SGK
    R47_kkin = 5e-5;
  R48: dnabound_Foxo1_Pa0_Ac0_pUb0 => dnabound_Foxo1_Pa1_Ac0_pUb0; dnabound_Foxo1_Pa0_Ac0_pUb0*SGK*R48_kkin; R48 is "conversion of dnabound_Foxo1_Pa0_Ac0_pUb0 to dnabound_Foxo1_Pa1_Ac0_pUb0 by SGK";  // modifiers: SGK
    R48_kkin = 5e-5;
  R49: cytoplasm_Foxo1_Pa0_Ac0_pUb1 => cytoplasm_Foxo1_Pa1_Ac0_pUb1; cytoplasm_Foxo1_Pa0_Ac0_pUb1*SGK*R49_kkin; R49 is "conversion of cytoplasm_Foxo1_Pa0_Ac0_pUb1 to cytoplasm_Foxo1_Pa1_Ac0_pUb1 by SGK";  // modifiers: SGK
    R49_kkin = 5e-5;
  R50: nucleus_Foxo1_Pa0_Ac0_pUb1 => nucleus_Foxo1_Pa1_Ac0_pUb1; nucleus_Foxo1_Pa0_Ac0_pUb1*SGK*R50_kkin; R50 is "conversion of nucleus_Foxo1_Pa0_Ac0_pUb1 to nucleus_Foxo1_Pa1_Ac0_pUb1 by SGK";  // modifiers: SGK
    R50_kkin = 5e-5;
  R51: dnabound_Foxo1_Pa0_Ac0_pUb1 => dnabound_Foxo1_Pa1_Ac0_pUb1; dnabound_Foxo1_Pa0_Ac0_pUb1*SGK*R51_kkin; R51 is "conversion of dnabound_Foxo1_Pa0_Ac0_pUb1 to dnabound_Foxo1_Pa1_Ac0_pUb1 by SGK";  // modifiers: SGK
    R51_kkin = 5e-5;
  R52: cytoplasm_Foxo1_Pa0_Ac1_pUb0 => cytoplasm_Foxo1_Pa1_Ac1_pUb0; cytoplasm_Foxo1_Pa0_Ac1_pUb0*SGK*R52_kkin; R52 is "conversion of cytoplasm_Foxo1_Pa0_Ac1_pUb0 to cytoplasm_Foxo1_Pa1_Ac1_pUb0 by SGK";  // modifiers: SGK
    R52_kkin = 5e-5;
  R53: nucleus_Foxo1_Pa0_Ac1_pUb0 => nucleus_Foxo1_Pa1_Ac1_pUb0; nucleus_Foxo1_Pa0_Ac1_pUb0*SGK*R53_kkin; R53 is "conversion of nucleus_Foxo1_Pa0_Ac1_pUb0 to nucleus_Foxo1_Pa1_Ac1_pUb0 by SGK";  // modifiers: SGK
    R53_kkin = 5e-5;
  R54: dnabound_Foxo1_Pa0_Ac1_pUb0 => dnabound_Foxo1_Pa1_Ac1_pUb0; dnabound_Foxo1_Pa0_Ac1_pUb0*SGK*R54_kkin; R54 is "conversion of dnabound_Foxo1_Pa0_Ac1_pUb0 to dnabound_Foxo1_Pa1_Ac1_pUb0 by SGK";  // modifiers: SGK
    R54_kkin = 5e-5;
  R55: cytoplasm_Foxo1_Pa0_Ac1_pUb1 => cytoplasm_Foxo1_Pa1_Ac1_pUb1; cytoplasm_Foxo1_Pa0_Ac1_pUb1*SGK*R55_kkin; R55 is "conversion of cytoplasm_Foxo1_Pa0_Ac1_pUb1 to cytoplasm_Foxo1_Pa1_Ac1_pUb1 by SGK";  // modifiers: SGK
    R55_kkin = 5e-5;
  R56: nucleus_Foxo1_Pa0_Ac1_pUb1 => nucleus_Foxo1_Pa1_Ac1_pUb1; nucleus_Foxo1_Pa0_Ac1_pUb1*SGK*R56_kkin; R56 is "conversion of nucleus_Foxo1_Pa0_Ac1_pUb1 to nucleus_Foxo1_Pa1_Ac1_pUb1 by SGK";  // modifiers: SGK
    R56_kkin = 5e-5;
  R57: dnabound_Foxo1_Pa0_Ac1_pUb1 => dnabound_Foxo1_Pa1_Ac1_pUb1; dnabound_Foxo1_Pa0_Ac1_pUb1*SGK*R57_kkin; R57 is "conversion of dnabound_Foxo1_Pa0_Ac1_pUb1 to dnabound_Foxo1_Pa1_Ac1_pUb1 by SGK";  // modifiers: SGK
    R57_kkin = 5e-5;
  R58: cytoplasm_Foxo1_Pa1_Ac0_pUb0 => cytoplasm_Foxo1_Pa0_Ac0_pUb0; cytoplasm_Foxo1_Pa1_Ac0_pUb0*PP2A*R58_kdephos; R58 is "conversion of cytoplasm_Foxo1_Pa1_Ac0_pUb0 to cytoplasm_Foxo1_Pa0_Ac0_pUb0 by PP2A";  // modifiers: PP2A
    R58_kdephos = 5e-5;
  R59: nucleus_Foxo1_Pa1_Ac0_pUb0 => nucleus_Foxo1_Pa0_Ac0_pUb0; nucleus_Foxo1_Pa1_Ac0_pUb0*PP2A*R59_kdephos; R59 is "conversion of nucleus_Foxo1_Pa1_Ac0_pUb0 to nucleus_Foxo1_Pa0_Ac0_pUb0 by PP2A";  // modifiers: PP2A
    R59_kdephos = 5e-5;
  R60: dnabound_Foxo1_Pa1_Ac0_pUb0 => dnabound_Foxo1_Pa0_Ac0_pUb0; dnabound_Foxo1_Pa1_Ac0_pUb0*PP2A*R60_kdephos; R60 is "conversion of dnabound_Foxo1_Pa1_Ac0_pUb0 to dnabound_Foxo1_Pa0_Ac0_pUb0 by PP2A";  // modifiers: PP2A
    R60_kdephos = 5e-5;
  R61: cytoplasm_Foxo1_Pa1_Ac0_pUb1 => cytoplasm_Foxo1_Pa0_Ac0_pUb1; cytoplasm_Foxo1_Pa1_Ac0_pUb1*PP2A*R61_kdephos; R61 is "conversion of cytoplasm_Foxo1_Pa1_Ac0_pUb1 to cytoplasm_Foxo1_Pa0_Ac0_pUb1 by PP2A";  // modifiers: PP2A
    R61_kdephos = 5e-5;
  R62: nucleus_Foxo1_Pa1_Ac0_pUb1 => nucleus_Foxo1_Pa0_Ac0_pUb1; nucleus_Foxo1_Pa1_Ac0_pUb1*PP2A*R62_kdephos; R62 is "conversion of nucleus_Foxo1_Pa1_Ac0_pUb1 to nucleus_Foxo1_Pa0_Ac0_pUb1 by PP2A";  // modifiers: PP2A
    R62_kdephos = 5e-5;
  R63: dnabound_Foxo1_Pa1_Ac0_pUb1 => dnabound_Foxo1_Pa0_Ac0_pUb1; dnabound_Foxo1_Pa1_Ac0_pUb1*PP2A*R63_kdephos; R63 is "conversion of dnabound_Foxo1_Pa1_Ac0_pUb1 to dnabound_Foxo1_Pa0_Ac0_pUb1 by PP2A";  // modifiers: PP2A
    R63_kdephos = 5e-5;
  R64: cytoplasm_Foxo1_Pa1_Ac1_pUb0 => cytoplasm_Foxo1_Pa0_Ac1_pUb0; cytoplasm_Foxo1_Pa1_Ac1_pUb0*PP2A*R64_kdephos; R64 is "conversion of cytoplasm_Foxo1_Pa1_Ac1_pUb0 to cytoplasm_Foxo1_Pa0_Ac1_pUb0 by PP2A";  // modifiers: PP2A
    R64_kdephos = 5e-5;
  R65: nucleus_Foxo1_Pa1_Ac1_pUb0 => nucleus_Foxo1_Pa0_Ac1_pUb0; nucleus_Foxo1_Pa1_Ac1_pUb0*PP2A*R65_kdephos; R65 is "conversion of nucleus_Foxo1_Pa1_Ac1_pUb0 to nucleus_Foxo1_Pa0_Ac1_pUb0 by PP2A";  // modifiers: PP2A
    R65_kdephos = 5e-5;
  R66: dnabound_Foxo1_Pa1_Ac1_pUb0 => dnabound_Foxo1_Pa0_Ac1_pUb0; dnabound_Foxo1_Pa1_Ac1_pUb0*PP2A*R66_kdephos; R66 is "conversion of dnabound_Foxo1_Pa1_Ac1_pUb0 to dnabound_Foxo1_Pa0_Ac1_pUb0 by PP2A";  // modifiers: PP2A
    R66_kdephos = 5e-5;
  R67: cytoplasm_Foxo1_Pa1_Ac1_pUb1 => cytoplasm_Foxo1_Pa0_Ac1_pUb1; cytoplasm_Foxo1_Pa1_Ac1_pUb1*PP2A*R67_kdephos; R67 is "conversion of cytoplasm_Foxo1_Pa1_Ac1_pUb1 to cytoplasm_Foxo1_Pa0_Ac1_pUb1 by PP2A";  // modifiers: PP2A
    R67_kdephos = 5e-5;
  R68: nucleus_Foxo1_Pa1_Ac1_pUb1 => nucleus_Foxo1_Pa0_Ac1_pUb1; nucleus_Foxo1_Pa1_Ac1_pUb1*PP2A*R68_kdephos; R68 is "conversion of nucleus_Foxo1_Pa1_Ac1_pUb1 to nucleus_Foxo1_Pa0_Ac1_pUb1 by PP2A";  // modifiers: PP2A
    R68_kdephos = 5e-5;
  R69: dnabound_Foxo1_Pa1_Ac1_pUb1 => dnabound_Foxo1_Pa0_Ac1_pUb1; dnabound_Foxo1_Pa1_Ac1_pUb1*PP2A*R69_kdephos; R69 is "conversion of dnabound_Foxo1_Pa1_Ac1_pUb1 to dnabound_Foxo1_Pa0_Ac1_pUb1 by PP2A";  // modifiers: PP2A
    R69_kdephos = 5e-5;
  R70: nucleus_Foxo1_Pa0_Ac0_pUb0 => nucleus_Foxo1_Pa0_Ac1_pUb0; nucleus_Foxo1_Pa0_Ac0_pUb0*CBPP300*R70_kacet; R70 is "conversion of nucleus_Foxo1_Pa0_Ac0_pUb0 to nucleus_Foxo1_Pa0_Ac1_pUb0 by CBPP300";  // modifiers: CBPP300
    R70_kacet = 0.0001;
  R71: dnabound_Foxo1_Pa0_Ac0_pUb0 => dnabound_Foxo1_Pa0_Ac1_pUb0; dnabound_Foxo1_Pa0_Ac0_pUb0*CBPP300*R71_kacet; R71 is "conversion of dnabound_Foxo1_Pa0_Ac0_pUb0 to dnabound_Foxo1_Pa0_Ac1_pUb0 by CBPP300";  // modifiers: CBPP300
    R71_kacet = 0.0001;
  R72: nucleus_Foxo1_Pa0_Ac0_pUb1 => nucleus_Foxo1_Pa0_Ac1_pUb1; nucleus_Foxo1_Pa0_Ac0_pUb1*CBPP300*R72_kacet; R72 is "conversion of nucleus_Foxo1_Pa0_Ac0_pUb1 to nucleus_Foxo1_Pa0_Ac1_pUb1 by CBPP300";  // modifiers: CBPP300
    R72_kacet = 0.0001;
  R73: dnabound_Foxo1_Pa0_Ac0_pUb1 => dnabound_Foxo1_Pa0_Ac1_pUb1; dnabound_Foxo1_Pa0_Ac0_pUb1*CBPP300*R73_kacet; R73 is "conversion of dnabound_Foxo1_Pa0_Ac0_pUb1 to dnabound_Foxo1_Pa0_Ac1_pUb1 by CBPP300";  // modifiers: CBPP300
    R73_kacet = 0.0001;
  R74: nucleus_Foxo1_Pa0_Ac1_pUb0 => nucleus_Foxo1_Pa0_Ac0_pUb0; nucleus_Foxo1_Pa0_Ac1_pUb0*SIRT1*R74_kdeac; R74 is "conversion of nucleus_Foxo1_Pa0_Ac1_pUb0 to nucleus_Foxo1_Pa0_Ac0_pUb0 by SIRT1";  // modifiers: SIRT1
    R74_kdeac = 0.0001;
  R75: dnabound_Foxo1_Pa0_Ac1_pUb0 => dnabound_Foxo1_Pa0_Ac0_pUb0; dnabound_Foxo1_Pa0_Ac1_pUb0*SIRT1*R75_kdeac; R75 is "conversion of dnabound_Foxo1_Pa0_Ac1_pUb0 to dnabound_Foxo1_Pa0_Ac0_pUb0 by SIRT1";  // modifiers: SIRT1
    R75_kdeac = 0.0001;
  R76: nucleus_Foxo1_Pa0_Ac1_pUb1 => nucleus_Foxo1_Pa0_Ac0_pUb1; nucleus_Foxo1_Pa0_Ac1_pUb1*SIRT1*R76_kdeac; R76 is "conversion of nucleus_Foxo1_Pa0_Ac1_pUb1 to nucleus_Foxo1_Pa0_Ac0_pUb1 by SIRT1";  // modifiers: SIRT1
    R76_kdeac = 0.0001;
  R77: dnabound_Foxo1_Pa0_Ac1_pUb1 => dnabound_Foxo1_Pa0_Ac0_pUb1; dnabound_Foxo1_Pa0_Ac1_pUb1*SIRT1*R77_kdeac; R77 is "conversion of dnabound_Foxo1_Pa0_Ac1_pUb1 to dnabound_Foxo1_Pa0_Ac0_pUb1 by SIRT1";  // modifiers: SIRT1
    R77_kdeac = 0.0001;
  R78: nucleus_Foxo1_Pa1_Ac0_pUb0 => nucleus_Foxo1_Pa1_Ac1_pUb0; nucleus_Foxo1_Pa1_Ac0_pUb0*CBPP300*R78_kacet; R78 is "conversion of nucleus_Foxo1_Pa1_Ac0_pUb0 to nucleus_Foxo1_Pa1_Ac1_pUb0 by CBPP300";  // modifiers: CBPP300
    R78_kacet = 0.0001;
  R79: dnabound_Foxo1_Pa1_Ac0_pUb0 => dnabound_Foxo1_Pa1_Ac1_pUb0; dnabound_Foxo1_Pa1_Ac0_pUb0*CBPP300*R79_kacet; R79 is "conversion of dnabound_Foxo1_Pa1_Ac0_pUb0 to dnabound_Foxo1_Pa1_Ac1_pUb0 by CBPP300";  // modifiers: CBPP300
    R79_kacet = 0.0001;
  R80: nucleus_Foxo1_Pa1_Ac0_pUb1 => nucleus_Foxo1_Pa1_Ac1_pUb1; nucleus_Foxo1_Pa1_Ac0_pUb1*CBPP300*R80_kacet; R80 is "conversion of nucleus_Foxo1_Pa1_Ac0_pUb1 to nucleus_Foxo1_Pa1_Ac1_pUb1 by CBPP300";  // modifiers: CBPP300
    R80_kacet = 0.0001;
  R81: dnabound_Foxo1_Pa1_Ac0_pUb1 => dnabound_Foxo1_Pa1_Ac1_pUb1; dnabound_Foxo1_Pa1_Ac0_pUb1*CBPP300*R81_kacet; R81 is "conversion of dnabound_Foxo1_Pa1_Ac0_pUb1 to dnabound_Foxo1_Pa1_Ac1_pUb1 by CBPP300";  // modifiers: CBPP300
    R81_kacet = 0.0001;
  R82: nucleus_Foxo1_Pa1_Ac1_pUb0 => nucleus_Foxo1_Pa1_Ac0_pUb0; nucleus_Foxo1_Pa1_Ac1_pUb0*SIRT1*R82_kdeac; R82 is "conversion of nucleus_Foxo1_Pa1_Ac1_pUb0 to nucleus_Foxo1_Pa1_Ac0_pUb0 by SIRT1";  // modifiers: SIRT1
    R82_kdeac = 0.0001;
  R83: dnabound_Foxo1_Pa1_Ac1_pUb0 => dnabound_Foxo1_Pa1_Ac0_pUb0; dnabound_Foxo1_Pa1_Ac1_pUb0*SIRT1*R83_kdeac; R83 is "conversion of dnabound_Foxo1_Pa1_Ac1_pUb0 to dnabound_Foxo1_Pa1_Ac0_pUb0 by SIRT1";  // modifiers: SIRT1
    R83_kdeac = 0.0001;
  R84: nucleus_Foxo1_Pa1_Ac1_pUb1 => nucleus_Foxo1_Pa1_Ac0_pUb1; nucleus_Foxo1_Pa1_Ac1_pUb1*SIRT1*R84_kdeac; R84 is "conversion of nucleus_Foxo1_Pa1_Ac1_pUb1 to nucleus_Foxo1_Pa1_Ac0_pUb1 by SIRT1";  // modifiers: SIRT1
    R84_kdeac = 0.0001;
  R85: dnabound_Foxo1_Pa1_Ac1_pUb1 => dnabound_Foxo1_Pa1_Ac0_pUb1; dnabound_Foxo1_Pa1_Ac1_pUb1*SIRT1*R85_kdeac; R85 is "conversion of dnabound_Foxo1_Pa1_Ac1_pUb1 to dnabound_Foxo1_Pa1_Ac0_pUb1 by SIRT1";  // modifiers: SIRT1
    R85_kdeac = 0.0001;
  R86: cytoplasm_Foxo1_Pa0_Ac0_pUb0 => cytoplasm_Foxo1_Pa0_Ac0_pUb1; cytoplasm_Foxo1_Pa0_Ac0_pUb0*SCF*R86_kub; R86 is "conversion of cytoplasm_Foxo1_Pa0_Ac0_pUb0 to cytoplasm_Foxo1_Pa0_Ac0_pUb1 by SCF";  // modifiers: SCF
    R86_kub = 1e-6;
  R87: nucleus_Foxo1_Pa0_Ac0_pUb0 => nucleus_Foxo1_Pa0_Ac0_pUb1; nucleus_Foxo1_Pa0_Ac0_pUb0*SCF*R87_kub; R87 is "conversion of nucleus_Foxo1_Pa0_Ac0_pUb0 to nucleus_Foxo1_Pa0_Ac0_pUb1 by SCF";  // modifiers: SCF
    R87_kub = 1e-6;
  R88: dnabound_Foxo1_Pa0_Ac0_pUb0 => dnabound_Foxo1_Pa0_Ac0_pUb1; dnabound_Foxo1_Pa0_Ac0_pUb0*SCF*R88_kub; R88 is "conversion of dnabound_Foxo1_Pa0_Ac0_pUb0 to dnabound_Foxo1_Pa0_Ac0_pUb1 by SCF";  // modifiers: SCF
    R88_kub = 1e-6;
  R89: cytoplasm_Foxo1_Pa0_Ac1_pUb0 => cytoplasm_Foxo1_Pa0_Ac1_pUb1; cytoplasm_Foxo1_Pa0_Ac1_pUb0*SCF*R89_kub; R89 is "conversion of cytoplasm_Foxo1_Pa0_Ac1_pUb0 to cytoplasm_Foxo1_Pa0_Ac1_pUb1 by SCF";  // modifiers: SCF
    R89_kub = 3.333333e-8;
  R90: nucleus_Foxo1_Pa0_Ac1_pUb0 => nucleus_Foxo1_Pa0_Ac1_pUb1; nucleus_Foxo1_Pa0_Ac1_pUb0*SCF*R90_kub; R90 is "conversion of nucleus_Foxo1_Pa0_Ac1_pUb0 to nucleus_Foxo1_Pa0_Ac1_pUb1 by SCF";  // modifiers: SCF
    R90_kub = 3.333333e-8;
  R91: dnabound_Foxo1_Pa0_Ac1_pUb0 => dnabound_Foxo1_Pa0_Ac1_pUb1; dnabound_Foxo1_Pa0_Ac1_pUb0*SCF*R91_kub; R91 is "conversion of dnabound_Foxo1_Pa0_Ac1_pUb0 to dnabound_Foxo1_Pa0_Ac1_pUb1 by SCF";  // modifiers: SCF
    R91_kub = 3.333333e-8;
  R92: cytoplasm_Foxo1_Pa1_Ac0_pUb0 => cytoplasm_Foxo1_Pa1_Ac0_pUb1; cytoplasm_Foxo1_Pa1_Ac0_pUb0*SCF*R92_kub; R92 is "conversion of cytoplasm_Foxo1_Pa1_Ac0_pUb0 to cytoplasm_Foxo1_Pa1_Ac0_pUb1 by SCF";  // modifiers: SCF
    R92_kub = 3e-6;
  R93: nucleus_Foxo1_Pa1_Ac0_pUb0 => nucleus_Foxo1_Pa1_Ac0_pUb1; nucleus_Foxo1_Pa1_Ac0_pUb0*SCF*R93_kub; R93 is "conversion of nucleus_Foxo1_Pa1_Ac0_pUb0 to nucleus_Foxo1_Pa1_Ac0_pUb1 by SCF";  // modifiers: SCF
    R93_kub = 3e-6;
  R94: dnabound_Foxo1_Pa1_Ac0_pUb0 => dnabound_Foxo1_Pa1_Ac0_pUb1; dnabound_Foxo1_Pa1_Ac0_pUb0*SCF*R94_kub; R94 is "conversion of dnabound_Foxo1_Pa1_Ac0_pUb0 to dnabound_Foxo1_Pa1_Ac0_pUb1 by SCF";  // modifiers: SCF
    R94_kub = 3e-6;
  R95: cytoplasm_Foxo1_Pa1_Ac1_pUb0 => cytoplasm_Foxo1_Pa1_Ac1_pUb1; cytoplasm_Foxo1_Pa1_Ac1_pUb0*SCF*R95_kub; R95 is "conversion of cytoplasm_Foxo1_Pa1_Ac1_pUb0 to cytoplasm_Foxo1_Pa1_Ac1_pUb1 by SCF";  // modifiers: SCF
    R95_kub = 1e-7;
  R96: nucleus_Foxo1_Pa1_Ac1_pUb0 => nucleus_Foxo1_Pa1_Ac1_pUb1; nucleus_Foxo1_Pa1_Ac1_pUb0*SCF*R96_kub; R96 is "conversion of nucleus_Foxo1_Pa1_Ac1_pUb0 to nucleus_Foxo1_Pa1_Ac1_pUb1 by SCF";  // modifiers: SCF
    R96_kub = 1e-7;
  R97: dnabound_Foxo1_Pa1_Ac1_pUb0 => dnabound_Foxo1_Pa1_Ac1_pUb1; dnabound_Foxo1_Pa1_Ac1_pUb0*SCF*R97_kub; R97 is "conversion of dnabound_Foxo1_Pa1_Ac1_pUb0 to dnabound_Foxo1_Pa1_Ac1_pUb1 by SCF";  // modifiers: SCF
    R97_kub = 1e-7;
  R98: cytoplasm_Foxo1_Pa0_Ac0_pUb1 => degr_Foxo1; cytoplasm_Foxo1_Pa0_Ac0_pUb1*Proteasome*R98_kdeg; R98 is "degradation of cytoplasm_Foxo1_Pa0_Ac0_pUb1";  // modifiers: Proteasome
    R98_kdeg = 0.0001;
  R99: cytoplasm_Foxo1_Pa0_Ac1_pUb1 => degr_Foxo1; cytoplasm_Foxo1_Pa0_Ac1_pUb1*Proteasome*R99_kdeg; R99 is "degradation of cytoplasm_Foxo1_Pa0_Ac1_pUb1";  // modifiers: Proteasome
    R99_kdeg = 0.0001;
  R100: cytoplasm_Foxo1_Pa1_Ac0_pUb1 => degr_Foxo1; cytoplasm_Foxo1_Pa1_Ac0_pUb1*Proteasome*R100_kdeg; R100 is "degradation of cytoplasm_Foxo1_Pa1_Ac0_pUb1";  // modifiers: Proteasome
    R100_kdeg = 0.0001;
  R101: cytoplasm_Foxo1_Pa1_Ac1_pUb1 => degr_Foxo1; cytoplasm_Foxo1_Pa1_Ac1_pUb1*Proteasome*R101_kdeg; R101 is "degradation of cytoplasm_Foxo1_Pa1_Ac1_pUb1";  // modifiers: Proteasome
    R101_kdeg = 0.0001;
  R102: $null => nucleus_RNA_Inr; dnabound_Foxo1_Pa0_Ac0_pUb0*R102_ktranscr; R102 is "transcription of inr by dnabound_Foxo1_Pa0_Ac0_pUb0";  // modifiers: dnabound_Foxo1_Pa0_Ac0_pUb0
    R102_ktranscr = 0.3;
  R103: $null => nucleus_RNA_Sod2; dnabound_Foxo1_Pa0_Ac0_pUb0*R103_ktranscr; R103 is "transcription of sod2 by dnabound_Foxo1_Pa0_Ac0_pUb0";  // modifiers: dnabound_Foxo1_Pa0_Ac0_pUb0
    R103_ktranscr = 0.3;
  R104: $null => nucleus_RNA_Inr; dnabound_Foxo1_Pa0_Ac0_pUb1*R104_ktranscr; R104 is "transcription of inr by dnabound_Foxo1_Pa0_Ac0_pUb1";  // modifiers: dnabound_Foxo1_Pa0_Ac0_pUb1
    R104_ktranscr = 0.3;
  R105: $null => nucleus_RNA_Sod2; dnabound_Foxo1_Pa0_Ac0_pUb1*R105_ktranscr; R105 is "transcription of sod2 by dnabound_Foxo1_Pa0_Ac0_pUb1";  // modifiers: dnabound_Foxo1_Pa0_Ac0_pUb1
    R105_ktranscr = 0.3;
  R106: $null => nucleus_RNA_Inr; dnabound_Foxo1_Pa0_Ac1_pUb0*R106_ktranscr; R106 is "transcription of inr by dnabound_Foxo1_Pa0_Ac1_pUb0";  // modifiers: dnabound_Foxo1_Pa0_Ac1_pUb0
    R106_ktranscr = 0.3;
  R107: $null => nucleus_RNA_Sod2; dnabound_Foxo1_Pa0_Ac1_pUb0*R107_ktranscr; R107 is "transcription of sod2 by dnabound_Foxo1_Pa0_Ac1_pUb0";  // modifiers: dnabound_Foxo1_Pa0_Ac1_pUb0
    R107_ktranscr = 0.3;
  R108: $null => nucleus_RNA_Inr; dnabound_Foxo1_Pa0_Ac1_pUb1*R108_ktranscr; R108 is "transcription of inr by dnabound_Foxo1_Pa0_Ac1_pUb1";  // modifiers: dnabound_Foxo1_Pa0_Ac1_pUb1
    R108_ktranscr = 0.3;
  R109: $null => nucleus_RNA_Sod2; dnabound_Foxo1_Pa0_Ac1_pUb1*R109_ktranscr; R109 is "transcription of sod2 by dnabound_Foxo1_Pa0_Ac1_pUb1";  // modifiers: dnabound_Foxo1_Pa0_Ac1_pUb1
    R109_ktranscr = 0.3;
  R110: $null => nucleus_RNA_Inr; dnabound_Foxo1_Pa1_Ac0_pUb0*R110_ktranscr; R110 is "transcription of inr by dnabound_Foxo1_Pa1_Ac0_pUb0";  // modifiers: dnabound_Foxo1_Pa1_Ac0_pUb0
    R110_ktranscr = 0.3;
  R111: $null => nucleus_RNA_Sod2; dnabound_Foxo1_Pa1_Ac0_pUb0*R111_ktranscr; R111 is "transcription of sod2 by dnabound_Foxo1_Pa1_Ac0_pUb0";  // modifiers: dnabound_Foxo1_Pa1_Ac0_pUb0
    R111_ktranscr = 0.3;
  R112: $null => nucleus_RNA_Inr; dnabound_Foxo1_Pa1_Ac0_pUb1*R112_ktranscr; R112 is "transcription of inr by dnabound_Foxo1_Pa1_Ac0_pUb1";  // modifiers: dnabound_Foxo1_Pa1_Ac0_pUb1
    R112_ktranscr = 0.3;
  R113: $null => nucleus_RNA_Sod2; dnabound_Foxo1_Pa1_Ac0_pUb1*R113_ktranscr; R113 is "transcription of sod2 by dnabound_Foxo1_Pa1_Ac0_pUb1";  // modifiers: dnabound_Foxo1_Pa1_Ac0_pUb1
    R113_ktranscr = 0.3;
  R114: $null => nucleus_RNA_Inr; dnabound_Foxo1_Pa1_Ac1_pUb0*R114_ktranscr; R114 is "transcription of inr by dnabound_Foxo1_Pa1_Ac1_pUb0";  // modifiers: dnabound_Foxo1_Pa1_Ac1_pUb0
    R114_ktranscr = 0.3;
  R115: $null => nucleus_RNA_Sod2; dnabound_Foxo1_Pa1_Ac1_pUb0*R115_ktranscr; R115 is "transcription of sod2 by dnabound_Foxo1_Pa1_Ac1_pUb0";  // modifiers: dnabound_Foxo1_Pa1_Ac1_pUb0
    R115_ktranscr = 0.3;
  R116: $null => nucleus_RNA_Inr; dnabound_Foxo1_Pa1_Ac1_pUb1*R116_ktranscr; R116 is "transcription of inr by dnabound_Foxo1_Pa1_Ac1_pUb1";  // modifiers: dnabound_Foxo1_Pa1_Ac1_pUb1
    R116_ktranscr = 0.3;
  R117: $null => nucleus_RNA_Sod2; dnabound_Foxo1_Pa1_Ac1_pUb1*R117_ktranscr; R117 is "transcription of sod2 by dnabound_Foxo1_Pa1_Ac1_pUb1";  // modifiers: dnabound_Foxo1_Pa1_Ac1_pUb1
    R117_ktranscr = 0.3;
  basal_transcription_of_inr: $null => nucleus_RNA_Inr; basal_transcription_of_inr_k_basal_transcr;
    basal_transcription_of_inr_k_basal_transcr = 3;
  export_of_inr_RNA: nucleus_RNA_Inr => cytoplasm_RNA_Inr; nucleus_RNA_Inr*export_of_inr_RNA_kexp;
    export_of_inr_RNA_kexp = 0.22;
  cyto_degr_of_inr_RNA: cytoplasm_RNA_Inr => $null; cytoplasm_RNA_Inr*cyto_degr_of_inr_RNA_kmdeg;
    cyto_degr_of_inr_RNA_kmdeg = 5.622;
  translation_of_inr: $null => cytoplasm_Inr; cytoplasm_RNA_Inr*translation_of_inr_ktransl;  // modifiers: cytoplasm_RNA_Inr
    translation_of_inr_ktransl = 1.23;
  degradation_of_Inr_protein: cytoplasm_Inr => $null; cytoplasm_Inr*degradation_of_Inr_protein_kpdeg;
    degradation_of_Inr_protein_kpdeg = 0.0019;
  basal_transcription_of_sod2: $null => nucleus_RNA_Sod2; basal_transcription_of_sod2_k_basal_transcr;
    basal_transcription_of_sod2_k_basal_transcr = 3;
  export_of_sod2_RNA: nucleus_RNA_Sod2 => cytoplasm_RNA_Sod2; nucleus_RNA_Sod2*export_of_sod2_RNA_kexp;
    export_of_sod2_RNA_kexp = 0.22;
  cyto_degr_of_sod2_RNA: cytoplasm_RNA_Sod2 => $null; cytoplasm_RNA_Sod2*cyto_degr_of_sod2_RNA_kmdeg;
    cyto_degr_of_sod2_RNA_kmdeg = 5.622;
  translation_of_sod2: $null => cytoplasm_Sod2; cytoplasm_RNA_Sod2*translation_of_sod2_ktransl;  // modifiers: cytoplasm_RNA_Sod2
    translation_of_sod2_ktransl = 1.23;
  degradation_of_Sod2_protein: cytoplasm_Sod2 => $null; cytoplasm_Sod2*degradation_of_Sod2_protein_kpdeg;
    degradation_of_Sod2_protein_kpdeg = 0.0019;

  // Events:
  event_0000001: at (time >= 60): Akt = 100000;

  // Unit definitions:
  unit volume = 1e-3 litre;
  unit substance = item;
  unit time = 60 second;
end
