// SBML level 2 version 3

model Bondarenko2004_apex()
  // Bondarenko2004_Myocyte_AP_apical
  // This the model from the article:
  // Computer model of action potential of mouse ventricular myocytes.
  // Bondarenko VE, Szigeti GP, Bett GC, Kim SJ, Rasmusson RL Am. J. Physiol. Heart Circ. Physiol. 2004 Sep;287(3):H1378-403. Pubmed ID: 15142845 , doi: 10.1152/ajpheart.00185.2003 .
  // Abstract:
  // We have developed a mathematical model of the mouse ventricular myocyte action potential (AP) from voltage-clamp data of the underlying currents and Ca 2+ transients. Wherever possible, we used Markov models to represent the molecular structure and function of ion channels. The model includes detailed intracellular Ca 2+ dynamics, with simulations of localized events such as sarcoplasmic Ca 2+ release into a small intracellular volume bounded by the sarcolemma and sarcoplasmic reticulum. Transporter-mediated Ca 2+ fluxes from the bulk cytosol are closely matched to the experimentally reported values and predict stimulation rate-dependent changes in Ca 2+ transients. Our model reproduces the properties of cardiac myocytes from two different regions of the heart: the apex and the septum. The septum has a relatively prolonged AP, which reflects a relatively small contribution from the rapid transient outward K + current in the septum. The attribution of putative molecular bases for several of the component currents enables our mouse model to be used to simulate the behavior of genetically modified transgenic mice.
  // This SBML model has been converted from a CellML model (see: Bondarenko 2004 vers. 5 var. 1 ) in the CellML repository .
  // It has been slightly changed and a parameter E_try been introduced to make it valid SBML. The CellML model was orginally created by:
  // James Lawson
  // Auckland Bioengineering Institute
  // j.lawson(at)auckland.ac.nz
  // From the original CellML model:
  // The original CellML model version "has been curated by Penny Noble from Oxford University and is known to run in COR and PCEnv. This model represents the APICAL CELL variant as described in Bondarenko et al.'s 2004 paper and all units are consistent. The model is able to reproduce the action potential traces from Figure 16 of the publication. This model has a PCEnv session file associated with it."
  // This model originates from BioModels Database: A Database of Annotated Published Models (http://www.ebi.ac.uk/biomodels/). It is copyright (c) 2005-2011 The BioModels.net Team.
  // To the extent possible under law, all copyright and related or neighbouring rights to this encoded model have been dedicated to the public domain worldwide. Please refer to CC0 Public Domain Dedication for more information.
  // In summary, you are entitled to use this encoded model in absolutely any manner you deem suitable, verbatim, or with modification, alone or embedded it in a larger context, redistribute it, commercially or not, in a restricted way or not. .
  // To cite BioModels Database, please use: Li C, Donizelli M, Rodriguez N, Dharuri H, Endler L, Chelliah V, Li L, He E, Henry A, Stefan MI, Snoep JL, Hucka M, Le Novère N, Laibe C (2010) BioModels Database: An enhanced, curated and annotated resource for published quantitative kinetic models. BMC Syst Biol., 4:92.
  // biomodels.db:MODEL1150151512
  // isDescribedBy pubmed:15142845
  // biomodels.db:MODEL1150151512
  // isDescribedBy pubmed:15142845
  // biomodels.db:MODEL1150151512
  // biomodels.db:MODEL1150151512

  // Compartments:
  compartment Compartment = 1 litre;

  // Parameters:
  time_environment has millisecond;
  V = -82.4202 millivolt;
  E_try has millivolt;
  Cm = 1 microF_per_cm2;
  Vmyo = 2.584e-5 microlitre;
  VJSR = 1.2e-7 microlitre;
  VNSR = 2.098e-6 microlitre;
  Vss = 1.485e-9 microlitre;
  Acap = 0.0001534 cm2;
  Ko = 5400 micromolar;
  Nao = 140000 micromolar;
  Cao = 1800 micromolar;
  R = 8.314 joule_per_mole_kelvin;
  T = 298 kelvin;
  F = 96.5 coulomb_per_millimole;
  i_stim has picoA_per_picoF;
  stim_start = 20 millisecond;
  stim_end = 100000 millisecond;
  stim_period = 71.43 millisecond;
  stim_duration = 0.5 millisecond;
  stim_amplitude = -80 picoA_per_picoF;
  Cai = 0.115001 micromolar;
  Cass = 0.115001 micromolar;
  CaJSR = 1299.5 micromolar;
  CaNSR = 1299.5 micromolar;
  Bi has dimensionless;
  Bss has dimensionless;
  BJSR has dimensionless;
  CMDN_tot = 50 micromolar;
  CSQN_tot = 15000 micromolar;
  Km_CMDN = 0.238 micromolar;
  Km_CSQN = 800 micromolar;
  J_leak has micromolar_per_millisecond;
  J_rel has micromolar_per_millisecond;
  J_up has micromolar_per_millisecond;
  J_tr has micromolar_per_millisecond;
  J_trpn has micromolar_per_millisecond;
  J_xfer has micromolar_per_millisecond;
  k_plus_htrpn = 0.00237 per_micromolar_millisecond;
  k_minus_htrpn = 3.2e-5 per_millisecond;
  k_plus_ltrpn = 0.0327 per_micromolar_millisecond;
  k_minus_ltrpn = 0.0196 per_millisecond;
  P_RyR = 0 dimensionless;
  v1 = 4.5 per_millisecond;
  tau_tr = 20 millisecond;
  v2 = 1.74e-5 per_millisecond;
  tau_xfer = 8 millisecond;
  v3 = 0.45 micromolar_per_millisecond;
  Km_up = 0.5 micromolar;
  LTRPN_tot = 70 micromolar;
  HTRPN_tot = 140 micromolar;
  LTRPN_Ca = 11.2684 micromolar;
  HTRPN_Ca = 125.29 micromolar;
  P_O1 = 1.49102e-5 dimensionless;
  P_O2 = 9.51726e-11 dimensionless;
  P_C1 has dimensionless;
  P_C2 = 0.00016774 dimensionless;
  k_plus_a = 0.006075 micromolar4_per_millisecond;
  k_minus_a = 0.07125 per_millisecond;
  k_plus_b = 0.00405 micromolar3_per_millisecond;
  k_minus_b = 0.965 per_millisecond;
  k_plus_c = 0.009 per_millisecond;
  k_minus_c = 0.0008 per_millisecond;
  m = 3 dimensionless;
  n = 4 dimensionless;
  i_CaL has picoA_per_picoF;
  i_CaL_max = 7 picoA_per_picoF;
  E_CaL = 63 millivolt;
  g_CaL = 0.1729 milliS_per_microF;
  O = 9.30308e-19 dimensionless;
  C1 has dimensionless;
  C2 = 0.000124216 dimensionless;
  C3 = 5.78679e-9 dimensionless;
  C4 = 1.19816e-13 dimensionless;
  I1 = 4.97923e-19 dimensionless;
  I2 = 3.45847e-14 dimensionless;
  I3 = 1.85106e-14 dimensionless;
  alpha has per_millisecond;
  beta has per_millisecond;
  gamma has per_millisecond;
  Kpcf has per_millisecond;
  Kpcb = 0.0005 per_millisecond;
  Kpc_max = 0.23324 per_millisecond;
  Kpc_half = 20 micromolar;
  i_pCa has picoA_per_picoF;
  i_pCa_max = 1 picoA_per_picoF;
  Km_pCa = 0.5 micromolar;
  i_NaCa has picoA_per_picoF;
  k_NaCa = 292.8 picoA_per_picoF;
  K_mNa = 87500 micromolar;
  K_mCa = 1380 micromolar;
  k_sat = 0.1 dimensionless;
  eta = 0.35 dimensionless;
  i_Cab has picoA_per_picoF;
  g_Cab = 0.000367 milliS_per_microF;
  E_CaN has millivolt;
  Nai = 1.42371e4 micromolar;
  i_Na has picoA_per_picoF;
  E_Na has millivolt;
  g_Na = 13 milliS_per_microF;
  O_Na = 7.13483e-7 dimensionless;
  C_Na1 = 0.000279132 dimensionless;
  C_Na2 = 0.020752 dimensionless;
  I1_Na = 6.73345e-7 dimensionless;
  I2_Na = 1.55787e-9 dimensionless;
  IF_Na = 0.000153176 dimensionless;
  IC_Na2 = 0.0113879 dimensionless;
  IC_Na3 = 0.34278 dimensionless;
  alpha_Na11 has per_millisecond;
  beta_Na11 has per_millisecond;
  alpha_Na12 has per_millisecond;
  beta_Na12 has per_millisecond;
  alpha_Na13 has per_millisecond;
  beta_Na13 has per_millisecond;
  alpha_Na3 has per_millisecond;
  beta_Na3 has per_millisecond;
  alpha_Na2 has per_millisecond;
  beta_Na2 has per_millisecond;
  alpha_Na4 has per_millisecond;
  beta_Na4 has per_millisecond;
  alpha_Na5 has per_millisecond;
  beta_Na5 has per_millisecond;
  i_Nab has picoA_per_picoF;
  g_Nab = 0.0026 milliS_per_microF;
  Ki = 143720 micromolar;
  i_Kto_f has picoA_per_picoF;
  E_K has millivolt;
  g_Kto_f = 0.4067 milliS_per_microF;
  ato_f = 0.00265563 dimensionless;
  ito_f = 0.999977 dimensionless;
  alpha_a has per_millisecond;
  beta_a has per_millisecond;
  alpha_i_fast_transient_outward_potassium_current has per_millisecond;
  beta_i_fast_transient_outward_potassium_current has per_millisecond;
  i_Kto_s has picoA_per_picoF;
  ass has dimensionless;
  iss has dimensionless;
  g_Kto_s = 0 milliS_per_microF;
  ato_s = 0.000417069 dimensionless;
  ito_s = 0.998543 dimensionless;
  tau_ta_s has millisecond;
  tau_ti_s has millisecond;
  i_K1 has picoA_per_picoF;
  i_Ks has picoA_per_picoF;
  g_Ks = 0.00575 milliS_per_microF;
  nKs = 0.000262753 dimensionless;
  alpha_n has per_millisecond;
  beta_n has per_millisecond;
  i_Kur has picoA_per_picoF;
  g_Kur = 0.16 milliS_per_microF;
  aur = 0.000417069 dimensionless;
  iur = 0.998543 dimensionless;
  tau_aur has millisecond;
  tau_iur has millisecond;
  i_Kss has picoA_per_picoF;
  g_Kss = 0.05 milliS_per_microF;
  aKss = 0.000417069 dimensionless;
  iKss = 1 dimensionless;
  tau_Kss has millisecond;
  i_Kr has picoA_per_picoF;
  g_Kr = 0.078 milliS_per_microF;
  O_K = 0.000175298 dimensionless;
  C_K1 = 0.000992513 dimensionless;
  C_K2 = 0.000641229 dimensionless;
  C_K0 has dimensionless;
  I_K = 3.19129e-5 dimensionless;
  alpha_a0 has per_millisecond;
  beta_a0 has per_millisecond;
  kb = 0.036778 per_millisecond;
  kf = 0.023761 per_millisecond;
  alpha_a1 has per_millisecond;
  beta_a1 has per_millisecond;
  alpha_i_rapid_delayed_rectifier_potassium_current has per_millisecond;
  beta_i_rapid_delayed_rectifier_potassium_current has per_millisecond;
  i_NaK has picoA_per_picoF;
  i_NaK_max = 0.88 picoA_per_picoF;
  Km_Nai = 21000 micromolar;
  Km_Ko = 1500 micromolar;
  f_NaK has dimensionless;
  sigma has dimensionless;
  i_ClCa has picoA_per_picoF;
  g_ClCa = 10 milliS_per_microF;
  O_ClCa has dimensionless;
  E_Cl = -40 millivolt;
  Km_Cl = 10 micromolar;

  // Assignment rules:
  i_stim := piecewise(stim_amplitude, (time >= stim_start) && (time <= stim_end) && (time - stim_start - floor((time - stim_start)/stim_period)*stim_period <= stim_duration), 0);
  Bi := (1 + CMDN_tot*Km_CMDN/(Km_CMDN + Cai)^2)^(-1);
  Bss := (1 + CMDN_tot*Km_CMDN/(Km_CMDN + Cass)^2)^(-1);
  BJSR := (1 + CSQN_tot*Km_CSQN/(Km_CSQN + CaJSR)^2)^(-1);
  J_rel := v1*(P_O1 + P_O2)*(CaJSR - Cass)*P_RyR;
  J_tr := (CaNSR - CaJSR)/tau_tr;
  J_xfer := (Cass - Cai)/tau_xfer;
  J_leak := v2*(CaNSR - Cai);
  J_up := v3*Cai^2/(Km_up^2 + Cai^2);
  J_trpn := k_plus_htrpn*Cai*(HTRPN_tot - HTRPN_Ca) + k_plus_ltrpn*Cai*(LTRPN_tot - LTRPN_Ca) - (k_minus_htrpn*HTRPN_Ca + k_minus_ltrpn*LTRPN_Ca);
  P_C1 := 1 - (P_C2 + P_O1 + P_O2);
  i_CaL := g_CaL*O*(V - E_CaL);
  C1 := 1 - (O + C2 + C2 + C3 + C4 + I1 + I2 + I3);
  alpha := 0.4*exp((V + 12)/10)*(1 + 0.7*exp(-(V + 40)^2/10) - 0.75*exp(-(V + 20)^2/400))/(1 + 0.12*exp((V + 12)/10));
  beta := 0.05*exp(-(V + 12)/13);
  gamma := Kpc_max*Cass/(Kpc_half + Cass);
  Kpcf := 13*(1 - exp(-(V + 14.5)^2/100));
  i_pCa := i_pCa_max*Cai^2/(Km_pCa^2 + Cai^2);
  i_NaCa := k_NaCa*1/(K_mNa^3 + Nao^3)*1/(K_mCa + Cao)*1/(1 + k_sat*exp((eta - 1)*V*F/(R*T)))*(exp(eta*V*F/(R*T))*Nai^3*Cao - exp((eta - 1)*V*F/(R*T))*Nao^3*Cai);
  i_Cab := g_Cab*(V - E_CaN);
  E_CaN := R*T/(2*F)*ln(Cao/Cai);
  i_Na := g_Na*O_Na*(V - E_Na);
  E_Na := R*T/F*ln((0.9*Nao + 0.1*Ko)/(0.9*Nai + 0.1*Ki));
  C_Na3 := 1 - (O_Na + C_Na1 + C_Na2 + IF_Na + I1_Na + I2_Na + IC_Na2 + IC_Na3);
  alpha_Na11 := 3.802/(0.1027*exp(-(V + 2.5)/17) + 0.2*exp(-(V + 2.5)/150));
  alpha_Na12 := 3.802/(0.1027*exp(-(V + 2.5)/15) + 0.23*exp(-(V + 2.5)/150));
  alpha_Na13 := 3.802/(0.1027*exp(-(V + 2.5)/12) + 0.25*exp(-(V + 2.5)/150));
  beta_Na11 := 0.1917*exp(-(V + 2.5)/20.3);
  beta_Na12 := 0.2*exp(-(V - 2.5)/20.3);
  beta_Na13 := 0.22*exp(-(V - 7.5)/20.3);
  alpha_Na3 := 7e-7*exp(-(V + 7)/7.7);
  beta_Na3 := 0.0084 + 2e-5*(V + 7);
  alpha_Na2 := 1/(0.188495*exp(-(V + 7)/16.6) + 0.393956);
  beta_Na2 := alpha_Na13*alpha_Na2*alpha_Na3/(beta_Na13*beta_Na3);
  alpha_Na4 := alpha_Na2/1000;
  beta_Na4 := alpha_Na3;
  alpha_Na5 := alpha_Na2/95000;
  beta_Na5 := alpha_Na3/50;
  i_Nab := g_Nab*(V - E_Na);
  i_Kto_f := g_Kto_f*ato_f^3*ito_f*(V - E_K);
  E_K := R*T/F*ln(Ko/Ki);
  alpha_a := 0.18064*exp(0.03577*(V + 30));
  beta_a := 0.3956*exp(-0.06237*(V + 30));
  alpha_i_fast_transient_outward_potassium_current := 0.000152*exp(-(V + 13.5)/7)/(0.0067083*exp(-(V + 33.5)/7) + 1);
  beta_i_fast_transient_outward_potassium_current := 0.00095*exp((V + 33.5)/7)/(0.051335*exp((V + 33.5)/7) + 1);
  i_Kto_s := g_Kto_s*ato_s*ito_s*(V - E_K);
  ass := 1/(1 + exp(-(V + 22.5)/7.7));
  iss := 1/(1 + exp((V + 45.2)/5.7));
  tau_ta_s := 0.493*exp(-0.0629*V) + 2.058;
  tau_ti_s := 270 + 1050/(1 + exp((V + 45.2)/5.7));
  i_K1 := 0.2938*Ko/(Ko + 210)*(V - E_K)/(1 + exp(0.0896*(V - E_K)));
  i_Ks := g_Ks*nKs^2*(V - E_K);
  alpha_n := 4.81333e-6*(V + 26.5)/(1 - exp(-0.128*(V + 26.5)));
  beta_n := 9.53333e-5*exp(-0.038*(V + 26.5));
  i_Kur := g_Kur*aur*iur*(V - E_K);
  tau_aur := 0.493*exp(-0.0629*V) + 2.058;
  tau_iur := 1200 - 170/(1 + exp((V + 45.2)/5.7));
  i_Kss := g_Kss*aKss*iKss*(V - E_K);
  tau_Kss := 39.3*exp(-0.0862*V) + 13.17;
  i_Kr := g_Kr*O_K*(V - E_try);
  E_try := R*T/F*ln((0.98*Ko + 0.02*Nao)/(0.98*Ki + 0.02*Nai));
  C_K0 := 1 - (C_K1 + C_K2 + O_K + I_K);
  alpha_a0 := 0.022348*exp(0.01176*V);
  beta_a0 := 0.047002*exp(-0.0631*V);
  alpha_a1 := 0.013733*exp(0.038198*V);
  beta_a1 := 6.89e-5*exp(-0.04178*V);
  alpha_i_rapid_delayed_rectifier_potassium_current := 0.090821*exp(0.023391*(V + 5));
  beta_i_rapid_delayed_rectifier_potassium_current := 0.006497*exp(-0.03268*(V + 5));
  i_NaK := i_NaK_max*f_NaK*1/(1 + (Km_Nai/Nai)^1.5)*Ko/(Ko + Km_Ko);
  f_NaK := 1/(1 + 0.1245*exp(-0.1*V*F/(R*T)) + 0.0365*sigma*exp(-V*F/(R*T)));
  sigma := 1/7*(exp(Nao/67300) - 1);
  i_ClCa := g_ClCa*O_ClCa*Cai/(Cai + Km_Cl)*(V - E_Cl);
  O_ClCa := 0.2/(1 + exp(-(V - 46.7)/7.8));

  // Rate rules:
  V' = -(i_CaL + i_pCa + i_NaCa + i_Cab + i_Na + i_Nab + i_NaK + i_Kto_f + i_Kto_s + i_K1 + i_Ks + i_Kur + i_Kss + i_Kr + i_ClCa + i_stim);
  Cai' = Bi*(J_leak + J_xfer - (J_up + J_trpn + (i_Cab + i_pCa - 2*i_NaCa)*Acap*Cm/(2*Vmyo*F)));
  Cass' = Bss*(J_rel*VJSR/Vss - (J_xfer*Vmyo/Vss + i_CaL*Acap*Cm/(2*Vss*F)));
  CaJSR' = BJSR*(J_tr - J_rel);
  CaNSR' = (J_up - J_leak)*Vmyo/VNSR - J_tr*VJSR/VNSR;
  P_RyR' = -0.04*P_RyR - 0.1*i_CaL/i_CaL_max*exp(-(V - 5)^2/648);
  LTRPN_Ca' = k_plus_ltrpn*Cai*(LTRPN_tot - LTRPN_Ca) - k_minus_ltrpn*LTRPN_Ca;
  HTRPN_Ca' = k_plus_htrpn*Cai*(HTRPN_tot - HTRPN_Ca) - k_minus_htrpn*HTRPN_Ca;
  P_O1' = k_plus_a*Cass^n*P_C1 + k_minus_b*P_O2 + k_minus_c*P_C2 - (k_minus_a*P_O1 + k_plus_b*Cass^m*P_O1 + k_plus_c*P_O1);
  P_O2' = k_plus_b*Cass^m*P_O1 - k_minus_b*P_O2;
  P_C2' = k_plus_c*P_O1 - k_minus_c*P_C2;
  O' = alpha*C4 + Kpcb*I1 + 0.001*(alpha*I2 - Kpcf*O) - (4*beta*O + gamma*O);
  C2' = 4*alpha*C1 + 2*beta*C3 - (beta*C2 + 3*alpha*C2);
  C3' = 3*alpha*C2 + 3*beta*C4 - (2*beta*C3 + 2*alpha*C3);
  C4' = 2*alpha*C3 + 4*beta*O + 0.01*(4*Kpcb*beta*I1 - alpha*gamma*C4) + 0.002*(4*beta*I2 - Kpcf*C4) + 4*beta*Kpcb*I3 - (3*beta*C4 + alpha*C4 + 1*gamma*Kpcf*C4);
  I1' = gamma*O + 0.001*(alpha*I3 - Kpcf*I1) + 0.01*(alpha*gamma*C4 - 4*beta*Kpcf*I1) - Kpcb*I1;
  I2' = 0.001*(Kpcf*O - alpha*I2) + Kpcb*I3 + 0.002*(Kpcf*C4 - 4*beta*I2) - gamma*I2;
  I3' = 0.001*(Kpcf*I1 - alpha*I3) + gamma*I2 + 1*gamma*Kpcf*C4 - (4*beta*Kpcb*I3 + Kpcb*I3);
  Nai' = -(i_Na + i_Nab + 3*i_NaK + 3*i_NaCa)*Acap*Cm/(Vmyo*F);
  C_Na2' = alpha_Na11*C_Na3 + beta_Na12*C_Na1 + alpha_Na3*IC_Na2 - (beta_Na11*C_Na2 + alpha_Na12*C_Na2 + beta_Na3*C_Na2);
  C_Na1' = alpha_Na12*C_Na2 + beta_Na13*O_Na + alpha_Na3*IF_Na - (beta_Na12*C_Na1 + alpha_Na13*C_Na1 + beta_Na3*C_Na1);
  O_Na' = alpha_Na13*C_Na1 + beta_Na2*IF_Na - (beta_Na13*O_Na + alpha_Na2*O_Na);
  IF_Na' = alpha_Na2*O_Na + beta_Na3*C_Na1 + beta_Na4*I1_Na + alpha_Na12*IC_Na2 - (beta_Na2*IF_Na + alpha_Na3*IF_Na + alpha_Na4*IF_Na + beta_Na12*IF_Na);
  I1_Na' = alpha_Na4*IF_Na + beta_Na5*I2_Na - (beta_Na4*I1_Na + alpha_Na5*I1_Na);
  I2_Na' = alpha_Na5*I1_Na - beta_Na5*I2_Na;
  IC_Na2' = alpha_Na11*IC_Na3 + beta_Na12*IF_Na + beta_Na3*IC_Na2 - (beta_Na11*IC_Na2 + alpha_Na12*IC_Na2 + alpha_Na3*IC_Na2);
  IC_Na3' = beta_Na11*IC_Na2 + beta_Na3*C_Na3 - (alpha_Na11*IC_Na3 + alpha_Na3*IC_Na3);
  Ki' = -(i_Kto_f + i_Kto_s + i_K1 + i_Ks + i_Kss + i_Kur + i_Kr - 2*i_NaK)*Acap*Cm/(Vmyo*F);
  ato_f' = alpha_a*(1 - ato_f) - beta_a*ato_f;
  ito_f' = alpha_i_fast_transient_outward_potassium_current*(1 - ito_f) - beta_i_fast_transient_outward_potassium_current*ito_f;
  ato_s' = (ass - ato_s)/tau_ta_s;
  ito_s' = (iss - ito_s)/tau_ti_s;
  nKs' = alpha_n*(1 - nKs) - beta_n*nKs;
  aur' = (ass - aur)/tau_aur;
  iur' = (iss - iur)/tau_iur;
  aKss' = (ass - aKss)/tau_Kss;
  iKss' = 0;
  C_K2' = kf*C_K1 + beta_a1*O_K - (kb*C_K2 + alpha_a1*C_K2);
  C_K1' = alpha_a0*C_K0 + kb*C_K2 - (beta_a0*C_K1 + kf*C_K1);
  O_K' = alpha_a1*C_K2 + beta_i_rapid_delayed_rectifier_potassium_current*I_K - (beta_a1*O_K + alpha_i_rapid_delayed_rectifier_potassium_current*O_K);
  I_K' = alpha_i_rapid_delayed_rectifier_potassium_current*O_K - beta_i_rapid_delayed_rectifier_potassium_current*I_K;

  // Unit definitions:
  unit millisecond = 1e-3 second;
  unit per_millisecond = 1 / (1e-3 second);
  unit micromolar_per_millisecond = 1e-6 mole / (litre * 1e-3 second);
  unit per_micromolar_millisecond = litre / (1e-6 mole * 1e-3 second);
  unit micromolar3_per_millisecond = litre^3 / ((1e-6 mole)^3 * 1e-3 second);
  unit micromolar4_per_millisecond = litre^4 / ((1e-6 mole)^4 * 1e-3 second);
  unit millivolt = 1e-3 volt;
  unit per_millivolt = 1 / (1e-3 volt);
  unit millivolt2 = (1e-3 volt)^2;
  unit per_millivolt_millisecond = 1 / (1e-3 volt * 1e-3 second);
  unit milliS_per_microF = 1e-3 siemens / (1e-6 farad);
  unit picoF = 1e-12 farad;
  unit per_picoF = 1 / (1e-12 farad);
  unit microF_per_cm2 = 1e-6 farad / (0.01 metre)^2;
  unit picoA_per_picoF = 1e-12 ampere / (1e-12 farad);
  unit micromolar = 1e-6 mole / litre;
  unit joule_per_mole_kelvin = joule / (mole * kelvin);
  unit coulomb_per_millimole = coulomb / (1e-3 mole);
  unit cm2 = (0.01 metre)^2;
  unit microlitre = 1e-6 litre;
  unit time = 1e-3 second;
end
