// SBML level 2 version 3

model Bingzheng1990_GlucocorticoidsSecretion()
  // This a model from the article:
  // A mathematical model of the regulation system of the secretion of glucocorticoids
  // Liu Bingzheng, Zhao Zhenye and Chen Liansong Journal of Biological Physics 1990 17(4):221-233 doi:10.1007/BF00386598 ,
  // Abstract:
  // We propose a mathematical model for the regulation system of the secretion of glucocorticoids and determined the coefficients in the system of ordinary differential equations. Some results are calculated which agree with the experimental results.
  // This model was taken from the CellML repository and automatically converted to SBML.
  // The original model was: Liu Bingzheng, Zhao Zhenye and Chen Liansong, (1990) - version01
  // The original CellML model was created by:
  // Lloyd, Catherine, May
  // c.lloyd@aukland.ac.nz
  // The University of Auckland
  // The Bioengineering Institute
  // This model originates from BioModels Database: A Database of Annotated Published Models (http://www.ebi.ac.uk/biomodels/). It is copyright (c) 2005-2011 The BioModels.net Team.
  // To the extent possible under law, all copyright and related or neighbouring rights to this encoded model have been dedicated to the public domain worldwide. Please refer to CC0 Public Domain Dedication for more information.
  // In summary, you are entitled to use this encoded model in absolutely any manner you deem suitable, verbatim, or with modification, alone or embedded it in a larger context, redistribute it, commercially or not, in a restricted way or not..
  // To cite BioModels Database, please use: Li C, Donizelli M, Rodriguez N, Dharuri H, Endler L, Chelliah V, Li L, He E, Henry A, Stefan MI, Snoep JL, Hucka M, Le Novère N, Laibe C (2010) BioModels Database: An enhanced, curated and annotated resource for published quantitative kinetic models. BMC Syst Biol., 4:92.
  // biomodels.db:MODEL1172200168
  // isDescribedBy doi:10.1007/BF00386598
  // biomodels.db:MODEL1172200168
  // isDescribedBy doi:10.1007/BF00386598
  // biomodels.db:MODEL1172200168
  // biomodels.db:MODEL1172200168

  // Compartments:
  compartment COMpartment = 1 litre;

  // Parameters:
  X1 = 10 ng_ml;
  a0 = 0.0014 ng_ml_min;
  a1 = 0.000517 ng_ml_min;
  a2 = 0.0164 dl_microg;
  b1 = 0.0598 first_order_rate_constant;
  X2 = 0 pg_ml;
  a3 = 1.38;
  a4 = 0.6;
  a5 = 0.00498 dl_microg;
  b2 = 0.053 first_order_rate_constant;
  X3 = 0 microg_dl;
  a6 = 0.0084;
  a7 = 0.0081;
  b3 = 0.0138 first_order_rate_constant;

  // Rate rules:
  X1' = a0 + a1/(1 + a2*X3) - b1*X1;
  X2' = (a3 + a4*X1)/(1 + a5*X3) - b2*X2;
  X3' = a6 + a7*X2 - b3*X3;

  // Unit definitions:
  unit ng_ml = 1e-9 gram / (1e-3 litre);
  unit pg_ml = 1e-12 gram / (1e-3 litre);
  unit microg_dl = 1e-6 gram / (0.1 litre);
  unit dl_microg = 0.1 litre / (1e-6 gram);
  unit minute = 60 second;
  unit first_order_rate_constant = 1 / (60 second);
  unit ng_ml_min = 1e-9 gram / (1e-3 litre * 60 second);
  unit pg_ml_min = 1e-12 gram / (1e-3 litre * 60 second);
  unit microg_dl_min = 1e-6 gram / (0.1 litre * 60 second);
  unit mg_min = 1e-3 gram / (60 second);
  unit time = 60 second;
end
