// SBML level 2 version 3

model Cui2008_CardiacMyocytes()
  // This a model from the article:
  // Simulating Complex Calcium-Calcineurin Signaling Network
  // Jiangjun Cui and Jaap A. Kaandorp Lecture Notes in Computer Science 2008; Volume 5103/2008;110-119 doi:10.1007/978-3-540-69389-5_14 ,
  // Abstract:
  // Understanding of processes in which calcium signaling is involved is of fundamental importance in systems biology and has many applications in medicine. In this paper we have studied the particular case of the complex calcium-calcineurin-MCIP-NFAT signaling network in cardiac myocytes, the understanding of which is critical for treatment of pathologic hypertrophy and heart failure. By including some most recent experimental findings, we constructed a computational model totally based on biochemical principles. The model can correctly predict the mutant (MCIP1− / −) behavior under different stress such as PO (pressure overload) and CaN* (activated calcineurin) overexpression.
  // This model was taken from the CellML repository and automatically converted to SBML.
  // The original model was: Jiangjun Cui and Jaap A. Kaandorp, (2008) -version02
  // The original CellML model was created by:
  // Lloyd, Catherine, May
  // c.lloyd@aukland.ac.nz
  // The University of Auckland
  // The Bioengineering Institute
  // This model originates from BioModels Database: A Database of Annotated Published Models (http://www.ebi.ac.uk/biomodels/). It is copyright (c) 2005-2011 The BioModels.net Team.
  // To the extent possible under law, all copyright and related or neighbouring rights to this encoded model have been dedicated to the public domain worldwide. Please refer to CC0 Public Domain Dedication for more information.
  // In summary, you are entitled to use this encoded model in absolutely any manner you deem suitable, verbatim, or with modification, alone or embedded it in a larger context, redistribute it, commercially or not, in a restricted way or not..
  // To cite BioModels Database, please use: Li C, Donizelli M, Rodriguez N, Dharuri H, Endler L, Chelliah V, Li L, He E, Henry A, Stefan MI, Snoep JL, Hucka M, Le Novère N, Laibe C (2010) BioModels Database: An enhanced, curated and annotated resource for published quantitative kinetic models. BMC Syst Biol., 4:92.
  // biomodels.db:MODEL1172425728
  // isDescribedBy doi:10.1007/978-3-540-69389-5_14
  // biomodels.db:MODEL1172425728
  // isDescribedBy doi:10.1007/978-3-540-69389-5_14
  // biomodels.db:MODEL1172425728
  // biomodels.db:MODEL1172425728

  // Compartments:
  compartment COMpartment = 1 litre;

  // Parameters:
  BMK1 = 0.012 micromolar;
  MRNA = 0.000333 micromolar;
  NFATc = 2e-5 micromolar;
  NFATn = 0.000499 micromolar;
  NFATpc = 0.00494 micromolar;
  NFATpn = 8.01e-5 micromolar;
  GSK3betac = 0.17 micromolar;
  GSK3betan = 0.339 micromolar;
  CaNc = 0.91 micromolar;
  CaNc_star = 0.0275 micromolar;
  CaNn_star = 0.0568 micromolar;
  CaNn = 0.0057 micromolar;
  CaM = 25.2 micromolar;
  CaMCa = 7.88e-7 micromolar;
  MCIP = 0.000215 micromolar;
  MCIPp = 0.00776 micromolar;
  MCIPpp = 0.0798 micromolar;
  Comp1 = 0.00521 micromolar;
  Comp2 = 0.283 micromolar;
  Comp3 = 0.014 micromolar;
  P1433 = 0.708 micromolar;
  MCIP_BMK1 = 2.14e-5 micromolar;
  MCIPp_CaNc_star = 0.000107 micromolar;
  MCIPp_GSK3betac = 0.0011 micromolar;
  MCIPpp_CaNc_star = 0.0011 micromolar;
  NFATpc_CaNc_star = 8.15e-5 micromolar;
  NFATc_GSK3betac = 1.36e-6 micromolar;
  NFATpn_CaNn_star = 2.27e-6 micromolar;
  NFATn_GSK3betan = 8.46e-5 micromolar;
  v1 has flux;
  v2 has flux;
  v3 has flux;
  v4 has flux;
  v5 has flux;
  v6 has flux;
  v7 has flux;
  v8 has flux;
  v9 has flux;
  v10 has flux;
  v10a has flux;
  v10b has flux;
  v11 has flux;
  v11a has flux;
  v11b has flux;
  v12 has flux;
  v12a has flux;
  v12b has flux;
  v13 has flux;
  v13a has flux;
  v13b has flux;
  v14 has flux;
  v14a has flux;
  v14b has flux;
  v15 has flux;
  v15a has flux;
  v15b has flux;
  v16 has flux;
  v16a has flux;
  v16b has flux;
  v17 has flux;
  v17a has flux;
  v17b has flux;
  v18 has flux;
  v19 has flux;
  k1 = 5;
  k2 = 100;
  k3 = 2760 second_order_rate_constant;
  k4 = 0.072 first_order_rate_constant;
  k5 = 50 second_order_rate_constant;
  k6 = 0.0567 first_order_rate_constant;
  k7 = 5 second_order_rate_constant;
  k8 = 0.1 first_order_rate_constant;
  k9 = 0.5 first_order_rate_constant;
  k10 = 0.1 second_order_rate_constant;
  k11 = 0.1 first_order_rate_constant;
  k12 = 0.1 first_order_rate_constant;
  k13 = 0.5 second_order_rate_constant;
  k14 = 0.5 first_order_rate_constant;
  k15 = 0.1 first_order_rate_constant;
  k16 = 0.1 second_order_rate_constant;
  k17 = 0.1 first_order_rate_constant;
  k18 = 0.1 first_order_rate_constant;
  k19 = 0.5 second_order_rate_constant;
  k20 = 0.1 first_order_rate_constant;
  k21 = 0.15 second_order_rate_constant;
  k22 = 0.15 first_order_rate_constant;
  k23 = 0.15 first_order_rate_constant;
  k24 = 0.1 second_order_rate_constant;
  k25 = 0.15 first_order_rate_constant;
  k26 = 0.1 first_order_rate_constant;
  k27 = 0.4 second_order_rate_constant;
  k28 = 0.1 first_order_rate_constant;
  k29 = 0.4 first_order_rate_constant;
  k30 = 0.1 first_order_rate_constant;
  k31 = 0.1 first_order_rate_constant;
  k32 = 0.05 first_order_rate_constant;
  k33 = 0.114 first_order_rate_constant;
  k34 = 0.0552 first_order_rate_constant;
  k35 = 0.15 second_order_rate_constant;
  k36 = 0.1 first_order_rate_constant;
  k37 = 0.2 first_order_rate_constant;
  k38 = 0.1 second_order_rate_constant;
  k39 = 0.1 first_order_rate_constant;
  k40 = 0.1 first_order_rate_constant;
  k41 = 0.02 first_order_rate_constant;
  k42 = 0.03 first_order_rate_constant;
  k43 = 0.03 first_order_rate_constant;
  t_half = 15 minute;
  Ca = 0.2 micromolar;

  // Assignment rules:
  v1 := k29*NFATc;
  v2 := k30*NFATpn;
  v3 := k31*GSK3betac - k32*GSK3betan;
  v4 := k33*CaNc_star - k34*CaNn_star;
  v5 := k1*CaM*Ca^4 - k2*CaMCa;
  v6 := k3*CaMCa*CaNc - k4*CaNc_star;
  v7 := k5*CaNc_star*MCIP - k6*Comp1;
  v8 := k19*P1433*MCIPpp - k20*Comp2;
  v9 := k27*NFATpc*P1433 - k28*Comp3;
  v10a := k7*MCIP*BMK1 - k8*MCIP_BMK1;
  v10b := k9*MCIP_BMK1;
  v10 := v10a + v10b;
  v11a := k10*MCIPp*CaNc_star - k11*MCIPp_CaNc_star;
  v11b := k12*MCIPp_CaNc_star;
  v11 := v11a + v11b;
  v12a := k13*MCIPp*GSK3betac - k14*MCIPp_GSK3betac;
  v12b := k15*MCIPp_GSK3betac;
  v12 := v12a + v12b;
  v13a := k16*MCIPpp*CaNc_star - k17*MCIPpp_CaNc_star;
  v13b := k18*MCIPpp_CaNc_star;
  v13 := v13a + v13b;
  v14a := k21*NFATpc*CaNc_star - k22*NFATpc_CaNc_star;
  v14b := k23*NFATpc_CaNc_star;
  v14 := v14a + v14b;
  v15a := k24*NFATc*GSK3betac - k25*NFATc_GSK3betac;
  v15b := k26*NFATc_GSK3betac;
  v15 := v15a + v15b;
  v16a := k35*NFATpn*CaNn_star - k36*NFATpn_CaNn_star;
  v16b := k37*NFATpn_CaNn_star;
  v16 := v16a + v16b;
  v17a := k38*NFATn*GSK3betan - k39*NFATn_GSK3betan;
  v17b := k40*NFATn_GSK3betan;
  v17 := v17a + v17b;
  v18 := k41*NFATn - k42*MRNA;
  v19 := k43*MRNA - ln(2)/t_half*MCIP;

  // Rate rules:
  BMK1' = v10b - v10a;
  MRNA' = v19 - v18;
  NFATc' = v14 - (v1 + v15);
  NFATn' = v1 + v16 - (v17 + v18);
  NFATpc' = v2 + v15 - (v9 + v14);
  NFATpn' = v17 - (v2 + v16);
  GSK3betac' = v12b + v15b - (v3 + v12a + v15a);
  GSK3betan' = v3 + v17b - v17a;
  CaNc' = -v6;
  CaNc_star' = v6 + v11b + v13b + v14b - (v4 + v7 + v11a + v13a + v14a);
  CaNn_star' = v4 + v16b - v16a;
  CaNn' = -v6;
  CaM' = -v5;
  CaMCa' = v5 - v6;
  MCIP' = v11 - (v7 + v10 + v19);
  MCIPp' = v10 + v13 - (v11 + v12);
  MCIPpp' = v12 - (v8 + v13);
  Comp1' = v7;
  Comp2' = v8;
  Comp3' = v9;
  P1433' = -(v8 + v9);
  MCIP_BMK1' = v10a - v10b;
  MCIPp_CaNc_star' = v11a - v11b;
  MCIPp_GSK3betac' = v12a - v12b;
  MCIPpp_CaNc_star' = v13a - v13b;
  NFATpc_CaNc_star' = v14a - v14b;
  NFATc_GSK3betac' = v15a - v15b;
  NFATpn_CaNn_star' = v16a - v16b;
  NFATn_GSK3betan' = v17a - v17b;

  // Unit definitions:
  unit minute = 60 second;
  unit micromolar = 1e-9 mole / litre;
  unit flux = 1e-9 mole / (litre * 60 second);
  unit first_order_rate_constant = 1 / (60 second);
  unit second_order_rate_constant = litre / (1e-9 mole * 60 second);
  unit fifth_order_rate_constant = litre^4 / ((1e-9 mole)^4 * 60 second);
  unit time = 60 second;
end
