// SBML level 2 version 3

model Cui2008_ZincHomeostasisSystem()
  // This a model from the article:
  // Simulating in vitro transcriptional response of zinc homeostasis system in Escherichia coli.
  // Cui J, Kaandorp JA, Lloyd CM. BMC Syst Biol 2008 Oct 24;2:89 18950480 ,
  // Abstract:
  // BACKGROUND: The zinc homeostasis system in Escherichia coli is one of the most intensively studied prokaryotic zinc homeostasis systems. Its underlying regulatory machine consists of repression on zinc influx through ZnuABC by Zur (Zn2+ uptake regulator) and activation on zinc efflux via ZntA by ZntR (a zinc-responsive regulator). Although these transcriptional regulations seem to be well characterized, and there is an abundance of detailed in vitro experimental data available, as yet there is no mathematical model to help interpret these data. To our knowledge, the work described here is the first attempt to use a mathematical model to simulate these regulatory relations and to help explain the in vitro experimental data. RESULTS: We develop a unified mathematical model consisting of 14 reactions to simulate the in vitro transcriptional response of the zinc homeostasis system in E. coli. Firstly, we simulate the in vitro Zur-DNA interaction by using two of these reactions, which are expressed as 4 ordinary differential equations (ODEs). By imposing the conservation restraints and solving the relevant steady state equations, we find that the simulated sigmoidal curve matches the corresponding experimental data. Secondly, by numerically solving the ODEs for simulating the Zur and ZntR run-off transcription experiments, and depicting the simulated concentrations of zntA and znuC transcripts as a function of free zinc concentration, we find that the simulated curves fit the corresponding in vitro experimental data. Moreover, we also perform simulations, after taking into consideration the competitive effects of ZntR with the zinc buffer, and depict the simulated concentration of zntA transcripts as a function of the total ZntR concentration, both in the presence and absence of Zn(II). The obtained simulation results are in general agreement with the corresponding experimental data. CONCLUSION: Simulation results show that our model can quantitatively reproduce the results of several of the in vitro experiments conducted by Outten CE and her colleagues. Our model provides a detailed insight into the dynamics of the regulatory system and also provides a general framework for simulating in vitro metal-binding and transcription experiments and interpreting the relevant experimental data.
  // This model was taken from the CellML repository and automatically converted to SBML.
  // The original model was: Cui J, Kaandorp JA, Lloyd CM. (2008) - version01
  // The original CellML model was created by:
  // Lloyd, Catherine, May
  // c.lloyd@aukland.ac.nz
  // The University of Auckland
  // The Bioengineering Institute
  // This model originates from BioModels Database: A Database of Annotated Published Models. It is copyright (c) 2005-2011 The BioModels.net Team.
  // To the extent possible under law, all copyright and related or neighbouring rights to this encoded model have been dedicated to the public domain worldwide. Please refer to CC0 Public Domain Dedication for more information.
  // In summary, you are entitled to use this encoded model in absolutely any manner you deem suitable, verbatim, or with modification, alone or embedded it in a larger context, redistribute it, commercially or not, in a restricted way or not..
  // To cite BioModels Database, please use: Li C, Donizelli M, Rodriguez N, Dharuri H, Endler L, Chelliah V, Li L, He E, Henry A, Stefan MI, Snoep JL, Hucka M, Le Novère N, Laibe C (2010) BioModels Database: An enhanced, curated and annotated resource for published quantitative kinetic models. BMC Syst Biol., 4:92.
  // biomodels.db:MODEL1172501439
  // isDescribedBy pubmed:18950480
  // biomodels.db:MODEL1172501439
  // isDescribedBy pubmed:18950480
  // biomodels.db:MODEL1172501439
  // biomodels.db:MODEL1172501439

  // Compartments:
  compartment COMpartment = 1 litre;

  // Parameters:
  time_environment has second;
  Py = 25 nanomolar;
  Py1 = 0 nanomolar;
  Dw = 4 nanomolar;
  Rw = 50 nanomolar;
  Qw1 = 0 nanomolar;
  Qw2 = 0 nanomolar;
  Mw = 0 nanomolar;
  Px = 25 nanomolar;
  Px1 = 0 nanomolar;
  Dz = 4 nanomolar;
  Rz = 50 nanomolar;
  Qz1 = 0 nanomolar;
  Qz2 = 0 nanomolar;
  Qz3 = 0 nanomolar;
  Qz4 = 0 nanomolar;
  Qz5 = 0 nanomolar;
  Mz = 0 nanomolar;
  r1 = 273 second_order_rate_constant;
  r2 = 0.0003437 first_order_rate_constant;
  r3 = 4.41e10 third_order_rate_constant;
  r4 = 0.009 first_order_rate_constant;
  Zn = 1e-5 nanomolar;
  k1 = 0.025 second_order_rate_constant;
  k1a = 1 second_order_rate_constant;
  k1b = 0.01253 second_order_rate_constant;
  k_1 = 0.9 first_order_rate_constant;
  k2 = 0.02 second_order_rate_constant;
  k2a = 5e-5 second_order_rate_constant;
  k2b = 0.0002 second_order_rate_constant;
  k2c = 0.0037 second_order_rate_constant;
  k_2 = 0.3 first_order_rate_constant;
  k3 has first_order_rate_constant;
  td0 = 1800 second;
  td = 2700 second;

  // Assignment rules:
  k3 := piecewise(0, (time_environment >= 0) && (time_environment < td0), 0.011, (time_environment >= td0) && (time_environment < td));

  // Rate rules:
  Py' = r4*Py1 - r3*Zn^2*Py;
  Py1' = r3*Zn^2*Py + k_1*Qw2 - (r4*Py1 + k1a*Dw*Py1);
  Dw' = k_1*Qw2 + k3*Qw1 + k_2*Qw1 - (k1a*Dw*Py1 + k2*Dw*Rw);
  Rw' = k3*Qw1 + k_2*Qw1 - k2*Dw*Rw;
  Qw1' = k2*Dw*Rw - (k3*Qw1 + k_2*Qw1);
  Qw2' = k1a*Dw*Py1 - k_1*Qw2;
  Mw' = k3*Qw1;
  Px' = r2*Px1 + k_1*Qz4 - (r1*Zn*Px + k1b*Dz*Px);
  Px1' = r1*Zn*Px + k_1*Qz2 - (r2*Px1 + k1*Dz*Px1);
  Dz' = k_1*Qz2 + k3*Qz1 + k_2*Qz1 + k_1*Qz4 - (k1b*Dz*Px + k1*Dz*Px1 + k2a*Dz*Rz);
  Rz' = k3*Qz1 + k_2*Qz1 + k3*Qz3 + k_2*Qz3 + k3*Qz5 + k_2*Qz5 - (k2a*Dz*Rz + k2b*Qz4*Rz + k2c*Qz2*Rz);
  Qz1' = k2a*Dz*Rz - (k3*Qz1 + k_2*Qz1);
  Qz2' = k1*Dz*Px1 + k3*Qz3 + k_2*Qz3 - (k_1*Qz2 + k2c*Qz2*Rz);
  Qz3' = k2c*Qz2*Rz - (k3*Qz3 + k_2*Qz3);
  Qz4' = k1b*Dz*Px + k3*Qz5 + k_2*Qz5 - (k_1*Qz4 + k2b*Qz4*Rz);
  Qz5' = k2b*Qz4*Rz - (k3*Qz5 + k_2*Qz5);
  Mz' = k3*Qz1 + k3*Qz3 + k3*Qz5;

  // Unit definitions:
  unit minute = 60 second;
  unit molar = mole / litre;
  unit per_molar = litre / mole;
  unit nanomolar = 1e-9 mole / litre;
  unit first_order_rate_constant = 1 / second;
  unit second_order_rate_constant = litre / (1e-9 mole * second);
  unit third_order_rate_constant = litre^2 / ((1e-9 mole)^2 * second);
end
