// SBML level 2 version 3

model DePaor1986_CirculatoryAutoregulation()
  // This a model from the article:
  // A feedback oscillator model for circulatory autoregulation
  // Annraoi M. De Paor, Patrick Timmons International Journal of Control 1986 43(2):679-688 doi:10.1080/00207178608933494 ,
  // Abstract:
  // Circulatory autregulation is the phenomenon whereby an isolated organ can maintain a constant or almost-constant blood flow rate over a range of perfusion pressures. A mathematical model is developed, based on work reported in the physiological literature, and tuned to show that autoregulation can be accomplished by pressure-induced oscillations in arteriolar radius. Various features known lo be exhibited by skeletal muscle and by stretch receptors are incorporated in the model of smooth muscle surrounding the arterioles.
  // This model was taken from the CellML repository and automatically converted to SBML.
  // The original model was: Annraoi M. De Paor, Patrick Timmons, (1986) - version03
  // The original CellML model was created by:
  // Lloyd, Catherine, May
  // c.lloyd@aukland.ac.nz
  // The University of Auckland
  // The Bioengineering Institute
  // This model originates from BioModels Database: A Database of Annotated Published Models (http://www.ebi.ac.uk/biomodels/). It is copyright (c) 2005-2011 The BioModels.net Team.
  // To the extent possible under law, all copyright and related or neighbouring rights to this encoded model have been dedicated to the public domain worldwide. Please refer to CC0 Public Domain Dedication for more information.
  // In summary, you are entitled to use this encoded model in absolutely any manner you deem suitable, verbatim, or with modification, alone or embedded it in a larger context, redistribute it, commercially or not, in a restricted way or not..
  // To cite BioModels Database, please use: Li C, Donizelli M, Rodriguez N, Dharuri H, Endler L, Chelliah V, Li L, He E, Henry A, Stefan MI, Snoep JL, Hucka M, Le Novère N, Laibe C (2010) BioModels Database: An enhanced, curated and annotated resource for published quantitative kinetic models. BMC Syst Biol., 4:92.
  // biomodels.db:MODEL1172940336
  // isDescribedBy doi:10.1080/00207178608933494
  // biomodels.db:MODEL1172940336
  // isDescribedBy doi:10.1080/00207178608933494
  // biomodels.db:MODEL1172940336
  // biomodels.db:MODEL1172940336

  // Compartments:
  compartment COMpartment = 1;

  // Parameters:
  time_environment has dimensionless;
  f has dimensionless;
  a = 1 dimensionless;
  r = 0.5 dimensionless;
  beta = 1 pertime;
  alpha = 1 dimensionless;
  y has dimensionless;
  z has pertime;
  x1 = 0 dimensionless;
  q has dimensionless;
  d = 5 dimensionless;
  k = 10.5 dimensionless;
  x2 = 0 dimensionless;
  x3 = 0 dimensionless;
  m has dimensionless;
  phi has dimensionless;
  ur0 has dimensionless;
  ur1 has dimensionless;
  uz has dimensionless;
  h = 0 dimensionless;
  r0 = 0.5 dimensionless;
  r1 = 1.2 dimensionless;
  t1 = 0.1 time;
  t2 = 0.5 time;
  t4 = 20 time;
  p = 1.05 dimensionless;

  // Assignment rules:
  f := a*p*r^4;
  y := (r - r1)*ur1;
  z := (y - x1)/t1;
  q := k*(1 - exp(-(d*z)))*uz;
  m := x3*phi;
  phi := piecewise(0, r < 0.25, 0, r > 2, 1 - 1.3061225*(r - 1.125)*(r - 1.125));
  ur0 := piecewise(1, r > r0, 0);
  ur1 := piecewise(1, r > r1, 0);
  uz := piecewise(1, z > 0, 0);

  // Rate rules:
  r' = beta*(p*r - (alpha*(r - r0)^2*ur0 + m));
  x1' = (y - x1)/t1;
  x2' = (q - x2)/t2;
  x3' = (x2 - x3)/t2;
  h' = (f - h)/t4;

  // Unit definitions:
  unit substance = dimensionless; substance is "normalised";
  unit pertime = 1 / second;
end
