// SBML level 2 version 3

model Gilbert2008_ElectrochemicalBiosensor()
  // This a model from the article:
  // A Case Study in Model-driven Synthetic Biology
  // David Gilbert, Monika Heiner, Susan Rosser, Rachael Fulton, Xu Gu and Maciej Trybilo IFIP International Federation for Information Processing 2008; Volume 268:163-175 doi:10.1007/978-0-387-09655-1_15 ,
  // Abstract:
  // We report on a case study in synthetic biology, demonstrating the model-driven design of a self-powering electrochemical biosensor. An essential result of the design process is a general template of a biosensor, which can be instantiated to be adapted to specific pollutants. This template represents a gene expression network extended by metabolic activity. We illustrate the model-based analysis of this template using qualitative, stochastic and continuous Petri nets and related analysis techniques, contributing to a reliable and robust design.
  // This model was taken from the CellML repository and automatically converted to SBML.
  // The original model was: David Gilbert, Monika Heiner, Susan Rosser, Rachael Fulton, Xu Gu and Maciej Trybilo. (2007) - version01
  // The original CellML model was created by:
  // Cooling, Mike
  // m.cooling@aukland.ac.nz
  // The University of Auckland
  // The Bioengineering Institute
  // This model originates from BioModels Database: A Database of Annotated Published Models. It is copyright (c) 2005-2011 The BioModels.net Team.
  // To the extent possible under law, all copyright and related or neighbouring rights to this encoded model have been dedicated to the public domain worldwide. Please refer to CC0 Public Domain Dedication for more information.
  // In summary, you are entitled to use this encoded model in absolutely any manner you deem suitable, verbatim, or with modification, alone or embedded it in a larger context, redistribute it, commercially or not, in a restricted way or not..
  // To cite BioModels Database, please use: Li C, Donizelli M, Rodriguez N, Dharuri H, Endler L, Chelliah V, Li L, He E, Henry A, Stefan MI, Snoep JL, Hucka M, Le Novère N, Laibe C (2010) BioModels Database: An enhanced, curated and annotated resource for published quantitative kinetic models. BMC Syst Biol., 4:92.
  // biomodels.db:MODEL1173105855
  // isDescribedBy doi:10.1007/978-0-387-09655-1_15
  // biomodels.db:MODEL1173105855
  // isDescribedBy doi:10.1007/978-0-387-09655-1_15
  // biomodels.db:MODEL1173105855
  // biomodels.db:MODEL1173105855

  // Compartments:
  compartment COMpartment = 1 litre;

  // Parameters:
  time_temporalExistence has second;
  alphaTF = 0.05 uM_per_second;
  JTF_Device_TFgenerator has uM_per_second;
  Jgain_TF has uM_per_second;
  Jgain_TFS has uM_per_second;
  TFS = 0 uM;
  TF = 8.6207 uM;
  s = 5 uM;
  betaTFS = 1000000 per_uM_per_second;
  kd = 4000000 per_second;
  deltaTFS = 0.0003851 per_second;
  deltaTF = 0.0058 per_second;
  Jassociation has uM_per_second;
  gammaPhzMS = 5 uM;
  betaPhzMS = 0.1 uM_per_second;
  JPhzMS has uM_per_second;
  gammaTF = 4 uM;
  betaTF = 0.07 uM_per_second;
  feedbackOn = 1 dimensionless;
  JTF_Device_PhzMSgenerator has uM_per_second;
  Jgain_PhzMS has uM_per_second;
  Jgain_PYO has uM_per_second;
  PhzMS = 0 uM;
  PYO = 0 uM;
  deltaPhzMS = 8.0225e-6 per_second;
  alphaPYO = 1.3 per_second;
  deltaPYO = 0.58 per_second;
  JPYOformation has uM_per_second;

  // Assignment rules:
  JTF_Device_TFgenerator := alphaTF;
  Jgain_TFS := 0;
  Jgain_TF := JTF_Device_TFgenerator + JTF_Device_PhzMSgenerator;
  Jassociation := betaTFS*s*TF - kd*TFS;
  JTF_Device_PhzMSgenerator := piecewise(betaTF*TFS/(gammaTF + TFS), feedbackOn != 0, 0);
  JPhzMS := betaPhzMS*TFS/(gammaPhzMS + TFS);
  Jgain_PYO := 0;
  Jgain_PhzMS := JPhzMS;
  JPYOformation := alphaPYO*PhzMS;

  // Rate rules:
  TF' = -Jassociation + Jgain_TF - deltaTF*TF;
  TFS' = Jassociation - deltaTFS*TFS + Jgain_TFS;
  PhzMS' = Jgain_PhzMS - deltaPhzMS*PhzMS;
  PYO' = Jgain_PYO - deltaPYO*PYO + JPYOformation;

  // Unit definitions:
  unit per_second = 1 / second;
  unit uM = 1e-6 mole / litre;
  unit uM_per_second = 1e-6 mole / (litre * second);
  unit per_uM_per_second = litre / (1e-6 mole * second);
end
