// SBML level 2 version 4

model Gall1999_CalciumBursting_BetaCellModel_A()
  // This a model from the article:
  // Effect of Na/Ca exchange on plateau fraction and [Ca]i in models for bursting in pancreatic beta-cells.
  // Gall D, Susa I. Biophys J. 1999 Jul;77(1):45-53. 10388739 ,
  // Abstract:
  // In the presence of an insulinotropic glucose concentration, beta-cells, in intact pancreatic islets, exhibit periodic bursting electrical activity consisting of an alternation of active and silent phases. The fraction of time spent in the active phase over a period is called the plateau fraction and is correlated with the rate of insulin release. However, the mechanisms that regulate the plateau fraction remain unclear. In this paper we investigate the possible role of the plasma membrane Na+/Ca2+ exchange of the beta-cell in controlling the plateau fraction. We have extended different single-cell models to incorporate this Ca2+-activated electrogenic Ca2+ transporter. We find that the Na+/Ca2+ exchange can provide a physiological mechanism to increase the plateau fraction as the glucose concentration is raised. In addition, we show theoretically that the Na+/Ca2+ exchanger is a key regulator of the cytoplasmic calcium concentration in clusters of heterogeneous cells with gap-junctional electrical coupling.
  // This model was taken from the CellML repository and automatically converted to SBML.
  // The original model was: Gall and Susa(1999)_Model A
  // The original CellML model was created by:
  // Catherine Lloyd
  // c.lloyd@aukland.ac.nz
  // The University of Auckland
  // The Bioengineering Institute
  // This model originates from BioModels Database: A Database of Annotated Published Models (http://www.ebi.ac.uk/biomodels/). It is copyright (c) 2005-2011 The BioModels.net Team.
  // To the extent possible under law, all copyright and related or neighbouring rights to this encoded model have been dedicated to the public domain worldwide. Please refer to CC0 Public Domain Dedication for more information.
  // In summary, you are entitled to use this encoded model in absolutely any manner you deem suitable, verbatim, or with modification, alone or embedded it in a larger context, redistribute it, commercially or not, in a restricted way or not..
  // To cite BioModels Database, please use: Li C, Donizelli M, Rodriguez N, Dharuri H, Endler L, Chelliah V, Li L, He E, Henry A, Stefan MI, Snoep JL, Hucka M, Le Novère N, Laibe C (2010) BioModels Database: An enhanced, curated and annotated resource for published quantitative kinetic models. BMC Syst Biol., 4:92.
  // biomodels.db:MODEL1201070000
  // isDescribedBy pubmed:10388739
  // biomodels.db:MODEL1201070000
  // biomodels.db:MODEL1201070000
  // isDescribedBy pubmed:10388739

  // Compartments:
  compartment COMpartment = 1;

  // Parameters:
  time_environment = ;
  V_membrane = -76;
  Cm = 5310;
  V_K = -75;
  g_K = 2500;
  n = 0.1;
  lamda = 1.6;
  V_n = -15;
  S_n = 5.6;
  a = 65;
  b = 20;
  c = 6;
  V_ = -75;
  V_rapidly_activating_K_current_n_gate = ;
  time_rapidly_activating_K_current_n_gate = ;
  V_Ca = 110;
  g_Ca = 1400;
  V_m = 4;
  S_m = 14;
  V_calcium_current_m_gate = ;
  time_calcium_current_m_gate = ;
  V_h = -10;
  S_h = -10;
  V_calcium_current_h_gate = ;
  time_calcium_current_h_gate = ;
  g_K_Ca = 30000;
  K_d = 100;
  g_Na_Ca = 234;
  K_1_2 = 1.5;
  RT_F = 26.54;
  nH = 5;
  Ca_i = 0.52;
  Ca_o = 2600;
  Na_i = 10;
  Na_o = 140;
  f = 0.001;
  k_Ca = 0.03;
  alpha = 4.5055e-6;

  // Assignment rules:
  i_K := g_K*n*(V_membrane - V_K);
  n_infinity := 1/(1 + exp((V_n - V_rapidly_activating_K_current_n_gate)/S_n));
  tau_n := c/(exp((V_rapidly_activating_K_current_n_gate - V_)/a) + exp((V_ - V_rapidly_activating_K_current_n_gate)/b));
  i_Ca := g_Ca*m_infinity*h*(V_membrane - V_Ca);
  m_infinity := 1/(1 + exp((V_m - V_calcium_current_m_gate)/S_m));
  h := 1/(1 + exp((V_h - V_calcium_current_h_gate)/S_h));
  i_K_Ca := g_K_Ca*(Ca_i/(K_d + Ca_i))*(V_membrane - V_K);
  i_Na_Ca := g_Na_Ca*(Ca_i^nH/(K_1_2^nH + Ca_i^nH))*(V_membrane - V_Na_Ca);
  V_Na_Ca := RT_F*3*ln(Na_o/Na_i - ln(Ca_o/Ca_i));

  // Rate rules:
  V_membrane' = -(i_K + i_Ca + i_K_Ca + i_Na_Ca)/Cm;
  n' = lamda*((n_infinity - n)/tau_n);
  Ca_i' = f*(-alpha*(i_Ca - 2*i_Na_Ca) - k_Ca*Ca_i);
end
