// SBML level 2 version 4

model Gall1999_CalciumBursting_BetaCellModel_B()
  // This a model from the article:
  // Effect of Na/Ca exchange on plateau fraction and [Ca]i in models for bursting in pancreatic beta-cells.
  // Gall D, Susa I. Biophys J. 1999 Jul;77(1):45-53. 10388739 ,
  // Abstract:
  // In the presence of an insulinotropic glucose concentration, beta-cells, in intact pancreatic islets, exhibit periodic bursting electrical activity consisting of an alternation of active and silent phases. The fraction of time spent in the active phase over a period is called the plateau fraction and is correlated with the rate of insulin release. However, the mechanisms that regulate the plateau fraction remain unclear. In this paper we investigate the possible role of the plasma membrane Na+/Ca2+ exchange of the beta-cell in controlling the plateau fraction. We have extended different single-cell models to incorporate this Ca2+-activated electrogenic Ca2+ transporter. We find that the Na+/Ca2+ exchange can provide a physiological mechanism to increase the plateau fraction as the glucose concentration is raised. In addition, we show theoretically that the Na+/Ca2+ exchanger is a key regulator of the cytoplasmic calcium concentration in clusters of heterogeneous cells with gap-junctional electrical coupling.
  // This model was taken from the CellML repository and automatically converted to SBML.
  // The original model was: Gall and Susa(1999)_Model B
  // The original CellML model was created by:
  // Catherine Lloyd
  // c.lloyd@aukland.ac.nz
  // The University of Auckland
  // The Bioengineering Institute
  // This model originates from BioModels Database: A Database of Annotated Published Models (http://www.ebi.ac.uk/biomodels/).
  // To the extent possible under law, all copyright and related or neighbouring rights to this encoded model have been dedicated to the public domain worldwide. Please refer to CC0 Public Domain Dedication for more information.
  // In summary, you are entitled to use this encoded model in absolutely any manner you deem suitable, verbatim, or with modification, alone or embedded it in a larger context, redistribute it, commercially or not, in a restricted way or not..
  // To cite BioModels Database, please use: Li C, Donizelli M, Rodriguez N, Dharuri H, Endler L, Chelliah V, Li L, He E, Henry A, Stefan MI, Snoep JL, Hucka M, Le Novère N, Laibe C (2010) BioModels Database: An enhanced, curated and annotated resource for published quantitative kinetic models. BMC Syst Biol., 4:92.
  // biomodels.db:MODEL1201070001
  // isDescribedBy pubmed:10388739
  // biomodels.db:MODEL1201070001
  // isDescribedBy pubmed:10388739
  // biomodels.db:MODEL1201070001
  // biomodels.db:MODEL1201070001

  // Compartments:
  compartment COMpartment = 1;

  // Parameters:
  time_environment = ;
  V_membrane = -76;
  Cm = 5310;
  V_K = -75;
  g_K = 2700;
  n = 0.1;
  lamda = 1;
  tau_n = 20;
  V_n = -16;
  S_n = 5.6;
  V_rapidly_activating_K_current_n_gate = ;
  time_rapidly_activating_K_current_n_gate = ;
  V_Ca = 25;
  g_Ca = 1000;
  m_infinity has dimensionless;
  V_m = -20;
  S_m = 12;
  V_calcium_current_m_gate = ;
  time_calcium_current_m_gate = ;
  g_s = 200;
  s = 0.1;
  tau_s = 12000;
  V_s = -52;
  S_s = 10;
  R_s = 0.58;
  V_slow_K_current_s_gate = ;
  time_slow_K_current_s_gate = ;
  g_Na_Ca = 350;
  K_1_2 = 1.5;
  RT_F = 26.54;
  nH = 5;
  Ca_i = 0.52;
  Ca_o = 2600;
  Na_i = 10;
  Na_o = 140;
  Ca_ret = 0.7;
  f = 0.02;
  k_Ca = 0.64;
  k_rel = 0.0006;
  k_pump = 0.2;
  alpha = 6e-5;

  // Assignment rules:
  i_K := g_K*n*(V_membrane - V_K);
  n_infinity := 1/(1 + exp((V_n - V_rapidly_activating_K_current_n_gate)/S_n));
  i_Ca := g_Ca*m_infinity*(V_membrane - V_Ca);
  m_infinity := 1/(1 + exp((V_m - V_calcium_current_m_gate)/S_m));
  i_slow := g_s*s*(V_membrane - V_K);
  S_V_R_s := s_infinity + R_s;
  s_infinity := 1/(1 + exp((V_s - V_slow_K_current_s_gate)/S_s));
  i_Na_Ca := g_Na_Ca*(Ca_i^nH/(K_1_2^nH + Ca_i^nH))*(V_membrane - V_Na_Ca);
  V_Na_Ca := RT_F*3*ln(Na_o/Na_i - ln(Ca_o/Ca_i));

  // Rate rules:
  V_membrane' = -(i_K + i_Ca + i_slow + i_Na_Ca)/Cm;
  n' = lamda*((n_infinity - n)/tau_n);
  s' = (S_V_R_s - s)/tau_s;
  Ca_i' = f*(-alpha*(i_Ca - 2*i_Na_Ca) - k_Ca*Ca_i) + k_rel*(Ca_ret - Ca_i) - k_pump*Ca_i;
  Ca_ret' = -k_rel*(Ca_ret - Ca_i) + k_pump*Ca_i;
end
