// SBML level 2 version 4

model Keener2001_OscillatoryInsulinSecretionModel()
  // This a model from the article:
  // Diffusion induced oscillatory insulin secretion.
  // Keener JP. Bull Math Biol. 2001 Jul;63(4):625-41. 11497161 ,
  // Abstract:
  // Oscillatory secretion of insulin has been observed in many different experimental preparations. Here we examine a mathematical model for in vitro insulin secretion from pancreatic beta cells in a flow-through reactor. The analysis shows that oscillations result because of an important interplay between flow rate of the reactor and insulin diffusion. In particular, if the ratio of flow rate to volume of the reaction bed is too large, oscillations are eliminated, in contradiction to the conclusions of Maki and Keizer (L. W. Maki and Keizer J. Mathematical analysis of a proposed mechanism for oscillatory insulin secretion in perifused HIT-15 cells. Bull. Math. Biol., 57(1995), 569-591). Furthermore, with reasonable numbers for the experimental parameters and the diffusion of insulin, the model equations do not exhibit oscillations.
  // This model was taken from the CellML repository and automatically converted to SBML.
  // The original model was: Keener (2001)
  // The original CellML model was created by:
  // Catherine Lloyd
  // c.lloyd@aukland.ac.nz
  // The University of Auckland
  // The Bioengineering Institute
  // This model originates from BioModels Database: A Database of Annotated Published Models (http://www.ebi.ac.uk/biomodels/). It is copyright (c) 2005-2011 The BioModels.net Team.
  // To the extent possible under law, all copyright and related or neighbouring rights to this encoded model have been dedicated to the public domain worldwide. Please refer to CC0 Public Domain Dedication for more information.
  // In summary, you are entitled to use this encoded model in absolutely any manner you deem suitable, verbatim, or with modification, alone or embedded it in a larger context, redistribute it, commercially or not, in a restricted way or not..
  // To cite BioModels Database, please use: Li C, Donizelli M, Rodriguez N, Dharuri H, Endler L, Chelliah V, Li L, He E, Henry A, Stefan MI, Snoep JL, Hucka M, Le Novère N, Laibe C (2010) BioModels Database: An enhanced, curated and annotated resource for published quantitative kinetic models. BMC Syst Biol., 4:92.
  // biomodels.db:MODEL1201140001
  // isDescribedBy pubmed:11497161
  // biomodels.db:MODEL1201140001
  // biomodels.db:MODEL1201140001
  // isDescribedBy pubmed:11497161

  // Compartments:
  compartment COMpartment = 1;

  // Parameters:
  time_environment = ;
  rho = ;
  G_i = 0;
  G = 5;
  x = 0.1;
  V = 3.8;
  D_G = 6.6e-6;
  A = ;
  B = ;
  I = 0;
  D_I = 2.1e-6;
  C = ;
  D = ;
  J = ;
  J_tau = 20;
  K_inh = 1e-6;
  Vm = 0.24;
  Km = 9.8;
  V1 = 120;
  K1 = 1.4;
  Ki = 4e-5;
  V2 = 32;
  K2 = 17;
  Jm = ;
  Vs = 0.034;
  Ks = 0.13;
  L = 0.01;

  // Assignment rules:
  J_infinity := K_inh/(K_inh + I);
  Rm := rho*(Vm*G_i/(Km + G_i));
  R1 := rho*(V1*(G - G_i)/((K1 + G_i)*(1 + G/K1)))*(I/(Ki + I));
  R2 := rho*(V2*(G*Jm - G_i)/((K2 + G_i)*(1 + G/K2)));
  Rs := Vs*(Rm^4 + rho^4*L^4)/(Rm^4 + rho^4*Ks^4 + rho^4*L^4);

  // Rate rules:
  G_i' = (R1 + R2 - Rm)/rho;
  J' = J_tau*(J_infinity - J);
end
