// SBML level 2 version 4

model Lenbury2001_InsulinKineticsModel_B()
  // This a model from the article:
  // Modeling insulin kinetics: responses to a single oral glucose administration or ambulatory-fed conditions.
  // Lenbury Y, Ruktamatakul S, Amornsamarnkul S. Biosystems. 2001 Jan;59(1):15-25. 11226623 ,
  // Abstract:
  // This paper presents a nonlinear mathematical model of the glucose-insulin feedback system, which has been extended to incorporate the beta-cells' function on maintaining and regulating plasma insulin level in man. Initially, a gastrointestinal absorption term for glucose is utilized to effect the glucose absorption by the intestine and the subsequent release of glucose into the bloodstream, taking place at a given initial rate and falling off exponentially with time. An analysis of the model is carried out by the singular perturbation technique in order to derive boundary conditions on the system parameters which identify, in particular, the existence of limit cycles in our model system consistent with the oscillatory patterns often observed in clinical data. We then utilize a sinusoidal term to incorporate the temporal absorption of glucose in order to study the responses in the patients under ambulatory-fed conditions. A numerical investigation is carried out in this case to construct a bifurcation diagram to identify the ranges of parametric values for which chaotic behavior can be expected, leading to interesting biological interpretations.
  // This model was taken from the CellML repository and automatically converted to SBML.
  // The original model was: lenbury_ruktamatakul_amornsamarnkul_2001_B
  // The original CellML model was created by:
  // Catherine Lloyd
  // c.lloyd@aukland.ac.nz
  // The University of Auckland
  // The Bioengineering Institute
  // This model originates from BioModels Database: A Database of Annotated Published Models (http://www.ebi.ac.uk/biomodels/). It is copyright (c) 2005-2011 The BioModels.net Team.
  // To the extent possible under law, all copyright and related or neighbouring rights to this encoded model have been dedicated to the public domain worldwide. Please refer to CC0 Public Domain Dedication for more information.
  // In summary, you are entitled to use this encoded model in absolutely any manner you deem suitable, verbatim, or with modification, alone or embedded it in a larger context, redistribute it, commercially or not, in a restricted way or not..
  // To cite BioModels Database, please use: Li C, Donizelli M, Rodriguez N, Dharuri H, Endler L, Chelliah V, Li L, He E, Henry A, Stefan MI, Snoep JL, Hucka M, Le Novère N, Laibe C (2010) BioModels Database: An enhanced, curated and annotated resource for published quantitative kinetic models. BMC Syst Biol., 4:92.
  // biomodels.db:MODEL1201140003
  // isDescribedBy pubmed:11226623
  // biomodels.db:MODEL1201140003
  // biomodels.db:MODEL1201140003
  // isDescribedBy pubmed:11226623

  // Compartments:
  compartment COMpartment = 1;

  // Parameters:
  time_environment = ;
  x = 5;
  r1 = 0.15;
  r2 = 0.12;
  c1 = 0.1;
  y = 0;
  r3 = 0.05;
  r4 = 0.03;
  c2 = 0.1;
  c3 = 0.005;
  z = 1;
  r5 = 0.09;
  r6 = 0.1;
  r7 = 0.05;
  z_ = 1.01;
  y_ = 1.08;
  delta = 0.01;
  u = 1;
  omega = 0.05;
  v = 0;
  epsilon = 0.1;

  // Rate rules:
  x' = z*(r1*y + (-r2*x) + c1);
  y' = epsilon*(r3/z + (-r4*x) + c2 + c3*u);
  z' = epsilon*delta*(r5*(y - y_)*(z_ - z) + r6*z*(z_ - z) - r7*z);
  u' = -omega*v;
  v' = omega*u;
end
