// SBML level 2 version 4

model Magnus1997_MitoCa_BetaCellMinimalModel()
  // This a model from the article:
  // Minimal model of beta-cell mitochondrial Ca2+ handling.
  // Magnus G, Keizer J. Am J Physiol. 1997 Aug;273(2 Pt 1):C717-33. 9277370 ,
  // Abstract:
  // We develop a simplified, but useful, mathematical model to describe Ca2+ handling by mitochondria in the pancreatic beta-cell. The model includes the following six transport mechanisms in the inner mitochondrial membrane: proton pumping via respiration and proton uptake by way of the F1Fzero-ATPase (adapted from D. Pietrobon and S. Caplan. Biochemistry 24: 5764-5778, 1985), a proton leak, adenine nucleotide exchange, the Ca2+ uniporter, and Na+/Ca2+ exchange. Each mechanism is developed separately into a kinetic model for the rate of transport, with parameters taken from experiments on isolated mitochondrial preparations. These mechanisms are combined in a modular fashion first to describe state 4 (nonphosphorylating) and state 3 (phosphorylating) mitochondria with mitochondrial NADH and Ca2+ concentrations as fixed parameters and then to describe Ca2+ handling with variable mitochondrial Ca2+ concentration. Simulations are compared to experimental measurements and agree well with the threshold for Ca2+ uptake, measured mitochondrial Ca2+ levels, and the influence of Ca2+ on oxygen uptake. In the absence of Ca2+ activation of mitochondrial dehydrogenases, the simulations predict a significant reduction in the rate of production of ATP that involves a "short circuit" via Ca2+ uptake through the uniporter. This effect suggests a potential role for mitochondrial Ca2+ handling in determining the ATP-ADP ratio in the pancreatic beta-cell.
  // This model was taken from the CellML repository and automatically converted to SBML.
  // The original model was: Magnus and Keizer (1997)
  // The original CellML model was created by:
  // Catherine Lloyd
  // c.lloyd@aukland.ac.nz
  // The University of Auckland
  // The Bioengineering Institute
  // This model originates from BioModels Database: A Database of Annotated Published Models (http://www.ebi.ac.uk/biomodels/). It is copyright (c) 2005-2011 The BioModels.net Team.
  // To the extent possible under law, all copyright and related or neighbouring rights to this encoded model have been dedicated to the public domain worldwide. Please refer to CC0 Public Domain Dedication for more information.
  // In summary, you are entitled to use this encoded model in absolutely any manner you deem suitable, verbatim, or with modification, alone or embedded it in a larger context, redistribute it, commercially or not, in a restricted way or not..
  // To cite BioModels Database, please use: Li C, Donizelli M, Rodriguez N, Dharuri H, Endler L, Chelliah V, Li L, He E, Henry A, Stefan MI, Snoep JL, Hucka M, Le Novère N, Laibe C (2010) BioModels Database: An enhanced, curated and annotated resource for published quantitative kinetic models. BMC Syst Biol., 4:92.
  // biomodels.db:MODEL1201140004
  // isDescribedBy pubmed:9277370
  // biomodels.db:MODEL1201140004
  // biomodels.db:MODEL1201140004
  // isDescribedBy pubmed:9277370

  // Compartments:
  compartment COMpartment = 1;

  // Parameters:
  time_environment = ;
  V = ;
  V_B = 50;
  R = 8314;
  T = 310;
  F = 96845;
  g_H = 0.2;
  Cmito = 0.00145;
  pH_i = ;
  pH_m = ;
  K_res = 1.35e17;
  NAD_m = ;
  NADH_m = ;
  rho_res = 0.4;
  r1 = 2.077e-18;
  r2 = 1.728e-9;
  r3 = 1.059e-26;
  ra = 6.394e-10;
  rb = 1.762e-13;
  rc1 = 2.656e-19;
  rc2 = 8.632e-27;
  g = 0.85;
  rho_F1 = 0.7;
  K_F1 = 1710000;
  ATP_m_F0_F1_ATPase = ;
  Pi_m = 20;
  p1 = 1.346e-8;
  p2 = 7.739e-7;
  p3 = 6.65e-15;
  pa = 1.656e-5;
  pb = 3.373e-7;
  pc1 = 9.651e-14;
  pc2 = 4.845e-19;
  ADP_m = ;
  Jmax_ant = 1000;
  ATP_i = ;
  ATP_m_ATP_ADP_exchange = ;
  ADP_i = ;
  f = 0.5;
  V_offset = 91;
  Jmax_uni = 300;
  Ca_i = ;
  K_trans = 19;
  K_act = 0.38;
  L = 110;
  na = 2.8;
  Jmax_Na_Ca = 25;
  Ca_m = ;
  Na_i = 30;
  K_Na = 9.4;
  K_Ca = 0.003;
  b = 0;
  n = 2;
  fm = 0.0003;

  // Assignment rules:
  delta_pH := pH_i - pH_m;
  proton_motive_force := V - 2.303*R*T/F*delta_pH;
  JH_res := 360*rho_res*((ra*10^(6*delta_pH)*exp(F*A_res/(R*T)) + rb*10^(6*delta_pH) - (ra + rb)*exp(g*6*F*V/(R*T)))/((1 + r1*exp(F*A_res/(R*T)))*exp(6*F*V_B/(R*T)) + (r2 + r3*exp(F*A_res/(R*T)))*exp(g*6*F*V/(R*T))));
  Jo := 30*rho_res*(((ra*10^(6*delta_pH) + rc1*exp(6*F*V_B/(R*T)))*exp(F*A_res/(R*T)) - ra*exp(g*6*F*V/(R*T)) + rc2*exp(F*A_res/(R*T))*exp(g*6*F*V/(R*T)))/((1 + r1*exp(F*A_res/(R*T)))*exp(6*F*V_B/(R*T)) + (r2 + r3*exp(F*A_res/(R*T)))*exp(g*6*F*V/(R*T))));
  A_res := R*T/F*ln(K_res*sqrt(NADH_m)/sqrt(NAD_m));
  total_NAD_m := NADH_m + NAD_m;
  JH_leak := g_H*proton_motive_force;
  JH_F1 := -180*rho_F1*((pa*10^(3*delta_pH)*exp(F*A_F1/(R*T)) + pb*10^(3*delta_pH) - (pa + pb)*exp(3*F*V/(R*T)))/((1 + p1*exp(F*A_F1/(R*T)))*exp(3*F*V_B/(R*T)) + (p2 + p3*exp(F*A_F1/(R*T)))*exp(3*F*V/(R*T))));
  Jp_F1 := -60*rho_F1*(((pa*10^(3*delta_pH) + pc1*exp(3*F*V_B/(R*T)))*exp(F*A_F1/(R*T)) - pa*exp(3*F*V/(R*T)) + pc2*exp(F*A_F1/(R*T))*exp(3*F*V/(R*T)))/((1 + p1*exp(F*A_F1/(R*T)))*exp(3*F*V_B/(R*T)) + (p2 + p3*exp(F*A_F1/(R*T)))*exp(3*F*V/(R*T))));
  A_F1 := R*T/F*ln(K_F1*ATP_m_F0_F1_ATPase/(ADP_m_free*Pi_m));
  total_mitochondrial_adenosine_phosphate := ATP_m_F0_F1_ATPase + ADP_m;
  ADP_m_free := 0.8*ADP_m;
  J_ant := Jmax_ant*((1 - ATP4_i*ADP3_m/(ADP3_i*ATP4_m)*exp(-F*V/(R*T)))/((1 + ATP4_i/ADP3_i*exp(-f*F*V/(R*T)))*(1 + ADP3_m/ATP4_m)));
  ADP3_m := 0.45*0.8*ADP_m;
  ADP3_i := 0.45*1*ADP_i;
  ATP4_m := 0.05*ATP_m_ATP_ADP_exchange;
  ATP4_i := 0.05*ATP_i;
  J_uni := Jmax_uni*(Ca_i/K_trans*(1 + Ca_i/K_trans)^3/((1 + Ca_i/K_trans)^4 + L/(1 + Ca_i/K_act)^na))*(2*F*(V - V_offset)/(R*T)/(1 - exp(-2*F*(V - V_offset)/(R*T))));
  J_Na_Ca := Jmax_Na_Ca*(exp(b*F*(V - V_offset)/(R*T))/((1 + K_Na/Na_i)^n*(1 + K_Ca/Ca_m)));

  // Rate rules:
  V' = -1/Cmito*(JH_F1 + J_ant + JH_leak + J_uni*2 - JH_res);
  ADP_m' = J_ant - Jp_F1;
  Ca_m' = fm*(J_uni - J_Na_Ca);
end
