// SBML level 2 version 4

model Wanant2000_InsulinReceptorModel_B()
  // This a model from the article:
  // Insulin receptor binding kinetics: modeling and simulation studies.
  // Wanant S, Quon MJ. J Theor Biol. 2000 Aug 7;205(3):355-64. 10882558 ,
  // Abstract:
  // Biological actions of insulin regulate glucose metabolism and other essential physiological functions. Binding of insulin to its cell surface receptor initiates signal transduction pathways that mediate cellular responses. Thus, it is of great interest to understand the mechanisms underlying insulin receptor binding kinetics. Interestingly, negative cooperative interactions are observed at high insulin concentrations while positive cooperativity may be present at low insulin concentrations. Clearly, insulin receptor binding kinetics cannot be simply explained by a classical bimolecular reaction. Mature insulin receptors have a dimeric structure capable of binding two molecules of insulin. The binding affinity of the receptor for the second insulin molecule is significantly lower than for the first bound insulin molecule. In addition, insulin receptor aggregation occurs in response to ligand binding and aggregation may also influence binding kinetics. In this study, we develop a mathematical model for insulin receptor binding kinetics that explicitly represents the divalent nature of the insulin receptor and incorporates receptor aggregation into the kinetic model. Model parameters are based upon published data where available. Computer simulations with our model are capable of reproducing both negative and positive cooperativity at the appropriate insulin concentrations. This model may be a useful tool for helping to understand the mechanisms underlying insulin receptor binding and the coupling of receptor binding to downstream signaling events.
  // This model was taken from the CellML repository and automatically converted to SBML.
  // The original model was: Wanant_Quon_2000_B
  // The original CellML model was created by:
  // Catherine Lloyd
  // c.lloyd@aukland.ac.nz
  // The University of Auckland
  // The Bioengineering Institute
  // This model originates from BioModels Database: A Database of Annotated Published Models (http://www.ebi.ac.uk/biomodels/). It is copyright (c) 2005-2011 The BioModels.net Team.
  // To the extent possible under law, all copyright and related or neighbouring rights to this encoded model have been dedicated to the public domain worldwide. Please refer to CC0 Public Domain Dedication for more information.
  // In summary, you are entitled to use this encoded model in absolutely any manner you deem suitable, verbatim, or with modification, alone or embedded it in a larger context, redistribute it, commercially or not, in a restricted way or not..
  // To cite BioModels Database, please use: Li C, Donizelli M, Rodriguez N, Dharuri H, Endler L, Chelliah V, Li L, He E, Henry A, Stefan MI, Snoep JL, Hucka M, Le Novère N, Laibe C (2010) BioModels Database: An enhanced, curated and annotated resource for published quantitative kinetic models. BMC Syst Biol., 4:92.
  // biomodels.db:MODEL1201140006
  // isDescribedBy pubmed:10882558
  // biomodels.db:MODEL1201140006
  // biomodels.db:MODEL1201140006
  // isDescribedBy pubmed:10882558

  // Compartments:
  compartment COMpartment = 1;

  // Parameters:
  time_environment = ;
  x1 = 10;
  x2 = 0.1;
  x3 = 1;
  x4 = 1;
  x5 = 1;
  x6 = 1;
  x7 = 1;
  x8 = 1;
  x9 = 1;
  k1 = 1000000;
  k1_ = 0.0004;
  k2 = 1000000;
  k2_ = 0.04;
  k3 = 1000000;
  k3_ = 0.0004;
  k4 = 1000000;
  k4_ = 0.0004;
  k5 = 10000000;
  k5_ = 0.004;

  // Assignment rules:
  scatchard := (x3 + x4 + x7 + x8 + x9)/x1;

  // Rate rules:
  x1' = k1_*x3 - k1*x1*x2 + k2_*x4 - k2*x1*x3 + k4_*(x6 + x7) - k4*x1*(x5 + x9) + k5_*(x7 + x8 + x9) - k5*x1*(x5 + x6 + x7);
  x2' = k1_*x3 - k1*x1*x2 + k3_*(x5 + x9) - k3*x2*(x3 + x4);
  x3' = k1*x1*x2 - k1_*x3 + k2_*x4 - k2*x1*x3 + k3_*x5 - k3*x2*x3;
  x4' = k2*x1*x3 - k2_*x4 + k3_*x9 - k2*x2*x4;
  x5' = k3*x2*x3 - k3_*x5 + k4_*x6 - k4*x1*x5 + k5_*x9 - k5*x1*x5;
  x6' = k4*x1*x5 - k4_*x6 + k5_*x7 - k5*x1*x6;
  x7' = k4*x1*x9 - k4_*x7 + k5_*(x8 - x7) + k5*x1*(x6 - x7);
  x8' = k5*x1*x7 - k5_*x8;
  x9' = k3*x2*x4 - k3_*x9 + k4_*x7 - k4*x1*x9 + k5*x1*x5 - k5_*x9;
end
