// SBML level 2 version 4

model Dupeux2011_ABAreceptor_Dimer()
  // This model is from the article:
  // A thermodynamic switch modulates abscisic acid receptor sensitivity.
  // Dupeux F, Santiago J, Betz K, Twycross J, Park SY, Rodriguez L, Gonzalez-Guzman M, Jensen MR, Krasnogor N, Blackledge M, Holdsworth M, Cutler SR, Rodriguez PL, Márquez JA EMBO J. [2011 Oct; Volume: 30 (Issue: 20 )] Page info: 4171-84 21847091 ,
  // Abstract:
  // Abscisic acid (ABA) is a key hormone regulating plant growth, development and the response to biotic and abiotic stress. ABA binding to pyrabactin resistance (PYR)/PYR1-like (PYL)/Regulatory Component of Abscisic acid Receptor (RCAR) intracellular receptors promotes the formation of stable complexes with certain protein phosphatases type 2C (PP2Cs), leading to the activation of ABA signalling. The PYR/PYL/RCAR family contains 14 genes in Arabidopsis and is currently the largest plant hormone receptor family known; however, it is unclear what functional differentiation exists among receptors. Here, we identify two distinct classes of receptors, dimeric and monomeric, with different intrinsic affinities for ABA and whose differential properties are determined by the oligomeric state of their apo forms. Moreover, we find a residue in PYR1, H60, that is variable between family members and plays a key role in determining oligomeric state. In silico modelling of the ABA activation pathway reveals that monomeric receptors have a competitive advantage for binding to ABA and PP2Cs. This work illustrates how receptor oligomerization can modulate hormonal responses and more generally, the sensitivity of a ligand-dependent signalling system.
  // To the extent possible under law, all copyright and related or neighbouring rights to this encoded model have been dedicated to the public domain worldwide. Please refer to CC0 Public Domain Dedication for more information.
  // In summary, you are entitled to use this encoded model in absolutely any manner you deem suitable, verbatim, or with modification, alone or embedded it in a larger context, redistribute it, commercially or not, in a restricted way or not.
  // To cite BioModels Database, please use: Li C, Donizelli M, Rodriguez N, Dharuri H, Endler L, Chelliah V, Li L, He E, Henry A, Stefan MI, Snoep JL, Hucka M, Le Novère N, Laibe C (2010) BioModels Database: An enhanced, curated and annotated resource for published quantitative kinetic models. BMC Syst Biol., 4:92.
  // biomodels.db:MODEL1202030000
  // isDescribedBy pubmed:21847091
  // biomodels.db:MODEL1202030000
  // isDescribedBy pubmed:21847091
  // biomodels.db:MODEL1202030000
  // biomodels.db:MODEL1202030000

  // Compartments:
  compartment c0_0 = 1;

  // Species:
  substanceOnly species s0_0 in c0_0 = 0; s0_0 is "H";
  substanceOnly species s0_1 in c0_0 = 0; s0_1 is "H.H.RA.RA";
  substanceOnly species s0_2 in c0_0 = 0; s0_2 is "H.H.RB.RB";
  substanceOnly species s0_3 in c0_0 = 0; s0_3 is "H.RA";
  substanceOnly species s0_4 in c0_0 = 0; s0_4 is "H.RA.RA";
  substanceOnly species s0_5 in c0_0 = 0; s0_5 is "H.RB";
  substanceOnly species s0_6 in c0_0 = 0; s0_6 is "H.RB.RB";
  substanceOnly species s0_7 in c0_0 = 60221; s0_7 is "P";
  substanceOnly species s0_8 in c0_0 = 0; s0_8 is "P.H.RA";
  substanceOnly species s0_9 in c0_0 = 0; s0_9 is "P.H.RB";
  substanceOnly species s0_10 in c0_0 = 30111; s0_10 is "RA";
  substanceOnly species s0_11 in c0_0 = 0; s0_11 is "RA.RA";
  substanceOnly species s0_12 in c0_0 = 30111; s0_12 is "RB";
  substanceOnly species s0_13 in c0_0 = 0; s0_13 is "RB.RB";

  // Reactions:
  re0_0_0: s0_10 + s0_10 => s0_11; re0_0_0_k1*s0_10*(s0_10 - 1)*0.5;
    re0_0_0_k1 = 3.321078e-5 per_second;
  re0_0_1: s0_11 => s0_10 + s0_10; re0_0_1_k1*s0_11;
    re0_0_1_k1 = 1000 per_second;
  re0_0_2: s0_10 + s0_0 => s0_3; re0_0_2_k1*s0_10*s0_0;
    re0_0_2_k1 = 1.660539e-5 per_second;
  re0_0_3: s0_3 => s0_10 + s0_0; re0_0_3_k1*s0_3;
    re0_0_3_k1 = 1.5 per_second;
  re0_0_4: s0_0 + s0_11 => s0_4; re0_0_4_k1*s0_0*s0_11;
    re0_0_4_k1 = 1.660539e-5 per_second;
  re0_0_5: s0_4 => s0_11 + s0_0; re0_0_5_k1*s0_4;
    re0_0_5_k1 = 90 per_second;
  re0_0_6: s0_0 + s0_4 => s0_1; re0_0_6_k1*s0_0*s0_4;
    re0_0_6_k1 = 1.660539e-5 per_second;
  re0_0_7: s0_1 => s0_0 + s0_4; re0_0_7_k1*s0_1;
    re0_0_7_k1 = 90 per_second;
  re0_0_8: s0_3 + s0_3 => s0_1; re0_0_8_k1*s0_3*(s0_3 - 1)*0.5;
    re0_0_8_k1 = 1.660539e-5 per_second;
  re0_0_9: s0_1 => s0_3 + s0_3; re0_0_9_k1*s0_1;
    re0_0_9_k1 = 100 per_second;
  re0_0_10: s0_3 + s0_7 => s0_8; re0_0_10_k1*s0_3*s0_7;
    re0_0_10_k1 = 1.660539e-5 per_second;
  re0_0_11: s0_8 => s0_7 + s0_3; re0_0_11_k1*s0_8;
    re0_0_11_k1 = 0.02 per_second;
  re0_0_12: s0_12 + s0_12 => s0_13; re0_0_12_k1*s0_12*(s0_12 - 1)*0.5;
    re0_0_12_k1 = 3.321078e-5 per_second;
  re0_0_13: s0_13 => s0_12 + s0_12; re0_0_13_k1*s0_13;
    re0_0_13_k1 = 0.05 per_second;
  re0_0_14: s0_12 + s0_0 => s0_5; re0_0_14_k1*s0_12*s0_0;
    re0_0_14_k1 = 1.660539e-5 per_second;
  re0_0_15: s0_5 => s0_12 + s0_0; re0_0_15_k1*s0_5;
    re0_0_15_k1 = 1.5 per_second;
  re0_0_16: s0_0 + s0_13 => s0_6; re0_0_16_k1*s0_0*s0_13;
    re0_0_16_k1 = 1.660539e-5 per_second;
  re0_0_17: s0_6 => s0_13 + s0_0; re0_0_17_k1*s0_6;
    re0_0_17_k1 = 90 per_second;
  re0_0_18: s0_0 + s0_6 => s0_2; re0_0_18_k1*s0_0*s0_6;
    re0_0_18_k1 = 1.660539e-5 per_second;
  re0_0_19: s0_2 => s0_0 + s0_6; re0_0_19_k1*s0_2;
    re0_0_19_k1 = 90 per_second;
  re0_0_20: s0_5 + s0_5 => s0_2; re0_0_20_k1*s0_5*(s0_5 - 1)*0.5;
    re0_0_20_k1 = 1.660539e-5 per_second;
  re0_0_21: s0_2 => s0_5 + s0_5; re0_0_21_k1*s0_2;
    re0_0_21_k1 = 100 per_second;
  re0_0_22: s0_5 + s0_7 => s0_9; re0_0_22_k1*s0_5*s0_7;
    re0_0_22_k1 = 1.660539e-5 per_second;
  re0_0_23: s0_9 => s0_7 + s0_5; re0_0_23_k1*s0_9;
    re0_0_23_k1 = 0.02 per_second;

  // Unit definitions:
  unit per_second = 1 / second;
  unit substance = item;
end
