// SBML level 2 version 4

model Nazaret2008_Dynnik1980_CarbohydrateEnergyMetabolism()
  // This model is from the article:
  // An old paper revisited: ‘‘A mathematical model of carbohydrate energy metabolism. Interaction between glycolysis, the Krebs cycle and the H-transporting shuttles at varying ATPases load’’ by V.V. Dynnik, R. Heinrich and E.E. Sel’kov
  // Nazaret C, Mazat JP. J Theor Biol 2008 Jun;252(3):520-9. 18304584 ,
  // Abstract:
  // We revisit an old Russian paper by V.V. Dynnik, R. Heinrich and E.E. Sel’kov (1980a, b) describing: ‘‘A mathematical model of carbohydrate energy metabolism. Interaction between glycolysis, the Krebs cycle and the H-transporting shuttles at varying ATPases load’’. We analyse the model mathematically and calculate the control coefficients as a function of ATPase loads. We also evaluate the structure of the metabolic network in terms of elementary flux modes. We show how this model can respond to an ATPase load as well as to the glucose supply. We also show how this simple model can help in understanding the articulation between the major blocks of energetic metabolism, i.e. glycolysis, the Krebs cycle and the H-transporting shuttles.
  // Note: "dynnik_v1.xml":
  // created directly from "heinrich.sci" model file provided by Christine Nazaret
  // IDs changed to as per the paper
  // initial conditions set to steady state
  // results of Fig. 3 may be reproduced by running a a parameter scan over b15 in COPASI
  // "dynnik_v2.xml":
  // rescaled species such as s2_e1 = s2 * e1 are introduced whose evolution may be described through reaction participation, rather than via ODEs
  // original variables are retained as global parameters
  // To the extent possible under law, all copyright and related or neighbouring rights to this encoded model have been dedicated to the public domain worldwide. Please refer to CC0 Public Domain Dedication for more information.
  // In summary, you are entitled to use this encoded model in absolutely any manner you deem suitable, verbatim, or with modification, alone or embedded it in a larger context, redistribute it, commercially or not, in a restricted way or not.
  // To cite BioModels Database, please use: Li C, Donizelli M, Rodriguez N, Dharuri H, Endler L, Chelliah V, Li L, He E, Henry A, Stefan MI, Snoep JL, Hucka M, Le Novère N, Laibe C (2010) BioModels Database: An enhanced, curated and annotated resource for published quantitative kinetic models. BMC Syst Biol., 4:92.
  // taxonomy:9606
  // isDescribedBy pubmed:18304584 pubmed:6445762
  // biomodels.db:MODEL1202170000
  // isDescribedBy pubmed:18304584
  // biomodels.db:MODEL1202170000
  // biomodels.db:MODEL1202170000

  // Compartments:
  compartment cell = 1;

  // Species:
  species GAP in cell = 0.1;  // CHEBI:58027 kegg.compound:C00661
  species s2_e1 in cell = 0.5; s2_e1 is "aGP";  // CHEBI:57597 kegg.compound:C00093
  species s3_e2 in cell = 0.5; s3_e2 is "13DPG";  // CHEBI:57604 kegg.compound:C00236
  species s4_e3 in cell = 0.01; s4_e3 is "Pyr";  // CHEBI:15361 kegg.compound:C00022
  species s5_e4 in cell = 0.01; s5_e4 is "Lac";  // CHEBI:16651 kegg.compound:C00186
  species a3_e5 in cell = 3.2; a3_e5 is "ATP";  // CHEBI:30616 kegg.compound:C00002
  species a1_e5 in cell = 0.4; a1_e5 is "AMP";  // CHEBI:456215 kegg.compound:C00020
  species r1_e6 in cell = 0.1; r1_e6 is "NADc";  // CHEBI:57540 kegg.compound:C00003
  species n2_e7 in cell = 0.002; n2_e7 is "NADHm";  // CHEBI:57945 kegg.compound:C00004
  species i1_e8 in cell = 0.01; i1_e8 is "Oxa";  // CHEBI:16452 kegg.compound:C00036
  species i2_e8 in cell = 0.01; i2_e8 is "Mal";  // CHEBI:15589 kegg.compound:C00149
  species c2_e9 in cell = 0.01; c2_e9 is "CoASAc";  // CHEBI:57288 kegg.compound:C00024
  species $a2 in cell; a2 is "ADP";  // CHEBI:456216 kegg.compound:C00008
  species $NADHc in cell;  // CHEBI:57945 kegg.compound:C00004
  species $n1 in cell; n1 is "NADm";  // CHEBI:57540 kegg.compound:C00003
  species $CoA in cell;  // CHEBI:57287 kegg.compound:C00010
  species $i3 in cell; i3 is "Cit";  // CHEBI:16947 kegg.compound:C00158

  // Parameters:
  e1 = 1 dimensionless;
  e2 = 1 dimensionless;
  e3 = 1 dimensionless;
  e4 = 1 dimensionless;
  e5 = 4 dimensionless;
  e6 = 0.2 dimensionless;
  e7 = 0.2 dimensionless;
  e8 = 0.2 dimensionless;
  e9 = 0.2 dimensionless;
  aGP has dimensionless;
  _13DPG has dimensionless;
  Pyr has dimensionless;
  Lac has dimensionless;
  a3 has dimensionless; a3 is "ATP";
  a1 has dimensionless; a1 is "AMP";
  NADc has dimensionless;
  n2 has dimensionless; n2 is "NADHm";
  i1 has dimensionless; i1 is "Oxa";
  i2 has dimensionless; i2 is "Mal";
  CoASAc has dimensionless;

  // Assignment rules:
  a2 := 1 - a3_e5/e5 - a1_e5/e5;
  NADHc := 1 - r1_e6/e6;
  n1 := 1 - n2_e7/e7;
  CoA := 1 - c2_e9/e9;
  i3 := 1 - i2_e8/e8 - i1_e8/e8;
  aGP := s2_e1/e1;
  _13DPG := s3_e2/e2;
  Pyr := s4_e3/e3;
  Lac := s5_e4/e4;
  a3 := a3_e5/e5;
  a1 := a1_e5/e5;
  NADc := r1_e6/e6;
  n2 := n2_e7/e7;
  i1 := i1_e8/e8;
  i2 := i2_e8/e8;
  CoASAc := c2_e9/e9;

  // Reactions:
  // glycolytic reaction
  v1: 2 a3_e5 -> 2 GAP + 2 $a2; cell*(a3_e5*b1*(w + a1_e5/(e5*m0))/(e5*(m1 + a3_e5/e5)*(a1_e5/(e5*m0) + 1)));  // modifiers: a1_e5
    b1 = 1 dimensionless; m0 = 0.003 dimensionless; m1 = 0.1 dimensionless; w = 0.1 dimensionless;
  // cytoplasmic alpha-glycerophosphate reaction of H-transporter
  v2: GAP + $NADHc -> s2_e1 + r1_e6; cell*b2*(NADHc*GAP - d2*r1_e6*s2_e1/(e1*e6));
    b2 = 20 dimensionless; d2 = 0.1 dimensionless;
  // glycolytic reaction
  v3: GAP + r1_e6 -> s3_e2 + $NADHc; cell*b3*(r1_e6*GAP/e6 - d3*NADHc*s3_e2/e2);
    b3 = 10 dimensionless; d3 = 25 dimensionless;
  // glycolytic intermediate efflux
  v4: s3_e2 -> ; cell*(b4*s3_e2/e2);
    b4 = 0.01 dimensionless;
  // glycolytic reaction
  v5: s3_e2 + 2 $a2 -> s4_e3 + 2 a3_e5; cell*(a2*b5*s3_e2/e2);
    b5 = 10 dimensionless;
  // glycolytic reaction
  v6: s4_e3 + $NADHc -> s5_e4 + r1_e6; cell*b6*(NADHc*s4_e3/e3 - d6*r1_e6*s5_e4/(e4*e6));
    b6 = 200 dimensionless; d6 = 0.003 dimensionless;
  // mitochondrial alpha-glycerophosphate reaction of H-transporter
  v7: s2_e1 + $n1 -> GAP + n2_e7; cell*(b7*n1*s2_e1/e1);
    b7 = 25 dimensionless;
  // pyruvate dehydrogenase
  v8: s4_e3 + $CoA + $n1 -> n2_e7 + c2_e9; cell*(b8*CoA*n1*s4_e3/e3);
    b8 = 3 dimensionless;
  // Krebs cycle
  v9: i2_e8 + $n1 -> n2_e7 + i1_e8; cell*b9*(i2_e8*n1/e8 - d9*i1_e8*n2_e7/(e7*e8));
    b9 = 100 dimensionless; d9 = 25 dimensionless;
  // Krebs cycle
  v10: i1_e8 + c2_e9 -> $i3 + $CoA; cell*(b10*c2_e9*i1_e8/(e8*e9));
    b10 = 5 dimensionless;
  // Krebs cycle
  v11: $i3 + 3 $n1 -> 3 n2_e7 + i2_e8; cell*b11*i3*n1;
    b11 = 3 dimensionless;
  // glycolytic intermediate efflux
  v12: s4_e3 -> ; cell*(b12*s4_e3/e3);
    b12 = 0.1 dimensionless;
  // glycolytic intermediate efflux
  v13: s5_e4 -> ; cell*(b13*s5_e4/e4);
    b13 = 0.1 dimensionless;
  // alpha-glycerophosphate efflux
  v14: s2_e1 -> ; cell*(b14*s2_e1/e1);
    b14 = 0.5 dimensionless;
  // total ATPase reaction
  v15: a3_e5 -> $a2; cell*(a3_e5*b15/(e5*(m15 + a3_e5/e5)));
    b15 = 1 dimensionless; m15 = 0.1 dimensionless;
  // oxidative phosphorylation
  v16: n2_e7 + 3 $a2 -> 3 a3_e5 + $n1; cell*(a2*b16*n2_e7/(e7*(a2 + m16)*(m16p + n2_e7/e7)));
    b16 = 5 dimensionless; m16 = 0.1 dimensionless; m16p = 0.1 dimensionless;
  // NADH dehydrogenase
  v17: $n1 -> n2_e7; cell*b17*n1;
    b17 = 0.01 dimensionless;
  // adenylate kinase
  v18: a3_e5 + a1_e5 -> 2 $a2; cell*(-b18)*(a2^2*d18 - a1_e5*a3_e5/e5^2);
    b18 = 100 dimensionless; d18 = 1 dimensionless;

  // Unit definitions:
  unit substance = dimensionless;
  unit time = dimensionless;
  unit volume = dimensionless;
end
