// SBML level 2 version 4

model Lee2012_GeneExpression_tTAdoxInteraction()
  // Lee2012_GeneExpression_tTA-doxInteraction
  // This model is from the article:
  // A regulatory role for repeated decoy transcription factor binding sites in target gene expression.
  // Lee TH, Maheshri N. Mol Syst Biol. 2012 Mar 27;8:576. 22453733 ,
  // Abstract:
  // Tandem repeats of DNA that contain transcription factor (TF) binding sites could serve as decoys, competitively binding to TFs and affecting target gene expression. Using a synthetic system in budding yeast, we demonstrate that repeated decoy sites inhibit gene expression by sequestering a transcriptional activator and converting the graded dose-response of target promoters to a sharper, sigmoidal-like response. On the basis of both modeling and chromatin immunoprecipitation measurements, we attribute the altered response to TF binding decoy sites more tightly than promoter binding sites. Tight TF binding to arrays of contiguous repeated decoy sites only occurs when the arrays are mostly unoccupied. Finally, we show that the altered sigmoidal-like response can convert the graded response of a transcriptional positive-feedback loop to a bimodal response. Together, these results show how changing numbers of repeated TF binding sites lead to qualitative changes in behavior and raise new questions about the stability of TF/promoter binding.
  // Note: This model corresponds to the comprehensive model encompassing the basic model (MODEL1202270000) as well as the tTA/dox (tet-transcriptional activator/doxycycline) interaction, described in the paper.
  // To the extent possible under law, all copyright and related or neighbouring rights to this encoded model have been dedicated to the public domain worldwide. Please refer to CC0 Public Domain Dedication for more information.
  // In summary, you are entitled to use this encoded model in absolutely any manner you deem suitable, verbatim, or with modification, alone or embedded it in a larger context, redistribute it, commercially or not, in a restricted way or not.
  // To cite BioModels Database, please use: Li C, Donizelli M, Rodriguez N, Dharuri H, Endler L, Chelliah V, Li L, He E, Henry A, Stefan MI, Snoep JL, Hucka M, Le Novère N, Laibe C (2010) BioModels Database: An enhanced, curated and annotated resource for published quantitative kinetic models. BMC Syst Biol., 4:92.
  // biomodels.db:MODEL1202270001
  // isDescribedBy pubmed:22453733
  // biomodels.db:MODEL1202270001
  // isDescribedBy pubmed:22453733
  // biomodels.db:MODEL1202270001
  // biomodels.db:MODEL1202270001

  // Compartments:
  compartment nucleus = 10000;

  // Species:
  substanceOnly species T0 in nucleus = 100; T0 is "total TF level";  // substance in MWBUILTINUNIT_molecule
  substanceOnly species T in nucleus = 100; T is "free TF activator";  // substance in MWBUILTINUNIT_molecule
  substanceOnly species x in nucleus = 50; x is "free dox";  // substance in MWBUILTINUNIT_molecule
  substanceOnly species Tx in nucleus = 0; Tx is "TF activator_dox complex1";  // substance in MWBUILTINUNIT_molecule
  substanceOnly species xTx in nucleus = 0; xTx is "TF activator_dox complex3";  // substance in MWBUILTINUNIT_molecule
  substanceOnly species total_intracellular_dox in nucleus = 50;  // substance in MWBUILTINUNIT_molecule
  substanceOnly species N in nucleus = 30; N is "decoy sites";  // substance in MWBUILTINUNIT_molecule
  substanceOnly species TN in nucleus = 0; TN is "total decoy sites";  // substance in MWBUILTINUNIT_molecule
  substanceOnly species N0 in nucleus = 30; N0 is "decoy sites balance";  // substance in MWBUILTINUNIT_molecule
  substanceOnly species P in nucleus = 7; P is "promotor";  // substance in MWBUILTINUNIT_molecule
  substanceOnly species TP in nucleus = 0; TP is "total promotor";  // substance in MWBUILTINUNIT_molecule
  substanceOnly species promotor_balance in nucleus = 7;  // substance in MWBUILTINUNIT_molecule
  substanceOnly species xT in nucleus = 0; xT is "TF activator_dox complex2";  // substance in MWBUILTINUNIT_molecule

  // Algebraic rules:
  0 = T0 - T - Tx - xT - xTx - TN - TP;
  0 = total_intracellular_dox - x - Tx - xT - 2*xTx;
  0 = N0 - N - TN;
  0 = promotor_balance - P - TP;

  // Reactions:
  reaction_Tx: T + x -> Tx; reaction_Tx_ksplus*T*x - reaction_Tx_ksminus*Tx;
    reaction_Tx_ksplus = 0.01 MWDERIVEDUNIT_1__molecule_minute; reaction_Tx_ksminus = 0.0021 MWDERIVEDUNIT_1__minute;
  reaction_xTx: Tx + x -> xTx; reaction_xTx_ksplus*Tx*x - reaction_xTx_ksminus*xTx;
    reaction_xTx_ksplus = 0.01 MWDERIVEDUNIT_1__molecule_minute; reaction_xTx_ksminus = 0.0021 MWDERIVEDUNIT_1__minute;
  reaction_TN: T + N -> TN; knplus*T*N - knminus*TN;
    knplus = 0.01 MWDERIVEDUNIT_1__molecule_minute; knminus = 0.42 MWDERIVEDUNIT_1__minute;
  reaction_TP: T + P -> TP; kpplus*T*P - kpminus*TP;
    kpplus = 0.01 MWDERIVEDUNIT_1__molecule_minute; kpminus = 0.42 MWDERIVEDUNIT_1__minute;
  reaction_xT: T + x -> xT; reaction_xT_ksplus*T*x - reaction_xT_ksminus*xT;
    reaction_xT_ksplus = 0.01 MWDERIVEDUNIT_1__molecule_minute; reaction_xT_ksminus = 0.0021 MWDERIVEDUNIT_1__minute;

  // Unit definitions:
  unit MWBUILTINUNIT_molecule = 1.660539e-24 mole;
  unit MWDERIVEDUNIT_1__molecule_minute = 1.00369e22 dimensionless / (mole * second); MWDERIVEDUNIT_1__molecule_minute is "1/(molecule*minute)";
  unit MWDERIVEDUNIT_1__minute = 0.01666667 dimensionless / second; MWDERIVEDUNIT_1__minute is "1/minute";
end
