// SBML level 2 version 4

model Houser2012_pheromone_Ste12()
  // This model is from the article:
  // Positive roles for negative regulators in the mating response of yeast.
  // Houser JR, Ford E, Nagiec MJ, Errede B, Elston TC. Mol Syst Biol 2012 June 5;8:586 22669614 ,
  // Abstract:
  // All cells must detect and respond to changes in their environment, often through changes in gene expression. The yeast pheromone pathway has been extensively characterized, and is an ideal system for studying transcriptional regulation. Here we combine computational and experimental approaches to study transcriptional regulation mediated by Ste12, the key transcription factor in the pheromone response. Our mathematical model is able to explain multiple counterintuitive experimental results and led to several novel findings. First, we found that the transcriptional repressors Dig1 and Dig2 positively affect transcription by stabilizing Ste12. This stabilization through protein-protein interactions creates a large pool of Ste12 that is rapidly activated following pheromone stimulation. Second, we found that protein degradation follows saturating kinetics, explaining the long half-life of Ste12 in mutants expressing elevated amounts of Ste12. Finally, our model reveals a novel mechanism for robust perfect adaptation through protein-protein interactions that enhance complex stability. This mechanism allows the transcriptional response to act on a shorter time scale than upstream pathway activity.
  // biomodels.db:MODEL1204040000
  // isDescribedBy pubmed:22669614
  // biomodels.db:MODEL1204040000
  // biomodels.db:MODEL1204040000
  // isDescribedBy pubmed:22669614

  // Compartments:
  compartment c0 = 1;

  // Species:
  species T1 in c0 = 0;  // substance in molecules
  species TS in c0 = 0;  // substance in molecules
  species TSD1 in c0 = 0;  // substance in molecules
  species Ste12B in c0 = 0;  // substance in molecules
  species T1B in c0 = 0;  // substance in molecules
  species S_2 in c0 = 0;  // substance in molecules
  species SD1 in c0 = 0;  // substance in molecules
  species SD2 in c0 = 0;  // substance in molecules
  species SD1D2 in c0 = 0;  // substance in molecules
  species Dig2 in c0 = 60.2;  // substance in molecules
  species Fus3 in c0 = 0;  // substance in molecules
  species FUS1 in c0 = 0;  // substance in molecules
  species Ste12 in c0 = 0;  // substance in molecules
  species Dig1 in c0 = 150.5;  // substance in molecules
  species Fus1 in c0 = 0;  // substance in molecules

  // Parameters:
  KMOLE = 0.00166113 uM_um3_molecules_1;
  d_s = 0.0578 s_1;
  kc = 8.33 uM_1_s_1;
  kr_sd1d2 = 6.13e-8 s_1;
  P1 has _one_;
  KD1 = 0.0061 uM;
  KD2 = 0.5 uM;
  KD3 = 0.32 uM;
  P2 has _one_;
  P3 has _one_;
  I = 0 _one_;
  k_a has uM_1_s_1;
  k_p1 = 0.25 _one_;
  k_p5 = 0.01 _one_;
  k_p2 = 0.0085 uM;
  Km_sat = 5.5e-5 uM_s_1;
  KD_sat = 0.46 uM;
  J2 has uM_1_s_1;
  J1_r16 has uM_1_s_1;

  // Assignment rules:
  P1 := 0.00166113*S_2*(1/(0.00166113*S_2 + 0.00166113*Ste12 + 0.00166113*SD1 + KD1));
  P2 := 0.00166113*S_2*(1/(0.00166113*S_2 + 0.00166113*Ste12 + 0.00166113*SD1 + KD3));
  P3 := 0.00166113*TS*(1/(0.00166113*TS + 0.00166113*TSD1 + KD2));
  k_a := 1.55*I;
  J2 := 0.00145*I;
  J1_r16 := 0.003*I;

  // Reactions:
  r18: TSD1 + Fus3 -> T1B + Ste12B + Dig1; 0.00166113*TSD1*d_tsd1*(k_p1*(0.01 + 0.00166113*Fus3)*(1/(0.01 + k_p2 + 0.00166113*Fus3)) + r18_k_p3)*c0*1*(1/KMOLE);
    d_tsd1 = 3.17e-5 s_1; r18_k_p3 = 0.5 _one_;
  r11: -> T1; (k_tec1 + kfb2*P3)*c0*1*(1/KMOLE);
    k_tec1 = 5e-7 uM_s_1; kfb2 = 2.5e-6 uM_s_1;
  r6: Ste12 + Fus3 -> Ste12B; 0.00166113*Ste12*d_s12*(k_p1*(0.01 + 0.00166113*Fus3)*(1/(0.01 + k_p2 + 0.00166113*Fus3)) + r6_k_p3)*c0*1*(1/KMOLE);
    d_s12 = 0.0037 s_1; r6_k_p3 = 0.5 _one_;
  r14: SD2 + Fus3 -> Ste12B + Dig2; 0.00166113*SD2*d_sd2*(k_p1*(0.01 + 0.00166113*Fus3)*(1/(0.01 + k_p2 + 0.00166113*Fus3)) + r14_k_p3)*c0*1*(1/KMOLE);
    d_sd2 = 0.00033 s_1; r14_k_p3 = 0.5 _one_;
  r22: TSD1 + Fus3 -> T1B + SD1; 0.00166113*TSD1*J2*(0.01 + 0.00166113*Fus3)*c0*1*(1/KMOLE);
  r21: -> Fus3; (I*a + (-(d_f3*0.00166113*Fus3)))*c0*1*(1/KMOLE);
    a = 0.001666667 uM_s_1; d_f3 = 0.0015 s_1;
  r16: T1 + Fus3 -> T1B; (d_tec1 + J1_r16*(0.01 + 0.00166113*Fus3))*0.00166113*T1*c0*1*(1/KMOLE);
    d_tec1 = 0.0006 s_1;
  r8: FUS1 -> Fus1; (kpf1*0.00166113*FUS1 + (-(d_pf1*0.00166113*Fus1)))*c0*1*(1/KMOLE);
    kpf1 = 0.0001 s_1; d_pf1 = 0.00013 s_1;
  r3: Ste12 + Dig2 + Fus3 -> SD2; (kc*0.00166113*Ste12*0.00166113*Dig2 + (-(kr_sd2*0.00166113*SD2)) + (-((0.01 + 0.00166113*Fus3)*k_a*0.00166113*SD2)))*c0*1*(1/KMOLE);
    kr_sd2 = 3.2e-7 s_1;
  r7: -> FUS1; (kf1*P2 + (-(d_mR*0.00166113*FUS1)))*c0*1*(1/KMOLE);
    kf1 = 1 uM_s_1; d_mR = 0.00115 s_1;
  r0: -> Ste12; (k_s12 + kfb1*P1)*c0*1*(1/KMOLE);
    k_s12 = 2e-5 uM_s_1; kfb1 = 1.7e-5 uM_s_1;
  r1: Ste12 + Ste12 -> S_2; (kc*0.00166113*Ste12*0.00166113*Ste12 + (-(0.00166113*S_2*d_s)))*c0*1*(1/KMOLE);
  r10: TS + Dig1 + Fus3 -> TSD1; (kc*0.00166113*TS*0.00166113*Dig1 + (-((kr_tsd1 + (0.01 + 0.00166113*Fus3)*k_a)*0.00166113*TSD1)))*c0*1*(1/KMOLE);
    kr_tsd1 = 2.23e-6 s_1;
  r20: TS + Fus3 -> T1B + Ste12; J2*0.00166113*TS*(0.01 + 0.00166113*Fus3)*c0*1*(1/KMOLE);
  r12: S_2 + Fus3 -> Ste12B + Ste12B; 0.00166113*S_2*d_s2*(k_p1*(0.01 + 0.00166113*Fus3)*(1/(0.01 + k_p2 + 0.00166113*Fus3)) + r12_k_p3)*c0*1*(1/KMOLE);
    d_s2 = 0.00083 s_1; r12_k_p3 = 0.5 _one_;
  r19: T1B -> Ste12B; 0.00166113*T1B*Km_sat*(1/(0.00166113*Ste12B + 0.00166113*T1B + KD_sat))*c0*1*(1/KMOLE);
  r17: TS + Fus3 -> T1B + Ste12B; 0.00166113*TS*d_ts*(k_p1*(0.01 + 0.00166113*Fus3)*(1/(0.01 + k_p2 + 0.00166113*Fus3)) + r17_k_p3)*c0*1*(1/KMOLE);
    d_ts = 1.12e-5 s_1; r17_k_p3 = 0.5 _one_;
  r4: SD1 + Dig2 + Fus3 -> SD1D2; (kc*0.00166113*SD1*0.00166113*Dig2 + (-(kr_sd1d2*0.00166113*SD1D2)) + (-((0.01 + 0.00166113*Fus3)*k_a*0.00166113*SD1D2)))*c0*1*(1/KMOLE);
  r15: Ste12B -> T1B; 0.00166113*Ste12B*Km_sat*(1/(0.00166113*Ste12B + 0.00166113*T1B + KD_sat))*c0*1*(1/KMOLE);
  r9: T1 + Ste12 -> TS + Ste12B; (kc*0.00166113*T1*0.00166113*Ste12 + (-(kr_ts*0.00166113*TS)))*c0*1*(1/KMOLE);
    kr_ts = 2.57e-8 s_1;
  r13: SD1 + Fus3 -> Dig1 + Ste12B; 0.00166113*SD1*d_sd1*(k_p1*(0.01 + 0.00166113*Fus3)*(1/(0.01 + k_p2 + 0.00166113*Fus3)) + r13_k_p3)*c0*1*(1/KMOLE);
    d_sd1 = 0.00074 s_1; r13_k_p3 = 0.5 _one_;
  r5: SD2 + Dig1 + Fus3 -> SD1D2; (kc*0.00166113*SD2*0.00166113*Dig1 + (-(kr_sd1d2*0.00166113*SD1D2)) + (-((0.01 + 0.00166113*Fus3)*k_a*0.00166113*SD1D2)))*c0*1*(1/KMOLE);
  r2: Ste12 + Dig1 + Fus3 -> SD1; (kc*0.00166113*Ste12*0.00166113*Dig1 + (-(kr_sd1*0.00166113*SD1)) + (-((0.01 + 0.00166113*Fus3)*k_a*0.00166113*SD1)))*c0*1*(1/KMOLE);
    kr_sd1 = 1.7e-6 s_1;

  // Unit definitions:
  unit substance = item;
  unit volume = (1e-6 metre)^3;
  unit area = (1e-6 metre)^2;
  unit molecules = item;
  unit umol_um3_litre_1 = 1e-21 mole;
  unit um2 = (1e-6 metre)^2;
  unit uM_um3_molecules_1 = 1e-21 dimensionless * mole / item;
  unit s_1 = 1 / second;
  unit uM_1_s_1 = 1000 dimensionless * metre^3 / (mole * second);
  unit _one_ = dimensionless;
  unit uM = 1e-3 dimensionless * mole / metre^3;
  unit uM_s_1 = 1e-3 dimensionless * mole / (metre^3 * second);
end
