// SBML level 2 version 4

model Kubota2012_InsulinAction_AKTpathway()
  // This model is from the article:
  // Temporal Coding of Insulin Action through Multiplexing of the AKT Pathway.
  // Kubota H, Noguchi R, Toyoshima Y, Ozaki Y, Uda S, Watanabe K, Ogawa W, Kuroda S. Mol Cell. 2012 Jun 29;46(6):820-32. 22633957 ,
  // Abstract:
  // One of the unique characteristics of cellular signaling pathways is that a common signaling pathway can selectively regulate multiple cellular functions of a hormone; however, this selective downstream control through a common signaling pathway is poorly understood. Here we show that the insulin-dependent AKT pathway uses temporal patterns multiplexing for selective regulation of downstream molecules. Pulse and sustained insulin stimulations were simultaneously encoded into transient and sustained AKT phosphorylation, respectively. The downstream molecules, including ribosomal protein S6 kinase (S6K), glucose-6-phosphatase (G6Pase), and glycogen synthase kinase-3β (GSK3β) selectively decoded transient, sustained, and both transient and sustained AKT phosphorylation, respectively. Selective downstream decoding is mediated by the molecules' network structures and kinetics. Our results demonstrate that the AKT pathway can multiplex distinct patterns of blood insulin, such as pulse-like additional and sustained-like basal secretions, and the downstream molecules selectively decode secretion patterns of insulin.
  // Note: Created by The MathWorks, Inc. SimBiology tool, Version 3.3
  // biomodels.db:MODEL1204060000
  // isDescribedBy pubmed:22633957
  // biomodels.db:MODEL1204060000
  // biomodels.db:MODEL1204060000
  // isDescribedBy pubmed:22633957

  // Compartments:
  compartment Insulin_signaling = 1;

  // Species:
  species proIR_complex in Insulin_signaling = 46.22225/Insulin_signaling;
  species IR_complex in Insulin_signaling = 46.22225/Insulin_signaling;
  species p2IR_complex in Insulin_signaling = 0;
  species p1p2IR_complex in Insulin_signaling = 0;
  species p1IR_complex in Insulin_signaling = 0;
  species pAKT in Insulin_signaling = 0;
  species AKT in Insulin_signaling = 4.33812/Insulin_signaling;
  species pGSK3b in Insulin_signaling = 0;
  species GSK3b in Insulin_signaling = 10.56415/Insulin_signaling;
  species pmTOR in Insulin_signaling = 0;
  species mTOR in Insulin_signaling = 0.09592/Insulin_signaling;
  species pS6K in Insulin_signaling = 0;
  species S6K in Insulin_signaling = 2.77699/Insulin_signaling;
  species pX in Insulin_signaling = 0;
  species X in Insulin_signaling = 14.99133/Insulin_signaling;
  species pFOX01 in Insulin_signaling = 0;
  species FOX01 in Insulin_signaling = 0.43571/Insulin_signaling;
  species G6Pase in Insulin_signaling = 38.54029/Insulin_signaling;
  species phi_2 in Insulin_signaling = 0;
  species phi_3 in Insulin_signaling = 0;
  species insulin in Insulin_signaling = 1/Insulin_signaling;
  species phi_1 in Insulin_signaling = 0;
  species phi_4 in Insulin_signaling = 0;

  // Reactions:
  IR_complex_synthesis: proIR_complex -> IR_complex; IR_complex_synthesis_k1*proIR_complex - IR_complex_synthesis_k1*IR_complex;
    IR_complex_synthesis_k1 = 0.0478;
  insulin_IR_complex: IR_complex + insulin -> p1IR_complex; insulin_IR_complex_k1*IR_complex*insulin - insulin_IR_complex_k2*p1IR_complex; insulin_IR_complex is "insulin+IR_complex";
    insulin_IR_complex_k1 = 7.78161; insulin_IR_complex_k2 = 1.61148;
  p1IR_complex_degradation: p1IR_complex => phi_1; p1IR_complex_degradation_k1*p1IR_complex;
    p1IR_complex_degradation_k1 = 0.00792;
  p1IR_complex_phosphorylation: p1IR_complex + pmTOR => p1p2IR_complex + pmTOR; p1IR_complex_phosphorylation_k1*p1IR_complex*pmTOR;
    p1IR_complex_phosphorylation_k1 = 4e-5;
  p1p2IR_complex_dephosphorylation: p1p2IR_complex => p1IR_complex; p1p2IR_complex_dephosphorylation_k1*p1p2IR_complex;
    p1p2IR_complex_dephosphorylation_k1 = 0.28443;
  p1p2IR_complex_degradation: p1p2IR_complex => phi_3; p1p2IR_complex_degradation_k1*p1p2IR_complex;
    p1p2IR_complex_degradation_k1 = 0.0949;
  p2IR_complex_dephosphorylation: p2IR_complex => IR_complex; p2IR_complex_dephosphorylation_k1*p2IR_complex;
    p2IR_complex_dephosphorylation_k1 = 1e-5;
  IR_complex_phosphorylation: IR_complex + pmTOR => p2IR_complex + pmTOR; IR_complex_phosphorylation_k1*IR_complex*pmTOR;
    IR_complex_phosphorylation_k1 = 9.93311;
  p2IR_complex_degradation: p2IR_complex => phi_2; p2IR_complex_degradation_k1*p2IR_complex;
    p2IR_complex_degradation_k1 = 1e-5;
  insulin_p2IR_complex: insulin + p2IR_complex -> p1p2IR_complex; insulin_p2IR_complex_k1*insulin*p2IR_complex - insulin_p2IR_complex_k2*p1p2IR_complex; insulin_p2IR_complex is "insulin+p2IR_complex";
    insulin_p2IR_complex_k1 = 0.36303; insulin_p2IR_complex_k2 = 0.40813;
  AKT_phosphorylation: p1IR_complex + AKT => p1IR_complex + pAKT; AKT_phosphorylation_k1*p1IR_complex*AKT;
    AKT_phosphorylation_k1 = 0.0092;
  pAKT_dephosphorylation: pAKT => AKT; pAKT_dephosphorylation_k1*pAKT;
    pAKT_dephosphorylation_k1 = 7.70619;
  mTOR_phosphorylation: mTOR + pAKT => pmTOR + pAKT; mTOR_phosphorylation_k1*mTOR*pAKT;
    mTOR_phosphorylation_k1 = 0.41968;
  pmTOR_dephosphorylation: pmTOR => mTOR; pmTOR_dephosphorylation_k1*pmTOR;
    pmTOR_dephosphorylation_k1 = 0.12433;
  X_phosphorylation: pmTOR + X => pmTOR + pX; X_phosphorylation_k1*pmTOR*X;
    X_phosphorylation_k1 = 0.00105;
  S6K_phosphorylation: pmTOR + S6K => pmTOR + pS6K; S6K_phosphorylation_k1*pmTOR*S6K;
    S6K_phosphorylation_k1 = 0.00752;
  pS6K_dephosphorylation: pX + pS6K => pX + S6K; pS6K_dephosphorylation_k1*pX*pS6K;
    pS6K_dephosphorylation_k1 = 1.95498;
  pX_dephosphorylation: pX => X; pX_dephosphorylation_k1*pX;
    pX_dephosphorylation_k1 = 0.00146;
  GSK3b_phosphorylation: pAKT + GSK3b => pAKT + pGSK3b; GSK3b_phosphorylation_k1*pAKT*GSK3b;
    GSK3b_phosphorylation_k1 = 2.97538;
  pGSK3b_dephosphorylation: pGSK3b => GSK3b; pGSK3b_dephosphorylation_k1*pGSK3b;
    pGSK3b_dephosphorylation_k1 = 0.9246;
  FOX01_phosphorylation: pAKT + FOX01 => pAKT + pFOX01; FOX01_phosphorylation_k1*pAKT*FOX01;
    FOX01_phosphorylation_k1 = 4.59698;
  pFOX01_dephosphorylation: pFOX01 => FOX01; pFOX01_dephosphorylation_k1*pFOX01;
    pFOX01_dephosphorylation_k1 = 0.15172;
  G6Pase_degradation: G6Pase => phi_4; G6Pase_degradation_k1*G6Pase;
    G6Pase_degradation_k1 = 0.05496;
  G6Pase_synthesis: FOX01 => FOX01 + G6Pase; G6Pase_synthesis_k1*FOX01;
    G6Pase_synthesis_k1 = 4.86146;
end
