// SBML level 2 version 4

function Constant_flux_reversible(v)
  v;
end
Constant_flux_reversible is "Constant flux (reversible)";

function Constant_flux_irreversible(v)
  v;
end
Constant_flux_irreversible is "Constant flux (irreversible)";

model Model_1()
  // Sorokina2011_StarchMetabolism_Ostreococcus
  // This model is from the article:
  // Microarray data can predict diurnal changes of starch content in the picoalga Ostreococcus.
  // Sorokina O, Corellou F, Dauvillée D, Sorokin A, Goryanin I, Ball S, Bouget FY, Millar AJ BMC Systems Biology 2011, 5:36 21352558 ,
  // Abstract:
  // BACKGROUND: The storage of photosynthetic carbohydrate products such as starch is subject to complex regulation, effected at both transcriptional and post-translational levels. The relevant genes in plants show pronounced daily regulation. Their temporal RNA expression profiles, however, do not predict the dynamics of metabolite levels, due to the divergence of enzyme activity from the RNA profiles.Unicellular phytoplankton retains the complexity of plant carbohydrate metabolism, and recent transcriptomic profiling suggests a major input of transcriptional regulation. RESULTS: We used a quasi-steady-state, constraint-based modelling approach to infer the dynamics of starch content during the 12 h light/12 h dark cycle in the model alga Ostreococcus tauri. Measured RNA expression datasets from microarray analysis were integrated with a detailed stoichiometric reconstruction of starch metabolism in O. tauri in order to predict the optimal flux distribution and the dynamics of the starch content in the light/dark cycle. The predicted starch profile was validated by experimental data over the 24 h cycle. The main genetic regulatory targets within the pathway were predicted by in silico analysis. CONCLUSIONS: A single-reaction description of starch production is not able to account for the observed variability of diurnal activity profiles of starch-related enzymes. We developed a detailed reaction model of starch metabolism, which, to our knowledge, is the first attempt to describe this polysaccharide polymerization while preserving the mass balance relationships. Our model and method demonstrate the utility of a quasi-steady-state approach for inferring dynamic metabolic information in O. tauri directly from time-series gene expression data.
  // To the extent possible under law, all copyright and related or neighbouring rights to this encoded model have been dedicated to the public domain worldwide. Please refer to CC0 Public Domain Dedication for more information.
  // In summary, you are entitled to use this encoded model in absolutely any manner you deem suitable, verbatim, or with modification, alone or embedded it in a larger context, redistribute it, commercially or not, in a restricted way or not.
  // To cite BioModels Database, please use: Li C, Donizelli M, Rodriguez N, Dharuri H, Endler L, Chelliah V, Li L, He E, Henry A, Stefan MI, Snoep JL, Hucka M, Le Novère N, Laibe C (2010) BioModels Database: An enhanced, curated and annotated resource for published quantitative kinetic models. BMC Syst Biol., 4:92.
  // biomodels.db:MODEL1204240000
  // isDescribedBy pubmed:21352558
  // biomodels.db:MODEL1204240000
  // isDescribedBy pubmed:21352558
  // biomodels.db:MODEL1204240000
  // biomodels.db:MODEL1204240000

  // Compartments:
  compartment compartment_1 = 1;

  // Species:
  species CO2_compartment in compartment_1 = 0.1;
  species GAP in compartment_1 = 0.1;
  species NADPH in compartment_1 = 0.1;
  species NADP_compartment in compartment_1 = 0.1;
  species ADP in compartment_1 = 0.1;
  species ATP in compartment_1 = 0.1;
  species P in compartment_1 = 0.1;
  species GP in compartment_1 = 0.1;
  species F16BP_compartment in compartment_1 = 0.1;
  species F6P_compartment in compartment_1 = 0.1;
  species G6P_compartment in compartment_1 = 0.1;
  species G1P_compartment in compartment_1 = 0.1;
  species PPi in compartment_1 = 0.1;
  species ADPG_compartment in compartment_1 = 0.1;
  species _20LG_compartment in compartment_1 = 0.1;
  species maltotriose in compartment_1 = 0.1;
  species _40LG_compartment in compartment_1 = 0.1;
  species _40BG in compartment_1 = 0.1;
  species _60BG in compartment_1 = 0.1;
  species _60LG in compartment_1 = 0.1;
  species _80LG in compartment_1 = 0.1;
  species _80BG in compartment_1 = 0.1;
  species _100LG in compartment_1 = 0.1;
  species _100BG in compartment_1 = 0.1;
  species _120BG in compartment_1 = 0.1;
  species species_26 in compartment_1 = 0.1; species_26 is "100LG_s";
  species _100LG_g_compartment in compartment_1 = 0.1;
  species _100BG_s_compartment in compartment_1 = 0.1;
  species _100BG_g_compartment in compartment_1 = 0.1;
  species _120BG_s_compartment in compartment_1 = 0.1;
  species _120BG_g_compartment in compartment_1 = 0.1;
  species species_32 in compartment_1 = 0.1; species_32 is "100LG-s";
  species _100LG_s_P_compartment in compartment_1 = 0.1;
  species _100BG_s_P_compartment in compartment_1 = 0.1;
  species _120BG_s_P_compartment in compartment_1 = 0.1;
  species maltose in compartment_1 = 0.1;
  species glu in compartment_1 = 0.1;
  species _20ADPG in compartment_1 = 0.1;

  // Reactions:
  CO2: => CO2_compartment; compartment_1*Constant_flux_irreversible(CO2_v);
    CO2_v = 0.1;
  GAPex: GAP -> ; compartment_1*Constant_flux_reversible(GAPex_v);
    GAPex_v = -0.1;
  NADPHex: NADPH -> ; compartment_1*Constant_flux_reversible(NADPHex_v);
    NADPHex_v = -0.1;
  NADP: NADP_compartment -> ; compartment_1*Constant_flux_reversible(NADP_v);
    NADP_v = -0.1;
  GAPphoto: 3 CO2_compartment + 6 NADPH + 9 ATP => GAP + 6 NADP_compartment + 9 ADP + 8 P; compartment_1*GAPphoto_k1*CO2_compartment^3*NADPH^6*ATP^9;
    GAPphoto_k1 = 0.1;
  GAPiso: GAP -> GP; compartment_1*(GAPiso_k1*GAP - GAPiso_k2*GP);  // isVersionOf ec-code:5.3.1.1
    GAPiso_k1 = 0.1; GAPiso_k2 = 0.1;
  F16BP: GAP + GP => F16BP_compartment; compartment_1*F16BP_k1*GAP*GP;  // isVersionOf ec-code:4.1.2.13
    F16BP_k1 = 0.1;
  F6P: F16BP_compartment => P + F6P_compartment; compartment_1*F6P_k1*F16BP_compartment;  // isVersionOf ec-code:3.1.3.11
    F6P_k1 = 0.1;
  G6P: F6P_compartment => G6P_compartment; compartment_1*G6P_k1*F6P_compartment;  // isVersionOf ec-code:5.3.1.9
    G6P_k1 = 0.1;
  G1P: G6P_compartment => G1P_compartment; compartment_1*G1P_k1*G6P_compartment;  // isVersionOf ec-code:5.4.2.2
    G1P_k1 = 0.1;
  ATPex: ATP -> ; compartment_1*Constant_flux_reversible(ATPex_v);
    ATPex_v = -0.1;
  ADPout: ADP => ; compartment_1*ADPout_k1*ADP;
    ADPout_k1 = 0.1;
  Pex: P -> ; compartment_1*Constant_flux_reversible(Pex_v);
    Pex_v = -0.1;
  PPitoP: PPi => 2 P; compartment_1*PPitoP_k1*PPi;
    PPitoP_k1 = 0.1;
  ADPG: ATP + G1P_compartment => ADPG_compartment + PPi; compartment_1*ADPG_k1*ATP*G1P_compartment;  // isVersionOf ec-code:2.7.7.27
    ADPG_k1 = 0.1;
  _20LG: maltotriose + 17 ADPG_compartment => _20LG_compartment + 17 ADP; compartment_1*_20LG_k1*maltotriose*ADPG_compartment^17;  // isVersionOf ec-code:2.4.1.242
    _20LG_k1 = 0.1;
  _40LG: _20LG_compartment + 20 ADPG_compartment => _40LG_compartment + 20 ADP; compartment_1*_40LG_k1*_20LG_compartment*ADPG_compartment^20;  // isVersionOf ec-code:2.4.1.21
    _40LG_k1 = 0.1;
  _40BGfrom40LG: _40LG_compartment => _40BG; compartment_1*_40BGfrom40LG_k1*_40LG_compartment;  // isVersionOf ec-code:2.4.1.18
    _40BGfrom40LG_k1 = 0.1;
  _60BGfrom40BG: _40BG + 20 ADPG_compartment => _60BG + 20 ADP; compartment_1*_60BGfrom40BG_k1*_40BG*ADPG_compartment^20;  // occursIn ec-code:2.4.1.21
    _60BGfrom40BG_k1 = 0.1;
  _60LGfrom40LG: _40LG_compartment + 20 ADPG_compartment => _60LG + 20 ADP; compartment_1*_60LGfrom40LG_k1*_40LG_compartment*ADPG_compartment^20;  // isVersionOf ec-code:2.4.1.242
    _60LGfrom40LG_k1 = 0.1;
  _80LGfrom60LG: _60LG + 20 ADPG_compartment => _80LG + 20 ADP; compartment_1*_80LGfrom60LG_k1*_60LG*ADPG_compartment^20;  // isVersionOf ec-code:2.4.1.242
    _80LGfrom60LG_k1 = 0.1;
  _80BGfrom60BG: _60BG + 20 ADPG_compartment => _80BG + 20 ADP; compartment_1*_80BGfrom60BG_k1*_60BG*ADPG_compartment^20;  // isPartOf ec-code:2.4.1.21
    _80BGfrom60BG_k1 = 0.1;
  _60BGfrom60LG: _60LG => _60BG; compartment_1*_60BGfrom60LG_k1*_60LG;  // isVersionOf ec-code:2.4.1.18
    _60BGfrom60LG_k1 = 0.1;
  _80BGfrom80LG: _80LG => _80BG; compartment_1*_80BGfrom80LG_k1*_80LG;  // isVersionOf ec-code:2.4.1.18
    _80BGfrom80LG_k1 = 0.1;
  _100LGfrom80LG: _80LG + 20 ADPG_compartment => _100LG + 20 ADP; compartment_1*_100LGfrom80LG_k1*_80LG*ADPG_compartment^20;  // occursIn ec-code:2.4.1.242
    _100LGfrom80LG_k1 = 0.1;
  _100BGfrom80BG: _80BG + 20 ADPG_compartment => _100BG + 20 ADP; compartment_1*_100BGfrom80BG_k1*_80BG*ADPG_compartment^20;  // isVersionOf ec-code:2.4.1.21
    _100BGfrom80BG_k1 = 0.1;
  _100BGfrom100LG: _100LG => _100BG; compartment_1*_100BGfrom100LG_k1*_100LG;  // isVersionOf ec-code:2.4.1.18
    _100BGfrom100LG_k1 = 0.1;
  _120BGfrom100BG: _100BG + 20 ADPG_compartment => _120BG + 20 ADP; compartment_1*_120BGfrom100BG_k1*_100BG*ADPG_compartment^20;  // isVersionOf ec-code:2.4.1.21
    _120BGfrom100BG_k1 = 0.1;
  _100LG_s: _100LG => species_26; compartment_1*_100LG_s_k1*_100LG;
    _100LG_s_k1 = 0.1;
  _100LG_g: species_26 -> _100LG_g_compartment; compartment_1*(_100LG_g_k1*species_26 - _100LG_g_k2*_100LG_g_compartment);
    _100LG_g_k1 = 0.1; _100LG_g_k2 = 0.1;
  _100BG_s: _100BG => _100BG_s_compartment; compartment_1*_100BG_s_k1*_100BG;
    _100BG_s_k1 = 0.1;
  _100BG_g: _100BG_s_compartment -> _100BG_g_compartment; compartment_1*(_100BG_g_k1*_100BG_s_compartment - _100BG_g_k2*_100BG_g_compartment);
    _100BG_g_k1 = 0.1; _100BG_g_k2 = 0.1;
  _120BG_s: _120BG => _120BG_s_compartment; compartment_1*_120BG_s_k1*_120BG;
    _120BG_s_k1 = 0.1;
  _120BG_g: _120BG_s_compartment -> _120BG_g_compartment; compartment_1*(_120BG_g_k1*_120BG_s_compartment - _120BG_g_k2*_120BG_g_compartment);
    _120BG_g_k1 = 0.1; _120BG_g_k2 = 0.1;
  starch_ex: _100LG_g_compartment + 4 _100BG_g_compartment + 2 _120BG_g_compartment -> ; compartment_1*Constant_flux_reversible(starch_ex_v);
    starch_ex_v = -0.1;
  _100LG_s_P: species_32 + P => _100LG_s_P_compartment; compartment_1*_100LG_s_P_k1*species_32*P;  // isVersionOf ec-code:27.9.4
    _100LG_s_P_k1 = 0.1;
  _100BG_s_P: _100BG_s_compartment + P => _100BG_s_P_compartment; compartment_1*_100BG_s_P_k1*_100BG_s_compartment*P;  // isVersionOf ec-code:2.7.9.4
    _100BG_s_P_k1 = 0.1;
  _120BG_s_P: _120BG_s_compartment + P => _120BG_s_P_compartment; compartment_1*_120BG_s_P_k1*_120BG_s_compartment*P;  // isVersionOf ec-code:2.7.9.4
    _120BG_s_P_k1 = 0.1;
  _100LG_s_Pto40LG60LG: _100LG_s_P_compartment => P + _40LG_compartment + _60LG; compartment_1*_100LG_s_Pto40LG60LG_k1*_100LG_s_P_compartment;  // isVersionOf ec-code:3.2.1.1
    _100LG_s_Pto40LG60LG_k1 = 0.1;
  _100LG_s_Pto80LG20LG: _100LG_s_P_compartment => P + _20LG_compartment + _80LG; compartment_1*_100LG_s_Pto80LG20LG_k1*_100LG_s_P_compartment;  // isVersionOf ec-code:3.2.1.1
    _100LG_s_Pto80LG20LG_k1 = 0.1;
  _100LG_s_Pto20LG: _100LG_s_P_compartment => 5 _20LG_compartment + P; compartment_1*_100LG_s_Pto20LG_k1*_100LG_s_P_compartment;  // isVersionOf ec-code:3.2.1.1
    _100LG_s_Pto20LG_k1 = 0.1;
  _100BG_s_Pto20LG: _100BG_s_P_compartment => 5 _20LG_compartment + P; compartment_1*_100BG_s_Pto20LG_k1*_100BG_s_P_compartment;  // isVersionOf ec-code:3.2.1.68
    _100BG_s_Pto20LG_k1 = 0.1;
  _100BG_s_Pto80BG20LG: _100BG_s_P_compartment => _80BG + _20LG_compartment + P; compartment_1*_100BG_s_Pto80BG20LG_k1*_100BG_s_P_compartment;  // isVersionOf ec-code:3.2.1.142
    _100BG_s_Pto80BG20LG_k1 = 0.1;
  _100BG_s_Pto40BG60BG: _100BG_s_P_compartment => _40BG + _60BG + P; compartment_1*_100BG_s_Pto40BG60BG_k1*_100BG_s_P_compartment;  // isVersionOf ec-code:3.2.1.68
    _100BG_s_Pto40BG60BG_k1 = 0.1;
  _120BG_s_Pto60BG: _120BG_s_P_compartment => 2 _60BG + P; compartment_1*_120BG_s_Pto60BG_k1*_120BG_s_P_compartment;  // isVersionOf ec-code:3.2.1.68
    _120BG_s_Pto60BG_k1 = 0.1;
  _120BG_s_Pto20LG100BG_s_P: _120BG_s_P_compartment => _100BG_s_P_compartment + _20LG_compartment; compartment_1*_120BG_s_Pto20LG100BG_s_P_k1*_120BG_s_P_compartment;  // isVersionOf ec-code:3.2.1.68
    _120BG_s_Pto20LG100BG_s_P_k1 = 0.1;
  _120BG_s_Pto20LG: _120BG_s_P_compartment => 6 _20LG_compartment + P; compartment_1*_120BG_s_Pto20LG_k1*_120BG_s_P_compartment;  // isVersionOf ec-code:3.2.1.68
    _120BG_s_Pto20LG_k1 = 0.1;
  _120BG_s_Pto20LG40BG: _120BG_s_P_compartment => 2 _20LG_compartment + 2 _40BG + P; compartment_1*_120BG_s_Pto20LG40BG_k1*_120BG_s_P_compartment;  // isVersionOf ec-code:3.2.1.142
    _120BG_s_Pto20LG40BG_k1 = 0.1;
  _120BG_s_Pto80BG40BG: _120BG_s_P_compartment => _80BG + _40BG + P; compartment_1*_120BG_s_Pto80BG40BG_k1*_120BG_s_P_compartment;  // isVersionOf ec-code:3.2.1.142
    _120BG_s_Pto80BG40BG_k1 = 0.1;
  _80BGto20LG: _80BG => 4 _20LG_compartment; compartment_1*_80BGto20LG_k1*_80BG;  // isVersionOf ec-code:3.2.1.68
    _80BGto20LG_k1 = 0.1;
  _80BGto40BG: _80BG => 2 _40BG; compartment_1*_80BGto40BG_k1*_80BG;  // isVersionOf ec-code:3.2.1.142
    _80BGto40BG_k1 = 0.1;
  _80LGto20LG: _80LG => 4 _20LG_compartment; compartment_1*_80LGto20LG_k1*_80LG;  // isVersionOf ec-code:3.2.1.1
    _80LGto20LG_k1 = 0.1;
  _80LGto40LG: _80LG => 2 _40LG_compartment; compartment_1*_80LGto40LG_k1*_80LG;  // isVersionOf ec-code:3.2.1.1
    _80LGto40LG_k1 = 0.1;
  _80BGto60BG20LG: _80BG => _60BG + _20LG_compartment; compartment_1*_80BGto60BG20LG_k1*_80BG;
    _80BGto60BG20LG_k1 = 0.1;
  _80LGto60LG20LG: _80LG => _60LG + _20LG_compartment; compartment_1*_80LGto60LG20LG_k1*_80LG;  // isVersionOf ec-code:3.2.1.1
    _80LGto60LG20LG_k1 = 0.1;
  _60BGto20LG: _60BG => 3 _20LG_compartment; compartment_1*_60BGto20LG_k1*_60BG;  // isVersionOf ec-code:3.2.1.68
    _60BGto20LG_k1 = 0.1;
  _60BGto40B20LG: _60BG => _40BG + _20LG_compartment; compartment_1*_60BGto40B20LG_k1*_60BG;  // isVersionOf ec-code:3.2.1.68
    _60BGto40B20LG_k1 = 0.1;
  _60LGto20LG: _60LG => 3 _20LG_compartment; compartment_1*_60LGto20LG_k1*_60LG;  // occursIn ec-code:3.2.1.1
    _60LGto20LG_k1 = 0.1;
  _60LGto40LG20LG: _60LG => _40LG_compartment + _20LG_compartment; compartment_1*_60LGto40LG20LG_k1*_60LG;  // isVersionOf ec-code:3.2.1.1
    _60LGto40LG20LG_k1 = 0.1;
  _40BGto20LG: _40BG => 2 _20LG_compartment; compartment_1*_40BGto20LG_k1*_40BG;  // isVersionOf ec-code:3.2.1.68
    _40BGto20LG_k1 = 0.1;
  _40LGtomaltose: _40LG_compartment => 14 maltose + 4 maltotriose; compartment_1*_40LGtomaltose_k1*_40LG_compartment;  // isVersionOf ec-code:3.2.1.2
    _40LGtomaltose_k1 = 0.1;
  _20LGtomaltose: _20LG_compartment => 7 maltose + 2 maltotriose; compartment_1*_20LGtomaltose_k1*_20LG_compartment;  // isVersionOf ec-code:3.2.1.2
    _20LGtomaltose_k1 = 0.1;
  _20LGtoG1P: _20LG_compartment + 20 P => 20 G1P_compartment; compartment_1*_20LGtoG1P_k1*_20LG_compartment*P^20;  // isVersionOf ec-code:2.4.1.1
    _20LGtoG1P_k1 = 0.1;
  _40LGto_G1P: _40LG_compartment + 20 P => _20LG_compartment + 20 G1P_compartment; compartment_1*_40LGto_G1P_k1*_40LG_compartment*P^20;  // isVersionOf ec-code:2.4.1.1
    _40LGto_G1P_k1 = 0.1;
  maltotriose_disp: _20LG_compartment + 20 maltotriose => _40LG_compartment + 10 glu; compartment_1*maltotriose_disp_k1*_20LG_compartment*maltotriose^20;  // isVersionOf ec-code:2.4.1.25
    maltotriose_disp_k1 = 0.1;
  glucosidase: maltotriose => maltose + glu; compartment_1*glucosidase_k1*maltotriose;  // isVersionOf ec-code:3.2.1.20
    glucosidase_k1 = 0.1;
  maltose_out: maltose => ; compartment_1*maltose_out_k1*maltose;  // isVersionOf ec-code:MEX1
    maltose_out_k1 = 0.1;
  glu_out: glu => ; compartment_1*glu_out_k1*glu;
    glu_out_k1 = 0.1;
  _20LGfromADPG: _20ADPG => _20LG_compartment + 20 ADP; compartment_1*_20LGfromADPG_k1*_20ADPG;  // isVersionOf ec-code:2.4.1.21
    _20LGfromADPG_k1 = 0.1;

  // Unit definitions:
  unit volume = 1e-3 litre;
  unit substance = 1e-3 mole;
end
