// SBML level 2 version 4

function function_10(k10, MK_P, K10, MKK_PP, MKK_P, MK_PP, MKK, MK, P2, K5, K6, Kse2, K9)
  k10*P2*MK_P/K10/(1 + MKK_PP/K5 + MKK_P/K6 + MKK/Kse2 + MK/Kse2 + MK_P/K10 + MK_PP/K9);
end

function function_1(MKKK, K1, Sig, k1)
  Sig*k1*MKKK/(K1 + MKKK);
end

function function_2(MKKK_P, K2, k2, P1, MKKK, Kse1)
  k2*P1*MKKK_P/K2/(1 + MKKK_P/K2 + MKKK/Kse1);
end

function function_3(k3, MKKK_P, MKK, K3, MKK_P, K4)
  k3*MKKK_P*MKK/K3/(1 + MKK/K3 + MKK_P/K4);
end

function function_4(k4, MKKK_P, MKK_P, K4, MKK, K3)
  k4*MKKK_P*MKK_P/K4/(1 + MKK/K3 + MKK_P/K4);
end

function function_5(k5, MKK_PP, K5, MKK_P, MK_P, MK_PP, MKK, MK, P2, K6, Kse2, K10, K9)
  k5*P2*MKK_PP/K5/(1 + MKK_PP/K5 + MKK_P/K6 + MKK/Kse2 + MK/Kse2 + MK_P/K10 + MK_PP/K9);
end

function function_6(k6, MKK_P, K6, MKK_PP, MK_P, MK_PP, MKK, MK, P2, K5, Kse2, K9, K10)
  k6*P2*MKK_P/K6/(1 + MKK_PP/K5 + MKK_P/K6 + MKK/Kse2 + MK/Kse2 + MK_P/K9 + MK_PP/K10);
end

function function_7(k7, MKK_PP, MK, K7, MK_P, K8)
  k7*MKK_PP*MK/K7/(1 + MK/K7 + MK_P/K8);
end

function function_8(k7, MKK_PP, MK_P, K8, MK, K7)
  k7*MKK_PP*MK_P/K8/(1 + MK/K7 + MK_P/K8);
end

function function_9(k9, MK_PP, K9, MKK_PP, MKK_P, MK_P, MKK, MK, P2, K5, K6, Kse2, K10)
  k9*P2*MK_PP/K9/(1 + MKK_PP/K5 + MKK_P/K6 + MKK/Kse2 + MK/Kse2 + MK_P/K10 + MK_PP/K9);
end

model MODEL1204280011()
  // Sarma2012 - Interaction topologies of MAPK cascade (M3_K1_USEQ_short_duration_signal)
  // The paper presents the various interaction topologies between the kinases and phosphatases of MAPK cascade. They are represented as M1, M2, M3 and M4. The kinases of the cascades are MKKK, MKK and MK, and Phos1, Phos2 and Phos3 are phosphatases of the system. All three kinases in a M1 type network have specific phosphatases Phos1, Phos2 and Phos3 for the dephosphorylation process. In a M2 type system, kinases MKKK and MKK are dephosphorylated by Phos1 and MK is dephosphorylated by Phos2. The architecture of system like M3 is such that MKKK gets dephosphorylated by Phos1, whereas Phos2 dephosphorylates both MKK and MK. Finally, the MAPK cascade exhibiting more complex design of interaction such as M4 is such that MKKK and MKK are dephosphorylated by Phos1 whereas MKK and MK are dephosphorylated by Phos2. In addition, as it is plausible that the kinases can sequester their respective phosphatases by binding to them, this is considered in the design of the systems (PSEQ-sequestrated system; USEQ-Unsequestrated system). The robustness of different interaction designs of the systems is checked, considering both MichaelisMenten type kinetics (K1) and elementary mass action kinetics (K2). In the living systems, the MAPK cascade transmit both short and long duration signals where short duration signals trigger proliferation and long duration signals trigger cell differentiation. These signal variants are considered to interpret the systems behaviour. It is also tested how the robustness and signal response behaviour of K2 models are affected when K2 assumes quasi steady state (QSS). The combinations of the above variants resulted in 40 models (MODEL1204280001-40). All these 40 models are available from BioModels Database .
  // Models that correspond to type M4 with mass-action kinetics K2, in four condition 1) USEQ [ MODEL1204280020 - M4_K2_USEQ], 2) PSEQ [ MODEL1204280024 - M4_K2_PSEQ], 3) QSS_USEQ [ MODEL1204280036 - M4_K2_QSS_USEQ] and 4) QSS_PSEQ [ MODEL1204280040 - M4_K2_QSS_PSEQ] are available from the curated branch. The remaining 36 models can be accessed from the non-curated branch.
  // This model [ MODEL1204280011 - M3_K1_USEQ_short_duration_signal] correspond to type M3 with MichaelisMenton type kinetics K1, in short_duration_signal and USEQ (Unsequestrated ) condition. This model can accessed from the non-curated branch of BioModels Database .
  // This model is described in the article:
  // Different designs of kinase-phosphatase interactions and phosphatase sequestration shapes the robustness and signal flow in the MAPK cascade.
  // Sarma U, Ghosh I.
  // BMC Syst Biol. 2012 Jul 2;6(1):82.
  // Abstract:
  // ABSTRACT: BACKGROUND: The three layer mitogen activated protein kinase (MAPK) signaling cascade exhibits different designs of interactions between its kinases and phosphatases. While the sequential interactions between the three kinases of the cascade are tightly preserved, the phosphatases of the cascade, such as MKP3 and PP2A, exhibit relatively diverse interactions with their substrate kinases. Additionally, the kinases of the MAPK cascade can also sequester their phosphatases. Thus, each topologically distinct interaction design of kinases and phosphatases could exhibit unique signal processing characteristics, and the presence of phosphatase sequestration may lead to further fine tuning of the propagated signal. RESULTS: We have built four models of the MAPK cascade, each model with identical kinase-kinase interactions but unique kinases-phosphatases interactions. Our simulations unravelled that MAPK cascade's robustness to external perturbations is a function of nature of interaction between its kinases and phosphatases. The cascade's output robustness was enhanced when phosphatases were sequestrated by their target kinases. We uncovered a novel implicit/hidden negative feedback loop from the phosphatase MKP3 to its upstream kinase Raf-1, in a cascade resembling the B cell MAPK cascade. Notably, strength of the feedback loop was reciprocal to the strength of phosphatases' sequestration and stronger sequestration abolished the feedback loop completely. An experimental method to verify the presence of the feedback loop is also proposed. We further showed, when the models were activated by transient signal, memory (total time taken by the cascade output to reach its unstimulated level after removal of signal) of a cascade was determined by the specific designs of interaction among its kinases and phosphatases. CONCLUSIONS: Differences in interaction designs among the kinases and phosphatases can differentially shape the robustness and signal response behaviour of the MAPK cascade and phosphatase sequestration dramatically enhances the robustness to perturbations in each of the cascade. An implicit negative feedback loop was uncovered from our analysis and we found that strength of the negative feedback loop is reciprocally related to the strength of phosphatase sequestration. Duration of output phosphorylation in response to a transient signal was also found to be determined by the individual cascade's kinase-phosphatase interaction design.
  // This model is hosted on BioModels Database and identified by: MODEL1204280011 .
  // To cite BioModels Database, please use: BioModels Database: An enhanced, curated and annotated resource for published quantitative kinetic models. PMID: 20587024 .
  // To the extent possible under law, all copyright and related or neighbouring rights to this encoded model have been dedicated to the public domain worldwide. Please refer to [CC0 Public Domain Dedication>http://creativecommons.org/publicdomain/zero/1.0/] for more information.
  // biomodels.db:MODEL1204280011
  // biomodels.db:MODEL1204280011
  // isDescribedBy pubmed:22748295

  // Compartments:
  compartment compartment_1 = 1;

  // Species:
  species MKKK in compartment_1 = 300;
  species MKKK_P in compartment_1 = 0;
  species MKK in compartment_1 = 1200;
  species MKK_P in compartment_1 = 0;
  species MKK_PP in compartment_1 = 0;
  species MK in compartment_1 = 1200;
  species MK_P in compartment_1 = 0;
  species MK_PP in compartment_1 = 0;
  species P1 in compartment_1 = 100;
  species P2 in compartment_1 = 200;
  species Sig in compartment_1 = 9.999999;

  // Parameters:
  K1 = 30;
  K2 = 30;
  K3 = 30;
  K4 = 30;
  K5 = 30;
  K6 = 30;
  K7 = 30;
  K8 = 30;
  K9 = 30;
  K10 = 30;
  Kse1 = 3e51;
  Kse2 = 3e51;

  // Reactions:
  reaction_1: MKKK => MKKK_P; compartment_1*function_1(MKKK, K1, Sig, k1);  // modifiers: Sig
    k1 = 0.2;
  reaction_2: MKKK_P => MKKK; compartment_1*function_2(MKKK_P, K2, k2, P1, MKKK, Kse1);  // modifiers: P1
    k2 = 0.01;
  reaction_3: MKK => MKK_P; compartment_1*function_3(k3, MKKK_P, MKK, K3, MKK_P, K4);  // modifiers: MKKK_P
    k3 = 0.1;
  reaction_4: MKK_P => MKK_PP; compartment_1*function_4(k4, MKKK_P, MKK_P, K4, MKK, K3);  // modifiers: MKKK_P, MKK
    k4 = 0.1;
  reaction_5: MKK_PP => MKK_P; compartment_1*function_5(k5, MKK_PP, K5, MKK_P, MK_P, MK_PP, MKK, MK, P2, K6, Kse2, K10, K9);  // modifiers: MK_P, MK_PP, MKK, MK, P2
    k5 = 0.1;
  reaction_6: MKK_P => MKK; compartment_1*function_6(k6, MKK_P, K6, MKK_PP, MK_P, MK_PP, MKK, MK, P2, K5, Kse2, K9, K10);  // modifiers: MKK_PP, MK_P, MK_PP, MK, P2
    k6 = 0.1;
  reaction_7: MK => MK_P; compartment_1*function_7(reaction_7_k7, MKK_PP, MK, K7, MK_P, K8);  // modifiers: MKK_PP
    reaction_7_k7 = 0.1;
  reaction_8: MK_P => MK_PP; compartment_1*function_8(reaction_8_k7, MKK_PP, MK_P, K8, MK, K7);  // modifiers: MKK_PP, MK
    reaction_8_k7 = 0.1;
  reaction_9: MK_PP => MK_P; compartment_1*function_9(k9, MK_PP, K9, MKK_PP, MKK_P, MK_P, MKK, MK, P2, K5, K6, Kse2, K10);  // modifiers: MKK_PP, MKK_P, MKK, MK, P2
    k9 = 0.1;
  reaction_10: MK_P => MK; compartment_1*function_10(k10, MK_P, K10, MKK_PP, MKK_P, MK_PP, MK, P2, P2, K5, K6, Kse2, K9);  // modifiers: MKK_PP, MKK_P, MK_PP, P2
    k10 = 0.1;

  // Events:
  event_1: at (time > 600): Sig = 0;

  // Unit definitions:
  unit volume = 1e-3 litre;
  unit substance = 1e-9 mole;
end
