// SBML level 2 version 4

model MODEL1204280032()
  // Sarma2012 - Interaction topologies of MAPK cascade (M4_K2_PSEQ_short_duration_signal)
  // The paper presents the various interaction topologies between the kinases and phosphatases of MAPK cascade. They are represented as M1, M2, M3 and M4. The kinases of the cascades are MKKK, MKK and MK, and Phos1, Phos2 and Phos3 are phosphatases of the system. All three kinases in a M1 type network have specific phosphatases Phos1, Phos2 and Phos3 for the dephosphorylation process. In a M2 type system, kinases MKKK and MKK are dephosphorylated by Phos1 and MK is dephosphorylated by Phos2. The architecture of system like M3 is such that MKKK gets dephosphorylated by Phos1, whereas Phos2 dephosphorylates both MKK and MK. Finally, the MAPK cascade exhibiting more complex design of interaction such as M4 is such that MKKK and MKK are dephosphorylated by Phos1 whereas MKK and MK are dephosphorylated by Phos2. In addition, as it is plausible that the kinases can sequester their respective phosphatases by binding to them, this is considered in the design of the systems (PSEQ-sequestrated system; USEQ-Unsequestrated system). The robustness of different interaction designs of the systems is checked, considering both MichaelisMenten type kinetics (K1) and elementary mass action kinetics (K2). In the living systems, the MAPK cascade transmit both short and long duration signals where short duration signals trigger proliferation and long duration signals trigger cell differentiation. These signal variants are considered to interpret the systems behaviour. It is also tested how the robustness and signal response behaviour of K2 models are affected when K2 assumes quasi steady state (QSS). The combinations of the above variants resulted in 40 models (MODEL1204280001-40). All these 40 models are available from BioModels Database .
  // Models that correspond to type M4 with mass-action kinetics K2, in four condition 1) USEQ [ MODEL1204280020 - M4_K2_USEQ], 2) PSEQ [ MODEL1204280024 - M4_K2_PSEQ], 3) QSS_USEQ [ MODEL1204280036 - M4_K2_QSS_USEQ] and 4) QSS_PSEQ [ MODEL1204280040 - M4_K2_QSS_PSEQ] are available from the curated branch. The remaining 36 models can be accessed from the non-curated branch.
  // This model [ MODEL1204280032 - M4_K2_PSEQ_short_duration_signal] correspond to type M4 with mass action kinetics K2, in short_duration_signal and PSEQ (sequestrated ) condition. This model can accessed from the non-curated branch of BioModels Database .
  // This model is described in the article:
  // Different designs of kinase-phosphatase interactions and phosphatase sequestration shapes the robustness and signal flow in the MAPK cascade.
  // Sarma U, Ghosh I.
  // BMC Syst Biol. 2012 Jul 2;6(1):82.
  // Abstract:
  // ABSTRACT: BACKGROUND: The three layer mitogen activated protein kinase (MAPK) signaling cascade exhibits different designs of interactions between its kinases and phosphatases. While the sequential interactions between the three kinases of the cascade are tightly preserved, the phosphatases of the cascade, such as MKP3 and PP2A, exhibit relatively diverse interactions with their substrate kinases. Additionally, the kinases of the MAPK cascade can also sequester their phosphatases. Thus, each topologically distinct interaction design of kinases and phosphatases could exhibit unique signal processing characteristics, and the presence of phosphatase sequestration may lead to further fine tuning of the propagated signal. RESULTS: We have built four models of the MAPK cascade, each model with identical kinase-kinase interactions but unique kinases-phosphatases interactions. Our simulations unravelled that MAPK cascade's robustness to external perturbations is a function of nature of interaction between its kinases and phosphatases. The cascade's output robustness was enhanced when phosphatases were sequestrated by their target kinases. We uncovered a novel implicit/hidden negative feedback loop from the phosphatase MKP3 to its upstream kinase Raf-1, in a cascade resembling the B cell MAPK cascade. Notably, strength of the feedback loop was reciprocal to the strength of phosphatases' sequestration and stronger sequestration abolished the feedback loop completely. An experimental method to verify the presence of the feedback loop is also proposed. We further showed, when the models were activated by transient signal, memory (total time taken by the cascade output to reach its unstimulated level after removal of signal) of a cascade was determined by the specific designs of interaction among its kinases and phosphatases. CONCLUSIONS: Differences in interaction designs among the kinases and phosphatases can differentially shape the robustness and signal response behaviour of the MAPK cascade and phosphatase sequestration dramatically enhances the robustness to perturbations in each of the cascade. An implicit negative feedback loop was uncovered from our analysis and we found that strength of the negative feedback loop is reciprocally related to the strength of phosphatase sequestration. Duration of output phosphorylation in response to a transient signal was also found to be determined by the individual cascade's kinase-phosphatase interaction design.
  // This model is hosted on BioModels Database and identified by: MODEL1204280032 .
  // To cite BioModels Database, please use: BioModels Database: An enhanced, curated and annotated resource for published quantitative kinetic models. PMID: 20587024 .
  // To the extent possible under law, all copyright and related or neighbouring rights to this encoded model have been dedicated to the public domain worldwide. Please refer to [CC0 Public Domain Dedication>http://creativecommons.org/publicdomain/zero/1.0/] for more information.
  // biomodels.db:MODEL1204280032
  // biomodels.db:MODEL1204280032
  // isDescribedBy pubmed:22748295

  // Compartments:
  compartment compartment_1 = 1;

  // Species:
  species MK in compartment_1 = 1200;
  species MKK_PP in compartment_1 = 0; MKK_PP is "MKK-PP";
  species MK_MKK_PP in compartment_1 = 0; MK_MKK_PP is "MK_MKK-PP";
  species MK_P in compartment_1 = 0; MK_P is "MK-P";
  species MK_P_MKK_PP in compartment_1 = 0; MK_P_MKK_PP is "MK-P_MKK-PP";
  species MK_PP in compartment_1 = 0; MK_PP is "MK-PP";
  species MKK in compartment_1 = 1200;
  species MKKK_P in compartment_1 = 0; MKKK_P is "MKKK-P";
  species MKK_MKKK_P in compartment_1 = 0; MKK_MKKK_P is "MKK_MKKK-P";
  species MKK_P in compartment_1 = 0; MKK_P is "MKK-P";
  species MKK_P_MKKK_P in compartment_1 = 0; MKK_P_MKKK_P is "MKK-P_MKKK-P";
  species MKK_PP_P2 in compartment_1 = 0; MKK_PP_P2 is "MKK-PP_P2";
  species P2 in compartment_1 = 200;
  species MKK_P_P2 in compartment_1 = 0; MKK_P_P2 is "MKK-P_P2";
  species MKK_P2 in compartment_1 = 0;
  species MKKK in compartment_1 = 300;
  species MKKK_Sig in compartment_1 = 0;
  species Sig in compartment_1 = 10;
  species MKKK_P_P1 in compartment_1 = 0; MKKK_P_P1 is "MKKK-P_P1";
  species P1 in compartment_1 = 100;
  species MK_PP_P2 in compartment_1 = 0; MK_PP_P2 is "MK-PP_P2";
  species MK_P_P2 in compartment_1 = 0; MK_P_P2 is "MK-P_P2";
  species MK_P2 in compartment_1 = 0;
  species MKK_PP_P1 in compartment_1 = 0; MKK_PP_P1 is "MKK-PP_P1";
  species MKK_P_P1 in compartment_1 = 0; MKK_P_P1 is "MKK-P_P1";
  species MKK_P1 in compartment_1 = 0;
  species MKKK_P1 in compartment_1 = 0;

  // Parameters:
  quantity_1 = 0;

  // Reactions:
  _15: MK + MKK_PP -> MK_MKK_PP; compartment_1*(_15_k1*MK*MKK_PP - _15_k2*MK_MKK_PP);
    _15_k1 = 0.02; _15_k2 = 1;
  _16: MK_MKK_PP => MK_P + MKK_PP; compartment_1*_16_k1*MK_MKK_PP;
    _16_k1 = 0.01;
  _17: MK_P + MKK_PP -> MK_P_MKK_PP; compartment_1*(_17_k1*MK_P*MKK_PP - _17_k2*MK_P_MKK_PP);
    _17_k1 = 0.032; _17_k2 = 1;
  _18: MK_P_MKK_PP => MK_PP + MKK_PP; compartment_1*_18_k1*MK_P_MKK_PP;
    _18_k1 = 15;
  _19: MK_PP + P2 -> MK_PP_P2; compartment_1*(_19_k1*MK_PP*P2 - _19_k2*MK_PP_P2);
    _19_k1 = 0.045; _19_k2 = 1;
  _20: MK_PP_P2 => MK_P + P2; compartment_1*_20_k1*MK_PP_P2;
    _20_k1 = 0.092;
  _21: MK_P + P2 -> MK_P_P2; compartment_1*(_21_k1*MK_P*P2 - _21_k2*MK_P_P2);
    _21_k1 = 0.01; _21_k2 = 1;
  _22: MK_P_P2 => MK_P2; compartment_1*_22_k1*MK_P_P2;
    _22_k1 = 0.5;
  _23: MK_P2 -> MK + P2; compartment_1*(_23_k1*MK_P2 - _23_k2*MK*P2);
    _23_k1 = 0.086; _23_k2 = 0.005;
  _6: MKK + MKKK_P -> MKK_MKKK_P; compartment_1*(_6_k1*MKK*MKKK_P - _6_k2*MKK_MKKK_P);
    _6_k1 = 0.02; _6_k2 = 1;
  _7: MKK_MKKK_P => MKK_P + MKKK_P; compartment_1*_7_k1*MKK_MKKK_P;
    _7_k1 = 0.01;
  _8: MKK_P + MKKK_P -> MKK_P_MKKK_P; compartment_1*(_8_k1*MKK_P*MKKK_P - _8_k2*MKK_P_MKKK_P);
    _8_k1 = 0.032; _8_k2 = 1;
  _9: MKK_P_MKKK_P => MKK_PP + MKKK_P; compartment_1*_9_k1*MKK_P_MKKK_P;
    _9_k1 = 15;
  _10_P2: MKK_PP + P2 -> MKK_PP_P2; compartment_1*(_10_P2_k1*MKK_PP*P2 - _10_P2_k2*MKK_PP_P2);
    _10_P2_k1 = 0.045; _10_P2_k2 = 1;
  _11_P2: MKK_PP_P2 => MKK_P + P2; compartment_1*_11_P2_k1*MKK_PP_P2;
    _11_P2_k1 = 0.092;
  _12_P2: MKK_P + P2 -> MKK_P_P2; compartment_1*(_12_P2_k1*MKK_P*P2 - _12_P2_k2*MKK_P_P2);
    _12_P2_k1 = 0.01; _12_P2_k2 = 1;
  _13_P2: MKK_P_P2 => MKK_P2; compartment_1*_13_P2_k1*MKK_P_P2;
    _13_P2_k1 = 0.5;
  _14_P2: MKK_P2 -> MKK + P2; compartment_1*(_14_P2_k1*MKK_P2 - _14_P2_k2*MKK*P2);
    _14_P2_k1 = 0.086; _14_P2_k2 = 0.005;
  reaction_19: MKKK + Sig -> MKKK_Sig; compartment_1*(reaction_19_k1*MKKK*Sig - reaction_19_k2*MKKK_Sig);
    reaction_19_k1 = 0.02; reaction_19_k2 = 1;
  _2: MKKK_Sig => MKKK_P + Sig; compartment_1*_2_k1*MKKK_Sig;
    _2_k1 = 1;
  _3: MKKK_P + P1 -> MKKK_P_P1; compartment_1*(_3_k1*MKKK_P*P1 - _3_k2*MKKK_P_P1);
    _3_k1 = 0.02; _3_k2 = 1;
  _4: MKKK_P_P1 => MKKK_P1; compartment_1*_4_k1*MKKK_P_P1;
    _4_k1 = 0.5;
  _10_P1: MKK_PP + P1 -> MKK_PP_P1; compartment_1*(_10_P1_k1*MKK_PP*P1 - _10_P1_k2*MKK_PP_P1);
    _10_P1_k1 = 0.045; _10_P1_k2 = 1;
  _11_P1: MKK_PP_P1 => MKK_P + P1; compartment_1*_11_P1_k1*MKK_PP_P1;
    _11_P1_k1 = 0.092;
  _12_P1: MKK_P + P1 -> MKK_P_P1; compartment_1*(_12_P1_k1*MKK_P*P1 - _12_P1_k2*MKK_P_P1);
    _12_P1_k1 = 0.01; _12_P1_k2 = 1;
  _13_P1: MKK_P_P1 => MKK_P1; compartment_1*_13_P1_k1*MKK_P_P1;
    _13_P1_k1 = 0.5;
  _14_P1: MKK_P1 -> MKK + P1; compartment_1*(_14_P1_k1*MKK_P1 - _14_P1_k2*MKK*P1);
    _14_P1_k1 = 0.086; _14_P1_k2 = 0.005;
  _5: MKKK_P1 -> MKKK + P1; compartment_1*(_5_k1*MKKK_P1 - _5_k2*MKKK*P1);
    _5_k1 = 0.086; _5_k2 = 0.005;

  // Events:
  event_1: at (time >= 600): Sig = 0, MKKK_Sig = 0;

  // Unit definitions:
  unit volume = 1e-3 litre;
  unit substance = 1e-9 mole;
end
