// SBML level 2 version 4

model Watterson2012_CholesterolBiosynthesisPathway()
  // This model is from the article:
  // A model of flux regulation in the cholesterol biosynthesis pathway: Immune mediated graduated flux reduction versus statin-like led stepped flux reduction.
  // Watterson S, Guerriero ML, Blanc M, Mazein A, Loewe L, Robertson KA, Gibbs H, Shui G, Wenk MR, Hillston J, Ghazal P. Biochimie. 2012 Jun 1. 22664637 ,
  // Abstract:
  // The cholesterol biosynthesis pathway has recently been shown to play an important role in the innate immune response to viral infection with host protection occurring through a coordinate down regulation of the enzymes catalysing each metabolic step. In contrast, statin based drugs, which form the principle pharmaceutical agents for decreasing the activity of this pathway, target a single enzyme. Here, we build an ordinary differential equation model of the cholesterol biosynthesis pathway in order to investigate how the two regulatory strategies impact upon the behaviour of the pathway. We employ a modest set of assumptions: that the pathway operates away from saturation, that each metabolite is involved in multiple cellular interactions and that mRNA levels reflect enzyme concentrations. Using data taken from primary bone marrow derived macrophage cells infected with murine cytomegalovirus or treated with IFNγ, we show that, under these assumptions, coordinate down-regulation of enzyme activity imparts a graduated reduction in flux along the pathway. In contrast, modelling a statin-like treatment that achieves the same degree of down-regulation in cholesterol production, we show that this delivers a step change in flux along the pathway. The graduated reduction mediated by physiological coordinate regulation of multiple enzymes supports a mechanism that allows a greater level of specificity, altering cholesterol levels with less impact upon interactions branching from the pathway, than pharmacological step reductions. We argue that coordinate regulation is likely to show a long-term evolutionary advantage over single enzyme regulation. Finally, the results from our models have implications for future pharmaceutical therapies intended to target cholesterol production with greater specificity and fewer off target effects, suggesting that this can be achieved by mimicking the coordinated down-regulation observed in immunological responses.
  // biomodels.db:MODEL1207300000
  // isDescribedBy pubmed:22664637
  // biomodels.db:MODEL1207300000
  // biomodels.db:MODEL1207300000
  // isDescribedBy pubmed:22664637

  // Compartments:
  compartment default = 1 volume;

  // Species:
  species ACoA in default = 0;
  species HMG_CoA in default = 0; HMG_CoA is "HMG-CoA";
  species M in default = 0;
  species M5P in default = 0;
  species M5PP in default = 0;
  species IsPP in default = 0;
  species FPP in default = 0;
  species Squa in default = 0;
  species _23Ox in default = 0;
  species Lan in default = 0;
  species _44Di in default = 0;
  species _14De in default = 0;
  species _4MZC in default = 0;
  species _3K4M in default = 0;
  species _4MZ in default = 0;
  species Zym in default = 0;
  species Cho8 in default = 0;
  species Cho7 in default = 0;
  species Lath in default = 0;
  species _7DeC in default = 0;
  species Chol in default = 0;
  species _7DeD in default = 0;
  species Des in default = 0;
  species HMGCS in default = 0;
  species HMGCR in default = 0;
  species MVK in default = 0;
  species PMVK in default = 0;
  species MVD in default = 0;
  species FDPS in default = 0;
  species FDFT1 in default = 0;
  species SQLE in default = 0;
  species LSS in default = 0;
  species CYP51A1 in default = 0;
  species TM7SF2 in default = 0;
  species SC4MOL in default = 0;
  species NSDHL in default = 0;
  species HSD17B7 in default = 0;
  species DHCR24 in default = 0;
  species EBP in default = 0;
  species SC5DL in default = 0;
  species DHCR7 in default = 0;
  species s45 in default = 0;
  species s46 in default = 0;
  species s47 in default = 0;
  species s48 in default = 0;
  species s49 in default = 0;
  species s50 in default = 0;
  species s51 in default = 0;
  species s52 in default = 0;
  species s53 in default = 0;
  species s54 in default = 0;
  species s55 in default = 0;
  species s56 in default = 0;
  species s57 in default = 0;
  species s58 in default = 0;
  species s59 in default = 0;
  species s60 in default = 0;
  species s61 in default = 0;
  species s62 in default = 0;
  species s63 in default = 0;
  species s64 in default = 0;
  species s65 in default = 0;
  species s66 in default = 0;
  species s67 in default = 0;

  // Reactions:
  re2: ACoA => HMG_CoA; ACoA*33.48*HMGCS/(0.042 + ACoA);  // modifiers: HMGCS
  re3: HMG_CoA => M; HMG_CoA*7900*HMGCR/(0.07 + HMG_CoA);  // modifiers: HMGCR
  re4: M => M5P; M*7900*MVK/(0.024 + M);  // modifiers: MVK
  re5: M5P => M5PP; M5P*36720*PMVK/(0.025 + M5P);  // modifiers: PMVK
  re6: M5PP => IsPP; M5PP*17640*MVD/(0.0074 + M5PP);  // modifiers: MVD
  re7: IsPP => FPP; IsPP*7900*FDPS/(0.042 + IsPP);  // modifiers: FDPS
  re8: FPP => Squa; FPP*1908*FDFT1/(0.0023 + FPP);  // modifiers: FDFT1
  re9: Squa => _23Ox; Squa*65.88*SQLE/(7.7 + Squa);  // modifiers: SQLE
  re10: _23Ox => Lan; _23Ox*7900*LSS/(0.015 + _23Ox);  // modifiers: LSS
  re11: Lan => _44Di; Lan*7900*CYP51A1/(0.005 + Lan);  // modifiers: CYP51A1
  re12: _44Di => _14De; _44Di*7900*TM7SF2/(0.0333 + _44Di);  // modifiers: TM7SF2
  re13: _14De => _4MZC; _14De*7900*SC4MOL/(0.042 + _14De);  // modifiers: SC4MOL
  re14: _4MZC => _3K4M; _4MZC*7900*NSDHL/(0.007 + _4MZC);  // modifiers: NSDHL
  re15: _3K4M => _4MZ; _3K4M*177.48*HSD17B7/(0.236 + _3K4M);  // modifiers: HSD17B7
  re16: _4MZ => Zym; _4MZ*156;
  re17: Zym => Cho8; Zym*7900*DHCR24/(0.037 + Zym);  // modifiers: DHCR24
  re18: Cho8 => Lath; Cho8*5122.8*EBP/(0.042 + Cho8);  // modifiers: EBP
  re19: Lath => _7DeC; Lath*7900*SC5DL/(0.032 + Lath);  // modifiers: SC5DL
  re20: _7DeC => Chol; _7DeC*7900*DHCR7/(1.1 + _7DeC);  // modifiers: DHCR7
  re21: Zym => Cho7; Zym*1522.8*EBP/(0.05 + Zym);  // modifiers: EBP
  re22: Cho7 => _7DeD; Cho7*156;
  re23: _7DeD => Des; _7DeD*156;
  re24: Des => Chol; Des*7900*DHCR24/(0.042 + Des);  // modifiers: DHCR24
  re25: ACoA => s45; ACoA*0.0134;
  re26: HMG_CoA => s46; HMG_CoA*0.1977;
  re27: M => s47; M*0.1858;
  re28: M5P => s48; M5P*8.8154;
  re29: M5PP => s49; M5PP*2.0107;
  re30: IsPP => s50; IsPP*8.6358;
  re31: FPP => s51; FPP*15.5664;
  re32: Squa => s58; Squa*0.0004;
  re33: _23Ox => s57; _23Ox*0.3178;
  re34: Lan => s56; Lan*1.1174;
  re35: _44Di => s55; _44Di*0.645;
  re36: _14De => s54; _14De*6.76;
  re37: _4MZC => s53; _4MZC*0.5712;
  re38: _3K4M => s52; _3K4M*0.0011;
  re39: _4MZ => s64; _4MZ*1.56;
  re40: Zym => s63; Zym*0.268;
  re41: Cho8 => s62; Cho8*1.3027;
  re42: Lath => s61; Lath*1.3936;
  re43: _7DeC => s60; _7DeC*0.0296;
  re44: Chol => s59; Chol*1;
  re45: Cho7 => s65; Cho7*1.56;
  re46: _7DeD => s66; _7DeD*1.56;
  re47: Des => s67; Des*0.1855;

  // Unit definitions:
  unit substance = mole;
  unit volume = litre;
  unit area = metre^2;
  unit length = metre;
  unit time = second;
end
