// SBML level 2 version 4

model MODEL1208280000()
  // Cellière2011 - Plasticity of TGF-β Signalling
  // Transforming growth factor beta (TGF-β) signalling has been implicated as an important regulator of almost all major cell behaviours, including proliferation, differentiation, cell death, and motility. It remains unclear that how the TGF-β signalling pathway accomplishes the flexibility in its responses. What and how many parameters have to be altered for cells to respond differently to perform complex tasks? This canonical response has been explored in this model, by considering the core signalling architecture of TGF-β pathway.
  // This model is described in the article:
  // Plasticity of TGF-β signaling
  // Cellière G, Fengos G, Hervé M, Iber D.
  // BMC Syst Biol. 2011 Nov 3;5:184.
  // Abstract:
  // The family of TGF-β ligands is large and its members are involved in many different signaling processes. These signaling processes strongly differ in type with TGF-β ligands eliciting both sustained or transient responses. Members of the TGF-β family can also act as morphogen and cellular responses would then be expected to provide a direct read-out of the extracellular ligand concentration. A number of different models have been proposed to reconcile these different behaviours. We were interested to define the set of minimal modifications that are required to change the type of signal processing in the TGF-β signaling network. RESULTS: To define the key aspects for signaling plasticity we focused on the core of the TGF-β signaling network. With the help of a parameter screen we identified ranges of kinetic parameters and protein concentrations that give rise to transient, sustained, or oscillatory responses to constant stimuli, as well as those parameter ranges that enable a proportional response to time-varying ligand concentrations (as expected in the read-out of morphogens). A combination of a strong negative feedback and fast shuttling to the nucleus biases signaling to a transient rather than a sustained response, while oscillations were obtained if ligand binding to the receptor is weak and the turn-over of the I-Smad is fast. A proportional read-out required inefficient receptor activation in addition to a low affinity of receptor-ligand binding. We find that targeted modification of single parameters suffices to alter the response type. The intensity of a constant signal (i.e. the ligand concentration), on the other hand, affected only the strength but not the type of the response. CONCLUSIONS: The architecture of the TGF-β pathway enables the observed signaling plasticity. The observed range of signaling outputs to TGF-β ligand in different cell types and under different conditions can be explained with differences in cellular protein concentrations and with changes in effective rate constants due to cross-talk with other signaling pathways. It will be interesting to uncover the exact cellular differences as well as the details of the cross-talks in future work.
  // This model is hosted on BioModels Database and identified by: MODEL1208280000 .
  // To cite BioModels Database, please use: BioModels Database: An enhanced, curated and annotated resource for published quantitative kinetic models. PMID: 20587024 .
  // To the extent possible under law, all copyright and related or neighbouring rights to this encoded model have been dedicated to the public domain worldwide. Please refer to [CC0 Public Domain Dedication>http://creativecommons.org/publicdomain/zero/1.0/] for more information.
  // biomodels.db:MODEL1208280000
  // biomodels.db:MODEL1208280000
  // isDescribedBy pubmed:22051045

  // Compartments:
  compartment default = 1 volume;
  compartment c in default = 2.3 volume; c is "cytoplasm";
  compartment n in default = 1 volume; n is "nucleus";

  // Species:
  species TGFbR in c = 1.01;
  species TGFb_TGFbR in c = 0;
  species TGFb_TGFbR_P in c = 0;
  species I_Smad_TGFb_TGFbR_P in c = 0;
  species Smad in c = 30.6;
  species Smad_P in c = 0;
  species CoSmad in c = 50.8;
  species Smad_P_Smad_P in c = 0;
  species Smad_P_CoSmad in c = 0;
  species Smad_N in n = 30;
  species Smad_P_Smad_P_N in n = 0;
  species Smad_P_N in n = 0;
  species Smad_P_CoSmad_N in n = 0;
  species CoSmad_N in n = 50.8;
  species I_Smad_mRNA1 in n = 0;
  species I_Smad_mRNA2 in c = 0;
  species I_Smad in c = 0;
  species s1 in n = 0;
  species s2 in c = 0;
  species s3 in c = 0;
  species s4 in c = 0;

  // Parameters:
  Vc = 2.3;
  Vn = 1;
  TGFb = 0.2;
  h = 2;
  k1 = 0.00015;
  k2 = 0.023;
  k3 = 0.01;
  k4 = 0.01;
  k7 = 0.000404;
  k8 = 0.0026;
  k9 = 0.0056;
  k10 = 0.002;
  k11 = 0.016;
  k12 = 5.7;
  k13 = 0.00657;
  k5 = 0.01;
  k6 = 0.1;
  k14 = 0.0017;
  k15 = 1;
  k16 = 0.0008;
  k17 = 0.001;
  k18 = 0.002;
  k19 = 0.001;

  // Reactions:
  r1: TGFb_TGFbR => TGFbR; k1*TGFb_TGFbR;
  r2: TGFbR => TGFb_TGFbR; k2*TGFbR*TGFb;
  r3: TGFb_TGFbR => TGFb_TGFbR_P; k3*TGFb_TGFbR;
  r4: TGFb_TGFbR_P => TGFb_TGFbR; k4*TGFb_TGFbR_P;
  r5: TGFb_TGFbR_P + I_Smad => I_Smad_TGFb_TGFbR_P; k5*TGFb_TGFbR_P*I_Smad;
  r6: I_Smad_TGFb_TGFbR_P => TGFb_TGFbR + I_Smad; k6*I_Smad_TGFb_TGFbR_P;
  r7: Smad => Smad_P; k7*Smad*TGFb_TGFbR_P;  // modifiers: TGFb_TGFbR_P
  r8: Smad => Smad_N; k8*Smad/Vn;
  r9: Smad_N => Smad; k9*Smad_N/Vc;
  r10: Smad_P => Smad_P_Smad_P; k10*Smad_P*Smad_P;
  r11: Smad_P_Smad_P => Smad_P; k11*Smad_P_Smad_P;
  r12: Smad_P + CoSmad => Smad_P_CoSmad; k10*Smad_P*CoSmad;
  r13: Smad_P_CoSmad => Smad_P + CoSmad; k11*Smad_P_CoSmad;
  r14: CoSmad => CoSmad_N; k8*CoSmad/Vn;
  r15: CoSmad_N => CoSmad; k9*CoSmad_N/Vc;
  r16: Smad_P_Smad_P => Smad_P_Smad_P_N; k12*k8*Smad_P_Smad_P/Vn;
  r17: Smad_P => Smad_P_N; k8*Smad_P/Vn;
  r18: Smad_P_N => Smad_P; k9*Smad_P_N/Vc;
  r19: Smad_P_CoSmad => Smad_P_CoSmad_N; k12*k8*Smad_P_CoSmad/Vn;
  r20: Smad_P_N => Smad_N; k13*Smad_P_N;
  r21: Smad_P_N => Smad_P_Smad_P_N; k10*Smad_P_N*Smad_P_N;
  r22: Smad_P_Smad_P_N => Smad_P_N; k11*Smad_P_Smad_P_N;
  r23: Smad_P_N + CoSmad_N => Smad_P_CoSmad_N; k10*Smad_P_N*CoSmad_N;
  r24: Smad_P_CoSmad_N => Smad_P_N + CoSmad_N; k11*Smad_P_CoSmad_N;
  r25: s1 => I_Smad_mRNA1; k14*Smad_P_CoSmad_N^h/(Smad_P_CoSmad_N^h + k15^h);  // modifiers: Smad_P_CoSmad_N
  r26: I_Smad_mRNA1 => I_Smad_mRNA2; k16*I_Smad_mRNA1/Vc;
  r27: I_Smad_mRNA2 => s2; k17*I_Smad_mRNA2;
  r28: s3 => I_Smad; k18*I_Smad_mRNA2;  // modifiers: I_Smad_mRNA2
  r29: I_Smad => s4; k19*I_Smad;

  // Unit definitions:
  unit substance = mole;
  unit volume = litre;
  unit area = metre^2;
  unit length = metre;
  unit time = second;
end
