// SBML level 2 version 3

model Shimoni2009_EscherichiaColi_SOS()
  // This model originates from BioModels Database: A Database of Annotated Published Models (http://www.ebi.ac.uk/biomodels/). It is copyright (c) 2005-2011 The BioModels.net Team.
  // To the extent possible under law, all copyright and related or neighbouring rights to this encoded model have been dedicated to the public domain worldwide. Please refer to CC0 Public Domain Dedication for more information.
  // In summary, you are entitled to use this encoded model in absolutely any manner you deem suitable, verbatim, or with modification, alone or embedded it in a larger context, redistribute it, commercially or not, in a restricted way or not..
  // To cite BioModels Database, please use: Li C, Donizelli M, Rodriguez N, Dharuri H, Endler L, Chelliah V, Li L, He E, Henry A, Stefan MI, Snoep JL, Hucka M, Le Novère N, Laibe C (2010) BioModels Database: An enhanced, curated and annotated resource for published quantitative kinetic models. BMC Syst Biol., 4:92.
  // biomodels.db:MODEL2937159804
  // isDescribedBy pubmed:19424504
  // biomodels.db:MODEL2937159804
  // isDescribedBy pubmed:19424504
  // biomodels.db:MODEL2937159804
  // biomodels.db:MODEL2937159804

  // Compartments:
  compartment compartment = 1;

  // Species:
  species bLexA in compartment = 0;
  species mLexA in compartment = 0;
  species LexA in compartment = 0;
  species bRecA in compartment = 0;
  species mRecA in compartment = 0;
  species RecA in compartment = 0;
  species $fluxL in compartment = 1;
  species $fluxR in compartment = 1;
  species $degradation in compartment = 0;

  // Parameters:
  J9_k = 0.1;
  J10_k = 0.05;
  g_mR = 0.05;
  mRecADegradation_k = 0.02;
  g_mL = 0.03;
  mLexADegradation_k = 0.003;
  g_L = 0.1;
  LexADegradation_k = 0.002;
  g_R = 0.04;
  RecADegradation_k = 0.02;
  LexAUnbindingAuto_k = 0.01;
  LexAUnbindingRecAPromoter_k = 0.04;
  c_R = 0.02;
  c_L = 0.01;

  // Reactions:
  mRecATranscription: $fluxR => mRecA; g_mR*fluxR*(1 - bRecA);  // modifiers: bRecA
  RecATranslation: $fluxR => RecA; g_R*fluxR*mRecA;  // modifiers: mRecA
  mLexATranscription: $fluxL => mLexA; g_mL*fluxL*(1 - bLexA);  // modifiers: bLexA
  LexATranslation: $fluxL => LexA; g_L*fluxL*mLexA;  // modifiers: mLexA
  LexABindingAuto: LexA => bLexA; c_L*LexA*(1 - bLexA);
  LexAUnbindingAuto: bLexA => LexA; LexAUnbindingAuto_k*bLexA;
  LexABindingRecAPromoter: LexA => bRecA; c_R*LexA*(1 - bRecA);
  LexAUnbindingRecAPromoter: bRecA => LexA; LexAUnbindingRecAPromoter_k*bRecA;
  J9: $degradation => $degradation; J9_k*degradation;
  LexAAutoCleavage: LexA => $degradation; J10_k*LexA*RecA;  // modifiers: RecA
  RecADegradation: RecA => $degradation; RecADegradation_k*RecA;
  mRecADegradation: mRecA => $degradation; mRecADegradation_k*mRecA;
  mLexADegradation: mLexA => $degradation; mLexADegradation_k*mLexA;
  LexADegradation: LexA => $degradation; LexADegradation_k*LexA;
end
