// SBML level 2 version 3

model Jablonsky2008_kinetic_model_of_monomeric_PSII()
  // This is a kinetic model of the monomeric photosystem II (PSII).
  // The model is partially based on the earlier model used for simulation of the flash-induced period-four damped oscillation of oxygen evolution and chlorophyll fluorescence (Jablonsky J and Lazar D (2008) Biophys J, 94: 2725-2736 pubmedID: 18178650 ). For short description of reactions and initial concentrations, see the notes in the model file. For explanation of the value of the rate constants, see: Lazar D (2003) J. theor. Biol. 220:469-503 pubmedID: 12623282 ; Jablonsky J and Lazar D, 2008 Biophys J, 94: 2725-2736 pubmedID: 18178650 and Jablonsky, Susila and Lazar, 2008, DOI: 10.1093/bioinformatics/btn530 pubmedID: 18845578 ).
  // The oxygen signal in the model is defined as a maximum of the sum of concentrations of the model forms in the iS3Yp-state (handled in MATLAB). This version of model cannot be used for simulation of the chlorophyll fluorescence because for simplicity the reactions behind the loss of excited state are not considered.
  // The meaning of the particular letters in the model is as follows: P – P680 (special chlorophyll pair), H – pheophytin, A – QA (the first quinone electron acceptor), B – QB (the second quinone electron acceptor), PQ – oxidized plastoquinone molecules in the PQ pool, PQH – reduced and protonated PQ molecules in the PQ pool, Y/Yp – reduced/oxidized state of tyrosine 161-D1, YD/YDox – reduced/oxidized state of tyrosine 160-D2, Sn (n = 0, 1, 2, 3) – the S-states of oxygen evolving complex (OEC), iSn (n = 0, 1, 2, 3) – the intermediate S-states of OEC.
  // All reactions describing electron transport through PSII entered into the model are assumed to be first order reactions with respect to one reactant and are defined as mass action reactions. This approach enables to consider D1-Y161 (YZ) and oxygen evolving complex (OEC) as the integral parts of the PSII, in contrary of the multi-units PSII model (Jablonsky and Lazar, 2008, Biophys J, 94: 2725-2736 pubmedID: 18178650 ) or model of dimeric PSII (Jablonsky, Susila and Lazar, 2008, DOI: 10.1093/bioinformatics/btn530).
  // initial conditions:
  // S1=100%,
  // YDox=89%
  // PHABm = 0.25
  // PHAB = 0.75
  // list of reactions:
  // R1-R144 ... excitation
  // R145- R180... charge separation_open
  // R181- R216... charge separation_closed
  // R217-R324 ... charge stabilisation
  // R325-R360 ... recombination PpHm (P680+pheophytin-)
  // R361-R396... recombination PpAm (P680+QA-)
  // R397-R399 ... recombination S2Am (S2-state of OEC and QA-)
  // R400-R471 ... electron transfer from QA to QB
  // R472-R543 ... electron transfer from QA to QB-
  // R544-R687 ... exchange of double reduced QB by free plastoquinone molecule from the PQ pool
  // R688 ... Ox/red PQ and PQH
  // R689-R700 ... reduction of Pp by Yz in S0
  // R701-R712 ... reduction of Pp by Yz in S1
  // R713-R724 ... reduction of Pp by Yz in S2
  // R725-R736 ... reduction of Pp by Yz in S3
  // R737-R784 ... formation of the intermediated S-states iS0,1,2, 3
  // R785-R832 ... electron donation from OEC to YZox during the S0->S1, S1->S2, S2->S3, S3->S0 transitions (Kok cycle)
  // R833-R850 ... YD oxidation by S3/S2 state of OEC; YDox reduction by S0 state of OEC
  // This model originates from BioModels Database: A Database of Annotated Published Models (http://www.ebi.ac.uk/biomodels/). It is copyright (c) 2005-2011 The BioModels.net Team.
  // To the extent possible under law, all copyright and related or neighbouring rights to this encoded model have been dedicated to the public domain worldwide. Please refer to CC0 Public Domain Dedication for more information.
  // In summary, you are entitled to use this encoded model in absolutely any manner you deem suitable, verbatim, or with modification, alone or embedded it in a larger context, redistribute it, commercially or not, in a restricted way or not..
  // To cite BioModels Database, please use: Li C, Donizelli M, Rodriguez N, Dharuri H, Endler L, Chelliah V, Li L, He E, Henry A, Stefan MI, Snoep JL, Hucka M, Le Novère N, Laibe C (2010) BioModels Database: An enhanced, curated and annotated resource for published quantitative kinetic models. BMC Syst Biol., 4:92.
  // biomodels.db:MODEL3631586579
  // isDescribedBy pubmed:18845578
  // biomodels.db:MODEL3631586579
  // isDescribedBy pubmed:18845578
  // biomodels.db:MODEL3631586579
  // biomodels.db:MODEL3631586579

  // Compartments:
  compartment compartment = 1;

  // Species:
  species S0YPHAB in compartment = 0;
  species S0YPeHAB in compartment = 0;
  species S0YpPHAB in compartment = 0;
  species S0YpPeHAB in compartment = 0;
  species iS0YpPHAB in compartment = 0;
  species iS0YpPeHAB in compartment = 0;
  species S1YPHAB in compartment = 0.75/compartment;
  species S1YPeHAB in compartment = 0;
  species S1YpPHAB in compartment = 0;
  species S1YpPeHAB in compartment = 0;
  species iS1YpPHAB in compartment = 0;
  species iS1YpPeHAB in compartment = 0;
  species S2YPHAB in compartment = 0;
  species S2YPeHAB in compartment = 0;
  species S2YpPHAB in compartment = 0;
  species S2YpPeHAB in compartment = 0;
  species iS2YpPHAB in compartment = 0;
  species iS2YpPeHAB in compartment = 0;
  species S3YPHAB in compartment = 0;
  species S3YPeHAB in compartment = 0;
  species S3YpPHAB in compartment = 0;
  species S3YpPeHAB in compartment = 0;
  species iS3YpPHAB in compartment = 0;
  species iS3YpPeHAB in compartment = 0;
  species S0YPHmAB in compartment = 0;
  species S0YPeHmAB in compartment = 0;
  species S0YpPHmAB in compartment = 0;
  species S0YpPeHmAB in compartment = 0;
  species iS0YpPHmAB in compartment = 0;
  species iS0YpPeHmAB in compartment = 0;
  species S1YPHmAB in compartment = 0;
  species S1YPeHmAB in compartment = 0;
  species S1YpPHmAB in compartment = 0;
  species S1YpPeHmAB in compartment = 0;
  species iS1YpPHmAB in compartment = 0;
  species iS1YpPeHmAB in compartment = 0;
  species S2YPHmAB in compartment = 0;
  species S2YPeHmAB in compartment = 0;
  species S2YpPHmAB in compartment = 0;
  species S2YpPeHmAB in compartment = 0;
  species iS2YpPHmAB in compartment = 0;
  species iS2YpPeHmAB in compartment = 0;
  species S3YPHmAB in compartment = 0;
  species S3YPeHmAB in compartment = 0;
  species S3YpPHmAB in compartment = 0;
  species S3YpPeHmAB in compartment = 0;
  species iS3YpPHmAB in compartment = 0;
  species iS3YpPeHmAB in compartment = 0;
  species S0YPHAmB in compartment = 0;
  species S0YPeHAmB in compartment = 0;
  species S0YpPHAmB in compartment = 0;
  species S0YpPeHAmB in compartment = 0;
  species iS0YpPHAmB in compartment = 0;
  species iS0YpPeHAmB in compartment = 0;
  species S1YPHAmB in compartment = 0;
  species S1YPeHAmB in compartment = 0;
  species S1YpPHAmB in compartment = 0;
  species S1YpPeHAmB in compartment = 0;
  species iS1YpPHAmB in compartment = 0;
  species iS1YpPeHAmB in compartment = 0;
  species S2YPHAmB in compartment = 0;
  species S2YPeHAmB in compartment = 0;
  species S2YpPHAmB in compartment = 0;
  species S2YpPeHAmB in compartment = 0;
  species iS2YpPHAmB in compartment = 0;
  species iS2YpPeHAmB in compartment = 0;
  species S3YPHAmB in compartment = 0;
  species S3YPeHAmB in compartment = 0;
  species S3YpPHAmB in compartment = 0;
  species S3YpPeHAmB in compartment = 0;
  species iS3YpPHAmB in compartment = 0;
  species iS3YpPeHAmB in compartment = 0;
  species S0YPHmAmB in compartment = 0;
  species S0YPeHmAmB in compartment = 0;
  species S0YpPHmAmB in compartment = 0;
  species S0YpPeHmAmB in compartment = 0;
  species iS0YpPHmAmB in compartment = 0;
  species iS0YpPeHmAmB in compartment = 0;
  species S1YPHmAmB in compartment = 0;
  species S1YPeHmAmB in compartment = 0;
  species S1YpPHmAmB in compartment = 0;
  species S1YpPeHmAmB in compartment = 0;
  species iS1YpPHmAmB in compartment = 0;
  species iS1YpPeHmAmB in compartment = 0;
  species S2YPHmAmB in compartment = 0;
  species S2YPeHmAmB in compartment = 0;
  species S2YpPHmAmB in compartment = 0;
  species S2YpPeHmAmB in compartment = 0;
  species iS2YpPHmAmB in compartment = 0;
  species iS2YpPeHmAmB in compartment = 0;
  species S3YPHmAmB in compartment = 0;
  species S3YPeHmAmB in compartment = 0;
  species S3YpPHmAmB in compartment = 0;
  species S3YpPeHmAmB in compartment = 0;
  species iS3YpPHmAmB in compartment = 0;
  species iS3YpPeHmAmB in compartment = 0;
  species S0YPHmABm in compartment = 0;
  species S0YPeHmABm in compartment = 0;
  species S0YpPHmABm in compartment = 0;
  species S0YpPeHmABm in compartment = 0;
  species iS0YpPHmABm in compartment = 0;
  species iS0YpPeHmABm in compartment = 0;
  species S1YPHmABm in compartment = 0;
  species S1YPeHmABm in compartment = 0;
  species S1YpPHmABm in compartment = 0;
  species S1YpPeHmABm in compartment = 0;
  species iS1YpPHmABm in compartment = 0;
  species iS1YpPeHmABm in compartment = 0;
  species S2YPHmABm in compartment = 0;
  species S2YPeHmABm in compartment = 0;
  species S2YpPHmABm in compartment = 0;
  species S2YpPeHmABm in compartment = 0;
  species iS2YpPHmABm in compartment = 0;
  species iS2YpPeHmABm in compartment = 0;
  species S3YPHmABm in compartment = 0;
  species S3YPeHmABm in compartment = 0;
  species S3YpPHmABm in compartment = 0;
  species S3YpPeHmABm in compartment = 0;
  species iS3YpPHmABm in compartment = 0;
  species iS3YpPeHmABm in compartment = 0;
  species S0YPHAmBm in compartment = 0;
  species S0YPeHAmBm in compartment = 0;
  species S0YpPHAmBm in compartment = 0;
  species S0YpPeHAmBm in compartment = 0;
  species iS0YpPHAmBm in compartment = 0;
  species iS0YpPeHAmBm in compartment = 0;
  species S1YPHAmBm in compartment = 0;
  species S1YPeHAmBm in compartment = 0;
  species S1YpPHAmBm in compartment = 0;
  species S1YpPeHAmBm in compartment = 0;
  species iS1YpPHAmBm in compartment = 0;
  species iS1YpPeHAmBm in compartment = 0;
  species S2YPHAmBm in compartment = 0;
  species S2YPeHAmBm in compartment = 0;
  species S2YpPHAmBm in compartment = 0;
  species S2YpPeHAmBm in compartment = 0;
  species iS2YpPHAmBm in compartment = 0;
  species iS2YpPeHAmBm in compartment = 0;
  species S3YPHAmBm in compartment = 0;
  species S3YPeHAmBm in compartment = 0;
  species S3YpPHAmBm in compartment = 0;
  species S3YpPeHAmBm in compartment = 0;
  species iS3YpPHAmBm in compartment = 0;
  species iS3YpPeHAmBm in compartment = 0;
  species S0YPHABmm in compartment = 0;
  species S0YPeHABmm in compartment = 0;
  species S0YpPHABmm in compartment = 0;
  species S0YpPeHABmm in compartment = 0;
  species iS0YpPHABmm in compartment = 0;
  species iS0YpPeHABmm in compartment = 0;
  species S1YPHABmm in compartment = 0;
  species S1YPeHABmm in compartment = 0;
  species S1YpPHABmm in compartment = 0;
  species S1YpPeHABmm in compartment = 0;
  species iS1YpPHABmm in compartment = 0;
  species iS1YpPeHABmm in compartment = 0;
  species S2YPHABmm in compartment = 0;
  species S2YPeHABmm in compartment = 0;
  species S2YpPHABmm in compartment = 0;
  species S2YpPeHABmm in compartment = 0;
  species iS2YpPHABmm in compartment = 0;
  species iS2YpPeHABmm in compartment = 0;
  species S3YPHABmm in compartment = 0;
  species S3YPeHABmm in compartment = 0;
  species S3YpPHABmm in compartment = 0;
  species S3YpPeHABmm in compartment = 0;
  species iS3YpPHABmm in compartment = 0;
  species iS3YpPeHABmm in compartment = 0;
  species S0YPHmAmBm in compartment = 0;
  species S0YPeHmAmBm in compartment = 0;
  species S0YpPHmAmBm in compartment = 0;
  species S0YpPeHmAmBm in compartment = 0;
  species iS0YpPHmAmBm in compartment = 0;
  species iS0YpPeHmAmBm in compartment = 0;
  species S1YPHmAmBm in compartment = 0;
  species S1YPeHmAmBm in compartment = 0;
  species S1YpPHmAmBm in compartment = 0;
  species S1YpPeHmAmBm in compartment = 0;
  species iS1YpPHmAmBm in compartment = 0;
  species iS1YpPeHmAmBm in compartment = 0;
  species S2YPHmAmBm in compartment = 0;
  species S2YPeHmAmBm in compartment = 0;
  species S2YpPHmAmBm in compartment = 0;
  species S2YpPeHmAmBm in compartment = 0;
  species iS2YpPHmAmBm in compartment = 0;
  species iS2YpPeHmAmBm in compartment = 0;
  species S3YPHmAmBm in compartment = 0;
  species S3YPeHmAmBm in compartment = 0;
  species S3YpPHmAmBm in compartment = 0;
  species S3YpPeHmAmBm in compartment = 0;
  species iS3YpPHmAmBm in compartment = 0;
  species iS3YpPeHmAmBm in compartment = 0;
  species S0YPHmABmm in compartment = 0;
  species S0YPeHmABmm in compartment = 0;
  species S0YpPHmABmm in compartment = 0;
  species S0YpPeHmABmm in compartment = 0;
  species iS0YpPHmABmm in compartment = 0;
  species iS0YpPeHmABmm in compartment = 0;
  species S1YPHmABmm in compartment = 0;
  species S1YPeHmABmm in compartment = 0;
  species S1YpPHmABmm in compartment = 0;
  species S1YpPeHmABmm in compartment = 0;
  species iS1YpPHmABmm in compartment = 0;
  species iS1YpPeHmABmm in compartment = 0;
  species S2YPHmABmm in compartment = 0;
  species S2YPeHmABmm in compartment = 0;
  species S2YpPHmABmm in compartment = 0;
  species S2YpPeHmABmm in compartment = 0;
  species iS2YpPHmABmm in compartment = 0;
  species iS2YpPeHmABmm in compartment = 0;
  species S3YPHmABmm in compartment = 0;
  species S3YPeHmABmm in compartment = 0;
  species S3YpPHmABmm in compartment = 0;
  species S3YpPeHmABmm in compartment = 0;
  species iS3YpPHmABmm in compartment = 0;
  species iS3YpPeHmABmm in compartment = 0;
  species S0YPHAmBmm in compartment = 0;
  species S0YPeHAmBmm in compartment = 0;
  species S0YpPHAmBmm in compartment = 0;
  species S0YpPeHAmBmm in compartment = 0;
  species iS0YpPHAmBmm in compartment = 0;
  species iS0YpPeHAmBmm in compartment = 0;
  species S1YPHAmBmm in compartment = 0;
  species S1YPeHAmBmm in compartment = 0;
  species S1YpPHAmBmm in compartment = 0;
  species S1YpPeHAmBmm in compartment = 0;
  species iS1YpPHAmBmm in compartment = 0;
  species iS1YpPeHAmBmm in compartment = 0;
  species S2YPHAmBmm in compartment = 0;
  species S2YPeHAmBmm in compartment = 0;
  species S2YpPHAmBmm in compartment = 0;
  species S2YpPeHAmBmm in compartment = 0;
  species iS2YpPHAmBmm in compartment = 0;
  species iS2YpPeHAmBmm in compartment = 0;
  species S3YPHAmBmm in compartment = 0;
  species S3YPeHAmBmm in compartment = 0;
  species S3YpPHAmBmm in compartment = 0;
  species S3YpPeHAmBmm in compartment = 0;
  species iS3YpPHAmBmm in compartment = 0;
  species iS3YpPeHAmBmm in compartment = 0;
  species S0YPHmAmBmm in compartment = 0;
  species S0YPeHmAmBmm in compartment = 0;
  species S0YpPHmAmBmm in compartment = 0;
  species S0YpPeHmAmBmm in compartment = 0;
  species iS0YpPHmAmBmm in compartment = 0;
  species iS0YpPeHmAmBmm in compartment = 0;
  species S1YPHmAmBmm in compartment = 0;
  species S1YPeHmAmBmm in compartment = 0;
  species S1YpPHmAmBmm in compartment = 0;
  species S1YpPeHmAmBmm in compartment = 0;
  species iS1YpPHmAmBmm in compartment = 0;
  species iS1YpPeHmAmBmm in compartment = 0;
  species S2YPHmAmBmm in compartment = 0;
  species S2YPeHmAmBmm in compartment = 0;
  species S2YpPHmAmBmm in compartment = 0;
  species S2YpPeHmAmBmm in compartment = 0;
  species iS2YpPHmAmBmm in compartment = 0;
  species iS2YpPeHmAmBmm in compartment = 0;
  species S3YPHmAmBmm in compartment = 0;
  species S3YPeHmAmBmm in compartment = 0;
  species S3YpPHmAmBmm in compartment = 0;
  species S3YpPeHmAmBmm in compartment = 0;
  species iS3YpPHmAmBmm in compartment = 0;
  species iS3YpPeHmAmBmm in compartment = 0;
  species S0YPHABm in compartment = 0;
  species S0YPeHABm in compartment = 0;
  species S0YpPHABm in compartment = 0;
  species S0YpPeHABm in compartment = 0;
  species iS0YpPHABm in compartment = 0;
  species iS0YpPeHABm in compartment = 0;
  species S1YPHABm in compartment = 0.25/compartment;
  species S1YPeHABm in compartment = 0;
  species S1YpPHABm in compartment = 0;
  species S1YpPeHABm in compartment = 0;
  species iS1YpPHABm in compartment = 0;
  species iS1YpPeHABm in compartment = 0;
  species S2YPHABm in compartment = 0;
  species S2YPeHABm in compartment = 0;
  species S2YpPHABm in compartment = 0;
  species S2YpPeHABm in compartment = 0;
  species iS2YpPHABm in compartment = 0;
  species iS2YpPeHABm in compartment = 0;
  species S3YPHABm in compartment = 0;
  species S3YPeHABm in compartment = 0;
  species S3YpPHABm in compartment = 0;
  species S3YpPeHABm in compartment = 0;
  species iS3YpPHABm in compartment = 0;
  species iS3YpPeHABm in compartment = 0;
  species S0YPpHmAB in compartment = 0;
  species S0YpPpHmAB in compartment = 0;
  species iS0YpPpHmAB in compartment = 0;
  species S1YPpHmAB in compartment = 0;
  species S1YpPpHmAB in compartment = 0;
  species iS1YpPpHmAB in compartment = 0;
  species S2YPpHmAB in compartment = 0;
  species S2YpPpHmAB in compartment = 0;
  species iS2YpPpHmAB in compartment = 0;
  species S3YPpHmAB in compartment = 0;
  species S3YpPpHmAB in compartment = 0;
  species iS3YpPpHmAB in compartment = 0;
  species S0YPpHmABm in compartment = 0;
  species S0YpPpHmABm in compartment = 0;
  species iS0YpPpHmABm in compartment = 0;
  species S1YPpHmABm in compartment = 0;
  species S1YpPpHmABm in compartment = 0;
  species iS1YpPpHmABm in compartment = 0;
  species S2YPpHmABm in compartment = 0;
  species S2YpPpHmABm in compartment = 0;
  species iS2YpPpHmABm in compartment = 0;
  species S3YPpHmABm in compartment = 0;
  species S3YpPpHmABm in compartment = 0;
  species iS3YpPpHmABm in compartment = 0;
  species S0YPpHmABmm in compartment = 0;
  species S0YpPpHmABmm in compartment = 0;
  species iS0YpPpHmABmm in compartment = 0;
  species S1YPpHmABmm in compartment = 0;
  species S1YpPpHmABmm in compartment = 0;
  species iS1YpPpHmABmm in compartment = 0;
  species S2YPpHmABmm in compartment = 0;
  species S2YpPpHmABmm in compartment = 0;
  species iS2YpPpHmABmm in compartment = 0;
  species S3YPpHmABmm in compartment = 0;
  species S3YpPpHmABmm in compartment = 0;
  species iS3YpPpHmABmm in compartment = 0;
  species S0YPpHmAmB in compartment = 0;
  species S0YpPpHmAmB in compartment = 0;
  species iS0YpPpHmAmB in compartment = 0;
  species S1YPpHmAmB in compartment = 0;
  species S1YpPpHmAmB in compartment = 0;
  species iS1YpPpHmAmB in compartment = 0;
  species S2YPpHmAmB in compartment = 0;
  species S2YpPpHmAmB in compartment = 0;
  species iS2YpPpHmAmB in compartment = 0;
  species S3YPpHmAmB in compartment = 0;
  species S3YpPpHmAmB in compartment = 0;
  species iS3YpPpHmAmB in compartment = 0;
  species S0YPpHmAmBm in compartment = 0;
  species S0YpPpHmAmBm in compartment = 0;
  species iS0YpPpHmAmBm in compartment = 0;
  species S1YPpHmAmBm in compartment = 0;
  species S1YpPpHmAmBm in compartment = 0;
  species iS1YpPpHmAmBm in compartment = 0;
  species S2YPpHmAmBm in compartment = 0;
  species S2YpPpHmAmBm in compartment = 0;
  species iS2YpPpHmAmBm in compartment = 0;
  species S3YPpHmAmBm in compartment = 0;
  species S3YpPpHmAmBm in compartment = 0;
  species iS3YpPpHmAmBm in compartment = 0;
  species S0YPpHmAmBmm in compartment = 0;
  species S0YpPpHmAmBmm in compartment = 0;
  species iS0YpPpHmAmBmm in compartment = 0;
  species S1YPpHmAmBmm in compartment = 0;
  species S1YpPpHmAmBmm in compartment = 0;
  species iS1YpPpHmAmBmm in compartment = 0;
  species S2YPpHmAmBmm in compartment = 0;
  species S2YpPpHmAmBmm in compartment = 0;
  species iS2YpPpHmAmBmm in compartment = 0;
  species S3YPpHmAmBmm in compartment = 0;
  species S3YpPpHmAmBmm in compartment = 0;
  species iS3YpPpHmAmBmm in compartment = 0;
  species S0YPpHAmB in compartment = 0;
  species S0YpPpHAmB in compartment = 0;
  species iS0YpPpHAmB in compartment = 0;
  species S1YPpHAmB in compartment = 0;
  species S1YpPpHAmB in compartment = 0;
  species iS1YpPpHAmB in compartment = 0;
  species S2YPpHAmB in compartment = 0;
  species S2YpPpHAmB in compartment = 0;
  species iS2YpPpHAmB in compartment = 0;
  species S3YPpHAmB in compartment = 0;
  species S3YpPpHAmB in compartment = 0;
  species iS3YpPpHAmB in compartment = 0;
  species S0YPpHAmBm in compartment = 0;
  species S0YpPpHAmBm in compartment = 0;
  species iS0YpPpHAmBm in compartment = 0;
  species S1YPpHAmBm in compartment = 0;
  species S1YpPpHAmBm in compartment = 0;
  species iS1YpPpHAmBm in compartment = 0;
  species S2YPpHAmBm in compartment = 0;
  species S2YpPpHAmBm in compartment = 0;
  species iS2YpPpHAmBm in compartment = 0;
  species S3YPpHAmBm in compartment = 0;
  species S3YpPpHAmBm in compartment = 0;
  species iS3YpPpHAmBm in compartment = 0;
  species S0YPpHAmBmm in compartment = 0;
  species S0YpPpHAmBmm in compartment = 0;
  species iS0YpPpHAmBmm in compartment = 0;
  species S1YPpHAmBmm in compartment = 0;
  species S1YpPpHAmBmm in compartment = 0;
  species iS1YpPpHAmBmm in compartment = 0;
  species S2YPpHAmBmm in compartment = 0;
  species S2YpPpHAmBmm in compartment = 0;
  species iS2YpPpHAmBmm in compartment = 0;
  species S3YPpHAmBmm in compartment = 0;
  species S3YpPpHAmBmm in compartment = 0;
  species iS3YpPpHAmBmm in compartment = 0;
  species S0YPpHABm in compartment = 0;
  species S0YpPpHABm in compartment = 0;
  species iS0YpPpHABm in compartment = 0;
  species S1YPpHABm in compartment = 0;
  species S1YpPpHABm in compartment = 0;
  species iS1YpPpHABm in compartment = 0;
  species S2YPpHABm in compartment = 0;
  species S2YpPpHABm in compartment = 0;
  species iS2YpPpHABm in compartment = 0;
  species S3YPpHABm in compartment = 0;
  species S3YpPpHABm in compartment = 0;
  species iS3YpPpHABm in compartment = 0;
  species S0YPpHABmm in compartment = 0;
  species S0YpPpHABmm in compartment = 0;
  species iS0YpPpHABmm in compartment = 0;
  species S1YPpHABmm in compartment = 0;
  species S1YpPpHABmm in compartment = 0;
  species iS1YpPpHABmm in compartment = 0;
  species S2YPpHABmm in compartment = 0;
  species S2YpPpHABmm in compartment = 0;
  species iS2YpPpHABmm in compartment = 0;
  species S3YPpHABmm in compartment = 0;
  species S3YpPpHABmm in compartment = 0;
  species iS3YpPpHABmm in compartment = 0;
  species PQ in compartment = 7/compartment;
  species S0YPpHAB in compartment = 0;
  species PQH in compartment = 0;
  species S0YpPpHAB in compartment = 0;
  species iS0YpPpHAB in compartment = 0;
  species S1YPpHAB in compartment = 0;
  species S1YpPpHAB in compartment = 0;
  species iS1YpPpHAB in compartment = 0;
  species S2YPpHAB in compartment = 0;
  species S2YpPpHAB in compartment = 0;
  species iS2YpPpHAB in compartment = 0;
  species S3YPpHAB in compartment = 0;
  species S3YpPpHAB in compartment = 0;
  species iS3YpPpHAB in compartment = 0;
  species YD in compartment = 0.11/compartment;
  species YDox in compartment = 0.89/compartment;

  // Reactions:
  R1: S0YPHAB -> S0YPeHAB; k1_1*S0YPHAB - k2_1*S0YPeHAB;
    k1_1 = 1200000; k2_1 = 500000000;
  R2: S0YpPHAB -> S0YpPeHAB; k1_2*S0YpPHAB - k2_2*S0YpPeHAB;
    k1_2 = 1200000; k2_2 = 500000000;
  R3: iS0YpPHAB -> iS0YpPeHAB; k1_3*iS0YpPHAB - k2_3*iS0YpPeHAB;
    k1_3 = 1200000; k2_3 = 500000000;
  R4: S1YPHAB -> S1YPeHAB; k1_4*S1YPHAB - k2_4*S1YPeHAB;
    k1_4 = 1200000; k2_4 = 500000000;
  R5: S1YpPHAB -> S1YpPeHAB; k1_5*S1YpPHAB - k2_5*S1YpPeHAB;
    k1_5 = 1200000; k2_5 = 500000000;
  R6: iS1YpPHAB -> iS1YpPeHAB; k1_6*iS1YpPHAB - k2_6*iS1YpPeHAB;
    k1_6 = 1200000; k2_6 = 500000000;
  R7: S2YPHAB -> S2YPeHAB; k1_7*S2YPHAB - k2_7*S2YPeHAB;
    k1_7 = 1200000; k2_7 = 500000000;
  R8: S2YpPHAB -> S2YpPeHAB; k1_8*S2YpPHAB - k2_8*S2YpPeHAB;
    k1_8 = 1200000; k2_8 = 500000000;
  R9: iS2YpPHAB -> iS2YpPeHAB; k1_9*iS2YpPHAB - k2_9*iS2YpPeHAB;
    k1_9 = 1200000; k2_9 = 500000000;
  R10: S3YPHAB -> S3YPeHAB; k1_10*S3YPHAB - k2_10*S3YPeHAB;
    k1_10 = 1200000; k2_10 = 500000000;
  R11: S3YpPHAB -> S3YpPeHAB; k1_11*S3YpPHAB - k2_11*S3YpPeHAB;
    k1_11 = 1200000; k2_11 = 500000000;
  R12: iS3YpPHAB -> iS3YpPeHAB; k1_12*iS3YpPHAB - k2_12*iS3YpPeHAB;
    k1_12 = 1200000; k2_12 = 500000000;
  R13: S0YPHmAB -> S0YPeHmAB; k1_13*S0YPHmAB - k2_13*S0YPeHmAB;
    k1_13 = 1200000; k2_13 = 500000000;
  R14: S0YpPHmAB -> S0YpPeHmAB; k1_14*S0YpPHmAB - k2_14*S0YpPeHmAB;
    k1_14 = 1200000; k2_14 = 500000000;
  R15: iS0YpPHmAB -> iS0YpPeHmAB; k1_15*iS0YpPHmAB - k2_15*iS0YpPeHmAB;
    k1_15 = 1200000; k2_15 = 500000000;
  R16: S1YPHmAB -> S1YPeHmAB; k1_16*S1YPHmAB - k2_16*S1YPeHmAB;
    k1_16 = 1200000; k2_16 = 500000000;
  R17: S1YpPHmAB -> S1YpPeHmAB; k1_17*S1YpPHmAB - k2_17*S1YpPeHmAB;
    k1_17 = 1200000; k2_17 = 500000000;
  R18: iS1YpPHmAB -> iS1YpPeHmAB; k1_18*iS1YpPHmAB - k2_18*iS1YpPeHmAB;
    k1_18 = 1200000; k2_18 = 500000000;
  R19: S2YPHmAB -> S2YPeHmAB; k1_19*S2YPHmAB - k2_19*S2YPeHmAB;
    k1_19 = 1200000; k2_19 = 500000000;
  R20: S2YpPHmAB -> S2YpPeHmAB; k1_20*S2YpPHmAB - k2_20*S2YpPeHmAB;
    k1_20 = 1200000; k2_20 = 500000000;
  R21: iS2YpPHmAB -> iS2YpPeHmAB; k1_21*iS2YpPHmAB - k2_21*iS2YpPeHmAB;
    k1_21 = 1200000; k2_21 = 500000000;
  R22: S3YPHmAB -> S3YPeHmAB; k1_22*S3YPHmAB - k2_22*S3YPeHmAB;
    k1_22 = 1200000; k2_22 = 500000000;
  R23: S3YpPHmAB -> S3YpPeHmAB; k1_23*S3YpPHmAB - k2_23*S3YpPeHmAB;
    k1_23 = 1200000; k2_23 = 500000000;
  R24: iS3YpPHmAB -> iS3YpPeHmAB; k1_24*iS3YpPHmAB - k2_24*iS3YpPeHmAB;
    k1_24 = 1200000; k2_24 = 500000000;
  R25: S0YPHAmB -> S0YPeHAmB; k1_25*S0YPHAmB - k2_25*S0YPeHAmB;
    k1_25 = 1200000; k2_25 = 500000000;
  R26: S0YpPHAmB -> S0YpPeHAmB; k1_26*S0YpPHAmB - k2_26*S0YpPeHAmB;
    k1_26 = 1200000; k2_26 = 500000000;
  R27: iS0YpPHAmB -> iS0YpPeHAmB; k1_27*iS0YpPHAmB - k2_27*iS0YpPeHAmB;
    k1_27 = 1200000; k2_27 = 500000000;
  R28: S1YPHAmB -> S1YPeHAmB; k1_28*S1YPHAmB - k2_28*S1YPeHAmB;
    k1_28 = 1200000; k2_28 = 500000000;
  R29: S1YpPHAmB -> S1YpPeHAmB; k1_29*S1YpPHAmB - k2_29*S1YpPeHAmB;
    k1_29 = 1200000; k2_29 = 500000000;
  R30: iS1YpPHAmB -> iS1YpPeHAmB; k1_30*iS1YpPHAmB - k2_30*iS1YpPeHAmB;
    k1_30 = 1200000; k2_30 = 500000000;
  R31: S2YPHAmB -> S2YPeHAmB; k1_31*S2YPHAmB - k2_31*S2YPeHAmB;
    k1_31 = 1200000; k2_31 = 500000000;
  R32: S2YpPHAmB -> S2YpPeHAmB; k1_32*S2YpPHAmB - k2_32*S2YpPeHAmB;
    k1_32 = 1200000; k2_32 = 500000000;
  R33: iS2YpPHAmB -> iS2YpPeHAmB; k1_33*iS2YpPHAmB - k2_33*iS2YpPeHAmB;
    k1_33 = 1200000; k2_33 = 500000000;
  R34: S3YPHAmB -> S3YPeHAmB; k1_34*S3YPHAmB - k2_34*S3YPeHAmB;
    k1_34 = 1200000; k2_34 = 500000000;
  R35: S3YpPHAmB -> S3YpPeHAmB; k1_35*S3YpPHAmB - k2_35*S3YpPeHAmB;
    k1_35 = 1200000; k2_35 = 500000000;
  R36: iS3YpPHAmB -> iS3YpPeHAmB; k1_36*iS3YpPHAmB - k2_36*iS3YpPeHAmB;
    k1_36 = 1200000; k2_36 = 500000000;
  R37: S0YPHmAmB -> S0YPeHmAmB; k1_37*S0YPHmAmB - k2_37*S0YPeHmAmB;
    k1_37 = 1200000; k2_37 = 500000000;
  R38: S0YpPHmAmB -> S0YpPeHmAmB; k1_38*S0YpPHmAmB - k2_38*S0YpPeHmAmB;
    k1_38 = 1200000; k2_38 = 500000000;
  R39: iS0YpPHmAmB -> iS0YpPeHmAmB; k1_39*iS0YpPHmAmB - k2_39*iS0YpPeHmAmB;
    k1_39 = 1200000; k2_39 = 500000000;
  R40: S1YPHmAmB -> S1YPeHmAmB; k1_40*S1YPHmAmB - k2_40*S1YPeHmAmB;
    k1_40 = 1200000; k2_40 = 500000000;
  R41: S1YpPHmAmB -> S1YpPeHmAmB; k1_41*S1YpPHmAmB - k2_41*S1YpPeHmAmB;
    k1_41 = 1200000; k2_41 = 500000000;
  R42: iS1YpPHmAmB -> iS1YpPeHmAmB; k1_42*iS1YpPHmAmB - k2_42*iS1YpPeHmAmB;
    k1_42 = 1200000; k2_42 = 500000000;
  R43: S2YPHmAmB -> S2YPeHmAmB; k1_43*S2YPHmAmB - k2_43*S2YPeHmAmB;
    k1_43 = 1200000; k2_43 = 500000000;
  R44: S2YpPHmAmB -> S2YpPeHmAmB; k1_44*S2YpPHmAmB - k2_44*S2YpPeHmAmB;
    k1_44 = 1200000; k2_44 = 500000000;
  R45: iS2YpPHmAmB -> iS2YpPeHmAmB; k1_45*iS2YpPHmAmB - k2_45*iS2YpPeHmAmB;
    k1_45 = 1200000; k2_45 = 500000000;
  R46: S3YPHmAmB -> S3YPeHmAmB; k1_46*S3YPHmAmB - k2_46*S3YPeHmAmB;
    k1_46 = 1200000; k2_46 = 500000000;
  R47: S3YpPHmAmB -> S3YpPeHmAmB; k1_47*S3YpPHmAmB - k2_47*S3YpPeHmAmB;
    k1_47 = 1200000; k2_47 = 500000000;
  R48: iS3YpPHmAmB -> iS3YpPeHmAmB; k1_48*iS3YpPHmAmB - k2_48*iS3YpPeHmAmB;
    k1_48 = 1200000; k2_48 = 500000000;
  R49: S0YPHmABm -> S0YPeHmABm; k1_49*S0YPHmABm - k2_49*S0YPeHmABm;
    k1_49 = 1200000; k2_49 = 500000000;
  R50: S0YpPHmABm -> S0YpPeHmABm; k1_50*S0YpPHmABm - k2_50*S0YpPeHmABm;
    k1_50 = 1200000; k2_50 = 500000000;
  R51: iS0YpPHmABm -> iS0YpPeHmABm; k1_51*iS0YpPHmABm - k2_51*iS0YpPeHmABm;
    k1_51 = 1200000; k2_51 = 500000000;
  R52: S1YPHmABm -> S1YPeHmABm; k1_52*S1YPHmABm - k2_52*S1YPeHmABm;
    k1_52 = 1200000; k2_52 = 500000000;
  R53: S1YpPHmABm -> S1YpPeHmABm; k1_53*S1YpPHmABm - k2_53*S1YpPeHmABm;
    k1_53 = 1200000; k2_53 = 500000000;
  R54: iS1YpPHmABm -> iS1YpPeHmABm; k1_54*iS1YpPHmABm - k2_54*iS1YpPeHmABm;
    k1_54 = 1200000; k2_54 = 500000000;
  R55: S2YPHmABm -> S2YPeHmABm; k1_55*S2YPHmABm - k2_55*S2YPeHmABm;
    k1_55 = 1200000; k2_55 = 500000000;
  R56: S2YpPHmABm -> S2YpPeHmABm; k1_56*S2YpPHmABm - k2_56*S2YpPeHmABm;
    k1_56 = 1200000; k2_56 = 500000000;
  R57: iS2YpPHmABm -> iS2YpPeHmABm; k1_57*iS2YpPHmABm - k2_57*iS2YpPeHmABm;
    k1_57 = 1200000; k2_57 = 500000000;
  R58: S3YPHmABm -> S3YPeHmABm; k1_58*S3YPHmABm - k2_58*S3YPeHmABm;
    k1_58 = 1200000; k2_58 = 500000000;
  R59: S3YpPHmABm -> S3YpPeHmABm; k1_59*S3YpPHmABm - k2_59*S3YpPeHmABm;
    k1_59 = 1200000; k2_59 = 500000000;
  R60: iS3YpPHmABm -> iS3YpPeHmABm; k1_60*iS3YpPHmABm - k2_60*iS3YpPeHmABm;
    k1_60 = 1200000; k2_60 = 500000000;
  R61: S0YPHAmBm -> S0YPeHAmBm; k1_61*S0YPHAmBm - k2_61*S0YPeHAmBm;
    k1_61 = 1200000; k2_61 = 500000000;
  R62: S0YpPHAmBm -> S0YpPeHAmBm; k1_62*S0YpPHAmBm - k2_62*S0YpPeHAmBm;
    k1_62 = 1200000; k2_62 = 500000000;
  R63: iS0YpPHAmBm -> iS0YpPeHAmBm; k1_63*iS0YpPHAmBm - k2_63*iS0YpPeHAmBm;
    k1_63 = 1200000; k2_63 = 500000000;
  R64: S1YPHAmBm -> S1YPeHAmBm; k1_64*S1YPHAmBm - k2_64*S1YPeHAmBm;
    k1_64 = 1200000; k2_64 = 500000000;
  R65: S1YpPHAmBm -> S1YpPeHAmBm; k1_65*S1YpPHAmBm - k2_65*S1YpPeHAmBm;
    k1_65 = 1200000; k2_65 = 500000000;
  R66: iS1YpPHAmBm -> iS1YpPeHAmBm; k1_66*iS1YpPHAmBm - k2_66*iS1YpPeHAmBm;
    k1_66 = 1200000; k2_66 = 500000000;
  R67: S2YPHAmBm -> S2YPeHAmBm; k1_67*S2YPHAmBm - k2_67*S2YPeHAmBm;
    k1_67 = 1200000; k2_67 = 500000000;
  R68: S2YpPHAmBm -> S2YpPeHAmBm; k1_68*S2YpPHAmBm - k2_68*S2YpPeHAmBm;
    k1_68 = 1200000; k2_68 = 500000000;
  R69: iS2YpPHAmBm -> iS2YpPeHAmBm; k1_69*iS2YpPHAmBm - k2_69*iS2YpPeHAmBm;
    k1_69 = 1200000; k2_69 = 500000000;
  R70: S3YPHAmBm -> S3YPeHAmBm; k1_70*S3YPHAmBm - k2_70*S3YPeHAmBm;
    k1_70 = 1200000; k2_70 = 500000000;
  R71: S3YpPHAmBm -> S3YpPeHAmBm; k1_71*S3YpPHAmBm - k2_71*S3YpPeHAmBm;
    k1_71 = 1200000; k2_71 = 500000000;
  R72: iS3YpPHAmBm -> iS3YpPeHAmBm; k1_72*iS3YpPHAmBm - k2_72*iS3YpPeHAmBm;
    k1_72 = 1200000; k2_72 = 500000000;
  R73: S0YPHABmm -> S0YPeHABmm; k1_73*S0YPHABmm - k2_73*S0YPeHABmm;
    k1_73 = 1200000; k2_73 = 500000000;
  R74: S0YpPHABmm -> S0YpPeHABmm; k1_74*S0YpPHABmm - k2_74*S0YpPeHABmm;
    k1_74 = 1200000; k2_74 = 500000000;
  R75: iS0YpPHABmm -> iS0YpPeHABmm; k1_75*iS0YpPHABmm - k2_75*iS0YpPeHABmm;
    k1_75 = 1200000; k2_75 = 500000000;
  R76: S1YPHABmm -> S1YPeHABmm; k1_76*S1YPHABmm - k2_76*S1YPeHABmm;
    k1_76 = 1200000; k2_76 = 500000000;
  R77: S1YpPHABmm -> S1YpPeHABmm; k1_77*S1YpPHABmm - k2_77*S1YpPeHABmm;
    k1_77 = 1200000; k2_77 = 500000000;
  R78: iS1YpPHABmm -> iS1YpPeHABmm; k1_78*iS1YpPHABmm - k2_78*iS1YpPeHABmm;
    k1_78 = 1200000; k2_78 = 500000000;
  R79: S2YPHABmm -> S2YPeHABmm; k1_79*S2YPHABmm - k2_79*S2YPeHABmm;
    k1_79 = 1200000; k2_79 = 500000000;
  R80: S2YpPHABmm -> S2YpPeHABmm; k1_80*S2YpPHABmm - k2_80*S2YpPeHABmm;
    k1_80 = 1200000; k2_80 = 500000000;
  R81: iS2YpPHABmm -> iS2YpPeHABmm; k1_81*iS2YpPHABmm - k2_81*iS2YpPeHABmm;
    k1_81 = 1200000; k2_81 = 500000000;
  R82: S3YPHABmm -> S3YPeHABmm; k1_82*S3YPHABmm - k2_82*S3YPeHABmm;
    k1_82 = 1200000; k2_82 = 500000000;
  R83: S3YpPHABmm -> S3YpPeHABmm; k1_83*S3YpPHABmm - k2_83*S3YpPeHABmm;
    k1_83 = 1200000; k2_83 = 500000000;
  R84: iS3YpPHABmm -> iS3YpPeHABmm; k1_84*iS3YpPHABmm - k2_84*iS3YpPeHABmm;
    k1_84 = 1200000; k2_84 = 500000000;
  R85: S0YPHmAmBm -> S0YPeHmAmBm; k1_85*S0YPHmAmBm - k2_85*S0YPeHmAmBm;
    k1_85 = 1200000; k2_85 = 500000000;
  R86: S0YpPHmAmBm -> S0YpPeHmAmBm; k1_86*S0YpPHmAmBm - k2_86*S0YpPeHmAmBm;
    k1_86 = 1200000; k2_86 = 500000000;
  R87: iS0YpPHmAmBm -> iS0YpPeHmAmBm; k1_87*iS0YpPHmAmBm - k2_87*iS0YpPeHmAmBm;
    k1_87 = 1200000; k2_87 = 500000000;
  R88: S1YPHmAmBm -> S1YPeHmAmBm; k1_88*S1YPHmAmBm - k2_88*S1YPeHmAmBm;
    k1_88 = 1200000; k2_88 = 500000000;
  R89: S1YpPHmAmBm -> S1YpPeHmAmBm; k1_89*S1YpPHmAmBm - k2_89*S1YpPeHmAmBm;
    k1_89 = 1200000; k2_89 = 500000000;
  R90: iS1YpPHmAmBm -> iS1YpPeHmAmBm; k1_90*iS1YpPHmAmBm - k2_90*iS1YpPeHmAmBm;
    k1_90 = 1200000; k2_90 = 500000000;
  R91: S2YPHmAmBm -> S2YPeHmAmBm; k1_91*S2YPHmAmBm - k2_91*S2YPeHmAmBm;
    k1_91 = 1200000; k2_91 = 500000000;
  R92: S2YpPHmAmBm -> S2YpPeHmAmBm; k1_92*S2YpPHmAmBm - k2_92*S2YpPeHmAmBm;
    k1_92 = 1200000; k2_92 = 500000000;
  R93: iS2YpPHmAmBm -> iS2YpPeHmAmBm; k1_93*iS2YpPHmAmBm - k2_93*iS2YpPeHmAmBm;
    k1_93 = 1200000; k2_93 = 500000000;
  R94: S3YPHmAmBm -> S3YPeHmAmBm; k1_94*S3YPHmAmBm - k2_94*S3YPeHmAmBm;
    k1_94 = 1200000; k2_94 = 500000000;
  R95: S3YpPHmAmBm -> S3YpPeHmAmBm; k1_95*S3YpPHmAmBm - k2_95*S3YpPeHmAmBm;
    k1_95 = 1200000; k2_95 = 500000000;
  R96: iS3YpPHmAmBm -> iS3YpPeHmAmBm; k1_96*iS3YpPHmAmBm - k2_96*iS3YpPeHmAmBm;
    k1_96 = 1200000; k2_96 = 500000000;
  R97: S0YPHmABmm -> S0YPeHmABmm; k1_97*S0YPHmABmm - k2_97*S0YPeHmABmm;
    k1_97 = 1200000; k2_97 = 500000000;
  R98: S0YpPHmABmm -> S0YpPeHmABmm; k1_98*S0YpPHmABmm - k2_98*S0YpPeHmABmm;
    k1_98 = 1200000; k2_98 = 500000000;
  R99: iS0YpPHmABmm -> iS0YpPeHmABmm; k1_99*iS0YpPHmABmm - k2_99*iS0YpPeHmABmm;
    k1_99 = 1200000; k2_99 = 500000000;
  R100: S1YPHmABmm -> S1YPeHmABmm; k1_100*S1YPHmABmm - k2_100*S1YPeHmABmm;
    k1_100 = 1200000; k2_100 = 500000000;
  R101: S1YpPHmABmm -> S1YpPeHmABmm; k1_101*S1YpPHmABmm - k2_101*S1YpPeHmABmm;
    k1_101 = 1200000; k2_101 = 500000000;
  R102: iS1YpPHmABmm -> iS1YpPeHmABmm; k1_102*iS1YpPHmABmm - k2_102*iS1YpPeHmABmm;
    k1_102 = 1200000; k2_102 = 500000000;
  R103: S2YPHmABmm -> S2YPeHmABmm; k1_103*S2YPHmABmm - k2_103*S2YPeHmABmm;
    k1_103 = 1200000; k2_103 = 500000000;
  R104: S2YpPHmABmm -> S2YpPeHmABmm; k1_104*S2YpPHmABmm - k2_104*S2YpPeHmABmm;
    k1_104 = 1200000; k2_104 = 500000000;
  R105: iS2YpPHmABmm -> iS2YpPeHmABmm; k1_105*iS2YpPHmABmm - k2_105*iS2YpPeHmABmm;
    k1_105 = 1200000; k2_105 = 500000000;
  R106: S3YPHmABmm -> S3YPeHmABmm; k1_106*S3YPHmABmm - k2_106*S3YPeHmABmm;
    k1_106 = 1200000; k2_106 = 500000000;
  R107: S3YpPHmABmm -> S3YpPeHmABmm; k1_107*S3YpPHmABmm - k2_107*S3YpPeHmABmm;
    k1_107 = 1200000; k2_107 = 500000000;
  R108: iS3YpPHmABmm -> iS3YpPeHmABmm; k1_108*iS3YpPHmABmm - k2_108*iS3YpPeHmABmm;
    k1_108 = 1200000; k2_108 = 500000000;
  R109: S0YPHAmBmm -> S0YPeHAmBmm; k1_109*S0YPHAmBmm - k2_109*S0YPeHAmBmm;
    k1_109 = 1200000; k2_109 = 500000000;
  R110: S0YpPHAmBmm -> S0YpPeHAmBmm; k1_110*S0YpPHAmBmm - k2_110*S0YpPeHAmBmm;
    k1_110 = 1200000; k2_110 = 500000000;
  R111: iS0YpPHAmBmm -> iS0YpPeHAmBmm; k1_111*iS0YpPHAmBmm - k2_111*iS0YpPeHAmBmm;
    k1_111 = 1200000; k2_111 = 500000000;
  R112: S1YPHAmBmm -> S1YPeHAmBmm; k1_112*S1YPHAmBmm - k2_112*S1YPeHAmBmm;
    k1_112 = 1200000; k2_112 = 500000000;
  R113: S1YpPHAmBmm -> S1YpPeHAmBmm; k1_113*S1YpPHAmBmm - k2_113*S1YpPeHAmBmm;
    k1_113 = 1200000; k2_113 = 500000000;
  R114: iS1YpPHAmBmm -> iS1YpPeHAmBmm; k1_114*iS1YpPHAmBmm - k2_114*iS1YpPeHAmBmm;
    k1_114 = 1200000; k2_114 = 500000000;
  R115: S2YPHAmBmm -> S2YPeHAmBmm; k1_115*S2YPHAmBmm - k2_115*S2YPeHAmBmm;
    k1_115 = 1200000; k2_115 = 500000000;
  R116: S2YpPHAmBmm -> S2YpPeHAmBmm; k1_116*S2YpPHAmBmm - k2_116*S2YpPeHAmBmm;
    k1_116 = 1200000; k2_116 = 500000000;
  R117: iS2YpPHAmBmm -> iS2YpPeHAmBmm; k1_117*iS2YpPHAmBmm - k2_117*iS2YpPeHAmBmm;
    k1_117 = 1200000; k2_117 = 500000000;
  R118: S3YPHAmBmm -> S3YPeHAmBmm; k1_118*S3YPHAmBmm - k2_118*S3YPeHAmBmm;
    k1_118 = 1200000; k2_118 = 500000000;
  R119: S3YpPHAmBmm -> S3YpPeHAmBmm; k1_119*S3YpPHAmBmm - k2_119*S3YpPeHAmBmm;
    k1_119 = 1200000; k2_119 = 500000000;
  R120: iS3YpPHAmBmm -> iS3YpPeHAmBmm; k1_120*iS3YpPHAmBmm - k2_120*iS3YpPeHAmBmm;
    k1_120 = 1200000; k2_120 = 500000000;
  R121: S0YPHmAmBmm -> S0YPeHmAmBmm; k1_121*S0YPHmAmBmm - k2_121*S0YPeHmAmBmm;
    k1_121 = 1200000; k2_121 = 500000000;
  R122: S0YpPHmAmBmm -> S0YpPeHmAmBmm; k1_122*S0YpPHmAmBmm - k2_122*S0YpPeHmAmBmm;
    k1_122 = 1200000; k2_122 = 500000000;
  R123: iS0YpPHmAmBmm -> iS0YpPeHmAmBmm; k1_123*iS0YpPHmAmBmm - k2_123*iS0YpPeHmAmBmm;
    k1_123 = 1200000; k2_123 = 500000000;
  R124: S1YPHmAmBmm -> S1YPeHmAmBmm; k1_124*S1YPHmAmBmm - k2_124*S1YPeHmAmBmm;
    k1_124 = 1200000; k2_124 = 500000000;
  R125: S1YpPHmAmBmm -> S1YpPeHmAmBmm; k1_125*S1YpPHmAmBmm - k2_125*S1YpPeHmAmBmm;
    k1_125 = 1200000; k2_125 = 500000000;
  R126: iS1YpPHmAmBmm -> iS1YpPeHmAmBmm; k1_126*iS1YpPHmAmBmm - k2_126*iS1YpPeHmAmBmm;
    k1_126 = 1200000; k2_126 = 500000000;
  R127: S2YPHmAmBmm -> S2YPeHmAmBmm; k1_127*S2YPHmAmBmm - k2_127*S2YPeHmAmBmm;
    k1_127 = 1200000; k2_127 = 500000000;
  R128: S2YpPHmAmBmm -> S2YpPeHmAmBmm; k1_128*S2YpPHmAmBmm - k2_128*S2YpPeHmAmBmm;
    k1_128 = 1200000; k2_128 = 500000000;
  R129: iS2YpPHmAmBmm -> iS2YpPeHmAmBmm; k1_129*iS2YpPHmAmBmm - k2_129*iS2YpPeHmAmBmm;
    k1_129 = 1200000; k2_129 = 500000000;
  R130: S3YPHmAmBmm -> S3YPeHmAmBmm; k1_130*S3YPHmAmBmm - k2_130*S3YPeHmAmBmm;
    k1_130 = 1200000; k2_130 = 500000000;
  R131: S3YpPHmAmBmm -> S3YpPeHmAmBmm; k1_131*S3YpPHmAmBmm - k2_131*S3YpPeHmAmBmm;
    k1_131 = 1200000; k2_131 = 500000000;
  R132: iS3YpPHmAmBmm -> iS3YpPeHmAmBmm; k1_132*iS3YpPHmAmBmm - k2_132*iS3YpPeHmAmBmm;
    k1_132 = 1200000; k2_132 = 500000000;
  R133: S0YPHABm -> S0YPeHABm; k1_133*S0YPHABm - k2_133*S0YPeHABm;
    k1_133 = 1200000; k2_133 = 500000000;
  R134: S0YpPHABm -> S0YpPeHABm; k1_134*S0YpPHABm - k2_134*S0YpPeHABm;
    k1_134 = 1200000; k2_134 = 500000000;
  R135: iS0YpPHABm -> iS0YpPeHABm; k1_135*iS0YpPHABm - k2_135*iS0YpPeHABm;
    k1_135 = 1200000; k2_135 = 500000000;
  R136: S1YPHABm -> S1YPeHABm; k1_136*S1YPHABm - k2_136*S1YPeHABm;
    k1_136 = 1200000; k2_136 = 500000000;
  R137: S1YpPHABm -> S1YpPeHABm; k1_137*S1YpPHABm - k2_137*S1YpPeHABm;
    k1_137 = 1200000; k2_137 = 500000000;
  R138: iS1YpPHABm -> iS1YpPeHABm; k1_138*iS1YpPHABm - k2_138*iS1YpPeHABm;
    k1_138 = 1200000; k2_138 = 500000000;
  R139: S2YPHABm -> S2YPeHABm; k1_139*S2YPHABm - k2_139*S2YPeHABm;
    k1_139 = 1200000; k2_139 = 500000000;
  R140: S2YpPHABm -> S2YpPeHABm; k1_140*S2YpPHABm - k2_140*S2YpPeHABm;
    k1_140 = 1200000; k2_140 = 500000000;
  R141: iS2YpPHABm -> iS2YpPeHABm; k1_141*iS2YpPHABm - k2_141*iS2YpPeHABm;
    k1_141 = 1200000; k2_141 = 500000000;
  R142: S3YPHABm -> S3YPeHABm; k1_142*S3YPHABm - k2_142*S3YPeHABm;
    k1_142 = 1200000; k2_142 = 500000000;
  R143: S3YpPHABm -> S3YpPeHABm; k1_143*S3YpPHABm - k2_143*S3YpPeHABm;
    k1_143 = 1200000; k2_143 = 500000000;
  R144: iS3YpPHABm -> iS3YpPeHABm; k1_144*iS3YpPHABm - k2_144*iS3YpPeHABm;
    k1_144 = 1200000; k2_144 = 500000000;
  R145: S0YPeHAB -> S0YPpHmAB; k1_145*S0YPeHAB - k2_145*S0YPpHmAB;
    k1_145 = 3e9; k2_145 = 300000000;
  R146: S0YpPeHAB -> S0YpPpHmAB; k1_146*S0YpPeHAB - k2_146*S0YpPpHmAB;
    k1_146 = 3e9; k2_146 = 300000000;
  R147: iS0YpPeHAB -> iS0YpPpHmAB; k1_147*iS0YpPeHAB - k2_147*iS0YpPpHmAB;
    k1_147 = 3e9; k2_147 = 300000000;
  R148: S1YPeHAB -> S1YPpHmAB; k1_148*S1YPeHAB - k2_148*S1YPpHmAB;
    k1_148 = 3e9; k2_148 = 300000000;
  R149: S1YpPeHAB -> S1YpPpHmAB; k1_149*S1YpPeHAB - k2_149*S1YpPpHmAB;
    k1_149 = 3e9; k2_149 = 300000000;
  R150: iS1YpPeHAB -> iS1YpPpHmAB; k1_150*iS1YpPeHAB - k2_150*iS1YpPpHmAB;
    k1_150 = 3e9; k2_150 = 300000000;
  R151: S2YPeHAB -> S2YPpHmAB; k1_151*S2YPeHAB - k2_151*S2YPpHmAB;
    k1_151 = 3e9; k2_151 = 300000000;
  R152: S2YpPeHAB -> S2YpPpHmAB; k1_152*S2YpPeHAB - k2_152*S2YpPpHmAB;
    k1_152 = 3e9; k2_152 = 300000000;
  R153: iS2YpPeHAB -> iS2YpPpHmAB; k1_153*iS2YpPeHAB - k2_153*iS2YpPpHmAB;
    k1_153 = 3e9; k2_153 = 300000000;
  R154: S3YPeHAB -> S3YPpHmAB; k1_154*S3YPeHAB - k2_154*S3YPpHmAB;
    k1_154 = 3e9; k2_154 = 300000000;
  R155: S3YpPeHAB -> S3YpPpHmAB; k1_155*S3YpPeHAB - k2_155*S3YpPpHmAB;
    k1_155 = 3e9; k2_155 = 300000000;
  R156: iS3YpPeHAB -> iS3YpPpHmAB; k1_156*iS3YpPeHAB - k2_156*iS3YpPpHmAB;
    k1_156 = 3e9; k2_156 = 300000000;
  R157: S0YPeHABm -> S0YPpHmABm; k1_157*S0YPeHABm - k2_157*S0YPpHmABm;
    k1_157 = 3e9; k2_157 = 300000000;
  R158: S0YpPeHABm -> S0YpPpHmABm; k1_158*S0YpPeHABm - k2_158*S0YpPpHmABm;
    k1_158 = 3e9; k2_158 = 300000000;
  R159: iS0YpPeHABm -> iS0YpPpHmABm; k1_159*iS0YpPeHABm - k2_159*iS0YpPpHmABm;
    k1_159 = 3e9; k2_159 = 300000000;
  R160: S1YPeHABm -> S1YPpHmABm; k1_160*S1YPeHABm - k2_160*S1YPpHmABm;
    k1_160 = 3e9; k2_160 = 300000000;
  R161: S1YpPeHABm -> S1YpPpHmABm; k1_161*S1YpPeHABm - k2_161*S1YpPpHmABm;
    k1_161 = 3e9; k2_161 = 300000000;
  R162: iS1YpPeHABm -> iS1YpPpHmABm; k1_162*iS1YpPeHABm - k2_162*iS1YpPpHmABm;
    k1_162 = 3e9; k2_162 = 300000000;
  R163: S2YPeHABm -> S2YPpHmABm; k1_163*S2YPeHABm - k2_163*S2YPpHmABm;
    k1_163 = 3e9; k2_163 = 300000000;
  R164: S2YpPeHABm -> S2YpPpHmABm; k1_164*S2YpPeHABm - k2_164*S2YpPpHmABm;
    k1_164 = 3e9; k2_164 = 300000000;
  R165: iS2YpPeHABm -> iS2YpPpHmABm; k1_165*iS2YpPeHABm - k2_165*iS2YpPpHmABm;
    k1_165 = 3e9; k2_165 = 300000000;
  R166: S3YPeHABm -> S3YPpHmABm; k1_166*S3YPeHABm - k2_166*S3YPpHmABm;
    k1_166 = 3e9; k2_166 = 300000000;
  R167: S3YpPeHABm -> S3YpPpHmABm; k1_167*S3YpPeHABm - k2_167*S3YpPpHmABm;
    k1_167 = 3e9; k2_167 = 300000000;
  R168: iS3YpPeHABm -> iS3YpPpHmABm; k1_168*iS3YpPeHABm - k2_168*iS3YpPpHmABm;
    k1_168 = 3e9; k2_168 = 300000000;
  R169: S0YPeHABmm -> S0YPpHmABmm; k1_169*S0YPeHABmm - k2_169*S0YPpHmABmm;
    k1_169 = 3e9; k2_169 = 300000000;
  R170: S0YpPeHABmm -> S0YpPpHmABmm; k1_170*S0YpPeHABmm - k2_170*S0YpPpHmABmm;
    k1_170 = 3e9; k2_170 = 300000000;
  R171: iS0YpPeHABmm -> iS0YpPpHmABmm; k1_171*iS0YpPeHABmm - k2_171*iS0YpPpHmABmm;
    k1_171 = 3e9; k2_171 = 300000000;
  R172: S1YPeHABmm -> S1YPpHmABmm; k1_172*S1YPeHABmm - k2_172*S1YPpHmABmm;
    k1_172 = 3e9; k2_172 = 300000000;
  R173: S1YpPeHABmm -> S1YpPpHmABmm; k1_173*S1YpPeHABmm - k2_173*S1YpPpHmABmm;
    k1_173 = 3e9; k2_173 = 300000000;
  R174: iS1YpPeHABmm -> iS1YpPpHmABmm; k1_174*iS1YpPeHABmm - k2_174*iS1YpPpHmABmm;
    k1_174 = 3e9; k2_174 = 300000000;
  R175: S2YPeHABmm -> S2YPpHmABmm; k1_175*S2YPeHABmm - k2_175*S2YPpHmABmm;
    k1_175 = 3e9; k2_175 = 300000000;
  R176: S2YpPeHABmm -> S2YpPpHmABmm; k1_176*S2YpPeHABmm - k2_176*S2YpPpHmABmm;
    k1_176 = 3e9; k2_176 = 300000000;
  R177: iS2YpPeHABmm -> iS2YpPpHmABmm; k1_177*iS2YpPeHABmm - k2_177*iS2YpPpHmABmm;
    k1_177 = 3e9; k2_177 = 300000000;
  R178: S3YPeHABmm -> S3YPpHmABmm; k1_178*S3YPeHABmm - k2_178*S3YPpHmABmm;
    k1_178 = 3e9; k2_178 = 300000000;
  R179: S3YpPeHABmm -> S3YpPpHmABmm; k1_179*S3YpPeHABmm - k2_179*S3YpPpHmABmm;
    k1_179 = 3e9; k2_179 = 300000000;
  R180: iS3YpPeHABmm -> iS3YpPpHmABmm; k1_180*iS3YpPeHABmm - k2_180*iS3YpPpHmABmm;
    k1_180 = 3e9; k2_180 = 300000000;
  R181: S0YPeHAmB -> S0YPpHmAmB; k1_181*S0YPeHAmB - k2_181*S0YPpHmAmB;
    k1_181 = 480000000; k2_181 = 340000000;
  R182: S0YpPeHAmB -> S0YpPpHmAmB; k1_182*S0YpPeHAmB - k2_182*S0YpPpHmAmB;
    k1_182 = 480000000; k2_182 = 340000000;
  R183: iS0YpPeHAmB -> iS0YpPpHmAmB; k1_183*iS0YpPeHAmB - k2_183*iS0YpPpHmAmB;
    k1_183 = 480000000; k2_183 = 340000000;
  R184: S1YPeHAmB -> S1YPpHmAmB; k1_184*S1YPeHAmB - k2_184*S1YPpHmAmB;
    k1_184 = 480000000; k2_184 = 340000000;
  R185: S1YpPeHAmB -> S1YpPpHmAmB; k1_185*S1YpPeHAmB - k2_185*S1YpPpHmAmB;
    k1_185 = 480000000; k2_185 = 340000000;
  R186: iS1YpPeHAmB -> iS1YpPpHmAmB; k1_186*iS1YpPeHAmB - k2_186*iS1YpPpHmAmB;
    k1_186 = 480000000; k2_186 = 340000000;
  R187: S2YPeHAmB -> S2YPpHmAmB; k1_187*S2YPeHAmB - k2_187*S2YPpHmAmB;
    k1_187 = 480000000; k2_187 = 340000000;
  R188: S2YpPeHAmB -> S2YpPpHmAmB; k1_188*S2YpPeHAmB - k2_188*S2YpPpHmAmB;
    k1_188 = 480000000; k2_188 = 340000000;
  R189: iS2YpPeHAmB -> iS2YpPpHmAmB; k1_189*iS2YpPeHAmB - k2_189*iS2YpPpHmAmB;
    k1_189 = 480000000; k2_189 = 340000000;
  R190: S3YPeHAmB -> S3YPpHmAmB; k1_190*S3YPeHAmB - k2_190*S3YPpHmAmB;
    k1_190 = 480000000; k2_190 = 340000000;
  R191: S3YpPeHAmB -> S3YpPpHmAmB; k1_191*S3YpPeHAmB - k2_191*S3YpPpHmAmB;
    k1_191 = 480000000; k2_191 = 340000000;
  R192: iS3YpPeHAmB -> iS3YpPpHmAmB; k1_192*iS3YpPeHAmB - k2_192*iS3YpPpHmAmB;
    k1_192 = 480000000; k2_192 = 340000000;
  R193: S0YPeHAmBm -> S0YPpHmAmBm; k1_193*S0YPeHAmBm - k2_193*S0YPpHmAmBm;
    k1_193 = 480000000; k2_193 = 340000000;
  R194: S0YpPeHAmBm -> S0YpPpHmAmBm; k1_194*S0YpPeHAmBm - k2_194*S0YpPpHmAmBm;
    k1_194 = 480000000; k2_194 = 340000000;
  R195: iS0YpPeHAmBm -> iS0YpPpHmAmBm; k1_195*iS0YpPeHAmBm - k2_195*iS0YpPpHmAmBm;
    k1_195 = 480000000; k2_195 = 340000000;
  R196: S1YPeHAmBm -> S1YPpHmAmBm; k1_196*S1YPeHAmBm - k2_196*S1YPpHmAmBm;
    k1_196 = 480000000; k2_196 = 340000000;
  R197: S1YpPeHAmBm -> S1YpPpHmAmBm; k1_197*S1YpPeHAmBm - k2_197*S1YpPpHmAmBm;
    k1_197 = 480000000; k2_197 = 340000000;
  R198: iS1YpPeHAmBm -> iS1YpPpHmAmBm; k1_198*iS1YpPeHAmBm - k2_198*iS1YpPpHmAmBm;
    k1_198 = 480000000; k2_198 = 340000000;
  R199: S2YPeHAmBm -> S2YPpHmAmBm; k1_199*S2YPeHAmBm - k2_199*S2YPpHmAmBm;
    k1_199 = 480000000; k2_199 = 340000000;
  R200: S2YpPeHAmBm -> S2YpPpHmAmBm; k1_200*S2YpPeHAmBm - k2_200*S2YpPpHmAmBm;
    k1_200 = 480000000; k2_200 = 340000000;
  R201: iS2YpPeHAmBm -> iS2YpPpHmAmBm; k1_201*iS2YpPeHAmBm - k2_201*iS2YpPpHmAmBm;
    k1_201 = 480000000; k2_201 = 340000000;
  R202: S3YPeHAmBm -> S3YPpHmAmBm; k1_202*S3YPeHAmBm - k2_202*S3YPpHmAmBm;
    k1_202 = 480000000; k2_202 = 340000000;
  R203: S3YpPeHAmBm -> S3YpPpHmAmBm; k1_203*S3YpPeHAmBm - k2_203*S3YpPpHmAmBm;
    k1_203 = 480000000; k2_203 = 340000000;
  R204: iS3YpPeHAmBm -> iS3YpPpHmAmBm; k1_204*iS3YpPeHAmBm - k2_204*iS3YpPpHmAmBm;
    k1_204 = 480000000; k2_204 = 340000000;
  R205: S0YPeHAmBmm -> S0YPpHmAmBmm; k1_205*S0YPeHAmBmm - k2_205*S0YPpHmAmBmm;
    k1_205 = 480000000; k2_205 = 340000000;
  R206: S0YpPeHAmBmm -> S0YpPpHmAmBmm; k1_206*S0YpPeHAmBmm - k2_206*S0YpPpHmAmBmm;
    k1_206 = 480000000; k2_206 = 340000000;
  R207: iS0YpPeHAmBmm -> iS0YpPpHmAmBmm; k1_207*iS0YpPeHAmBmm - k2_207*iS0YpPpHmAmBmm;
    k1_207 = 480000000; k2_207 = 340000000;
  R208: S1YPeHAmBmm -> S1YPpHmAmBmm; k1_208*S1YPeHAmBmm - k2_208*S1YPpHmAmBmm;
    k1_208 = 480000000; k2_208 = 340000000;
  R209: S1YpPeHAmBmm -> S1YpPpHmAmBmm; k1_209*S1YpPeHAmBmm - k2_209*S1YpPpHmAmBmm;
    k1_209 = 480000000; k2_209 = 340000000;
  R210: iS1YpPeHAmBmm -> iS1YpPpHmAmBmm; k1_210*iS1YpPeHAmBmm - k2_210*iS1YpPpHmAmBmm;
    k1_210 = 480000000; k2_210 = 340000000;
  R211: S2YPeHAmBmm -> S2YPpHmAmBmm; k1_211*S2YPeHAmBmm - k2_211*S2YPpHmAmBmm;
    k1_211 = 480000000; k2_211 = 340000000;
  R212: S2YpPeHAmBmm -> S2YpPpHmAmBmm; k1_212*S2YpPeHAmBmm - k2_212*S2YpPpHmAmBmm;
    k1_212 = 480000000; k2_212 = 340000000;
  R213: iS2YpPeHAmBmm -> iS2YpPpHmAmBmm; k1_213*iS2YpPeHAmBmm - k2_213*iS2YpPpHmAmBmm;
    k1_213 = 480000000; k2_213 = 340000000;
  R214: S3YPeHAmBmm -> S3YPpHmAmBmm; k1_214*S3YPeHAmBmm - k2_214*S3YPpHmAmBmm;
    k1_214 = 480000000; k2_214 = 340000000;
  R215: S3YpPeHAmBmm -> S3YpPpHmAmBmm; k1_215*S3YpPeHAmBmm - k2_215*S3YpPpHmAmBmm;
    k1_215 = 480000000; k2_215 = 340000000;
  R216: iS3YpPeHAmBmm -> iS3YpPpHmAmBmm; k1_216*iS3YpPeHAmBmm - k2_216*iS3YpPpHmAmBmm;
    k1_216 = 480000000; k2_216 = 340000000;
  R217: S0YPpHmAB -> S0YPpHAmB; k1_217*S0YPpHmAB - k2_217*S0YPpHAmB;
    k1_217 = 2.3e9; k2_217 = 0;
  R218: S0YpPpHmAB -> S0YpPpHAmB; k1_218*S0YpPpHmAB - k2_218*S0YpPpHAmB;
    k1_218 = 2.3e9; k2_218 = 0;
  R219: iS0YpPpHmAB -> iS0YpPpHAmB; k1_219*iS0YpPpHmAB - k2_219*iS0YpPpHAmB;
    k1_219 = 2.3e9; k2_219 = 0;
  R220: S1YPpHmAB -> S1YPpHAmB; k1_220*S1YPpHmAB - k2_220*S1YPpHAmB;
    k1_220 = 2.3e9; k2_220 = 0;
  R221: S1YpPpHmAB -> S1YpPpHAmB; k1_221*S1YpPpHmAB - k2_221*S1YpPpHAmB;
    k1_221 = 2.3e9; k2_221 = 0;
  R222: iS1YpPpHmAB -> iS1YpPpHAmB; k1_222*iS1YpPpHmAB - k2_222*iS1YpPpHAmB;
    k1_222 = 2.3e9; k2_222 = 0;
  R223: S2YPpHmAB -> S2YPpHAmB; k1_223*S2YPpHmAB - k2_223*S2YPpHAmB;
    k1_223 = 2.3e9; k2_223 = 0;
  R224: S2YpPpHmAB -> S2YpPpHAmB; k1_224*S2YpPpHmAB - k2_224*S2YpPpHAmB;
    k1_224 = 2.3e9; k2_224 = 0;
  R225: iS2YpPpHmAB -> iS2YpPpHAmB; k1_225*iS2YpPpHmAB - k2_225*iS2YpPpHAmB;
    k1_225 = 2.3e9; k2_225 = 0;
  R226: S3YPpHmAB -> S3YPpHAmB; k1_226*S3YPpHmAB - k2_226*S3YPpHAmB;
    k1_226 = 2.3e9; k2_226 = 0;
  R227: S3YpPpHmAB -> S3YpPpHAmB; k1_227*S3YpPpHmAB - k2_227*S3YpPpHAmB;
    k1_227 = 2.3e9; k2_227 = 0;
  R228: iS3YpPpHmAB -> iS3YpPpHAmB; k1_228*iS3YpPpHmAB - k2_228*iS3YpPpHAmB;
    k1_228 = 2.3e9; k2_228 = 0;
  R229: S0YPHmAB -> S0YPHAmB; k1_229*S0YPHmAB - k2_229*S0YPHAmB;
    k1_229 = 2.3e9; k2_229 = 0;
  R230: S0YpPHmAB -> S0YpPHAmB; k1_230*S0YpPHmAB - k2_230*S0YpPHAmB;
    k1_230 = 2.3e9; k2_230 = 0;
  R231: iS0YpPHmAB -> iS0YpPHAmB; k1_231*iS0YpPHmAB - k2_231*iS0YpPHAmB;
    k1_231 = 2.3e9; k2_231 = 0;
  R232: S1YPHmAB -> S1YPHAmB; k1_232*S1YPHmAB - k2_232*S1YPHAmB;
    k1_232 = 2.3e9; k2_232 = 0;
  R233: S1YpPHmAB -> S1YpPHAmB; k1_233*S1YpPHmAB - k2_233*S1YpPHAmB;
    k1_233 = 2.3e9; k2_233 = 0;
  R234: iS1YpPHmAB -> iS1YpPHAmB; k1_234*iS1YpPHmAB - k2_234*iS1YpPHAmB;
    k1_234 = 2.3e9; k2_234 = 0;
  R235: S2YPHmAB -> S2YPHAmB; k1_235*S2YPHmAB - k2_235*S2YPHAmB;
    k1_235 = 2.3e9; k2_235 = 0;
  R236: S2YpPHmAB -> S2YpPHAmB; k1_236*S2YpPHmAB - k2_236*S2YpPHAmB;
    k1_236 = 2.3e9; k2_236 = 0;
  R237: iS2YpPHmAB -> iS2YpPHAmB; k1_237*iS2YpPHmAB - k2_237*iS2YpPHAmB;
    k1_237 = 2.3e9; k2_237 = 0;
  R238: S3YPHmAB -> S3YPHAmB; k1_238*S3YPHmAB - k2_238*S3YPHAmB;
    k1_238 = 2.3e9; k2_238 = 0;
  R239: S3YpPHmAB -> S3YpPHAmB; k1_239*S3YpPHmAB - k2_239*S3YpPHAmB;
    k1_239 = 2.3e9; k2_239 = 0;
  R240: iS3YpPHmAB -> iS3YpPHAmB; k1_240*iS3YpPHmAB - k2_240*iS3YpPHAmB;
    k1_240 = 2.3e9; k2_240 = 0;
  R241: S0YPeHmAB -> S0YPeHAmB; k1_241*S0YPeHmAB - k2_241*S0YPeHAmB;
    k1_241 = 2.3e9; k2_241 = 0;
  R242: S0YpPeHmAB -> S0YpPeHAmB; k1_242*S0YpPeHmAB - k2_242*S0YpPeHAmB;
    k1_242 = 2.3e9; k2_242 = 0;
  R243: iS0YpPeHmAB -> iS0YpPeHAmB; k1_243*iS0YpPeHmAB - k2_243*iS0YpPeHAmB;
    k1_243 = 2.3e9; k2_243 = 0;
  R244: S1YPeHmAB -> S1YPeHAmB; k1_244*S1YPeHmAB - k2_244*S1YPeHAmB;
    k1_244 = 2.3e9; k2_244 = 0;
  R245: S1YpPeHmAB -> S1YpPeHAmB; k1_245*S1YpPeHmAB - k2_245*S1YpPeHAmB;
    k1_245 = 2.3e9; k2_245 = 0;
  R246: iS1YpPeHmAB -> iS1YpPeHAmB; k1_246*iS1YpPeHmAB - k2_246*iS1YpPeHAmB;
    k1_246 = 2.3e9; k2_246 = 0;
  R247: S2YPeHmAB -> S2YPeHAmB; k1_247*S2YPeHmAB - k2_247*S2YPeHAmB;
    k1_247 = 2.3e9; k2_247 = 0;
  R248: S2YpPeHmAB -> S2YpPeHAmB; k1_248*S2YpPeHmAB - k2_248*S2YpPeHAmB;
    k1_248 = 2.3e9; k2_248 = 0;
  R249: iS2YpPeHmAB -> iS2YpPeHAmB; k1_249*iS2YpPeHmAB - k2_249*iS2YpPeHAmB;
    k1_249 = 2.3e9; k2_249 = 0;
  R250: S3YPeHmAB -> S3YPeHAmB; k1_250*S3YPeHmAB - k2_250*S3YPeHAmB;
    k1_250 = 2.3e9; k2_250 = 0;
  R251: S3YpPeHmAB -> S3YpPeHAmB; k1_251*S3YpPeHmAB - k2_251*S3YpPeHAmB;
    k1_251 = 2.3e9; k2_251 = 0;
  R252: iS3YpPeHmAB -> iS3YpPeHAmB; k1_252*iS3YpPeHmAB - k2_252*iS3YpPeHAmB;
    k1_252 = 2.3e9; k2_252 = 0;
  R253: S0YPpHmABm -> S0YPpHAmBm; k1_253*S0YPpHmABm - k2_253*S0YPpHAmBm;
    k1_253 = 2.3e9; k2_253 = 0;
  R254: S0YpPpHmABm -> S0YpPpHAmBm; k1_254*S0YpPpHmABm - k2_254*S0YpPpHAmBm;
    k1_254 = 2.3e9; k2_254 = 0;
  R255: iS0YpPpHmABm -> iS0YpPpHAmBm; k1_255*iS0YpPpHmABm - k2_255*iS0YpPpHAmBm;
    k1_255 = 2.3e9; k2_255 = 0;
  R256: S1YPpHmABm -> S1YPpHAmBm; k1_256*S1YPpHmABm - k2_256*S1YPpHAmBm;
    k1_256 = 2.3e9; k2_256 = 0;
  R257: S1YpPpHmABm -> S1YpPpHAmBm; k1_257*S1YpPpHmABm - k2_257*S1YpPpHAmBm;
    k1_257 = 2.3e9; k2_257 = 0;
  R258: iS1YpPpHmABm -> iS1YpPpHAmBm; k1_258*iS1YpPpHmABm - k2_258*iS1YpPpHAmBm;
    k1_258 = 2.3e9; k2_258 = 0;
  R259: S2YPpHmABm -> S2YPpHAmBm; k1_259*S2YPpHmABm - k2_259*S2YPpHAmBm;
    k1_259 = 2.3e9; k2_259 = 0;
  R260: S2YpPpHmABm -> S2YpPpHAmBm; k1_260*S2YpPpHmABm - k2_260*S2YpPpHAmBm;
    k1_260 = 2.3e9; k2_260 = 0;
  R261: iS2YpPpHmABm -> iS2YpPpHAmBm; k1_261*iS2YpPpHmABm - k2_261*iS2YpPpHAmBm;
    k1_261 = 2.3e9; k2_261 = 0;
  R262: S3YPpHmABm -> S3YPpHAmBm; k1_262*S3YPpHmABm - k2_262*S3YPpHAmBm;
    k1_262 = 2.3e9; k2_262 = 0;
  R263: S3YpPpHmABm -> S3YpPpHAmBm; k1_263*S3YpPpHmABm - k2_263*S3YpPpHAmBm;
    k1_263 = 2.3e9; k2_263 = 0;
  R264: iS3YpPpHmABm -> iS3YpPpHAmBm; k1_264*iS3YpPpHmABm - k2_264*iS3YpPpHAmBm;
    k1_264 = 2.3e9; k2_264 = 0;
  R265: S0YPHmABm -> S0YPHAmBm; k1_265*S0YPHmABm - k2_265*S0YPHAmBm;
    k1_265 = 2.3e9; k2_265 = 0;
  R266: S0YpPHmABm -> S0YpPHAmBm; k1_266*S0YpPHmABm - k2_266*S0YpPHAmBm;
    k1_266 = 2.3e9; k2_266 = 0;
  R267: iS0YpPHmABm -> iS0YpPHAmBm; k1_267*iS0YpPHmABm - k2_267*iS0YpPHAmBm;
    k1_267 = 2.3e9; k2_267 = 0;
  R268: S1YPHmABm -> S1YPHAmBm; k1_268*S1YPHmABm - k2_268*S1YPHAmBm;
    k1_268 = 2.3e9; k2_268 = 0;
  R269: S1YpPHmABm -> S1YpPHAmBm; k1_269*S1YpPHmABm - k2_269*S1YpPHAmBm;
    k1_269 = 2.3e9; k2_269 = 0;
  R270: iS1YpPHmABm -> iS1YpPHAmBm; k1_270*iS1YpPHmABm - k2_270*iS1YpPHAmBm;
    k1_270 = 2.3e9; k2_270 = 0;
  R271: S2YPHmABm -> S2YPHAmBm; k1_271*S2YPHmABm - k2_271*S2YPHAmBm;
    k1_271 = 2.3e9; k2_271 = 0;
  R272: S2YpPHmABm -> S2YpPHAmBm; k1_272*S2YpPHmABm - k2_272*S2YpPHAmBm;
    k1_272 = 2.3e9; k2_272 = 0;
  R273: iS2YpPHmABm -> iS2YpPHAmBm; k1_273*iS2YpPHmABm - k2_273*iS2YpPHAmBm;
    k1_273 = 2.3e9; k2_273 = 0;
  R274: S3YPHmABm -> S3YPHAmBm; k1_274*S3YPHmABm - k2_274*S3YPHAmBm;
    k1_274 = 2.3e9; k2_274 = 0;
  R275: S3YpPHmABm -> S3YpPHAmBm; k1_275*S3YpPHmABm - k2_275*S3YpPHAmBm;
    k1_275 = 2.3e9; k2_275 = 0;
  R276: iS3YpPHmABm -> iS3YpPHAmBm; k1_276*iS3YpPHmABm - k2_276*iS3YpPHAmBm;
    k1_276 = 2.3e9; k2_276 = 0;
  R277: S0YPeHmABm -> S0YPeHAmBm; k1_277*S0YPeHmABm - k2_277*S0YPeHAmBm;
    k1_277 = 2.3e9; k2_277 = 0;
  R278: S0YpPeHmABm -> S0YpPeHAmBm; k1_278*S0YpPeHmABm - k2_278*S0YpPeHAmBm;
    k1_278 = 2.3e9; k2_278 = 0;
  R279: iS0YpPeHmABm -> iS0YpPeHAmBm; k1_279*iS0YpPeHmABm - k2_279*iS0YpPeHAmBm;
    k1_279 = 2.3e9; k2_279 = 0;
  R280: S1YPeHmABm -> S1YPeHAmBm; k1_280*S1YPeHmABm - k2_280*S1YPeHAmBm;
    k1_280 = 2.3e9; k2_280 = 0;
  R281: S1YpPeHmABm -> S1YpPeHAmBm; k1_281*S1YpPeHmABm - k2_281*S1YpPeHAmBm;
    k1_281 = 2.3e9; k2_281 = 0;
  R282: iS1YpPeHmABm -> iS1YpPeHAmBm; k1_282*iS1YpPeHmABm - k2_282*iS1YpPeHAmBm;
    k1_282 = 2.3e9; k2_282 = 0;
  R283: S2YPeHmABm -> S2YPeHAmBm; k1_283*S2YPeHmABm - k2_283*S2YPeHAmBm;
    k1_283 = 2.3e9; k2_283 = 0;
  R284: S2YpPeHmABm -> S2YpPeHAmBm; k1_284*S2YpPeHmABm - k2_284*S2YpPeHAmBm;
    k1_284 = 2.3e9; k2_284 = 0;
  R285: iS2YpPeHmABm -> iS2YpPeHAmBm; k1_285*iS2YpPeHmABm - k2_285*iS2YpPeHAmBm;
    k1_285 = 2.3e9; k2_285 = 0;
  R286: S3YPeHmABm -> S3YPeHAmBm; k1_286*S3YPeHmABm - k2_286*S3YPeHAmBm;
    k1_286 = 2.3e9; k2_286 = 0;
  R287: S3YpPeHmABm -> S3YpPeHAmBm; k1_287*S3YpPeHmABm - k2_287*S3YpPeHAmBm;
    k1_287 = 2.3e9; k2_287 = 0;
  R288: iS3YpPeHmABm -> iS3YpPeHAmBm; k1_288*iS3YpPeHmABm - k2_288*iS3YpPeHAmBm;
    k1_288 = 2.3e9; k2_288 = 0;
  R289: S0YPpHmABmm -> S0YPpHAmBmm; k1_289*S0YPpHmABmm - k2_289*S0YPpHAmBmm;
    k1_289 = 2.3e9; k2_289 = 0;
  R290: S0YpPpHmABmm -> S0YpPpHAmBmm; k1_290*S0YpPpHmABmm - k2_290*S0YpPpHAmBmm;
    k1_290 = 2.3e9; k2_290 = 0;
  R291: iS0YpPpHmABmm -> iS0YpPpHAmBmm; k1_291*iS0YpPpHmABmm - k2_291*iS0YpPpHAmBmm;
    k1_291 = 2.3e9; k2_291 = 0;
  R292: S1YPpHmABmm -> S1YPpHAmBmm; k1_292*S1YPpHmABmm - k2_292*S1YPpHAmBmm;
    k1_292 = 2.3e9; k2_292 = 0;
  R293: S1YpPpHmABmm -> S1YpPpHAmBmm; k1_293*S1YpPpHmABmm - k2_293*S1YpPpHAmBmm;
    k1_293 = 2.3e9; k2_293 = 0;
  R294: iS1YpPpHmABmm -> iS1YpPpHAmBmm; k1_294*iS1YpPpHmABmm - k2_294*iS1YpPpHAmBmm;
    k1_294 = 2.3e9; k2_294 = 0;
  R295: S2YPpHmABmm -> S2YPpHAmBmm; k1_295*S2YPpHmABmm - k2_295*S2YPpHAmBmm;
    k1_295 = 2.3e9; k2_295 = 0;
  R296: S2YpPpHmABmm -> S2YpPpHAmBmm; k1_296*S2YpPpHmABmm - k2_296*S2YpPpHAmBmm;
    k1_296 = 2.3e9; k2_296 = 0;
  R297: iS2YpPpHmABmm -> iS2YpPpHAmBmm; k1_297*iS2YpPpHmABmm - k2_297*iS2YpPpHAmBmm;
    k1_297 = 2.3e9; k2_297 = 0;
  R298: S3YPpHmABmm -> S3YPpHAmBmm; k1_298*S3YPpHmABmm - k2_298*S3YPpHAmBmm;
    k1_298 = 2.3e9; k2_298 = 0;
  R299: S3YpPpHmABmm -> S3YpPpHAmBmm; k1_299*S3YpPpHmABmm - k2_299*S3YpPpHAmBmm;
    k1_299 = 2.3e9; k2_299 = 0;
  R300: iS3YpPpHmABmm -> iS3YpPpHAmBmm; k1_300*iS3YpPpHmABmm - k2_300*iS3YpPpHAmBmm;
    k1_300 = 2.3e9; k2_300 = 0;
  R301: S0YPHmABmm -> S0YPHAmBmm; k1_301*S0YPHmABmm - k2_301*S0YPHAmBmm;
    k1_301 = 2.3e9; k2_301 = 0;
  R302: S0YpPHmABmm -> S0YpPHAmBmm; k1_302*S0YpPHmABmm - k2_302*S0YpPHAmBmm;
    k1_302 = 2.3e9; k2_302 = 0;
  R303: iS0YpPHmABmm -> iS0YpPHAmBmm; k1_303*iS0YpPHmABmm - k2_303*iS0YpPHAmBmm;
    k1_303 = 2.3e9; k2_303 = 0;
  R304: S1YPHmABmm -> S1YPHAmBmm; k1_304*S1YPHmABmm - k2_304*S1YPHAmBmm;
    k1_304 = 2.3e9; k2_304 = 0;
  R305: S1YpPHmABmm -> S1YpPHAmBmm; k1_305*S1YpPHmABmm - k2_305*S1YpPHAmBmm;
    k1_305 = 2.3e9; k2_305 = 0;
  R306: iS1YpPHmABmm -> iS1YpPHAmBmm; k1_306*iS1YpPHmABmm - k2_306*iS1YpPHAmBmm;
    k1_306 = 2.3e9; k2_306 = 0;
  R307: S2YPHmABmm -> S2YPHAmBmm; k1_307*S2YPHmABmm - k2_307*S2YPHAmBmm;
    k1_307 = 2.3e9; k2_307 = 0;
  R308: S2YpPHmABmm -> S2YpPHAmBmm; k1_308*S2YpPHmABmm - k2_308*S2YpPHAmBmm;
    k1_308 = 2.3e9; k2_308 = 0;
  R309: iS2YpPHmABmm -> iS2YpPHAmBmm; k1_309*iS2YpPHmABmm - k2_309*iS2YpPHAmBmm;
    k1_309 = 2.3e9; k2_309 = 0;
  R310: S3YPHmABmm -> S3YPHAmBmm; k1_310*S3YPHmABmm - k2_310*S3YPHAmBmm;
    k1_310 = 2.3e9; k2_310 = 0;
  R311: S3YpPHmABmm -> S3YpPHAmBmm; k1_311*S3YpPHmABmm - k2_311*S3YpPHAmBmm;
    k1_311 = 2.3e9; k2_311 = 0;
  R312: iS3YpPHmABmm -> iS3YpPHAmBmm; k1_312*iS3YpPHmABmm - k2_312*iS3YpPHAmBmm;
    k1_312 = 2.3e9; k2_312 = 0;
  R313: S0YPeHmABmm -> S0YPeHAmBmm; k1_313*S0YPeHmABmm - k2_313*S0YPeHAmBmm;
    k1_313 = 2.3e9; k2_313 = 0;
  R314: S0YpPeHmABmm -> S0YpPeHAmBmm; k1_314*S0YpPeHmABmm - k2_314*S0YpPeHAmBmm;
    k1_314 = 2.3e9; k2_314 = 0;
  R315: iS0YpPeHmABmm -> iS0YpPeHAmBmm; k1_315*iS0YpPeHmABmm - k2_315*iS0YpPeHAmBmm;
    k1_315 = 2.3e9; k2_315 = 0;
  R316: S1YPeHmABmm -> S1YPeHAmBmm; k1_316*S1YPeHmABmm - k2_316*S1YPeHAmBmm;
    k1_316 = 2.3e9; k2_316 = 0;
  R317: S1YpPeHmABmm -> S1YpPeHAmBmm; k1_317*S1YpPeHmABmm - k2_317*S1YpPeHAmBmm;
    k1_317 = 2.3e9; k2_317 = 0;
  R318: iS1YpPeHmABmm -> iS1YpPeHAmBmm; k1_318*iS1YpPeHmABmm - k2_318*iS1YpPeHAmBmm;
    k1_318 = 2.3e9; k2_318 = 0;
  R319: S2YPeHmABmm -> S2YPeHAmBmm; k1_319*S2YPeHmABmm - k2_319*S2YPeHAmBmm;
    k1_319 = 2.3e9; k2_319 = 0;
  R320: S2YpPeHmABmm -> S2YpPeHAmBmm; k1_320*S2YpPeHmABmm - k2_320*S2YpPeHAmBmm;
    k1_320 = 2.3e9; k2_320 = 0;
  R321: iS2YpPeHmABmm -> iS2YpPeHAmBmm; k1_321*iS2YpPeHmABmm - k2_321*iS2YpPeHAmBmm;
    k1_321 = 2.3e9; k2_321 = 0;
  R322: S3YPeHmABmm -> S3YPeHAmBmm; k1_322*S3YPeHmABmm - k2_322*S3YPeHAmBmm;
    k1_322 = 2.3e9; k2_322 = 0;
  R323: S3YpPeHmABmm -> S3YpPeHAmBmm; k1_323*S3YpPeHmABmm - k2_323*S3YpPeHAmBmm;
    k1_323 = 2.3e9; k2_323 = 0;
  R324: iS3YpPeHmABmm -> iS3YpPeHAmBmm; k1_324*iS3YpPeHmABmm - k2_324*iS3YpPeHAmBmm;
    k1_324 = 2.3e9; k2_324 = 0;
  R325: S0YPpHmAmB -> S0YPHAmB; k1_325*S0YPpHmAmB - k2_325*S0YPHAmB;
    k1_325 = 1000000000; k2_325 = 0;
  R326: S0YpPpHmAmB -> S0YpPHAmB; k1_326*S0YpPpHmAmB - k2_326*S0YpPHAmB;
    k1_326 = 1000000000; k2_326 = 0;
  R327: iS0YpPpHmAmB -> iS0YpPHAmB; k1_327*iS0YpPpHmAmB - k2_327*iS0YpPHAmB;
    k1_327 = 1000000000; k2_327 = 0;
  R328: S1YPpHmAmB -> S1YPHAmB; k1_328*S1YPpHmAmB - k2_328*S1YPHAmB;
    k1_328 = 1000000000; k2_328 = 0;
  R329: S1YpPpHmAmB -> S1YpPHAmB; k1_329*S1YpPpHmAmB - k2_329*S1YpPHAmB;
    k1_329 = 1000000000; k2_329 = 0;
  R330: iS1YpPpHmAmB -> iS1YpPHAmB; k1_330*iS1YpPpHmAmB - k2_330*iS1YpPHAmB;
    k1_330 = 1000000000; k2_330 = 0;
  R331: S2YPpHmAmB -> S2YPHAmB; k1_331*S2YPpHmAmB - k2_331*S2YPHAmB;
    k1_331 = 1000000000; k2_331 = 0;
  R332: S2YpPpHmAmB -> S2YpPHAmB; k1_332*S2YpPpHmAmB - k2_332*S2YpPHAmB;
    k1_332 = 1000000000; k2_332 = 0;
  R333: iS2YpPpHmAmB -> iS2YpPHAmB; k1_333*iS2YpPpHmAmB - k2_333*iS2YpPHAmB;
    k1_333 = 1000000000; k2_333 = 0;
  R334: S3YPpHmAmB -> S3YPHAmB; k1_334*S3YPpHmAmB - k2_334*S3YPHAmB;
    k1_334 = 1000000000; k2_334 = 0;
  R335: S3YpPpHmAmB -> S3YpPHAmB; k1_335*S3YpPpHmAmB - k2_335*S3YpPHAmB;
    k1_335 = 1000000000; k2_335 = 0;
  R336: iS3YpPpHmAmB -> iS3YpPHAmB; k1_336*iS3YpPpHmAmB - k2_336*iS3YpPHAmB;
    k1_336 = 1000000000; k2_336 = 0;
  R337: S0YPpHmAmBm -> S0YPHAmBm; k1_337*S0YPpHmAmBm - k2_337*S0YPHAmBm;
    k1_337 = 1000000000; k2_337 = 0;
  R338: S0YpPpHmAmBm -> S0YpPHAmBm; k1_338*S0YpPpHmAmBm - k2_338*S0YpPHAmBm;
    k1_338 = 1000000000; k2_338 = 0;
  R339: iS0YpPpHmAmBm -> iS0YpPHAmBm; k1_339*iS0YpPpHmAmBm - k2_339*iS0YpPHAmBm;
    k1_339 = 1000000000; k2_339 = 0;
  R340: S1YPpHmAmBm -> S1YPHAmBm; k1_340*S1YPpHmAmBm - k2_340*S1YPHAmBm;
    k1_340 = 1000000000; k2_340 = 0;
  R341: S1YpPpHmAmBm -> S1YpPHAmBm; k1_341*S1YpPpHmAmBm - k2_341*S1YpPHAmBm;
    k1_341 = 1000000000; k2_341 = 0;
  R342: iS1YpPpHmAmBm -> iS1YpPHAmBm; k1_342*iS1YpPpHmAmBm - k2_342*iS1YpPHAmBm;
    k1_342 = 1000000000; k2_342 = 0;
  R343: S2YPpHmAmBm -> S2YPHAmBm; k1_343*S2YPpHmAmBm - k2_343*S2YPHAmBm;
    k1_343 = 1000000000; k2_343 = 0;
  R344: S2YpPpHmAmBm -> S2YpPHAmBm; k1_344*S2YpPpHmAmBm - k2_344*S2YpPHAmBm;
    k1_344 = 1000000000; k2_344 = 0;
  R345: iS2YpPpHmAmBm -> iS2YpPHAmBm; k1_345*iS2YpPpHmAmBm - k2_345*iS2YpPHAmBm;
    k1_345 = 1000000000; k2_345 = 0;
  R346: S3YPpHmAmBm -> S3YPHAmBm; k1_346*S3YPpHmAmBm - k2_346*S3YPHAmBm;
    k1_346 = 1000000000; k2_346 = 0;
  R347: S3YpPpHmAmBm -> S3YpPHAmBm; k1_347*S3YpPpHmAmBm - k2_347*S3YpPHAmBm;
    k1_347 = 1000000000; k2_347 = 0;
  R348: iS3YpPpHmAmBm -> iS3YpPHAmBm; k1_348*iS3YpPpHmAmBm - k2_348*iS3YpPHAmBm;
    k1_348 = 1000000000; k2_348 = 0;
  R349: S0YPpHmAmBmm -> S0YPHAmBmm; k1_349*S0YPpHmAmBmm - k2_349*S0YPHAmBmm;
    k1_349 = 1000000000; k2_349 = 0;
  R350: S0YpPpHmAmBmm -> S0YpPHAmBmm; k1_350*S0YpPpHmAmBmm - k2_350*S0YpPHAmBmm;
    k1_350 = 1000000000; k2_350 = 0;
  R351: iS0YpPpHmAmBmm -> iS0YpPHAmBmm; k1_351*iS0YpPpHmAmBmm - k2_351*iS0YpPHAmBmm;
    k1_351 = 1000000000; k2_351 = 0;
  R352: S1YPpHmAmBmm -> S1YPHAmBmm; k1_352*S1YPpHmAmBmm - k2_352*S1YPHAmBmm;
    k1_352 = 1000000000; k2_352 = 0;
  R353: S1YpPpHmAmBmm -> S1YpPHAmBmm; k1_353*S1YpPpHmAmBmm - k2_353*S1YpPHAmBmm;
    k1_353 = 1000000000; k2_353 = 0;
  R354: iS1YpPpHmAmBmm -> iS1YpPHAmBmm; k1_354*iS1YpPpHmAmBmm - k2_354*iS1YpPHAmBmm;
    k1_354 = 1000000000; k2_354 = 0;
  R355: S2YPpHmAmBmm -> S2YPHAmBmm; k1_355*S2YPpHmAmBmm - k2_355*S2YPHAmBmm;
    k1_355 = 1000000000; k2_355 = 0;
  R356: S2YpPpHmAmBmm -> S2YpPHAmBmm; k1_356*S2YpPpHmAmBmm - k2_356*S2YpPHAmBmm;
    k1_356 = 1000000000; k2_356 = 0;
  R357: iS2YpPpHmAmBmm -> iS2YpPHAmBmm; k1_357*iS2YpPpHmAmBmm - k2_357*iS2YpPHAmBmm;
    k1_357 = 1000000000; k2_357 = 0;
  R358: S3YPpHmAmBmm -> S3YPHAmBmm; k1_358*S3YPpHmAmBmm - k2_358*S3YPHAmBmm;
    k1_358 = 1000000000; k2_358 = 0;
  R359: S3YpPpHmAmBmm -> S3YpPHAmBmm; k1_359*S3YpPpHmAmBmm - k2_359*S3YpPHAmBmm;
    k1_359 = 1000000000; k2_359 = 0;
  R360: iS3YpPpHmAmBmm -> iS3YpPHAmBmm; k1_360*iS3YpPpHmAmBmm - k2_360*iS3YpPHAmBmm;
    k1_360 = 1000000000; k2_360 = 0;
  R361: S0YPpHAmB => S0YPeHAB; k_361*S0YPpHAmB;
    k_361 = 1250;
  R362: S0YpPpHAmB => S0YpPeHAB; k_362*S0YpPpHAmB;
    k_362 = 1250;
  R363: iS0YpPpHAmB => iS0YpPeHAB; k_363*iS0YpPpHAmB;
    k_363 = 1250;
  R364: S1YPpHAmB => S1YPeHAB; k_364*S1YPpHAmB;
    k_364 = 1250;
  R365: S1YpPpHAmB => S1YpPeHAB; k_365*S1YpPpHAmB;
    k_365 = 1250;
  R366: iS1YpPpHAmB => iS1YpPeHAB; k_366*iS1YpPpHAmB;
    k_366 = 1250;
  R367: S2YPpHAmB => S2YPeHAB; k_367*S2YPpHAmB;
    k_367 = 1250;
  R368: S2YpPpHAmB => S2YpPeHAB; k_368*S2YpPpHAmB;
    k_368 = 1250;
  R369: iS2YpPpHAmB => iS2YpPeHAB; k_369*iS2YpPpHAmB;
    k_369 = 1250;
  R370: S3YPpHAmB => S3YPeHAB; k_370*S3YPpHAmB;
    k_370 = 1250;
  R371: S3YpPpHAmB => S3YpPeHAB; k_371*S3YpPpHAmB;
    k_371 = 1250;
  R372: iS3YpPpHAmB => iS3YpPeHAB; k_372*iS3YpPpHAmB;
    k_372 = 1250;
  R373: S0YPpHAmBm => S0YPeHABm; k_373*S0YPpHAmBm;
    k_373 = 1250;
  R374: S0YpPpHAmBm => S0YpPeHABm; k_374*S0YpPpHAmBm;
    k_374 = 1250;
  R375: iS0YpPpHAmBm => iS0YpPeHABm; k_375*iS0YpPpHAmBm;
    k_375 = 1250;
  R376: S1YPpHAmBm => S1YPeHABm; k_376*S1YPpHAmBm;
    k_376 = 1250;
  R377: S1YpPpHAmBm => S1YpPeHABm; k_377*S1YpPpHAmBm;
    k_377 = 1250;
  R378: iS1YpPpHAmBm => iS1YpPeHABm; k_378*iS1YpPpHAmBm;
    k_378 = 1250;
  R379: S2YPpHAmBm => S2YPeHABm; k_379*S2YPpHAmBm;
    k_379 = 1250;
  R380: S2YpPpHAmBm => S2YpPeHABm; k_380*S2YpPpHAmBm;
    k_380 = 1250;
  R381: iS2YpPpHAmBm => iS2YpPeHABm; k_381*iS2YpPpHAmBm;
    k_381 = 1250;
  R382: S3YPpHAmBm => S3YPeHABm; k_382*S3YPpHAmBm;
    k_382 = 1250;
  R383: S3YpPpHAmBm => S3YpPeHABm; k_383*S3YpPpHAmBm;
    k_383 = 1250;
  R384: iS3YpPpHAmBm => iS3YpPeHABm; k_384*iS3YpPpHAmBm;
    k_384 = 1250;
  R385: S0YPpHAmBmm => S0YPeHABmm; k_385*S0YPpHAmBmm;
    k_385 = 1250;
  R386: S0YpPpHAmBmm => S0YpPeHABmm; k_386*S0YpPpHAmBmm;
    k_386 = 1250;
  R387: iS0YpPpHAmBmm => iS0YpPeHABmm; k_387*iS0YpPpHAmBmm;
    k_387 = 1250;
  R388: S1YPpHAmBmm => S1YPeHABmm; k_388*S1YPpHAmBmm;
    k_388 = 1250;
  R389: S1YpPpHAmBmm => S1YpPeHABmm; k_389*S1YpPpHAmBmm;
    k_389 = 1250;
  R390: iS1YpPpHAmBmm => iS1YpPeHABmm; k_390*iS1YpPpHAmBmm;
    k_390 = 1250;
  R391: S2YPpHAmBmm => S2YPeHABmm; k_391*S2YPpHAmBmm;
    k_391 = 1250;
  R392: S2YpPpHAmBmm => S2YpPeHABmm; k_392*S2YpPpHAmBmm;
    k_392 = 1250;
  R393: iS2YpPpHAmBmm => iS2YpPeHABmm; k_393*iS2YpPpHAmBmm;
    k_393 = 1250;
  R394: S3YPpHAmBmm => S3YPeHABmm; k_394*S3YPpHAmBmm;
    k_394 = 1250;
  R395: S3YpPpHAmBmm => S3YpPeHABmm; k_395*S3YpPpHAmBmm;
    k_395 = 1250;
  R396: iS3YpPpHAmBmm => iS3YpPeHABmm; k_396*iS3YpPpHAmBmm;
    k_396 = 1250;
  R397: S2YPHAmB => S1YPeHAB; k_397*S2YPHAmB;
    k_397 = 0.66;
  R398: S2YPHAmBm => S1YPeHABm; k_398*S2YPHAmBm;
    k_398 = 0.66;
  R399: S2YPHAmBmm => S1YPeHABmm; k_399*S2YPHAmBmm;
    k_399 = 0.66;
  R400: S0YPpHAmB -> S0YPpHABm; k1_400*S0YPpHAmB - k2_400*S0YPpHABm;
    k1_400 = 10500; k2_400 = 787;
  R401: S0YpPpHAmB -> S0YpPpHABm; k1_401*S0YpPpHAmB - k2_401*S0YpPpHABm;
    k1_401 = 10500; k2_401 = 787;
  R402: iS0YpPpHAmB -> iS0YpPpHABm; k1_402*iS0YpPpHAmB - k2_402*iS0YpPpHABm;
    k1_402 = 10500; k2_402 = 787;
  R403: S1YPpHAmB -> S1YPpHABm; k1_403*S1YPpHAmB - k2_403*S1YPpHABm;
    k1_403 = 10500; k2_403 = 787;
  R404: S1YpPpHAmB -> S1YpPpHABm; k1_404*S1YpPpHAmB - k2_404*S1YpPpHABm;
    k1_404 = 10500; k2_404 = 787;
  R405: iS1YpPpHAmB -> iS1YpPpHABm; k1_405*iS1YpPpHAmB - k2_405*iS1YpPpHABm;
    k1_405 = 10500; k2_405 = 787;
  R406: S2YPpHAmB -> S2YPpHABm; k1_406*S2YPpHAmB - k2_406*S2YPpHABm;
    k1_406 = 10500; k2_406 = 787;
  R407: S2YpPpHAmB -> S2YpPpHABm; k1_407*S2YpPpHAmB - k2_407*S2YpPpHABm;
    k1_407 = 10500; k2_407 = 787;
  R408: iS2YpPpHAmB -> iS2YpPpHABm; k1_408*iS2YpPpHAmB - k2_408*iS2YpPpHABm;
    k1_408 = 10500; k2_408 = 787;
  R409: S3YPpHAmB -> S3YPpHABm; k1_409*S3YPpHAmB - k2_409*S3YPpHABm;
    k1_409 = 10500; k2_409 = 787;
  R410: S3YpPpHAmB -> S3YpPpHABm; k1_410*S3YpPpHAmB - k2_410*S3YpPpHABm;
    k1_410 = 10500; k2_410 = 787;
  R411: iS3YpPpHAmB -> iS3YpPpHABm; k1_411*iS3YpPpHAmB - k2_411*iS3YpPpHABm;
    k1_411 = 10500; k2_411 = 787;
  R412: S0YPHAmB -> S0YPHABm; k1_412*S0YPHAmB - k2_412*S0YPHABm;
    k1_412 = 10500; k2_412 = 787;
  R413: S0YpPHAmB -> S0YpPHABm; k1_413*S0YpPHAmB - k2_413*S0YpPHABm;
    k1_413 = 10500; k2_413 = 787;
  R414: iS0YpPHAmB -> iS0YpPHABm; k1_414*iS0YpPHAmB - k2_414*iS0YpPHABm;
    k1_414 = 10500; k2_414 = 787;
  R415: S1YPHAmB -> S1YPHABm; k1_415*S1YPHAmB - k2_415*S1YPHABm;
    k1_415 = 10500; k2_415 = 787;
  R416: S1YpPHAmB -> S1YpPHABm; k1_416*S1YpPHAmB - k2_416*S1YpPHABm;
    k1_416 = 10500; k2_416 = 787;
  R417: iS1YpPHAmB -> iS1YpPHABm; k1_417*iS1YpPHAmB - k2_417*iS1YpPHABm;
    k1_417 = 10500; k2_417 = 787;
  R418: S2YPHAmB -> S2YPHABm; k1_418*S2YPHAmB - k2_418*S2YPHABm;
    k1_418 = 10500; k2_418 = 787;
  R419: S2YpPHAmB -> S2YpPHABm; k1_419*S2YpPHAmB - k2_419*S2YpPHABm;
    k1_419 = 10500; k2_419 = 787;
  R420: iS2YpPHAmB -> iS2YpPHABm; k1_420*iS2YpPHAmB - k2_420*iS2YpPHABm;
    k1_420 = 10500; k2_420 = 787;
  R421: S3YPHAmB -> S3YPHABm; k1_421*S3YPHAmB - k2_421*S3YPHABm;
    k1_421 = 10500; k2_421 = 787;
  R422: S3YpPHAmB -> S3YpPHABm; k1_422*S3YpPHAmB - k2_422*S3YpPHABm;
    k1_422 = 10500; k2_422 = 787;
  R423: iS3YpPHAmB -> iS3YpPHABm; k1_423*iS3YpPHAmB - k2_423*iS3YpPHABm;
    k1_423 = 10500; k2_423 = 787;
  R424: S0YPeHAmB -> S0YPeHABm; k1_424*S0YPeHAmB - k2_424*S0YPeHABm;
    k1_424 = 10500; k2_424 = 787;
  R425: S0YpPeHAmB -> S0YpPeHABm; k1_425*S0YpPeHAmB - k2_425*S0YpPeHABm;
    k1_425 = 10500; k2_425 = 787;
  R426: iS0YpPeHAmB -> iS0YpPeHABm; k1_426*iS0YpPeHAmB - k2_426*iS0YpPeHABm;
    k1_426 = 10500; k2_426 = 787;
  R427: S1YPeHAmB -> S1YPeHABm; k1_427*S1YPeHAmB - k2_427*S1YPeHABm;
    k1_427 = 10500; k2_427 = 787;
  R428: S1YpPeHAmB -> S1YpPeHABm; k1_428*S1YpPeHAmB - k2_428*S1YpPeHABm;
    k1_428 = 10500; k2_428 = 787;
  R429: iS1YpPeHAmB -> iS1YpPeHABm; k1_429*iS1YpPeHAmB - k2_429*iS1YpPeHABm;
    k1_429 = 10500; k2_429 = 787;
  R430: S2YPeHAmB -> S2YPeHABm; k1_430*S2YPeHAmB - k2_430*S2YPeHABm;
    k1_430 = 10500; k2_430 = 787;
  R431: S2YpPeHAmB -> S2YpPeHABm; k1_431*S2YpPeHAmB - k2_431*S2YpPeHABm;
    k1_431 = 10500; k2_431 = 787;
  R432: iS2YpPeHAmB -> iS2YpPeHABm; k1_432*iS2YpPeHAmB - k2_432*iS2YpPeHABm;
    k1_432 = 10500; k2_432 = 787;
  R433: S3YPeHAmB -> S3YPeHABm; k1_433*S3YPeHAmB - k2_433*S3YPeHABm;
    k1_433 = 10500; k2_433 = 787;
  R434: S3YpPeHAmB -> S3YpPeHABm; k1_434*S3YpPeHAmB - k2_434*S3YpPeHABm;
    k1_434 = 10500; k2_434 = 787;
  R435: iS3YpPeHAmB -> iS3YpPeHABm; k1_435*iS3YpPeHAmB - k2_435*iS3YpPeHABm;
    k1_435 = 10500; k2_435 = 787;
  R436: S0YPpHmAmB -> S0YPpHmABm; k1_436*S0YPpHmAmB - k2_436*S0YPpHmABm;
    k1_436 = 10500; k2_436 = 787;
  R437: S0YpPpHmAmB -> S0YpPpHmABm; k1_437*S0YpPpHmAmB - k2_437*S0YpPpHmABm;
    k1_437 = 10500; k2_437 = 787;
  R438: iS0YpPpHmAmB -> iS0YpPpHmABm; k1_438*iS0YpPpHmAmB - k2_438*iS0YpPpHmABm;
    k1_438 = 10500; k2_438 = 787;
  R439: S1YPpHmAmB -> S1YPpHmABm; k1_439*S1YPpHmAmB - k2_439*S1YPpHmABm;
    k1_439 = 10500; k2_439 = 787;
  R440: S1YpPpHmAmB -> S1YpPpHmABm; k1_440*S1YpPpHmAmB - k2_440*S1YpPpHmABm;
    k1_440 = 10500; k2_440 = 787;
  R441: iS1YpPpHmAmB -> iS1YpPpHmABm; k1_441*iS1YpPpHmAmB - k2_441*iS1YpPpHmABm;
    k1_441 = 10500; k2_441 = 787;
  R442: S2YPpHmAmB -> S2YPpHmABm; k1_442*S2YPpHmAmB - k2_442*S2YPpHmABm;
    k1_442 = 10500; k2_442 = 787;
  R443: S2YpPpHmAmB -> S2YpPpHmABm; k1_443*S2YpPpHmAmB - k2_443*S2YpPpHmABm;
    k1_443 = 10500; k2_443 = 787;
  R444: iS2YpPpHmAmB -> iS2YpPpHmABm; k1_444*iS2YpPpHmAmB - k2_444*iS2YpPpHmABm;
    k1_444 = 10500; k2_444 = 787;
  R445: S3YPpHmAmB -> S3YPpHmABm; k1_445*S3YPpHmAmB - k2_445*S3YPpHmABm;
    k1_445 = 10500; k2_445 = 787;
  R446: S3YpPpHmAmB -> S3YpPpHmABm; k1_446*S3YpPpHmAmB - k2_446*S3YpPpHmABm;
    k1_446 = 10500; k2_446 = 787;
  R447: iS3YpPpHmAmB -> iS3YpPpHmABm; k1_447*iS3YpPpHmAmB - k2_447*iS3YpPpHmABm;
    k1_447 = 10500; k2_447 = 787;
  R448: S0YPHmAmB -> S0YPHmABm; k1_448*S0YPHmAmB - k2_448*S0YPHmABm;
    k1_448 = 10500; k2_448 = 787;
  R449: S0YpPHmAmB -> S0YpPHmABm; k1_449*S0YpPHmAmB - k2_449*S0YpPHmABm;
    k1_449 = 10500; k2_449 = 787;
  R450: iS0YpPHmAmB -> iS0YpPHmABm; k1_450*iS0YpPHmAmB - k2_450*iS0YpPHmABm;
    k1_450 = 10500; k2_450 = 787;
  R451: S1YPHmAmB -> S1YPHmABm; k1_451*S1YPHmAmB - k2_451*S1YPHmABm;
    k1_451 = 10500; k2_451 = 787;
  R452: S1YpPHmAmB -> S1YpPHmABm; k1_452*S1YpPHmAmB - k2_452*S1YpPHmABm;
    k1_452 = 10500; k2_452 = 787;
  R453: iS1YpPHmAmB -> iS1YpPHmABm; k1_453*iS1YpPHmAmB - k2_453*iS1YpPHmABm;
    k1_453 = 10500; k2_453 = 787;
  R454: S2YPHmAmB -> S2YPHmABm; k1_454*S2YPHmAmB - k2_454*S2YPHmABm;
    k1_454 = 10500; k2_454 = 787;
  R455: S2YpPHmAmB -> S2YpPHmABm; k1_455*S2YpPHmAmB - k2_455*S2YpPHmABm;
    k1_455 = 10500; k2_455 = 787;
  R456: iS2YpPHmAmB -> iS2YpPHmABm; k1_456*iS2YpPHmAmB - k2_456*iS2YpPHmABm;
    k1_456 = 10500; k2_456 = 787;
  R457: S3YPHmAmB -> S3YPHmABm; k1_457*S3YPHmAmB - k2_457*S3YPHmABm;
    k1_457 = 10500; k2_457 = 787;
  R458: S3YpPHmAmB -> S3YpPHmABm; k1_458*S3YpPHmAmB - k2_458*S3YpPHmABm;
    k1_458 = 10500; k2_458 = 787;
  R459: iS3YpPHmAmB -> iS3YpPHmABm; k1_459*iS3YpPHmAmB - k2_459*iS3YpPHmABm;
    k1_459 = 10500; k2_459 = 787;
  R460: S0YPeHmAmB -> S0YPeHmABm; k1_460*S0YPeHmAmB - k2_460*S0YPeHmABm;
    k1_460 = 10500; k2_460 = 787;
  R461: S0YpPeHmAmB -> S0YpPeHmABm; k1_461*S0YpPeHmAmB - k2_461*S0YpPeHmABm;
    k1_461 = 10500; k2_461 = 787;
  R462: iS0YpPeHmAmB -> iS0YpPeHmABm; k1_462*iS0YpPeHmAmB - k2_462*iS0YpPeHmABm;
    k1_462 = 10500; k2_462 = 787;
  R463: S1YPeHmAmB -> S1YPeHmABm; k1_463*S1YPeHmAmB - k2_463*S1YPeHmABm;
    k1_463 = 10500; k2_463 = 787;
  R464: S1YpPeHmAmB -> S1YpPeHmABm; k1_464*S1YpPeHmAmB - k2_464*S1YpPeHmABm;
    k1_464 = 10500; k2_464 = 787;
  R465: iS1YpPeHmAmB -> iS1YpPeHmABm; k1_465*iS1YpPeHmAmB - k2_465*iS1YpPeHmABm;
    k1_465 = 10500; k2_465 = 787;
  R466: S2YPeHmAmB -> S2YPeHmABm; k1_466*S2YPeHmAmB - k2_466*S2YPeHmABm;
    k1_466 = 10500; k2_466 = 787;
  R467: S2YpPeHmAmB -> S2YpPeHmABm; k1_467*S2YpPeHmAmB - k2_467*S2YpPeHmABm;
    k1_467 = 10500; k2_467 = 787;
  R468: iS2YpPeHmAmB -> iS2YpPeHmABm; k1_468*iS2YpPeHmAmB - k2_468*iS2YpPeHmABm;
    k1_468 = 10500; k2_468 = 787;
  R469: S3YPeHmAmB -> S3YPeHmABm; k1_469*S3YPeHmAmB - k2_469*S3YPeHmABm;
    k1_469 = 10500; k2_469 = 787;
  R470: S3YpPeHmAmB -> S3YpPeHmABm; k1_470*S3YpPeHmAmB - k2_470*S3YpPeHmABm;
    k1_470 = 10500; k2_470 = 787;
  R471: iS3YpPeHmAmB -> iS3YpPeHmABm; k1_471*iS3YpPeHmAmB - k2_471*iS3YpPeHmABm;
    k1_471 = 10500; k2_471 = 787;
  R472: S0YPpHAmBm -> S0YPpHABmm; k1_472*S0YPpHAmBm - k2_472*S0YPpHABmm;
    k1_472 = 5250; k2_472 = 157;
  R473: S0YpPpHAmBm -> S0YpPpHABmm; k1_473*S0YpPpHAmBm - k2_473*S0YpPpHABmm;
    k1_473 = 5250; k2_473 = 157;
  R474: iS0YpPpHAmBm -> iS0YpPpHABmm; k1_474*iS0YpPpHAmBm - k2_474*iS0YpPpHABmm;
    k1_474 = 5250; k2_474 = 157;
  R475: S1YPpHAmBm -> S1YPpHABmm; k1_475*S1YPpHAmBm - k2_475*S1YPpHABmm;
    k1_475 = 5250; k2_475 = 157;
  R476: S1YpPpHAmBm -> S1YpPpHABmm; k1_476*S1YpPpHAmBm - k2_476*S1YpPpHABmm;
    k1_476 = 5250; k2_476 = 157;
  R477: iS1YpPpHAmBm -> iS1YpPpHABmm; k1_477*iS1YpPpHAmBm - k2_477*iS1YpPpHABmm;
    k1_477 = 5250; k2_477 = 157;
  R478: S2YPpHAmBm -> S2YPpHABmm; k1_478*S2YPpHAmBm - k2_478*S2YPpHABmm;
    k1_478 = 5250; k2_478 = 157;
  R479: S2YpPpHAmBm -> S2YpPpHABmm; k1_479*S2YpPpHAmBm - k2_479*S2YpPpHABmm;
    k1_479 = 5250; k2_479 = 157;
  R480: iS2YpPpHAmBm -> iS2YpPpHABmm; k1_480*iS2YpPpHAmBm - k2_480*iS2YpPpHABmm;
    k1_480 = 5250; k2_480 = 157;
  R481: S3YPpHAmBm -> S3YPpHABmm; k1_481*S3YPpHAmBm - k2_481*S3YPpHABmm;
    k1_481 = 5250; k2_481 = 157;
  R482: S3YpPpHAmBm -> S3YpPpHABmm; k1_482*S3YpPpHAmBm - k2_482*S3YpPpHABmm;
    k1_482 = 5250; k2_482 = 157;
  R483: iS3YpPpHAmBm -> iS3YpPpHABmm; k1_483*iS3YpPpHAmBm - k2_483*iS3YpPpHABmm;
    k1_483 = 5250; k2_483 = 157;
  R484: S0YPHAmBm -> S0YPHABmm; k1_484*S0YPHAmBm - k2_484*S0YPHABmm;
    k1_484 = 5250; k2_484 = 157;
  R485: S0YpPHAmBm -> S0YpPHABmm; k1_485*S0YpPHAmBm - k2_485*S0YpPHABmm;
    k1_485 = 5250; k2_485 = 157;
  R486: iS0YpPHAmBm -> iS0YpPHABmm; k1_486*iS0YpPHAmBm - k2_486*iS0YpPHABmm;
    k1_486 = 5250; k2_486 = 157;
  R487: S1YPHAmBm -> S1YPHABmm; k1_487*S1YPHAmBm - k2_487*S1YPHABmm;
    k1_487 = 5250; k2_487 = 157;
  R488: S1YpPHAmBm -> S1YpPHABmm; k1_488*S1YpPHAmBm - k2_488*S1YpPHABmm;
    k1_488 = 5250; k2_488 = 157;
  R489: iS1YpPHAmBm -> iS1YpPHABmm; k1_489*iS1YpPHAmBm - k2_489*iS1YpPHABmm;
    k1_489 = 5250; k2_489 = 157;
  R490: S2YPHAmBm -> S2YPHABmm; k1_490*S2YPHAmBm - k2_490*S2YPHABmm;
    k1_490 = 5250; k2_490 = 157;
  R491: S2YpPHAmBm -> S2YpPHABmm; k1_491*S2YpPHAmBm - k2_491*S2YpPHABmm;
    k1_491 = 5250; k2_491 = 157;
  R492: iS2YpPHAmBm -> iS2YpPHABmm; k1_492*iS2YpPHAmBm - k2_492*iS2YpPHABmm;
    k1_492 = 5250; k2_492 = 157;
  R493: S3YPHAmBm -> S3YPHABmm; k1_493*S3YPHAmBm - k2_493*S3YPHABmm;
    k1_493 = 5250; k2_493 = 157;
  R494: S3YpPHAmBm -> S3YpPHABmm; k1_494*S3YpPHAmBm - k2_494*S3YpPHABmm;
    k1_494 = 5250; k2_494 = 157;
  R495: iS3YpPHAmBm -> iS3YpPHABmm; k1_495*iS3YpPHAmBm - k2_495*iS3YpPHABmm;
    k1_495 = 5250; k2_495 = 157;
  R496: S0YPeHAmBm -> S0YPeHABmm; k1_496*S0YPeHAmBm - k2_496*S0YPeHABmm;
    k1_496 = 5250; k2_496 = 157;
  R497: S0YpPeHAmBm -> S0YpPeHABmm; k1_497*S0YpPeHAmBm - k2_497*S0YpPeHABmm;
    k1_497 = 5250; k2_497 = 157;
  R498: iS0YpPeHAmBm -> iS0YpPeHABmm; k1_498*iS0YpPeHAmBm - k2_498*iS0YpPeHABmm;
    k1_498 = 5250; k2_498 = 157;
  R499: S1YPeHAmBm -> S1YPeHABmm; k1_499*S1YPeHAmBm - k2_499*S1YPeHABmm;
    k1_499 = 5250; k2_499 = 157;
  R500: S1YpPeHAmBm -> S1YpPeHABmm; k1_500*S1YpPeHAmBm - k2_500*S1YpPeHABmm;
    k1_500 = 5250; k2_500 = 157;
  R501: iS1YpPeHAmBm -> iS1YpPeHABmm; k1_501*iS1YpPeHAmBm - k2_501*iS1YpPeHABmm;
    k1_501 = 5250; k2_501 = 157;
  R502: S2YPeHAmBm -> S2YPeHABmm; k1_502*S2YPeHAmBm - k2_502*S2YPeHABmm;
    k1_502 = 5250; k2_502 = 157;
  R503: S2YpPeHAmBm -> S2YpPeHABmm; k1_503*S2YpPeHAmBm - k2_503*S2YpPeHABmm;
    k1_503 = 5250; k2_503 = 157;
  R504: iS2YpPeHAmBm -> iS2YpPeHABmm; k1_504*iS2YpPeHAmBm - k2_504*iS2YpPeHABmm;
    k1_504 = 5250; k2_504 = 157;
  R505: S3YPeHAmBm -> S3YPeHABmm; k1_505*S3YPeHAmBm - k2_505*S3YPeHABmm;
    k1_505 = 5250; k2_505 = 157;
  R506: S3YpPeHAmBm -> S3YpPeHABmm; k1_506*S3YpPeHAmBm - k2_506*S3YpPeHABmm;
    k1_506 = 5250; k2_506 = 157;
  R507: iS3YpPeHAmBm -> iS3YpPeHABmm; k1_507*iS3YpPeHAmBm - k2_507*iS3YpPeHABmm;
    k1_507 = 5250; k2_507 = 157;
  R508: S0YPpHAmBm -> S0YPpHmABmm; k1_508*S0YPpHAmBm - k2_508*S0YPpHmABmm;
    k1_508 = 5250; k2_508 = 157;
  R509: S0YpPpHAmBm -> S0YpPpHmABmm; k1_509*S0YpPpHAmBm - k2_509*S0YpPpHmABmm;
    k1_509 = 5250; k2_509 = 157;
  R510: iS0YpPpHAmBm -> iS0YpPpHmABmm; k1_510*iS0YpPpHAmBm - k2_510*iS0YpPpHmABmm;
    k1_510 = 5250; k2_510 = 157;
  R511: S1YPpHAmBm -> S1YPpHmABmm; k1_511*S1YPpHAmBm - k2_511*S1YPpHmABmm;
    k1_511 = 5250; k2_511 = 157;
  R512: S1YpPpHAmBm -> S1YpPpHmABmm; k1_512*S1YpPpHAmBm - k2_512*S1YpPpHmABmm;
    k1_512 = 5250; k2_512 = 157;
  R513: iS1YpPpHAmBm -> iS1YpPpHmABmm; k1_513*iS1YpPpHAmBm - k2_513*iS1YpPpHmABmm;
    k1_513 = 5250; k2_513 = 157;
  R514: S2YPpHAmBm -> S2YPpHmABmm; k1_514*S2YPpHAmBm - k2_514*S2YPpHmABmm;
    k1_514 = 5250; k2_514 = 157;
  R515: S2YpPpHAmBm -> S2YpPpHmABmm; k1_515*S2YpPpHAmBm - k2_515*S2YpPpHmABmm;
    k1_515 = 5250; k2_515 = 157;
  R516: iS2YpPpHAmBm -> iS2YpPpHmABmm; k1_516*iS2YpPpHAmBm - k2_516*iS2YpPpHmABmm;
    k1_516 = 5250; k2_516 = 157;
  R517: S3YPpHAmBm -> S3YPpHmABmm; k1_517*S3YPpHAmBm - k2_517*S3YPpHmABmm;
    k1_517 = 5250; k2_517 = 157;
  R518: S3YpPpHAmBm -> S3YpPpHmABmm; k1_518*S3YpPpHAmBm - k2_518*S3YpPpHmABmm;
    k1_518 = 5250; k2_518 = 157;
  R519: iS3YpPpHAmBm -> iS3YpPpHmABmm; k1_519*iS3YpPpHAmBm - k2_519*iS3YpPpHmABmm;
    k1_519 = 5250; k2_519 = 157;
  R520: S0YPHmAmBm -> S0YPHmABmm; k1_520*S0YPHmAmBm - k2_520*S0YPHmABmm;
    k1_520 = 5250; k2_520 = 157;
  R521: S0YpPHmAmBm -> S0YpPHmABmm; k1_521*S0YpPHmAmBm - k2_521*S0YpPHmABmm;
    k1_521 = 5250; k2_521 = 157;
  R522: iS0YpPHmAmBm -> iS0YpPHmABmm; k1_522*iS0YpPHmAmBm - k2_522*iS0YpPHmABmm;
    k1_522 = 5250; k2_522 = 157;
  R523: S1YPHmAmBm -> S1YPHmABmm; k1_523*S1YPHmAmBm - k2_523*S1YPHmABmm;
    k1_523 = 5250; k2_523 = 157;
  R524: S1YpPHmAmBm -> S1YpPHmABmm; k1_524*S1YpPHmAmBm - k2_524*S1YpPHmABmm;
    k1_524 = 5250; k2_524 = 157;
  R525: iS1YpPHmAmBm -> iS1YpPHmABmm; k1_525*iS1YpPHmAmBm - k2_525*iS1YpPHmABmm;
    k1_525 = 5250; k2_525 = 157;
  R526: S2YPHmAmBm -> S2YPHmABmm; k1_526*S2YPHmAmBm - k2_526*S2YPHmABmm;
    k1_526 = 5250; k2_526 = 157;
  R527: S2YpPHmAmBm -> S2YpPHmABmm; k1_527*S2YpPHmAmBm - k2_527*S2YpPHmABmm;
    k1_527 = 5250; k2_527 = 157;
  R528: iS2YpPHmAmBm -> iS2YpPHmABmm; k1_528*iS2YpPHmAmBm - k2_528*iS2YpPHmABmm;
    k1_528 = 5250; k2_528 = 157;
  R529: S3YPHmAmBm -> S3YPHmABmm; k1_529*S3YPHmAmBm - k2_529*S3YPHmABmm;
    k1_529 = 5250; k2_529 = 157;
  R530: S3YpPHmAmBm -> S3YpPHmABmm; k1_530*S3YpPHmAmBm - k2_530*S3YpPHmABmm;
    k1_530 = 5250; k2_530 = 157;
  R531: iS3YpPHmAmBm -> iS3YpPHmABmm; k1_531*iS3YpPHmAmBm - k2_531*iS3YpPHmABmm;
    k1_531 = 5250; k2_531 = 157;
  R532: S0YPeHmAmBm -> S0YPeHmABmm; k1_532*S0YPeHmAmBm - k2_532*S0YPeHmABmm;
    k1_532 = 5250; k2_532 = 157;
  R533: S0YpPeHmAmBm -> S0YpPeHmABmm; k1_533*S0YpPeHmAmBm - k2_533*S0YpPeHmABmm;
    k1_533 = 5250; k2_533 = 157;
  R534: iS0YpPeHmAmBm -> iS0YpPeHmABmm; k1_534*iS0YpPeHmAmBm - k2_534*iS0YpPeHmABmm;
    k1_534 = 5250; k2_534 = 157;
  R535: S1YPeHmAmBm -> S1YPeHmABmm; k1_535*S1YPeHmAmBm - k2_535*S1YPeHmABmm;
    k1_535 = 5250; k2_535 = 157;
  R536: S1YpPeHmAmBm -> S1YpPeHmABmm; k1_536*S1YpPeHmAmBm - k2_536*S1YpPeHmABmm;
    k1_536 = 5250; k2_536 = 157;
  R537: iS1YpPeHmAmBm -> iS1YpPeHmABmm; k1_537*iS1YpPeHmAmBm - k2_537*iS1YpPeHmABmm;
    k1_537 = 5250; k2_537 = 157;
  R538: S2YPeHmAmBm -> S2YPeHmABmm; k1_538*S2YPeHmAmBm - k2_538*S2YPeHmABmm;
    k1_538 = 5250; k2_538 = 157;
  R539: S2YpPeHmAmBm -> S2YpPeHmABmm; k1_539*S2YpPeHmAmBm - k2_539*S2YpPeHmABmm;
    k1_539 = 5250; k2_539 = 157;
  R540: iS2YpPeHmAmBm -> iS2YpPeHmABmm; k1_540*iS2YpPeHmAmBm - k2_540*iS2YpPeHmABmm;
    k1_540 = 5250; k2_540 = 157;
  R541: S3YPeHmAmBm -> S3YPeHmABmm; k1_541*S3YPeHmAmBm - k2_541*S3YPeHmABmm;
    k1_541 = 5250; k2_541 = 157;
  R542: S3YpPeHmAmBm -> S3YpPeHmABmm; k1_542*S3YpPeHmAmBm - k2_542*S3YpPeHmABmm;
    k1_542 = 5250; k2_542 = 157;
  R543: iS3YpPeHmAmBm -> iS3YpPeHmABmm; k1_543*iS3YpPeHmAmBm - k2_543*iS3YpPeHmABmm;
    k1_543 = 5250; k2_543 = 157;
  R544: S0YPpHABmm + PQ -> S0YPpHAB + PQH; k1_544*S0YPpHABmm*PQ - k2_544*S0YPpHAB*PQH;
    k1_544 = 250; k2_544 = 250;
  R545: S0YpPpHABmm + PQ -> PQH + S0YpPpHAB; k1_545*S0YpPpHABmm*PQ - k2_545*S0YpPpHAB*PQH;
    k1_545 = 250; k2_545 = 250;
  R546: iS0YpPpHABmm + PQ -> PQH + iS0YpPpHAB; k1_546*iS0YpPpHABmm*PQ - k2_546*iS0YpPpHAB*PQH;
    k1_546 = 250; k2_546 = 250;
  R547: S1YPpHABmm + PQ -> PQH + S1YPpHAB; k1_547*S1YPpHABmm*PQ - k2_547*S1YPpHAB*PQH;
    k1_547 = 250; k2_547 = 250;
  R548: S1YpPpHABmm + PQ -> PQH + S1YpPpHAB; k1_548*S1YpPpHABmm*PQ - k2_548*S1YpPpHAB*PQH;
    k1_548 = 250; k2_548 = 250;
  R549: iS1YpPpHABmm + PQ -> PQH + iS1YpPpHAB; k1_549*iS1YpPpHABmm*PQ - k2_549*iS1YpPpHAB*PQH;
    k1_549 = 250; k2_549 = 250;
  R550: S2YPpHABmm + PQ -> PQH + S2YPpHAB; k1_550*S2YPpHABmm*PQ - k2_550*S2YPpHAB*PQH;
    k1_550 = 250; k2_550 = 250;
  R551: S2YpPpHABmm + PQ -> PQH + S2YpPpHAB; k1_551*S2YpPpHABmm*PQ - k2_551*S2YpPpHAB*PQH;
    k1_551 = 250; k2_551 = 250;
  R552: iS2YpPpHABmm + PQ -> PQH + iS2YpPpHAB; k1_552*iS2YpPpHABmm*PQ - k2_552*iS2YpPpHAB*PQH;
    k1_552 = 250; k2_552 = 250;
  R553: S3YPpHABmm + PQ -> PQH + S3YPpHAB; k1_553*S3YPpHABmm*PQ - k2_553*S3YPpHAB*PQH;
    k1_553 = 250; k2_553 = 250;
  R554: S3YpPpHABmm + PQ -> PQH + S3YpPpHAB; k1_554*S3YpPpHABmm*PQ - k2_554*S3YpPpHAB*PQH;
    k1_554 = 250; k2_554 = 250;
  R555: iS3YpPpHABmm + PQ -> PQH + iS3YpPpHAB; k1_555*iS3YpPpHABmm*PQ - k2_555*iS3YpPpHAB*PQH;
    k1_555 = 250; k2_555 = 250;
  R556: S0YPHABmm + PQ -> S0YPHAB + PQH; k1_556*S0YPHABmm*PQ - k2_556*S0YPHAB*PQH;
    k1_556 = 250; k2_556 = 250;
  R557: S0YpPHABmm + PQ -> S0YpPHAB + PQH; k1_557*S0YpPHABmm*PQ - k2_557*S0YpPHAB*PQH;
    k1_557 = 250; k2_557 = 250;
  R558: iS0YpPHABmm + PQ -> iS0YpPHAB + PQH; k1_558*iS0YpPHABmm*PQ - k2_558*iS0YpPHAB*PQH;
    k1_558 = 250; k2_558 = 250;
  R559: S1YPHABmm + PQ -> S1YPHAB + PQH; k1_559*S1YPHABmm*PQ - k2_559*S1YPHAB*PQH;
    k1_559 = 250; k2_559 = 250;
  R560: S1YpPHABmm + PQ -> S1YpPHAB + PQH; k1_560*S1YpPHABmm*PQ - k2_560*S1YpPHAB*PQH;
    k1_560 = 250; k2_560 = 250;
  R561: iS1YpPHABmm + PQ -> iS1YpPHAB + PQH; k1_561*iS1YpPHABmm*PQ - k2_561*iS1YpPHAB*PQH;
    k1_561 = 250; k2_561 = 250;
  R562: S2YPHABmm + PQ -> S2YPHAB + PQH; k1_562*S2YPHABmm*PQ - k2_562*S2YPHAB*PQH;
    k1_562 = 250; k2_562 = 250;
  R563: S2YpPHABmm + PQ -> S2YpPHAB + PQH; k1_563*S2YpPHABmm*PQ - k2_563*S2YpPHAB*PQH;
    k1_563 = 250; k2_563 = 250;
  R564: iS2YpPHABmm + PQ -> iS2YpPHAB + PQH; k1_564*iS2YpPHABmm*PQ - k2_564*iS2YpPHAB*PQH;
    k1_564 = 250; k2_564 = 250;
  R565: S3YPHABmm + PQ -> S3YPHAB + PQH; k1_565*S3YPHABmm*PQ - k2_565*S3YPHAB*PQH;
    k1_565 = 250; k2_565 = 250;
  R566: S3YpPHABmm + PQ -> S3YpPHAB + PQH; k1_566*S3YpPHABmm*PQ - k2_566*S3YpPHAB*PQH;
    k1_566 = 250; k2_566 = 250;
  R567: iS3YpPHABmm + PQ -> iS3YpPHAB + PQH; k1_567*iS3YpPHABmm*PQ - k2_567*iS3YpPHAB*PQH;
    k1_567 = 250; k2_567 = 250;
  R568: S0YPeHABmm + PQ -> S0YPeHAB + PQH; k1_568*S0YPeHABmm*PQ - k2_568*S0YPeHAB*PQH;
    k1_568 = 250; k2_568 = 250;
  R569: S0YpPeHABmm + PQ -> S0YpPeHAB + PQH; k1_569*S0YpPeHABmm*PQ - k2_569*S0YpPeHAB*PQH;
    k1_569 = 250; k2_569 = 250;
  R570: iS0YpPeHABmm + PQ -> iS0YpPeHAB + PQH; k1_570*iS0YpPeHABmm*PQ - k2_570*iS0YpPeHAB*PQH;
    k1_570 = 250; k2_570 = 250;
  R571: S1YPeHABmm + PQ -> S1YPeHAB + PQH; k1_571*S1YPeHABmm*PQ - k2_571*S1YPeHAB*PQH;
    k1_571 = 250; k2_571 = 250;
  R572: S1YpPeHABmm + PQ -> S1YpPeHAB + PQH; k1_572*S1YpPeHABmm*PQ - k2_572*S1YpPeHAB*PQH;
    k1_572 = 250; k2_572 = 250;
  R573: iS1YpPeHABmm + PQ -> iS1YpPeHAB + PQH; k1_573*iS1YpPeHABmm*PQ - k2_573*iS1YpPeHAB*PQH;
    k1_573 = 250; k2_573 = 250;
  R574: S2YPeHABmm + PQ -> S2YPeHAB + PQH; k1_574*S2YPeHABmm*PQ - k2_574*S2YPeHAB*PQH;
    k1_574 = 250; k2_574 = 250;
  R575: S2YpPeHABmm + PQ -> S2YpPeHAB + PQH; k1_575*S2YpPeHABmm*PQ - k2_575*S2YpPeHAB*PQH;
    k1_575 = 250; k2_575 = 250;
  R576: iS2YpPeHABmm + PQ -> iS2YpPeHAB + PQH; k1_576*iS2YpPeHABmm*PQ - k2_576*iS2YpPeHAB*PQH;
    k1_576 = 250; k2_576 = 250;
  R577: S3YPeHABmm + PQ -> S3YPeHAB + PQH; k1_577*S3YPeHABmm*PQ - k2_577*S3YPeHAB*PQH;
    k1_577 = 250; k2_577 = 250;
  R578: S3YpPeHABmm + PQ -> S3YpPeHAB + PQH; k1_578*S3YpPeHABmm*PQ - k2_578*S3YpPeHAB*PQH;
    k1_578 = 250; k2_578 = 250;
  R579: iS3YpPeHABmm + PQ -> iS3YpPeHAB + PQH; k1_579*iS3YpPeHABmm*PQ - k2_579*iS3YpPeHAB*PQH;
    k1_579 = 250; k2_579 = 250;
  R580: S0YPpHmABmm + PQ -> S0YPpHmAB + PQH; k1_580*S0YPpHmABmm*PQ - k2_580*S0YPpHmAB*PQH;
    k1_580 = 250; k2_580 = 250;
  R581: S0YpPpHmABmm + PQ -> S0YpPpHmAB + PQH; k1_581*S0YpPpHmABmm*PQ - k2_581*S0YpPpHmAB*PQH;
    k1_581 = 250; k2_581 = 250;
  R582: iS0YpPpHmABmm + PQ -> iS0YpPpHmAB + PQH; k1_582*iS0YpPpHmABmm*PQ - k2_582*iS0YpPpHmAB*PQH;
    k1_582 = 250; k2_582 = 250;
  R583: S1YPpHmABmm + PQ -> S1YPpHmAB + PQH; k1_583*S1YPpHmABmm*PQ - k2_583*S1YPpHmAB*PQH;
    k1_583 = 250; k2_583 = 250;
  R584: S1YpPpHmABmm + PQ -> S1YpPpHmAB + PQH; k1_584*S1YpPpHmABmm*PQ - k2_584*S1YpPpHmAB*PQH;
    k1_584 = 250; k2_584 = 250;
  R585: iS1YpPpHmABmm + PQ -> iS1YpPpHmAB + PQH; k1_585*iS1YpPpHmABmm*PQ - k2_585*iS1YpPpHmAB*PQH;
    k1_585 = 250; k2_585 = 250;
  R586: S2YPpHmABmm + PQ -> S2YPpHmAB + PQH; k1_586*S2YPpHmABmm*PQ - k2_586*S2YPpHmAB*PQH;
    k1_586 = 250; k2_586 = 250;
  R587: S2YpPpHmABmm + PQ -> S2YpPpHmAB + PQH; k1_587*S2YpPpHmABmm*PQ - k2_587*S2YpPpHmAB*PQH;
    k1_587 = 250; k2_587 = 250;
  R588: iS2YpPpHmABmm + PQ -> iS2YpPpHmAB + PQH; k1_588*iS2YpPpHmABmm*PQ - k2_588*iS2YpPpHmAB*PQH;
    k1_588 = 250; k2_588 = 250;
  R589: S3YPpHmABmm + PQ -> S3YPpHmAB + PQH; k1_589*S3YPpHmABmm*PQ - k2_589*S3YPpHmAB*PQH;
    k1_589 = 250; k2_589 = 250;
  R590: S3YpPpHmABmm + PQ -> S3YpPpHmAB + PQH; k1_590*S3YpPpHmABmm*PQ - k2_590*S3YpPpHmAB*PQH;
    k1_590 = 250; k2_590 = 250;
  R591: iS3YpPpHmABmm + PQ -> iS3YpPpHmAB + PQH; k1_591*iS3YpPpHmABmm*PQ - k2_591*iS3YpPpHmAB*PQH;
    k1_591 = 250; k2_591 = 250;
  R592: S0YPpHAmBmm + PQ -> S0YPpHAmB + PQH; k1_592*S0YPpHAmBmm*PQ - k2_592*S0YPpHAmB*PQH;
    k1_592 = 250; k2_592 = 250;
  R593: S0YpPpHAmBmm + PQ -> S0YpPpHAmB + PQH; k1_593*S0YpPpHAmBmm*PQ - k2_593*S0YpPpHAmB*PQH;
    k1_593 = 250; k2_593 = 250;
  R594: iS0YpPpHAmBmm + PQ -> iS0YpPpHAmB + PQH; k1_594*iS0YpPpHAmBmm*PQ - k2_594*iS0YpPpHAmB*PQH;
    k1_594 = 250; k2_594 = 250;
  R595: S1YPpHAmBmm + PQ -> S1YPpHAmB + PQH; k1_595*S1YPpHAmBmm*PQ - k2_595*S1YPpHAmB*PQH;
    k1_595 = 250; k2_595 = 250;
  R596: S1YpPpHAmBmm + PQ -> S1YpPpHAmB + PQH; k1_596*S1YpPpHAmBmm*PQ - k2_596*S1YpPpHAmB*PQH;
    k1_596 = 250; k2_596 = 250;
  R597: iS1YpPpHAmBmm + PQ -> iS1YpPpHAmB + PQH; k1_597*iS1YpPpHAmBmm*PQ - k2_597*iS1YpPpHAmB*PQH;
    k1_597 = 250; k2_597 = 250;
  R598: S2YPpHAmBmm + PQ -> S2YPpHAmB + PQH; k1_598*S2YPpHAmBmm*PQ - k2_598*S2YPpHAmB*PQH;
    k1_598 = 250; k2_598 = 250;
  R599: S2YpPpHAmBmm + PQ -> S2YpPpHAmB + PQH; k1_599*S2YpPpHAmBmm*PQ - k2_599*S2YpPpHAmB*PQH;
    k1_599 = 250; k2_599 = 250;
  R600: iS2YpPpHAmBmm + PQ -> iS2YpPpHAmB + PQH; k1_600*iS2YpPpHAmBmm*PQ - k2_600*iS2YpPpHAmB*PQH;
    k1_600 = 250; k2_600 = 250;
  R601: S3YPpHAmBmm + PQ -> S3YPpHAmB + PQH; k1_601*S3YPpHAmBmm*PQ - k2_601*S3YPpHAmB*PQH;
    k1_601 = 250; k2_601 = 250;
  R602: S3YpPpHAmBmm + PQ -> S3YpPpHAmB + PQH; k1_602*S3YpPpHAmBmm*PQ - k2_602*S3YpPpHAmB*PQH;
    k1_602 = 250; k2_602 = 250;
  R603: iS3YpPpHAmBmm + PQ -> iS3YpPpHAmB + PQH; k1_603*iS3YpPpHAmBmm*PQ - k2_603*iS3YpPpHAmB*PQH;
    k1_603 = 250; k2_603 = 250;
  R604: S0YPHAmBmm + PQ -> S0YPHAmB + PQH; k1_604*S0YPHAmBmm*PQ - k2_604*S0YPHAmB*PQH;
    k1_604 = 250; k2_604 = 250;
  R605: S0YpPHAmBmm + PQ -> S0YpPHAmB + PQH; k1_605*S0YpPHAmBmm*PQ - k2_605*S0YpPHAmB*PQH;
    k1_605 = 250; k2_605 = 250;
  R606: iS0YpPHAmBmm + PQ -> iS0YpPHAmB + PQH; k1_606*iS0YpPHAmBmm*PQ - k2_606*iS0YpPHAmB*PQH;
    k1_606 = 250; k2_606 = 250;
  R607: S1YPHAmBmm + PQ -> S1YPHAmB + PQH; k1_607*S1YPHAmBmm*PQ - k2_607*S1YPHAmB*PQH;
    k1_607 = 250; k2_607 = 250;
  R608: S1YpPHAmBmm + PQ -> S1YpPHAmB + PQH; k1_608*S1YpPHAmBmm*PQ - k2_608*S1YpPHAmB*PQH;
    k1_608 = 250; k2_608 = 250;
  R609: iS1YpPHAmBmm + PQ -> iS1YpPHAmB + PQH; k1_609*iS1YpPHAmBmm*PQ - k2_609*iS1YpPHAmB*PQH;
    k1_609 = 250; k2_609 = 250;
  R610: S2YPHAmBmm + PQ -> S2YPHAmB + PQH; k1_610*S2YPHAmBmm*PQ - k2_610*S2YPHAmB*PQH;
    k1_610 = 250; k2_610 = 250;
  R611: S2YpPHAmBmm + PQ -> S2YpPHAmB + PQH; k1_611*S2YpPHAmBmm*PQ - k2_611*S2YpPHAmB*PQH;
    k1_611 = 250; k2_611 = 250;
  R612: iS2YpPHAmBmm + PQ -> iS2YpPHAmB + PQH; k1_612*iS2YpPHAmBmm*PQ - k2_612*iS2YpPHAmB*PQH;
    k1_612 = 250; k2_612 = 250;
  R613: S3YPHAmBmm + PQ -> S3YPHAmB + PQH; k1_613*S3YPHAmBmm*PQ - k2_613*S3YPHAmB*PQH;
    k1_613 = 250; k2_613 = 250;
  R614: S3YpPHAmBmm + PQ -> S3YpPHAmB + PQH; k1_614*S3YpPHAmBmm*PQ - k2_614*S3YpPHAmB*PQH;
    k1_614 = 250; k2_614 = 250;
  R615: iS3YpPHAmBmm + PQ -> iS3YpPHAmB + PQH; k1_615*iS3YpPHAmBmm*PQ - k2_615*iS3YpPHAmB*PQH;
    k1_615 = 250; k2_615 = 250;
  R616: S0YPHmABmm + PQ -> S0YPHmAB + PQH; k1_616*S0YPHmABmm*PQ - k2_616*S0YPHmAB*PQH;
    k1_616 = 250; k2_616 = 250;
  R617: S0YpPHmABmm + PQ -> S0YpPHmAB + PQH; k1_617*S0YpPHmABmm*PQ - k2_617*S0YpPHmAB*PQH;
    k1_617 = 250; k2_617 = 250;
  R618: iS0YpPHmABmm + PQ -> iS0YpPHmAB + PQH; k1_618*iS0YpPHmABmm*PQ - k2_618*iS0YpPHmAB*PQH;
    k1_618 = 250; k2_618 = 250;
  R619: S1YPHmABmm + PQ -> S1YPHmAB + PQH; k1_619*S1YPHmABmm*PQ - k2_619*S1YPHmAB*PQH;
    k1_619 = 250; k2_619 = 250;
  R620: S1YpPHmABmm + PQ -> S1YpPHmAB + PQH; k1_620*S1YpPHmABmm*PQ - k2_620*S1YpPHmAB*PQH;
    k1_620 = 250; k2_620 = 250;
  R621: iS1YpPHmABmm + PQ -> iS1YpPHmAB + PQH; k1_621*iS1YpPHmABmm*PQ - k2_621*iS1YpPHmAB*PQH;
    k1_621 = 250; k2_621 = 250;
  R622: S2YPHmABmm + PQ -> S2YPHmAB + PQH; k1_622*S2YPHmABmm*PQ - k2_622*S2YPHmAB*PQH;
    k1_622 = 250; k2_622 = 250;
  R623: S2YpPHmABmm + PQ -> S2YpPHmAB + PQH; k1_623*S2YpPHmABmm*PQ - k2_623*S2YpPHmAB*PQH;
    k1_623 = 250; k2_623 = 250;
  R624: iS2YpPHmABmm + PQ -> iS2YpPHmAB + PQH; k1_624*iS2YpPHmABmm*PQ - k2_624*iS2YpPHmAB*PQH;
    k1_624 = 250; k2_624 = 250;
  R625: S3YPHmABmm + PQ -> S3YPHmAB + PQH; k1_625*S3YPHmABmm*PQ - k2_625*S3YPHmAB*PQH;
    k1_625 = 250; k2_625 = 250;
  R626: S3YpPHmABmm + PQ -> S3YpPHmAB + PQH; k1_626*S3YpPHmABmm*PQ - k2_626*S3YpPHmAB*PQH;
    k1_626 = 250; k2_626 = 250;
  R627: iS3YpPHmABmm + PQ -> iS3YpPHmAB + PQH; k1_627*iS3YpPHmABmm*PQ - k2_627*iS3YpPHmAB*PQH;
    k1_627 = 250; k2_627 = 250;
  R628: S0YPeHAmBmm + PQ -> S0YPeHAmB + PQH; k1_628*S0YPeHAmBmm*PQ - k2_628*S0YPeHAmB*PQH;
    k1_628 = 250; k2_628 = 250;
  R629: S0YpPeHAmBmm + PQ -> S0YpPeHAmB + PQH; k1_629*S0YpPeHAmBmm*PQ - k2_629*S0YpPeHAmB*PQH;
    k1_629 = 250; k2_629 = 250;
  R630: iS0YpPeHAmBmm + PQ -> iS0YpPeHAmB + PQH; k1_630*iS0YpPeHAmBmm*PQ - k2_630*iS0YpPeHAmB*PQH;
    k1_630 = 250; k2_630 = 250;
  R631: S1YPeHAmBmm + PQ -> S1YPeHAmB + PQH; k1_631*S1YPeHAmBmm*PQ - k2_631*S1YPeHAmB*PQH;
    k1_631 = 250; k2_631 = 250;
  R632: S1YpPeHAmBmm + PQ -> S1YpPeHAmB + PQH; k1_632*S1YpPeHAmBmm*PQ - k2_632*S1YpPeHAmB*PQH;
    k1_632 = 250; k2_632 = 250;
  R633: iS1YpPeHAmBmm + PQ -> iS1YpPeHAmB + PQH; k1_633*iS1YpPeHAmBmm*PQ - k2_633*iS1YpPeHAmB*PQH;
    k1_633 = 250; k2_633 = 250;
  R634: S2YPeHAmBmm + PQ -> S2YPeHAmB + PQH; k1_634*S2YPeHAmBmm*PQ - k2_634*S2YPeHAmB*PQH;
    k1_634 = 250; k2_634 = 250;
  R635: S2YpPeHAmBmm + PQ -> S2YpPeHAmB + PQH; k1_635*S2YpPeHAmBmm*PQ - k2_635*S2YpPeHAmB*PQH;
    k1_635 = 250; k2_635 = 250;
  R636: iS2YpPeHAmBmm + PQ -> iS2YpPeHAmB + PQH; k1_636*iS2YpPeHAmBmm*PQ - k2_636*iS2YpPeHAmB*PQH;
    k1_636 = 250; k2_636 = 250;
  R637: S3YPeHAmBmm + PQ -> S3YPeHAmB + PQH; k1_637*S3YPeHAmBmm*PQ - k2_637*S3YPeHAmB*PQH;
    k1_637 = 250; k2_637 = 250;
  R638: S3YpPeHAmBmm + PQ -> S3YpPeHAmB + PQH; k1_638*S3YpPeHAmBmm*PQ - k2_638*S3YpPeHAmB*PQH;
    k1_638 = 250; k2_638 = 250;
  R639: iS3YpPeHAmBmm + PQ -> iS3YpPeHAmB + PQH; k1_639*iS3YpPeHAmBmm*PQ - k2_639*iS3YpPeHAmB*PQH;
    k1_639 = 250; k2_639 = 250;
  R640: S0YPpHmAmBmm + PQ -> S0YPpHmAmB + PQH; k1_640*S0YPpHmAmBmm*PQ - k2_640*S0YPpHmAmB*PQH;
    k1_640 = 250; k2_640 = 250;
  R641: S0YpPpHmAmBmm + PQ -> S0YpPpHmAmB + PQH; k1_641*S0YpPpHmAmBmm*PQ - k2_641*S0YpPpHmAmB*PQH;
    k1_641 = 250; k2_641 = 250;
  R642: iS0YpPpHmAmBmm + PQ -> iS0YpPpHmAmB + PQH; k1_642*iS0YpPpHmAmBmm*PQ - k2_642*iS0YpPpHmAmB*PQH;
    k1_642 = 250; k2_642 = 250;
  R643: S1YPpHmAmBmm + PQ -> S1YPpHmAmB + PQH; k1_643*S1YPpHmAmBmm*PQ - k2_643*S1YPpHmAmB*PQH;
    k1_643 = 250; k2_643 = 250;
  R644: S1YpPpHmAmBmm + PQ -> S1YpPpHmAmB + PQH; k1_644*S1YpPpHmAmBmm*PQ - k2_644*S1YpPpHmAmB*PQH;
    k1_644 = 250; k2_644 = 250;
  R645: iS1YpPpHmAmBmm + PQ -> iS1YpPpHmAmB + PQH; k1_645*iS1YpPpHmAmBmm*PQ - k2_645*iS1YpPpHmAmB*PQH;
    k1_645 = 250; k2_645 = 250;
  R646: S2YPpHmAmBmm + PQ -> S2YPpHmAmB + PQH; k1_646*S2YPpHmAmBmm*PQ - k2_646*S2YPpHmAmB*PQH;
    k1_646 = 250; k2_646 = 250;
  R647: S2YpPpHmAmBmm + PQ -> S2YpPpHmAmB + PQH; k1_647*S2YpPpHmAmBmm*PQ - k2_647*S2YpPpHmAmB*PQH;
    k1_647 = 250; k2_647 = 250;
  R648: iS2YpPpHmAmBmm + PQ -> iS2YpPpHmAmB + PQH; k1_648*iS2YpPpHmAmBmm*PQ - k2_648*iS2YpPpHmAmB*PQH;
    k1_648 = 250; k2_648 = 250;
  R649: S3YPpHmAmBmm + PQ -> S3YPpHmAmB + PQH; k1_649*S3YPpHmAmBmm*PQ - k2_649*S3YPpHmAmB*PQH;
    k1_649 = 250; k2_649 = 250;
  R650: S3YpPpHmAmBmm + PQ -> S3YpPpHmAmB + PQH; k1_650*S3YpPpHmAmBmm*PQ - k2_650*S3YpPpHmAmB*PQH;
    k1_650 = 250; k2_650 = 250;
  R651: iS3YpPpHmAmBmm + PQ -> iS3YpPpHmAmB + PQH; k1_651*iS3YpPpHmAmBmm*PQ - k2_651*iS3YpPpHmAmB*PQH;
    k1_651 = 250; k2_651 = 250;
  R652: S0YPHmAmBmm + PQ -> S0YPHmAmB + PQH; k1_652*S0YPHmAmBmm*PQ - k2_652*S0YPHmAmB*PQH;
    k1_652 = 250; k2_652 = 250;
  R653: S0YpPHmAmBmm + PQ -> S0YpPHmAmB + PQH; k1_653*S0YpPHmAmBmm*PQ - k2_653*S0YpPHmAmB*PQH;
    k1_653 = 250; k2_653 = 250;
  R654: iS0YpPHmAmBmm + PQ -> iS0YpPHmAmB + PQH; k1_654*iS0YpPHmAmBmm*PQ - k2_654*iS0YpPHmAmB*PQH;
    k1_654 = 250; k2_654 = 250;
  R655: S1YPHmAmBmm + PQ -> S1YPHmAmB + PQH; k1_655*S1YPHmAmBmm*PQ - k2_655*S1YPHmAmB*PQH;
    k1_655 = 250; k2_655 = 250;
  R656: S1YpPHmAmBmm + PQ -> S1YpPHmAmB + PQH; k1_656*S1YpPHmAmBmm*PQ - k2_656*S1YpPHmAmB*PQH;
    k1_656 = 250; k2_656 = 250;
  R657: iS1YpPHmAmBmm + PQ -> iS1YpPHmAmB + PQH; k1_657*iS1YpPHmAmBmm*PQ - k2_657*iS1YpPHmAmB*PQH;
    k1_657 = 250; k2_657 = 250;
  R658: S2YPHmAmBmm + PQ -> S2YPHmAmB + PQH; k1_658*S2YPHmAmBmm*PQ - k2_658*S2YPHmAmB*PQH;
    k1_658 = 250; k2_658 = 250;
  R659: S2YpPHmAmBmm + PQ -> S2YpPHmAmB + PQH; k1_659*S2YpPHmAmBmm*PQ - k2_659*S2YpPHmAmB*PQH;
    k1_659 = 250; k2_659 = 250;
  R660: iS2YpPHmAmBmm + PQ -> iS2YpPHmAmB + PQH; k1_660*iS2YpPHmAmBmm*PQ - k2_660*iS2YpPHmAmB*PQH;
    k1_660 = 250; k2_660 = 250;
  R661: S3YPHmAmBmm + PQ -> S3YPHmAmB + PQH; k1_661*S3YPHmAmBmm*PQ - k2_661*S3YPHmAmB*PQH;
    k1_661 = 250; k2_661 = 250;
  R662: S3YpPHmAmBmm + PQ -> S3YpPHmAmB + PQH; k1_662*S3YpPHmAmBmm*PQ - k2_662*S3YpPHmAmB*PQH;
    k1_662 = 250; k2_662 = 250;
  R663: iS3YpPHmAmBmm + PQ -> iS3YpPHmAmB + PQH; k1_663*iS3YpPHmAmBmm*PQ - k2_663*iS3YpPHmAmB*PQH;
    k1_663 = 250; k2_663 = 250;
  R664: S0YPeHmAmBmm + PQ -> S0YPeHmAmB + PQH; k1_664*S0YPeHmAmBmm*PQ - k2_664*S0YPeHmAmB*PQH;
    k1_664 = 250; k2_664 = 250;
  R665: S0YpPeHmAmBmm + PQ -> S0YpPeHmAmB + PQH; k1_665*S0YpPeHmAmBmm*PQ - k2_665*S0YpPeHmAmB*PQH;
    k1_665 = 250; k2_665 = 250;
  R666: iS0YpPeHmAmBmm + PQ -> iS0YpPeHmAmB + PQH; k1_666*iS0YpPeHmAmBmm*PQ - k2_666*iS0YpPeHmAmB*PQH;
    k1_666 = 250; k2_666 = 250;
  R667: S1YPeHmAmBmm + PQ -> S1YPeHmAmB + PQH; k1_667*S1YPeHmAmBmm*PQ - k2_667*S1YPeHmAmB*PQH;
    k1_667 = 250; k2_667 = 250;
  R668: S1YpPeHmAmBmm + PQ -> S1YpPeHmAmB + PQH; k1_668*S1YpPeHmAmBmm*PQ - k2_668*S1YpPeHmAmB*PQH;
    k1_668 = 250; k2_668 = 250;
  R669: iS1YpPeHmAmBmm + PQ -> iS1YpPeHmAmB + PQH; k1_669*iS1YpPeHmAmBmm*PQ - k2_669*iS1YpPeHmAmB*PQH;
    k1_669 = 250; k2_669 = 250;
  R670: S2YPeHmAmBmm + PQ -> S2YPeHmAmB + PQH; k1_670*S2YPeHmAmBmm*PQ - k2_670*S2YPeHmAmB*PQH;
    k1_670 = 250; k2_670 = 250;
  R671: S2YpPeHmAmBmm + PQ -> S2YpPeHmAmB + PQH; k1_671*S2YpPeHmAmBmm*PQ - k2_671*S2YpPeHmAmB*PQH;
    k1_671 = 250; k2_671 = 250;
  R672: iS2YpPeHmAmBmm + PQ -> iS2YpPeHmAmB + PQH; k1_672*iS2YpPeHmAmBmm*PQ - k2_672*iS2YpPeHmAmB*PQH;
    k1_672 = 250; k2_672 = 250;
  R673: S3YPeHmAmBmm + PQ -> S3YPeHmAmB + PQH; k1_673*S3YPeHmAmBmm*PQ - k2_673*S3YPeHmAmB*PQH;
    k1_673 = 250; k2_673 = 250;
  R674: S3YpPeHmAmBmm + PQ -> S3YpPeHmAmB + PQH; k1_674*S3YpPeHmAmBmm*PQ - k2_674*S3YpPeHmAmB*PQH;
    k1_674 = 250; k2_674 = 250;
  R675: iS3YpPeHmAmBmm + PQ -> iS3YpPeHmAmB + PQH; k1_675*iS3YpPeHmAmBmm*PQ - k2_675*iS3YpPeHmAmB*PQH;
    k1_675 = 250; k2_675 = 250;
  R676: S0YPeHmABmm + PQ -> S0YPeHmAB + PQH; k1_676*S0YPeHmABmm*PQ - k2_676*S0YPeHmAB*PQH;
    k1_676 = 250; k2_676 = 250;
  R677: S0YpPeHmABmm + PQ -> S0YpPeHmAB + PQH; k1_677*S0YpPeHmABmm*PQ - k2_677*S0YpPeHmAB*PQH;
    k1_677 = 250; k2_677 = 250;
  R678: iS0YpPeHmABmm + PQ -> iS0YpPeHmAB + PQH; k1_678*iS0YpPeHmABmm*PQ - k2_678*iS0YpPeHmAB*PQH;
    k1_678 = 250; k2_678 = 250;
  R679: S1YPeHmABmm + PQ -> S1YPeHmAB + PQH; k1_679*S1YPeHmABmm*PQ - k2_679*S1YPeHmAB*PQH;
    k1_679 = 250; k2_679 = 250;
  R680: S1YpPeHmABmm + PQ -> S1YpPeHmAB + PQH; k1_680*S1YpPeHmABmm*PQ - k2_680*S1YpPeHmAB*PQH;
    k1_680 = 250; k2_680 = 250;
  R681: iS1YpPeHmABmm + PQ -> iS1YpPeHmAB + PQH; k1_681*iS1YpPeHmABmm*PQ - k2_681*iS1YpPeHmAB*PQH;
    k1_681 = 250; k2_681 = 250;
  R682: S2YPeHmABmm + PQ -> S2YPeHmAB + PQH; k1_682*S2YPeHmABmm*PQ - k2_682*S2YPeHmAB*PQH;
    k1_682 = 250; k2_682 = 250;
  R683: S2YpPeHmABmm + PQ -> S2YpPeHmAB + PQH; k1_683*S2YpPeHmABmm*PQ - k2_683*S2YpPeHmAB*PQH;
    k1_683 = 250; k2_683 = 250;
  R684: iS2YpPeHmABmm + PQ -> iS2YpPeHmAB + PQH; k1_684*iS2YpPeHmABmm*PQ - k2_684*iS2YpPeHmAB*PQH;
    k1_684 = 250; k2_684 = 250;
  R685: S3YPeHmABmm + PQ -> S3YPeHmAB + PQH; k1_685*S3YPeHmABmm*PQ - k2_685*S3YPeHmAB*PQH;
    k1_685 = 250; k2_685 = 250;
  R686: S3YpPeHmABmm + PQ -> S3YpPeHmAB + PQH; k1_686*S3YpPeHmABmm*PQ - k2_686*S3YpPeHmAB*PQH;
    k1_686 = 250; k2_686 = 250;
  R687: iS3YpPeHmABmm + PQ -> iS3YpPeHmAB + PQH; k1_687*iS3YpPeHmABmm*PQ - k2_687*iS3YpPeHmAB*PQH;
    k1_687 = 250; k2_687 = 250;
  R688: PQH -> PQ; k1_688*PQH - k2_688*PQ;
    k1_688 = 10; k2_688 = 10;
  R689: S0YPpHAB -> S0YpPHAB; k1_689*S0YPpHAB - k2_689*S0YpPHAB;
    k1_689 = 50000000; k2_689 = 1700000;
  R690: S0YPpHmAB -> S0YpPHmAB; k1_690*S0YPpHmAB - k2_690*S0YpPHmAB;
    k1_690 = 50000000; k2_690 = 1700000;
  R691: S0YPpHAmB -> S0YpPHAmB; k1_691*S0YPpHAmB - k2_691*S0YpPHAmB;
    k1_691 = 50000000; k2_691 = 1700000;
  R692: S0YPpHmAmB -> S0YpPHmAmB; k1_692*S0YPpHmAmB - k2_692*S0YpPHmAmB;
    k1_692 = 50000000; k2_692 = 1700000;
  R693: S0YPpHABm -> S0YpPHABm; k1_693*S0YPpHABm - k2_693*S0YpPHABm;
    k1_693 = 50000000; k2_693 = 1700000;
  R694: S0YPpHmABm -> S0YpPHmABm; k1_694*S0YPpHmABm - k2_694*S0YpPHmABm;
    k1_694 = 50000000; k2_694 = 1700000;
  R695: S0YPpHAmBm -> S0YpPHAmBm; k1_695*S0YPpHAmBm - k2_695*S0YpPHAmBm;
    k1_695 = 50000000; k2_695 = 1700000;
  R696: S0YPpHmAmBm -> S0YpPHmAmBm; k1_696*S0YPpHmAmBm - k2_696*S0YpPHmAmBm;
    k1_696 = 50000000; k2_696 = 1700000;
  R697: S0YPpHABmm -> S0YpPHABmm; k1_697*S0YPpHABmm - k2_697*S0YpPHABmm;
    k1_697 = 50000000; k2_697 = 1700000;
  R698: S0YPpHmABmm -> S0YpPHmABmm; k1_698*S0YPpHmABmm - k2_698*S0YpPHmABmm;
    k1_698 = 50000000; k2_698 = 1700000;
  R699: S0YPpHAmBmm -> S0YpPHAmBmm; k1_699*S0YPpHAmBmm - k2_699*S0YpPHAmBmm;
    k1_699 = 50000000; k2_699 = 1700000;
  R700: S0YPpHmAmBmm -> S0YpPHmAmBmm; k1_700*S0YPpHmAmBmm - k2_700*S0YpPHmAmBmm;
    k1_700 = 50000000; k2_700 = 1700000;
  R701: S1YPpHAB -> S1YpPHAB; k1_701*S1YPpHAB - k2_701*S1YpPHAB;
    k1_701 = 50000000; k2_701 = 1700000;
  R702: S1YPpHmAB -> S1YpPHmAB; k1_702*S1YPpHmAB - k2_702*S1YpPHmAB;
    k1_702 = 50000000; k2_702 = 1700000;
  R703: S1YPpHAmB -> S1YpPHAmB; k1_703*S1YPpHAmB - k2_703*S1YpPHAmB;
    k1_703 = 50000000; k2_703 = 1700000;
  R704: S1YPpHmAmB -> S1YpPHmAmB; k1_704*S1YPpHmAmB - k2_704*S1YpPHmAmB;
    k1_704 = 50000000; k2_704 = 1700000;
  R705: S1YPpHABm -> S1YpPHABm; k1_705*S1YPpHABm - k2_705*S1YpPHABm;
    k1_705 = 50000000; k2_705 = 1700000;
  R706: S1YPpHmABm -> S1YpPHmABm; k1_706*S1YPpHmABm - k2_706*S1YpPHmABm;
    k1_706 = 50000000; k2_706 = 1700000;
  R707: S1YPpHAmBm -> S1YpPHAmBm; k1_707*S1YPpHAmBm - k2_707*S1YpPHAmBm;
    k1_707 = 50000000; k2_707 = 1700000;
  R708: S1YPpHmAmBm -> S1YpPHmAmBm; k1_708*S1YPpHmAmBm - k2_708*S1YpPHmAmBm;
    k1_708 = 50000000; k2_708 = 1700000;
  R709: S1YPpHABmm -> S1YpPHABmm; k1_709*S1YPpHABmm - k2_709*S1YpPHABmm;
    k1_709 = 50000000; k2_709 = 1700000;
  R710: S1YPpHmABmm -> S1YpPHmABmm; k1_710*S1YPpHmABmm - k2_710*S1YpPHmABmm;
    k1_710 = 50000000; k2_710 = 1700000;
  R711: S1YPpHAmBmm -> S1YpPHAmBmm; k1_711*S1YPpHAmBmm - k2_711*S1YpPHAmBmm;
    k1_711 = 50000000; k2_711 = 1700000;
  R712: S1YPpHmAmBmm -> S1YpPHmAmBmm; k1_712*S1YPpHmAmBmm - k2_712*S1YpPHmAmBmm;
    k1_712 = 50000000; k2_712 = 1700000;
  R713: S2YPpHAB -> S2YpPHAB; k1_713*S2YPpHAB - k2_713*S2YpPHAB;
    k1_713 = 11800000; k2_713 = 3950000;
  R714: S2YPpHmAB -> S2YpPHmAB; k1_714*S2YPpHmAB - k2_714*S2YpPHmAB;
    k1_714 = 11800000; k2_714 = 3950000;
  R715: S2YPpHAmB -> S2YpPHAmB; k1_715*S2YPpHAmB - k2_715*S2YpPHAmB;
    k1_715 = 11800000; k2_715 = 3950000;
  R716: S2YPpHmAmB -> S2YpPHmAmB; k1_716*S2YPpHmAmB - k2_716*S2YpPHmAmB;
    k1_716 = 11800000; k2_716 = 3950000;
  R717: S2YPpHABm -> S2YpPHABm; k1_717*S2YPpHABm - k2_717*S2YpPHABm;
    k1_717 = 11800000; k2_717 = 3950000;
  R718: S2YPpHmABm -> S2YpPHmABm; k1_718*S2YPpHmABm - k2_718*S2YpPHmABm;
    k1_718 = 11800000; k2_718 = 3950000;
  R719: S2YPpHAmBm -> S2YpPHAmBm; k1_719*S2YPpHAmBm - k2_719*S2YpPHAmBm;
    k1_719 = 11800000; k2_719 = 3950000;
  R720: S2YPpHmAmBm -> S2YpPHmAmBm; k1_720*S2YPpHmAmBm - k2_720*S2YpPHmAmBm;
    k1_720 = 11800000; k2_720 = 3950000;
  R721: S2YPpHABmm -> S2YpPHABmm; k1_721*S2YPpHABmm - k2_721*S2YpPHABmm;
    k1_721 = 11800000; k2_721 = 3950000;
  R722: S2YPpHmABmm -> S2YpPHmABmm; k1_722*S2YPpHmABmm - k2_722*S2YpPHmABmm;
    k1_722 = 11800000; k2_722 = 3950000;
  R723: S2YPpHAmBmm -> S2YpPHAmBmm; k1_723*S2YPpHAmBmm - k2_723*S2YpPHAmBmm;
    k1_723 = 11800000; k2_723 = 3950000;
  R724: S2YPpHmAmBmm -> S2YpPHmAmBmm; k1_724*S2YPpHmAmBmm - k2_724*S2YpPHmAmBmm;
    k1_724 = 11800000; k2_724 = 3950000;
  R725: S3YPpHAB -> S3YpPHAB; k1_725*S3YPpHAB - k2_725*S3YpPHAB;
    k1_725 = 11800000; k2_725 = 3950000;
  R726: S3YPpHmAB -> S3YpPHmAB; k1_726*S3YPpHmAB - k2_726*S3YpPHmAB;
    k1_726 = 11800000; k2_726 = 3950000;
  R727: S3YPpHAmB -> S3YpPHAmB; k1_727*S3YPpHAmB - k2_727*S3YpPHAmB;
    k1_727 = 11800000; k2_727 = 3950000;
  R728: S3YPpHmAmB -> S3YpPHmAmB; k1_728*S3YPpHmAmB - k2_728*S3YpPHmAmB;
    k1_728 = 11800000; k2_728 = 3950000;
  R729: S3YPpHABm -> S3YpPHABm; k1_729*S3YPpHABm - k2_729*S3YpPHABm;
    k1_729 = 11800000; k2_729 = 3950000;
  R730: S3YPpHmABm -> S3YpPHmABm; k1_730*S3YPpHmABm - k2_730*S3YpPHmABm;
    k1_730 = 11800000; k2_730 = 3950000;
  R731: S3YPpHAmBm -> S3YpPHAmBm; k1_731*S3YPpHAmBm - k2_731*S3YpPHAmBm;
    k1_731 = 11800000; k2_731 = 3950000;
  R732: S3YPpHmAmBm -> S3YpPHmAmBm; k1_732*S3YPpHmAmBm - k2_732*S3YpPHmAmBm;
    k1_732 = 11800000; k2_732 = 3950000;
  R733: S3YPpHABmm -> S3YpPHABmm; k1_733*S3YPpHABmm - k2_733*S3YpPHABmm;
    k1_733 = 11800000; k2_733 = 3950000;
  R734: S3YPpHmABmm -> S3YpPHmABmm; k1_734*S3YPpHmABmm - k2_734*S3YpPHmABmm;
    k1_734 = 11800000; k2_734 = 3950000;
  R735: S3YPpHAmBmm -> S3YpPHAmBmm; k1_735*S3YPpHAmBmm - k2_735*S3YpPHAmBmm;
    k1_735 = 11800000; k2_735 = 3950000;
  R736: S3YPpHmAmBmm -> S3YpPHmAmBmm; k1_736*S3YPpHmAmBmm - k2_736*S3YpPHmAmBmm;
    k1_736 = 11800000; k2_736 = 3950000;
  R737: S0YpPHAB -> iS0YpPHAB; k1_737*S0YpPHAB - k2_737*iS0YpPHAB;
    k1_737 = 1500000; k2_737 = 0;
  R738: S0YpPHmAB -> iS0YpPHmAB; k1_738*S0YpPHmAB - k2_738*iS0YpPHmAB;
    k1_738 = 1500000; k2_738 = 0;
  R739: S0YpPHAmB -> iS0YpPHAmB; k1_739*S0YpPHAmB - k2_739*iS0YpPHAmB;
    k1_739 = 1500000; k2_739 = 0;
  R740: S0YpPHmAmB -> iS0YpPHmAmB; k1_740*S0YpPHmAmB - k2_740*iS0YpPHmAmB;
    k1_740 = 1500000; k2_740 = 0;
  R741: S0YpPHABm -> iS0YpPHABm; k1_741*S0YpPHABm - k2_741*iS0YpPHABm;
    k1_741 = 1500000; k2_741 = 0;
  R742: S0YpPHmABm -> iS0YpPHmABm; k1_742*S0YpPHmABm - k2_742*iS0YpPHmABm;
    k1_742 = 1500000; k2_742 = 0;
  R743: S0YpPHAmBm -> iS0YpPHAmBm; k1_743*S0YpPHAmBm - k2_743*iS0YpPHAmBm;
    k1_743 = 1500000; k2_743 = 0;
  R744: S0YpPHmAmBm -> iS0YpPHmAmBm; k1_744*S0YpPHmAmBm - k2_744*iS0YpPHmAmBm;
    k1_744 = 1500000; k2_744 = 0;
  R745: S0YpPHABmm -> iS0YpPHABmm; k1_745*S0YpPHABmm - k2_745*iS0YpPHABmm;
    k1_745 = 1500000; k2_745 = 0;
  R746: S0YpPHmABmm -> iS0YpPHmABmm; k1_746*S0YpPHmABmm - k2_746*iS0YpPHmABmm;
    k1_746 = 1500000; k2_746 = 0;
  R747: S0YpPHAmBmm -> iS0YpPHAmBmm; k1_747*S0YpPHAmBmm - k2_747*iS0YpPHAmBmm;
    k1_747 = 1500000; k2_747 = 0;
  R748: S0YpPHmAmBmm -> iS0YpPHmAmBmm; k1_748*S0YpPHmAmBmm - k2_748*iS0YpPHmAmBmm;
    k1_748 = 1500000; k2_748 = 0;
  R749: S1YpPHAB -> iS1YpPHAB; k1_749*S1YpPHAB - k2_749*iS1YpPHAB;
    k1_749 = 1500000; k2_749 = 0;
  R750: S1YpPHmAB -> iS1YpPHmAB; k1_750*S1YpPHmAB - k2_750*iS1YpPHmAB;
    k1_750 = 1500000; k2_750 = 0;
  R751: S1YpPHAmB -> iS1YpPHAmB; k1_751*S1YpPHAmB - k2_751*iS1YpPHAmB;
    k1_751 = 1500000; k2_751 = 0;
  R752: S1YpPHmAmB -> iS1YpPHmAmB; k1_752*S1YpPHmAmB - k2_752*iS1YpPHmAmB;
    k1_752 = 1500000; k2_752 = 0;
  R753: S1YpPHABm -> iS1YpPHABm; k1_753*S1YpPHABm - k2_753*iS1YpPHABm;
    k1_753 = 1500000; k2_753 = 0;
  R754: S1YpPHmABm -> iS1YpPHmABm; k1_754*S1YpPHmABm - k2_754*iS1YpPHmABm;
    k1_754 = 1500000; k2_754 = 0;
  R755: S1YpPHAmBm -> iS1YpPHAmBm; k1_755*S1YpPHAmBm - k2_755*iS1YpPHAmBm;
    k1_755 = 1500000; k2_755 = 0;
  R756: S1YpPHmAmBm -> iS1YpPHmAmBm; k1_756*S1YpPHmAmBm - k2_756*iS1YpPHmAmBm;
    k1_756 = 1500000; k2_756 = 0;
  R757: S1YpPHABmm -> iS1YpPHABmm; k1_757*S1YpPHABmm - k2_757*iS1YpPHABmm;
    k1_757 = 1500000; k2_757 = 0;
  R758: S1YpPHmABmm -> iS1YpPHmABmm; k1_758*S1YpPHmABmm - k2_758*iS1YpPHmABmm;
    k1_758 = 1500000; k2_758 = 0;
  R759: S1YpPHAmBmm -> iS1YpPHAmBmm; k1_759*S1YpPHAmBmm - k2_759*iS1YpPHAmBmm;
    k1_759 = 1500000; k2_759 = 0;
  R760: S1YpPHmAmBmm -> iS1YpPHmAmBmm; k1_760*S1YpPHmAmBmm - k2_760*iS1YpPHmAmBmm;
    k1_760 = 1500000; k2_760 = 0;
  R761: S2YpPHAB -> iS2YpPHAB; k1_761*S2YpPHAB - k2_761*iS2YpPHAB;
    k1_761 = 1500000; k2_761 = 0;
  R762: S2YpPHmAB -> iS2YpPHmAB; k1_762*S2YpPHmAB - k2_762*iS2YpPHmAB;
    k1_762 = 1500000; k2_762 = 0;
  R763: S2YpPHAmB -> iS2YpPHAmB; k1_763*S2YpPHAmB - k2_763*iS2YpPHAmB;
    k1_763 = 1500000; k2_763 = 0;
  R764: S2YpPHmAmB -> iS2YpPHmAmB; k1_764*S2YpPHmAmB - k2_764*iS2YpPHmAmB;
    k1_764 = 1500000; k2_764 = 0;
  R765: S2YpPHABm -> iS2YpPHABm; k1_765*S2YpPHABm - k2_765*iS2YpPHABm;
    k1_765 = 1500000; k2_765 = 0;
  R766: S2YpPHmABm -> iS2YpPHmABm; k1_766*S2YpPHmABm - k2_766*iS2YpPHmABm;
    k1_766 = 1500000; k2_766 = 0;
  R767: S2YpPHAmBm -> iS2YpPHAmBm; k1_767*S2YpPHAmBm - k2_767*iS2YpPHAmBm;
    k1_767 = 1500000; k2_767 = 0;
  R768: S2YpPHmAmBm -> iS2YpPHmAmBm; k1_768*S2YpPHmAmBm - k2_768*iS2YpPHmAmBm;
    k1_768 = 1500000; k2_768 = 0;
  R769: S2YpPHABmm -> iS2YpPHABmm; k1_769*S2YpPHABmm - k2_769*iS2YpPHABmm;
    k1_769 = 1500000; k2_769 = 0;
  R770: S2YpPHmABmm -> iS2YpPHmABmm; k1_770*S2YpPHmABmm - k2_770*iS2YpPHmABmm;
    k1_770 = 1500000; k2_770 = 0;
  R771: S2YpPHAmBmm -> iS2YpPHAmBmm; k1_771*S2YpPHAmBmm - k2_771*iS2YpPHAmBmm;
    k1_771 = 1500000; k2_771 = 0;
  R772: S2YpPHmAmBmm -> iS2YpPHmAmBmm; k1_772*S2YpPHmAmBmm - k2_772*iS2YpPHmAmBmm;
    k1_772 = 1500000; k2_772 = 0;
  R773: S3YpPHAB -> iS3YpPHAB; k1_773*S3YpPHAB - k2_773*iS3YpPHAB;
    k1_773 = 1500000; k2_773 = 0;
  R774: S3YpPHmAB -> iS3YpPHmAB; k1_774*S3YpPHmAB - k2_774*iS3YpPHmAB;
    k1_774 = 1500000; k2_774 = 0;
  R775: S3YpPHAmB -> iS3YpPHAmB; k1_775*S3YpPHAmB - k2_775*iS3YpPHAmB;
    k1_775 = 1500000; k2_775 = 0;
  R776: S3YpPHmAmB -> iS3YpPHmAmB; k1_776*S3YpPHmAmB - k2_776*iS3YpPHmAmB;
    k1_776 = 1500000; k2_776 = 0;
  R777: S3YpPHABm -> iS3YpPHABm; k1_777*S3YpPHABm - k2_777*iS3YpPHABm;
    k1_777 = 1500000; k2_777 = 0;
  R778: S3YpPHmABm -> iS3YpPHmABm; k1_778*S3YpPHmABm - k2_778*iS3YpPHmABm;
    k1_778 = 1500000; k2_778 = 0;
  R779: S3YpPHAmBm -> iS3YpPHAmBm; k1_779*S3YpPHAmBm - k2_779*iS3YpPHAmBm;
    k1_779 = 1500000; k2_779 = 0;
  R780: S3YpPHmAmBm -> iS3YpPHmAmBm; k1_780*S3YpPHmAmBm - k2_780*iS3YpPHmAmBm;
    k1_780 = 1500000; k2_780 = 0;
  R781: S3YpPHABmm -> iS3YpPHABmm; k1_781*S3YpPHABmm - k2_781*iS3YpPHABmm;
    k1_781 = 1500000; k2_781 = 0;
  R782: S3YpPHmABmm -> iS3YpPHmABmm; k1_782*S3YpPHmABmm - k2_782*iS3YpPHmABmm;
    k1_782 = 1500000; k2_782 = 0;
  R783: S3YpPHAmBmm -> iS3YpPHAmBmm; k1_783*S3YpPHAmBmm - k2_783*iS3YpPHAmBmm;
    k1_783 = 1500000; k2_783 = 0;
  R784: S3YpPHmAmBmm -> iS3YpPHmAmBmm; k1_784*S3YpPHmAmBmm - k2_784*iS3YpPHmAmBmm;
    k1_784 = 1500000; k2_784 = 0;
  R785: iS0YpPHAB -> S1YPHAB; k1_785*iS0YpPHAB - k2_785*S1YPHAB;
    k1_785 = 20000; k2_785 = 0;
  R786: iS0YpPHmAB -> S1YPHmAB; k1_786*iS0YpPHmAB - k2_786*S1YPHmAB;
    k1_786 = 20000; k2_786 = 0;
  R787: iS0YpPHAmB -> S1YPHAmB; k1_787*iS0YpPHAmB - k2_787*S1YPHAmB;
    k1_787 = 20000; k2_787 = 0;
  R788: iS0YpPHmAmB -> S1YPHmAmB; k1_788*iS0YpPHmAmB - k2_788*S1YPHmAmB;
    k1_788 = 20000; k2_788 = 0;
  R789: iS0YpPHABm -> S1YPHABm; k1_789*iS0YpPHABm - k2_789*S1YPHABm;
    k1_789 = 20000; k2_789 = 0;
  R790: iS0YpPHmABm -> S1YPHmABm; k1_790*iS0YpPHmABm - k2_790*S1YPHmABm;
    k1_790 = 20000; k2_790 = 0;
  R791: iS0YpPHAmBm -> S1YPHAmBm; k1_791*iS0YpPHAmBm - k2_791*S1YPHAmBm;
    k1_791 = 20000; k2_791 = 0;
  R792: iS0YpPHmAmBm -> S1YPHmAmBm; k1_792*iS0YpPHmAmBm - k2_792*S1YPHmAmBm;
    k1_792 = 20000; k2_792 = 0;
  R793: iS0YpPHABmm -> S1YPHABmm; k1_793*iS0YpPHABmm - k2_793*S1YPHABmm;
    k1_793 = 20000; k2_793 = 0;
  R794: iS0YpPHmABmm -> S1YPHmABmm; k1_794*iS0YpPHmABmm - k2_794*S1YPHmABmm;
    k1_794 = 20000; k2_794 = 0;
  R795: iS0YpPHAmBmm -> S1YPHAmBmm; k1_795*iS0YpPHAmBmm - k2_795*S1YPHAmBmm;
    k1_795 = 20000; k2_795 = 0;
  R796: iS0YpPHmAmBmm -> S1YPHmAmBmm; k1_796*iS0YpPHmAmBmm - k2_796*S1YPHmAmBmm;
    k1_796 = 20000; k2_796 = 0;
  R797: iS1YpPHAB -> S2YPHAB; k1_797*iS1YpPHAB - k2_797*S2YPHAB;
    k1_797 = 10000; k2_797 = 0;
  R798: iS1YpPHmAB -> S2YPHmAB; k1_798*iS1YpPHmAB - k2_798*S2YPHmAB;
    k1_798 = 10000; k2_798 = 0;
  R799: iS1YpPHAmB -> S2YPHAmB; k1_799*iS1YpPHAmB - k2_799*S2YPHAmB;
    k1_799 = 10000; k2_799 = 0;
  R800: iS1YpPHmAmB -> S2YPHmAmB; k1_800*iS1YpPHmAmB - k2_800*S2YPHmAmB;
    k1_800 = 10000; k2_800 = 0;
  R801: iS1YpPHABm -> S2YPHABm; k1_801*iS1YpPHABm - k2_801*S2YPHABm;
    k1_801 = 10000; k2_801 = 0;
  R802: iS1YpPHmABm -> S2YPHmABm; k1_802*iS1YpPHmABm - k2_802*S2YPHmABm;
    k1_802 = 10000; k2_802 = 0;
  R803: iS1YpPHAmBm -> S2YPHAmBm; k1_803*iS1YpPHAmBm - k2_803*S2YPHAmBm;
    k1_803 = 10000; k2_803 = 0;
  R804: iS1YpPHmAmBm -> S2YPHmAmBm; k1_804*iS1YpPHmAmBm - k2_804*S2YPHmAmBm;
    k1_804 = 10000; k2_804 = 0;
  R805: iS1YpPHABmm -> S2YPHABmm; k1_805*iS1YpPHABmm - k2_805*S2YPHABmm;
    k1_805 = 10000; k2_805 = 0;
  R806: iS1YpPHmABmm -> S2YPHmABmm; k1_806*iS1YpPHmABmm - k2_806*S2YPHmABmm;
    k1_806 = 10000; k2_806 = 0;
  R807: iS1YpPHAmBmm -> S2YPHAmBmm; k1_807*iS1YpPHAmBmm - k2_807*S2YPHAmBmm;
    k1_807 = 10000; k2_807 = 0;
  R808: iS1YpPHmAmBmm -> S2YPHmAmBmm; k1_808*iS1YpPHmAmBmm - k2_808*S2YPHmAmBmm;
    k1_808 = 10000; k2_808 = 0;
  R809: iS2YpPHAB -> S3YPHAB; k1_809*iS2YpPHAB - k2_809*S3YPHAB;
    k1_809 = 3330; k2_809 = 0;
  R810: iS2YpPHmAB -> S3YPHmAB; k1_810*iS2YpPHmAB - k2_810*S3YPHmAB;
    k1_810 = 3330; k2_810 = 0;
  R811: iS2YpPHAmB -> S3YPHAmB; k1_811*iS2YpPHAmB - k2_811*S3YPHAmB;
    k1_811 = 3330; k2_811 = 0;
  R812: iS2YpPHmAmB -> S3YPHmAmB; k1_812*iS2YpPHmAmB - k2_812*S3YPHmAmB;
    k1_812 = 3330; k2_812 = 0;
  R813: iS2YpPHABm -> S3YPHABm; k1_813*iS2YpPHABm - k2_813*S3YPHABm;
    k1_813 = 3330; k2_813 = 0;
  R814: iS2YpPHmABm -> S3YPHmABm; k1_814*iS2YpPHmABm - k2_814*S3YPHmABm;
    k1_814 = 3330; k2_814 = 0;
  R815: iS2YpPHAmBm -> S3YPHAmBm; k1_815*iS2YpPHAmBm - k2_815*S3YPHAmBm;
    k1_815 = 3330; k2_815 = 0;
  R816: iS2YpPHmAmBm -> S3YPHmAmBm; k1_816*iS2YpPHmAmBm - k2_816*S3YPHmAmBm;
    k1_816 = 3330; k2_816 = 0;
  R817: iS2YpPHABmm -> S3YPHABmm; k1_817*iS2YpPHABmm - k2_817*S3YPHABmm;
    k1_817 = 3330; k2_817 = 0;
  R818: iS2YpPHmABmm -> S3YPHmABmm; k1_818*iS2YpPHmABmm - k2_818*S3YPHmABmm;
    k1_818 = 3330; k2_818 = 0;
  R819: iS2YpPHAmBmm -> S3YPHAmBmm; k1_819*iS2YpPHAmBmm - k2_819*S3YPHAmBmm;
    k1_819 = 3330; k2_819 = 0;
  R820: iS2YpPHmAmBmm -> S3YPHmAmBmm; k1_820*iS2YpPHmAmBmm - k2_820*S3YPHmAmBmm;
    k1_820 = 3330; k2_820 = 0;
  R821: iS3YpPHAB -> S0YPHAB; k1_821*iS3YpPHAB - k2_821*S0YPHAB;
    k1_821 = 1000; k2_821 = 0;
  R822: iS3YpPHmAB -> S0YPHmAB; k1_822*iS3YpPHmAB - k2_822*S0YPHmAB;
    k1_822 = 1000; k2_822 = 0;
  R823: iS3YpPHAmB -> S0YPHAmB; k1_823*iS3YpPHAmB - k2_823*S0YPHAmB;
    k1_823 = 1000; k2_823 = 0;
  R824: iS3YpPHmAmB -> S0YPHmAmB; k1_824*iS3YpPHmAmB - k2_824*S0YPHmAmB;
    k1_824 = 1000; k2_824 = 0;
  R825: iS3YpPHABm -> S0YPHABm; k1_825*iS3YpPHABm - k2_825*S0YPHABm;
    k1_825 = 1000; k2_825 = 0;
  R826: iS3YpPHmABm -> S0YPHmABm; k1_826*iS3YpPHmABm - k2_826*S0YPHmABm;
    k1_826 = 1000; k2_826 = 0;
  R827: iS3YpPHAmBm -> S0YPHAmBm; k1_827*iS3YpPHAmBm - k2_827*S0YPHAmBm;
    k1_827 = 1000; k2_827 = 0;
  R828: iS3YpPHmAmBm -> S0YPHmAmBm; k1_828*iS3YpPHmAmBm - k2_828*S0YPHmAmBm;
    k1_828 = 1000; k2_828 = 0;
  R829: iS3YpPHABmm -> S0YPHABmm; k1_829*iS3YpPHABmm - k2_829*S0YPHABmm;
    k1_829 = 1000; k2_829 = 0;
  R830: iS3YpPHmABmm -> S0YPHmABmm; k1_830*iS3YpPHmABmm - k2_830*S0YPHmABmm;
    k1_830 = 1000; k2_830 = 0;
  R831: iS3YpPHAmBmm -> S0YPHAmBmm; k1_831*iS3YpPHAmBmm - k2_831*S0YPHAmBmm;
    k1_831 = 1000; k2_831 = 0;
  R832: iS3YpPHmAmBmm -> S0YPHmAmBmm; k1_832*iS3YpPHmAmBmm - k2_832*S0YPHmAmBmm;
    k1_832 = 1000; k2_832 = 0;
  R833: S3YPHAB + YD -> S2YPHAB + YDox; k1_833*S3YPHAB*YD - k2_833*S2YPHAB*YDox;
    k1_833 = 1.25; k2_833 = 0;
  R834: S3YPHAmB + YD -> S2YPHAmB + YDox; k1_834*S3YPHAmB*YD - k2_834*S2YPHAmB*YDox;
    k1_834 = 1.25; k2_834 = 0;
  R835: S3YPHABm + YD -> S2YPHABm + YDox; k1_835*S3YPHABm*YD - k2_835*S2YPHABm*YDox;
    k1_835 = 1.25; k2_835 = 0;
  R836: S3YPHAmBm + YD -> S2YPHAmBm + YDox; k1_836*S3YPHAmBm*YD - k2_836*S2YPHAmBm*YDox;
    k1_836 = 1.25; k2_836 = 0;
  R837: S3YPHABmm + YD -> S2YPHABmm + YDox; k1_837*S3YPHABmm*YD - k2_837*S2YPHABmm*YDox;
    k1_837 = 1.25; k2_837 = 0;
  R838: S3YPHAmBmm + YD -> S2YPHAmBmm + YDox; k1_838*S3YPHAmBmm*YD - k2_838*S2YPHAmBmm*YDox;
    k1_838 = 1.25; k2_838 = 0;
  R839: S2YPHAB + YD -> S1YPHAB + YDox; k1_839*S2YPHAB*YD - k2_839*S1YPHAB*YDox;
    k1_839 = 2.14; k2_839 = 0;
  R840: S2YPHAmB + YD -> S1YPHAmB + YDox; k1_840*S2YPHAmB*YD - k2_840*S1YPHAmB*YDox;
    k1_840 = 2.14; k2_840 = 0;
  R841: S2YPHABm + YD -> S1YPHABm + YDox; k1_841*S2YPHABm*YD - k2_841*S1YPHABm*YDox;
    k1_841 = 2.14; k2_841 = 0;
  R842: S2YPHAmBm + YD -> S1YPHAmBm + YDox; k1_842*S2YPHAmBm*YD - k2_842*S1YPHAmBm*YDox;
    k1_842 = 2.14; k2_842 = 0;
  R843: S2YPHABmm + YD -> S1YPHABmm + YDox; k1_843*S2YPHABmm*YD - k2_843*S1YPHABmm*YDox;
    k1_843 = 2.14; k2_843 = 0;
  R844: S2YPHAmBmm + YD -> S1YPHAmBmm + YDox; k1_844*S2YPHAmBmm*YD - k2_844*S1YPHAmBmm*YDox;
    k1_844 = 2.14; k2_844 = 0;
  R845: S0YPHAB + YDox -> S1YPHAB + YD; k1_845*S0YPHAB*YDox - k2_845*S1YPHAB*YD;
    k1_845 = 0.00037; k2_845 = 0;
  R846: S0YPHAmB + YDox -> S1YPHAmB + YD; k1_846*S0YPHAmB*YDox - k2_846*S1YPHAmB*YD;
    k1_846 = 0.00037; k2_846 = 0;
  R847: S0YPHABm + YDox -> S1YPHABm + YD; k1_847*S0YPHABm*YDox - k2_847*S1YPHABm*YD;
    k1_847 = 0.00037; k2_847 = 0;
  R848: S0YPHAmBm + YDox -> S1YPHAmBm + YD; k1_848*S0YPHAmBm*YDox - k2_848*S1YPHAmBm*YD;
    k1_848 = 0.00037; k2_848 = 0;
  R849: S0YPHABmm + YDox -> S1YPHABmm + YD; k1_849*S0YPHABmm*YDox - k2_849*S1YPHABmm*YD;
    k1_849 = 0.00037; k2_849 = 0;
  R850: S0YPHAmBmm + YDox -> S1YPHAmBmm + YD; k1_850*S0YPHAmBmm*YDox - k2_850*S1YPHAmBmm*YD;
    k1_850 = 0.00037; k2_850 = 0;
end
