// SBML level 2 version 1

function BB(A1, A2, A3, A4)
  A2 - A1 + A3*A2 + A4*A1;
end

function GK(A1, A2, A3, A4)
  2*A4*A1/(A2 - A1 + A3*A2 + A4*A1 + sqrt((A2 - A1 + A3*A2 + A4*A1)^2 - 4*(A2 - A1)*A4*A1));
end

function MichaelisMenten(M1, J1, k1, S1)
  k1*S1*M1/(J1 + S1);
end
MichaelisMenten is "Michaelis-Menten";

function Mass_Action_2(k1, S1, S2)
  k1*S1*S2;
end

function Mass_Action_1(k1, S1)
  k1*S1;
end

function Mass_Action_0(k1)
  k1;
end

model MODEL3897771820()
  // Csikasz-Nagy2006_Cell_Cycle
  // This model originates from the Cell Cycle Database . It is described in:
  // Analysis of a generic model of eukaryotic cell-cycle regulation. Csikász-Nagy A , Battogtokh D , Chen KC , Novák B , Tyson JJ Biophys. J. [2006 Jun],90(12 ):4361-79
  // PMID: 16581849
  // Abstract:
  // We propose a protein interaction network for the regulation of DNA synthesis and mitosis that emphasizes the universality of the regulatory system among eukaryotic cells. The idiosyncrasies of cell cycle regulation in particular organisms can be attributed, we claim, to specific settings of rate constants in the dynamic network of chemical reactions. The values of these rate constants are determined ultimately by the genetic makeup of an organism. To support these claims, we convert the reaction mechanism into a set of governing kinetic equations and provide parameter values (specific to budding yeast, fission yeast, frog eggs, and mammalian cells) that account for many curious features of cell cycle regulation in these organisms. Using one-parameter bifurcation diagrams, we show how overall cell growth drives progression through the cell cycle, how cell-size homeostasis can be achieved by two different strategies, and how mutations remodel bifurcation diagrams and create unusual cell-division phenotypes. The relation between gene dosage and phenotype can be summarized compactly in two-parameter bifurcation diagrams. Our approach provides a theoretical framework in which to understand both the universality and particularity of cell cycle regulation, and to construct, in modular fashion, increasingly complex models of the networks controlling cell growth and division.
  // To the extent possible under law, all copyright and related or neighbouring rights to this encoded model have been dedicated to the public domain worldwide. Please refer to CC0 Public Domain Dedication for more information.
  // In summary, you are entitled to use this encoded model in absolutely any manner you deem suitable, verbatim, or with modification, alone or embedded it in a larger context, redistribute it, commercially or not, in a restricted way or not.
  // To cite BioModels Database, please use: Li C, Donizelli M, Rodriguez N, Dharuri H, Endler L, Chelliah V, Li L, He E, Henry A, Stefan MI, Snoep JL, Hucka M, Le Novère N, Laibe C (2010) BioModels Database: An enhanced, curated and annotated resource for published quantitative kinetic models. BMC Syst Biol., 4:92.
  // biomodels.db:MODEL3897771820
  // isDescribedBy pubmed:16581849
  // biomodels.db:MODEL3897771820
  // isDescribedBy pubmed:16581849
  // biomodels.db:MODEL3897771820
  // isDescribedBy pubmed:16581849

  // Compartments:
  compartment cell = 1;

  // Species:
  species $APC in cell;
  species APCP in cell = 0.6716266/cell;
  species BCKI in cell = 0;
  species Cdc14 in cell;
  species Cdc20A in cell = 0.6605867/cell;
  species Cdc20i in cell = 0.01855353/cell;
  species Cdc20T in cell;
  species Cdc25P in cell;
  species Cdh1 in cell = 0.9992357/cell;
  species $Cdh1i in cell;
  species CKI in cell = 0.2954077/cell;
  species CKIT in cell;
  species CycA in cell = 0.009940445/cell;
  species CycAT in cell;
  species CycB in cell = 0.1668414/cell;
  species CycBT in cell;
  species CycD in cell;
  species CycE in cell = 0.07760513/cell;
  species CycET in cell;
  species Mass in cell = 1.174217/cell;
  species pB in cell = 0.009814871/cell;
  species pBCKI in cell = 0;
  species preMPF in cell;
  species TFB in cell;
  species TFE in cell;
  species TFI in cell;
  species TriA in cell = 0.0171538/cell;
  species TriB in cell;
  species TriE in cell = 0.3117263/cell;
  species Wee1 in cell;

  // Parameters:
  APCT = 1;
  Cdh1T = 1;
  CycD0 = 0.05;
  J20 = 1;
  Ja20 = 0.005;
  Ja25 = 0.1;
  Jafb = 0.1;
  Jafi = 88;
  Jah1 = 0.01;
  Jaie = 0.01;
  Jatf = 0.01;
  Jawee = 0.05;
  Ji20 = 0.005;
  Ji25 = 0.1;
  Jifb = 0.1;
  Jifi = 88;
  Jih1 = 0.01;
  Jiie = 0.01;
  Jitf = 0.01;
  Jiwee = 0.05;
  k14di = 0;
  k25b = 5;
  k25a = 0.01;
  ka20 = 0.5;
  ka25b = 1;
  ka25a = 0;
  kafb = 1;
  kafi = 88;
  kah1b = 3.5;
  kah1a = 0.18;
  kaie = 0.07;
  kassa = 25;
  kassb = 0;
  kasse = 50;
  katf = 0;
  katfa = 0.3;
  katfd = 3;
  katfe = 0.5;
  kaweeb = 0;
  kaweea = 0.3;
  kd20 = 0.15;
  kdab = 2;
  kdaa = 0.02;
  kdac = 0;
  kdb = 0.005;
  kdbc = 0.1;
  kdbh = 2;
  kde = 0.01;
  kdea = 0.5;
  kdeb = 0.5;
  kdee = 0.1;
  kdi = 0.8;
  kdia = 5;
  kdib = 5;
  kdid = 0;
  kdie = 5;
  kdissa = 1;
  kdissb = 0;
  kdisse = 1;
  KEZ = 0.2;
  ki20 = 0.25;
  ki25b = 0;
  ki25a = 0.3;
  kifb = 0.1;
  kifi = 88;
  kifib = 88;
  kih1 = 0;
  kih1a = 0.2;
  kih1b = 1;
  kih1d = 0;
  kih1e = 0.1;
  kiie = 0.18;
  kitf = 0.25;
  kitfa = 0.1;
  kitfb = 0.1;
  kiweeb = 1;
  kiweea = 0;
  ks20b = 0.15;
  ks20a = 0;
  ksab = 0.025;
  ksaa = 0;
  ksbb = 0.03;
  ksba = 0.01;
  kseb = 0.18;
  ksea = 0.01;
  ksib = 0;
  ksia = 1.8;
  kweeb = 0.2;
  kweea = 0.02;
  MaxMass = 10000;
  mu = 0.004951;
  n20 = 1;

  // Assignment rules:
  preMPF := pB + pBCKI;
  TriB := BCKI + pBCKI;
  CycBT := CycB + pB + BCKI + pBCKI;
  CycAT := CycA + TriA;
  CycET := CycE + TriE;
  CycD := CycD0*Mass;
  CKIT := CKI + BCKI + pBCKI + TriA + TriE;
  Cdc20T := Cdc20i + Cdc20A;
  Cdc14 := Cdc20A;
  Wee1 := GK(kaweea + kaweeb*Cdc14, kiweea + kiweeb*CycB, Jawee, Jiwee);
  Vwee := kweea + kweeb*Wee1;
  Cdc25P := GK(ka25a + ka25b*CycB, ki25a + ki25b*Cdc14, Ja25, Ji25);
  V25 := k25a + k25b*Cdc25P;
  TFB := GK(kafb*CycB, kifb, Jafb, Jifb);
  Vatf := katf + katfa*CycA + katfe*CycE + katfd*CycD;
  Vitf := kitf + kitfa*CycA + kitfb*CycB;
  TFE := GK(Vatf, Vitf, Jatf, Jitf);
  Vsb := (ksba + ksbb*TFB)*Mass;
  Vsa := (ksaa + ksab*TFE)*Mass;
  Vse := (ksea + kseb*TFE)*Mass;
  Vah1 := kah1a + kah1b*Cdc14;
  Vih1 := kih1 + kih1a*CycA + kih1b*CycB + kih1e*CycE + kih1d*CycD;
  Vdb := kdb + kdbh*Cdh1 + kdbc*Cdc20A;
  Vda := kdaa + (kdab + kdac)*Cdc20A + kdac*Cdc20i;
  Vde := kde + kdee*CycE + kdea*CycA + kdeb*CycB;
  TFI := GK(kafi*Cdc14, kifi + kifib*CycB, Jafi, Jifi);
  Vsi := ksia + ksib*TFI;
  Vdi := (kdi + kdia*CycA + kdib*CycB + kdie*CycE + kdid*CycD)/(1 + k14di*Cdc14);
  APC := APCT - APCP;
  Cdh1i := Cdh1T - Cdh1;

  // Reactions:
  Mass_accumulation: => Mass; Mass_Action_0(mu*Mass*(1 - Mass/MaxMass));
  Synthesis_of_MPF: => CycB; Vsb;
  Deg_of_MPF: CycB => ; Mass_Action_1(Vdb, CycB); Deg_of_MPF is "Deg. of MPF";
  activation_of_MPF_from_pB_by_Cdc25: pB => CycB; Mass_Action_1(V25, pB);
  inactivation_of_MPFby_Wee1: CycB => pB; Mass_Action_1(Vwee, CycB);
  assoc_of_MPF_with_CKI: CycB + CKI => BCKI; Mass_Action_2(kassb, CycB, CKI); assoc_of_MPF_with_CKI is "assoc. of MPF with CKI";
  dissoc_1: BCKI => CycB + CKI; Mass_Action_1(kdissb, BCKI); dissoc_1 is "dissoc1";
  deg_of_pB: pB => ; Mass_Action_1(Vdb, pB); deg_of_pB is "deg. of pB";
  assoc_of_pB_with_CKI: pB + CKI => pBCKI; Mass_Action_2(kassb, pB, CKI); assoc_of_pB_with_CKI is "assoc. of pB with CKI";
  dissoc_2: pBCKI => pB + CKI; Mass_Action_1(kdissb, pBCKI); dissoc_2 is "dissoc2";
  Cdc25_action: pBCKI => BCKI; Mass_Action_1(V25, pBCKI);
  Wee1_action: BCKI => pBCKI; Mass_Action_1(Vwee, BCKI);
  Deg_of_CycB_moeity__in_BCKI: BCKI => CKI; Mass_Action_1(Vdb, BCKI); Deg_of_CycB_moeity__in_BCKI is "Deg. of CycB moeity in BCKI";
  Deg_of_CKI_moeity_in_BCKI: BCKI => CycB; Mass_Action_1(Vdi, BCKI); Deg_of_CKI_moeity_in_BCKI is "Deg. of CKI moeity in BCKI";
  Deg_of_pB_moeity_in_pBCKI: pBCKI => CKI; Mass_Action_1(Vdb, pBCKI); Deg_of_pB_moeity_in_pBCKI is "Deg. of pB moeity in pBCKI";
  Deg_of_CKI_moeity_in_pBCKI: pBCKI => pB; Mass_Action_1(Vdi, pBCKI); Deg_of_CKI_moeity_in_pBCKI is "Deg. of CKI moeity in pBCKI";
  Synthesis_of_CKI: => CKI; Vsi;
  Deg_of_CKI: CKI => ; Mass_Action_1(Vdi, CKI); Deg_of_CKI is "Deg. of CKI";
  Assoc_of_CKI_with_CycA: CKI + CycA => TriA; Mass_Action_2(kassa, CKI, CycA); Assoc_of_CKI_with_CycA is "Assoc. of CKI with CycA";
  dissoc_3: TriA => CKI + CycA; Mass_Action_1(kdissa, TriA); dissoc_3 is "dissoc3";
  Deg_of_CKI_moeity_in_TriA: TriA => CycA; Mass_Action_1(Vdi, TriA); Deg_of_CKI_moeity_in_TriA is "Deg. of CKI moeity in TriA";
  Deg_of_CycA_moeity_in_TriA: TriA => CKI; Mass_Action_1(Vda, TriA); Deg_of_CycA_moeity_in_TriA is "Deg. of CycA moeity in TriA";
  Assoc_of_CKI_with_CycE: CKI + CycE => TriE; Mass_Action_2(kasse, CKI, CycE); Assoc_of_CKI_with_CycE is "Assoc. of CKI with CycE";
  dissoc_4: TriE => CKI + CycE; Mass_Action_1(kdisse, TriE); dissoc_4 is "dissoc4";
  Deg_of_CKI_moeity_in_TriE: TriE => CycE; Mass_Action_1(Vdi, TriE); Deg_of_CKI_moeity_in_TriE is "Deg. of CKI moeity in TriE";
  Deg_of_CycE_moeity_in_TriE: TriE => CKI; Mass_Action_1(Vde, TriE); Deg_of_CycE_moeity_in_TriE is "Deg. of CycE moeity in TriE";
  Synthesis_of_CycA_by_TFE: => CycA; Vsa;
  Deg_of_CycA: CycA => ; Mass_Action_1(Vda, CycA); Deg_of_CycA is "Deg. of CycA";
  Synthesis_of_CycE_by_TFE: => CycE; Vse;
  Deg_of_CycE: CycE => ; Mass_Action_1(Vde, CycE); Deg_of_CycE is "Deg. of CycE";
  activation_of_APCP: $APC => APCP; MichaelisMenten(CycB, Jaie, kaie, APC);  // modifiers: CycB
  inactivation_1: APCP => $APC; MichaelisMenten(1, Jiie, kiie, APCP); inactivation_1 is "inactivation1";
  Synthesis_of_Cdc20i: => Cdc20i; Mass_Action_0(ks20a + ks20b*CycB^n20/(J20^n20 + CycB^n20));  // modifiers: CycB
  Deg_of_Cdc20i: Cdc20i => ; Mass_Action_1(kd20, Cdc20i); Deg_of_Cdc20i is "Deg. of Cdc20i";
  activation_of_Cdc20i: Cdc20i => Cdc20A; MichaelisMenten(APCP, Ja20, ka20, Cdc20i);  // modifiers: APCP
  inactivation_2: Cdc20A => Cdc20i; MichaelisMenten(1, Ji20, ki20, Cdc20A); inactivation_2 is "inactivation2";
  degradation: Cdc20A => ; Mass_Action_1(kd20, Cdc20A);
  activation_of_Cdh1: $Cdh1i => Cdh1; MichaelisMenten(Vah1, Jah1, 1, Cdh1i);
  inactivation__of_Cdh1: Cdh1 => $Cdh1i; MichaelisMenten(Vih1, Jih1, 1, Cdh1); inactivation__of_Cdh1 is "inactivation of Cdh1";

  // Events:
  at (CycB - KEZ < 0): Mass = 0.5*Mass;

  // Unit definitions:
  // both substance and and volume are normalized and actually should be dimensionless. Due to restrictions in SBML level2 version1 They are set to items and litres.
  unit substance = item; substance is "normalized subst";
  unit volume = litre; volume is "normalized volume";
  unit per6minute = 1 / (360 second);
end
