// SBML level 2 version 3

model beard_model_2005_version_3()
  // Beard2005_Mitochondrial_Respiration
  // This is the model described in the article:
  // A biophysical model of the mitochondrial respiratory system and oxidative phosphorylation.
  // Beard DA. PLoS Comput Biol. 2005 Sep;1(4):e36. Pubmed ID: 16163394 , doi: 10.1371/journal.pcbi.0010036 .
  // Abstract:
  // A computational model for the mitochondrial respiratory chain that appropriately balances mass, charge, and free energy transduction is introduced and analyzed based on a previously published set of data measured on isolated cardiac mitochondria. The basic components included in the model are the reactions at complexes I, III, and IV of the electron transport system, ATP synthesis at F1F0 ATPase, substrate transporters including adenine nucleotide translocase and the phosphate-hydrogen co-transporter, and cation fluxes across the inner membrane including fluxes through the K+/H+ antiporter and passive H+ and K+ permeation. Estimation of 16 adjustable parameter values is based on fitting model simulations to nine independent data curves. The identified model is further validated by comparison to additional datasets measured from mitochondria isolated from rat heart and liver and observed at low oxygen concentration. To obtain reasonable fits to the available data, it is necessary to incorporate inorganic-phosphate-dependent activation of the dehydrogenase activity and the electron transport system. Specifically, it is shown that a model incorporating phosphate-dependent activation of complex III is able to reasonably reproduce the observed data. The resulting validated and verified model provides a foundation for building larger and more complex systems models and investigating complex physiological and pathophysiological interactions in cardiac energetics.
  // This model was taken from the CellML repository and automatically converted to SBML.
  // The original model was: Beard, 2005 version 03
  // The original CellML model was created and curated by:
  // Geoffrey Nunns
  // The University of Auckland, Bioengineering Research Group
  // This model originates from BioModels Database: A Database of Annotated Published Models (http://www.ebi.ac.uk/biomodels/). It is copyright (c) 2005-2011 The BioModels.net Team.
  // To the extent possible under law, all copyright and related or neighbouring rights to this encoded model have been dedicated to the public domain worldwide. Please refer to CC0 Public Domain Dedication for more information.
  // In summary, you are entitled to use this encoded model in absolutely any manner you deem suitable, verbatim, or with modification, alone or embedded it in a larger context, redistribute it, commercially or not, in a restricted way or not. .
  // To cite BioModels Database, please use: Li C, Donizelli M, Rodriguez N, Dharuri H, Endler L, Chelliah V, Li L, He E, Henry A, Stefan MI, Snoep JL, Hucka M, Le Novère N, Laibe C (2010) BioModels Database: An enhanced, curated and annotated resource for published quantitative kinetic models. BMC Syst Biol., 4:92.
  // biomodels.db:MODEL4151491057
  // isDescribedBy pubmed:16163394
  // biomodels.db:MODEL4151491057
  // isDescribedBy pubmed:16163394
  // biomodels.db:MODEL4151491057
  // biomodels.db:MODEL4151491057

  // Compartments:
  compartment Compartment = 1 litre;

  // Parameters:
  t = ;
  Mg_tot = 0.005;
  Pi_e = 0.001;
  ADP_e = 0.0013;
  RT = 2.4734;
  F = 0.096485;
  n_A = 3;
  dG_C1o = -69.37;
  dG_C3o = -32.53;
  dG_C4o = -122.94;
  dG_F1o = 36.03;
  pH_e = 7.1;
  K_e = 0.15;
  ATP_e = 0;
  AMP_e = 0;
  k_dHPi = 1.778275e-7;
  k_dHatp = 3.311311e-7;
  k_dHadp = 5.128614e-7;
  K_DT = 2.4e-5;
  K_DD = 0.000347;
  K_AK = 0.4331;
  W_m = 0.72376;
  gamma = 5.99;
  Ctot = 0.0027;
  Qtot = 0.00135;
  NADtot = 0.00297;
  k_Pi1 = 0.00013413;
  k_Pi2 = 0.00067668;
  k_Pi3 = 0.00019172;
  k_Pi4 = 0.02531;
  k_PiH = 0.00045082;
  r = 4.5807;
  x_DH = 0.09183;
  x_C1 = 0.36923;
  x_C3 = 0.091737;
  x_C4 = 3.2562e-5;
  x_F1 = 150.93;
  x_ANT = 0.0079204;
  x_Pi1 = 339430;
  x_KH = 29802000;
  x_Hle = 250;
  x_K = 0;
  k_mADP = 3.5e-6;
  x_AK = 0;
  p_A = 85;
  k_O2 = 0.00012;
  r_buff = 4.253;
  x_MgA = 1000000;
  x_Pi2 = 327;
  mincond = 1e-12;
  H_x = 6.309573e-8;
  K_x = 0.14;
  Mg_x = 0.005;
  NADH_x = 0.0015;
  QH2 = 0.0008;
  Cred = 0.001;
  ATP_x = 0;
  ADP_x = 0.01;
  ATP_mx = 0;
  ADP_mx = 0;
  Pi_x = 0.001;
  ATP_i = 0;
  ADP_i = 0;
  AMP_i = 0;
  ATP_mi = 0;
  ADP_mi = 0;
  Pi_i = 0.001;
  dPsi = 160;
  C_im = 1e-6;
  O2 = 2.6e-5;

  // Assignment rules:
  H_e := 1*10^(-pH_e);
  W_x := 0.9*W_m;
  W_i := 0.1*W_m;
  H_i := H_e;
  K_i := K_e;
  Psi_x := -0.65*dPsi;
  Psi_i := 0.35*dPsi;
  J_ANT := piecewise(x_ANT*(ADP_fi/(ADP_fi + ATP_fi*exp(-F*Psi_i/RT)) - ADP_fx/(ADP_fx + ATP_fx*exp(-F*Psi_x/RT)))*1/(1 + k_mADP/ADP_fi), (ADP_fi > mincond) || (ATP_fi > mincond), 0);
  ATP_fx := ATP_x - ATP_mx;
  J_MgATPx := x_MgA*(ATP_fx*Mg_x - K_DT*ATP_mx);
  ADP_fx := ADP_x - ADP_mx;
  J_MgADPx := x_MgA*(ADP_fx*Mg_x - K_DD*ADP_mx);
  ATP_fi := ATP_i - ATP_mi;
  ADP_fi := ADP_i - ADP_mi;
  J_MgADPi := x_MgA*(ADP_fi*Mg_i - K_DD*ADP_mi);
  J_ATP := gamma*p_A*(ATP_e - ATP_i);
  J_ADP := gamma*p_A*(ADP_e - ADP_i);
  J_AMP := gamma*p_A*(AMP_e - AMP_i);
  J_Pi2 := gamma*x_Pi2*(Pi_e - Pi_i);
  H2PIi := Pi_i*H_i/(H_i + k_dHPi);
  H2PIx := Pi_x*H_x/(H_x + k_dHPi);
  J_Pi1 := x_Pi1*(H_x*H2PIi - H_i*H2PIx)/(H2PIi + k_PiH);
  J_AKi := x_AK*(K_AK*ADP_i*ADP_i - AMP_i*ATP_i);
  J_Hle := x_Hle*dPsi*(H_i*exp(F*dPsi/RT) - H_x)/(exp(F*dPsi/RT) - 1);
  J_K := x_K*dPsi*(K_i*exp(F*dPsi/RT) - K_x)/(exp(F*dPsi/RT) - 1);
  J_KH := x_KH*(K_i*H_x - K_x*H_i);
  NAD_x := NADtot - NADH_x;
  Q := Qtot - QH2;
  Cox := Ctot - Cred;
  ADP_fe := ADP_e - ADP_me;
  ADP_me := (K_DD + ADP_e + Mg_tot - ((K_DD + ADP_e + Mg_tot)^2 - 4*Mg_tot*ADP_e)^0.5)/2;
  Mg_e := Mg_tot - ADP_me;
  Mg_i := Mg_e;
  dG_H := F*dPsi + RT*ln(H_i/H_x);
  J_DH := x_DH*(r*NAD_x - NADH_x)*(1 + Pi_x/k_Pi1)/(1 + Pi_x/k_Pi2);
  dG_C1op := dG_C1o - RT*ln(H_x/1e-7) - RT*ln(Q/QH2);
  J_C1 := x_C1*(exp(-(dG_C1op + 4*dG_H)/RT)*NADH_x - NAD_x);
  dG_C3op := dG_C3o + 2*RT*ln(H_x/1e-7) - RT*ln(QH2/Q);
  J_C3 := x_C3*(1 + Pi_x/k_Pi3)/(1 + Pi_x/k_Pi4)*(exp(-(dG_C3op + 4*dG_H - 2*F*dPsi)/(2*RT))*Cox - Cred);
  dG_C4op := dG_C4o - 2*RT*ln(H_x/1e-7) + RT/2*ln(O2/1);
  J_C4 := x_C4/(1 + k_O2/O2)*Cred/Ctot*(exp((-dG_C4op - 2*dG_H)/(2*RT))*Cred - Cox*exp(F*dPsi/RT));
  J_F1 := x_F1*(exp(-(dG_F1o - n_A*dG_H)/RT)*K_DD/K_DT*ADP_mx*Pi_x - ATP_mx*1);
  J_MgATPi := x_MgA*(ATP_fi*Mg_i - K_DT*ATP_mi);

  // Rate rules:
  H_x' = 1/r_buff*(-J_DH - 3*J_C1 - 4*J_C3 - 2*J_C4 + (n_A - 1)*J_F1 + 2*J_Pi1 + J_Hle - J_KH)/W_x;
  K_x' = (J_KH + J_K)/W_x;
  Mg_x' = (-J_MgATPx - J_MgADPx)/W_x;
  NADH_x' = (J_DH - J_C1)/W_x;
  QH2' = (J_C1 - J_C3)/W_x;
  Cred' = (2*J_C3 - 2*J_C4)/W_i;
  ATP_x' = (J_F1 - J_ANT)/W_x;
  ADP_x' = (-J_F1 + J_ANT)/W_x;
  ATP_mx' = J_MgATPx/W_x;
  ADP_mx' = J_MgADPx/W_x;
  Pi_x' = (-J_F1 + J_Pi1)/W_x;
  ATP_i' = (J_ATP + J_ANT + J_AKi)/W_i;
  ADP_i' = (J_ADP - J_ANT - 2*J_AKi)/W_i;
  AMP_i' = (J_AMP + J_AKi)/W_i;
  ATP_mi' = J_MgATPi/W_i;
  ADP_mi' = J_MgADPi/W_i;
  Pi_i' = (-J_Pi1 + J_Pi2)/W_i;
  dPsi' = (4*J_C1 + 2*J_C3 + 4*J_C4 - n_A*J_F1 - J_ANT - J_Hle - J_K)/C_im;
  O2' = 0;

  // Unit definitions:
  unit mg_per_mitochondria = 1e-3 gram;
  unit M = mole / litre;
  unit M_per_second = mole / (litre * second);
  unit M_2 = mole^2 / litre^2;
  unit M_3 = mole^3 / litre^3;
  unit microM = 1e-6 mole / litre;
  unit per_M = litre / mole;
  unit micron_per_second = 1e-6 metre / second;
  unit per_micron = 1 / (1e-6 metre);
  unit kilojoule_per_mole = 1000 joule / mole;
  unit millivolt = 1e-3 volt;
  unit kilojoule_per_mole_per_millivolt = 1000 joule / (mole * 1e-3 volt);
  unit molar_per_cyto = mole / litre;
  unit molar_per_mito = mole / litre;
  unit mole_per_second_per_l_cyto = mole / (litre * second);
  unit mole_per_second_per_l_mito = mole / (litre * second);
  unit mole_per_second_per_l_mito_per_molar = 1 / second;
  unit mole_per_second_per_l_mito_per_molar_per_molar = litre / (mole * second);
  unit mole_per_l_mito_per_millivolt = mole / (litre * 1e-3 volt);
  unit mole_per_second_per_l_mito_per_molar_per_millivolt = 1 / (second * 1e-3 volt);
end
