// SBML level 2 version 1

model testid()
  // Kuroda2001_NO_cGMP_Pathway
  // This model of sGC is based on the paper by Kuroda S. et al. J Neurosci. (2001) 21(15):5693-702 . This models features the activation of sGC by NO, synthesis of cGMP, activity of PKG and PP2A in the synapse. The rates and concentrations have been taken from literature. It contains only the part described in figure 1B of the article.
  // This model originates from BioModels Database: A Database of Annotated Published Models. It is copyright (c) 2005-2011 The BioModels.net Team.
  // To the extent possible under law, all copyright and related or neighbouring rights to this encoded model have been dedicated to the public domain worldwide. Please refer to CC0 Public Domain Dedication for more information.
  // In summary, you are entitled to use this encoded model in absolutely any manner you deem suitable, verbatim, or with modification, alone or embedded it in a larger context, redistribute it, commercially or not, in a restricted way or not..
  // To cite BioModels Database, please use: Li C, Donizelli M, Rodriguez N, Dharuri H, Endler L, Chelliah V, Li L, He E, Henry A, Stefan MI, Snoep JL, Hucka M, Le Novère N, Laibe C (2010) BioModels Database: An enhanced, curated and annotated resource for published quantitative kinetic models. BMC Syst Biol., 4:92.
  // biomodels.db:MODEL4780181279
  // isDescribedBy pubmed:11466441
  // biomodels.db:MODEL4780181279
  // isDescribedBy pubmed:11466441
  // biomodels.db:MODEL4780181279
  // biomodels.db:MODEL4780181279

  // Compartments:
  compartment cell = 1;

  // Species:
  species NO in cell = 0.1;
  species NO_GC in cell = 0;
  species NO_GC_slash_kenz_slash_kenz_cplx in cell = 0;
  species NOdegrade in cell = 0;
  species GTP in cell = 10;
  species cGMP in cell = 0;
  species PDE in cell = 5;
  species PDE_slash_kenz_slash_kenz_cplx in cell = 0;
  species PKG in cell = 2.5;
  species cGMP_dot_PKG in cell = 0;
  species cGMP_dot_PKG_slash_kenz_slash_kenz_cplx in cell = 0;
  species Gsub in cell = 10.7;
  species Gsub_star_ in cell = 0;
  species PP2A in cell = 2.7;
  species PP2A_Gsub_star_ in cell = 0;
  species num_5prime_GMP in cell = 0;
  // Guanylyl Cyclase ... Intracellular concentration is around 3 uM, as sGC is enrcihed in the Purkinje cells (Shinya Kuroda, personal corresspondence).. Conc assumed on the basis of reported data in Ariano et al., PNAS,79:297-300.
  species $GC in cell = 3;

  // Reactions:
  // kf*NO*GC-kb*NO_GC
  // Kd 250 nM (Stone and Marletta, 1996).. kf - 0.01 kb - 0.0025 Shinya Kuroda, J.Neurosci, 2001, ...
  NObindGC: NO + $GC -> NO_GC; NObindGC_kf*NO*GC - NObindGC_kb*NO_GC;
    NObindGC_kf = 1.666667e-20 vol_uMINVsecINV; NObindGC_kb = 4.166667e-21 vol_secINV;
  // kf*NO-kb*NOdegrade
  // degradation of NO ... kf - 0.673 / sec .... Shinya Kuroda, J.Neurosci, 2001, 21(15):5693-5702
  degradeNO: NO -> NOdegrade; degradeNO_kf*NO - degradeNO_kb*NOdegrade;
    degradeNO_kf = 1.121667e-18 vol_secINV; degradeNO_kb = 0 vol_secINV;
  // kf*cGMP*PKG-kb*cGMP_dot_PKG
  // Kd - 0.05uM Shinya Kuroda, 2001, 21(15):5693-5702.
  cGMPbindPKG: cGMP + PKG -> cGMP_dot_PKG; cGMPbindPKG_kf*cGMP*PKG - cGMPbindPKG_kb*cGMP_dot_PKG;
    cGMPbindPKG_kf = 1.666667e-17 vol_uMINVsecINV; cGMPbindPKG_kb = 8.333333e-19 vol_secINV;
  // kf*PP2A*Gsub_star_-kb*PP2A_Gsub_star_
  // Kd - 0.27 uM Shinya Kuroda, J.Neurosci, 21(15):5693-5702.
  PP2AbindGsub_star_: PP2A + Gsub_star_ -> PP2A_Gsub_star_; PP2AbindGsub_star__kf*PP2A*Gsub_star_ - PP2AbindGsub_star__kb*PP2A_Gsub_star_;
    PP2AbindGsub_star__kf = 1.666667e-18 vol_uMINVsecINV; PP2AbindGsub_star__kb = 4.5e-19 vol_secINV;
  // kf*Gsub_star_-kb*Gsub
  // kf - 0.0001/sec Shinya Kuroda, J.Neurosci, 2001, 21(15):5693-5702 ... and thru personal ...
  dephosphory: Gsub_star_ -> Gsub; dephosphory_kf*Gsub_star_ - dephosphory_kb*Gsub;
    dephosphory_kf = 1.666667e-22 vol_secINV; dephosphory_kb = 0 vol_secINV;
  // k1*GTP*NO_GC-k2*NO_GC_slash_kenz_slash_kenz_cplx
  // Km - 45 Vamx - 7.35 Shinya Kuroda, J.Neurosci, 2001, 21(15):5693-5702.
  NO_GC_slash_kenz_1: GTP + NO_GC -> NO_GC_slash_kenz_slash_kenz_cplx; NO_GC_slash_kenz_1_k1*GTP*NO_GC - NO_GC_slash_kenz_1_k2*NO_GC_slash_kenz_slash_kenz_cplx;
    NO_GC_slash_kenz_1_k1 = 1.361117e-18 vol_uMINVsecINV; NO_GC_slash_kenz_1_k2 = 4.9e-17 vol_secINV;
  // k3*NO_GC_slash_kenz_slash_kenz_cplx
  NO_GC_slash_kenz_2: NO_GC_slash_kenz_slash_kenz_cplx => cGMP + NO_GC; NO_GC_slash_kenz_2_k3*NO_GC_slash_kenz_slash_kenz_cplx;
    NO_GC_slash_kenz_2_k3 = 1.225e-17 vol_secINV;
  // k1*cGMP*PDE-k2*PDE_slash_kenz_slash_kenz_cplx
  // Km - 2 Vmax - 3.87 Thru personal Correspondence with Shinya Kuroda... rates initially from Turko et al., 1998, Biochem J, 329, 505-510
  PDE_slash_kenz_1: cGMP + PDE -> PDE_slash_kenz_slash_kenz_cplx; PDE_slash_kenz_1_k1*cGMP*PDE - PDE_slash_kenz_1_k2*PDE_slash_kenz_slash_kenz_cplx;
    PDE_slash_kenz_1_k1 = 1.6125e-17 vol_uMINVsecINV; PDE_slash_kenz_1_k2 = 2.58e-17 vol_secINV;
  // k3*PDE_slash_kenz_slash_kenz_cplx
  PDE_slash_kenz_2: PDE_slash_kenz_slash_kenz_cplx => num_5prime_GMP + PDE; PDE_slash_kenz_2_k3*PDE_slash_kenz_slash_kenz_cplx;
    PDE_slash_kenz_2_k3 = 6.45e-18 vol_secINV;
  // k1*Gsub*cGMP_dot_PKG-k2*cGMP_dot_PKG_slash_kenz_slash_kenz_cplx
  // Km - 0.2 Vmax - 0.72 Shinya Kuroda, J.Neurosci, 2001, 21(15):5693-5702
  cGMP_dot_PKG_slash_kenz_1: Gsub + cGMP_dot_PKG -> cGMP_dot_PKG_slash_kenz_slash_kenz_cplx; cGMP_dot_PKG_slash_kenz_1_k1*Gsub*cGMP_dot_PKG - cGMP_dot_PKG_slash_kenz_1_k2*cGMP_dot_PKG_slash_kenz_slash_kenz_cplx;
    cGMP_dot_PKG_slash_kenz_1_k1 = 3e-17 vol_uMINVsecINV; cGMP_dot_PKG_slash_kenz_1_k2 = 4.8e-18 vol_secINV;
  // k3*cGMP_dot_PKG_slash_kenz_slash_kenz_cplx
  cGMP_dot_PKG_slash_kenz_2: cGMP_dot_PKG_slash_kenz_slash_kenz_cplx => Gsub_star_ + cGMP_dot_PKG; cGMP_dot_PKG_slash_kenz_2_k3*cGMP_dot_PKG_slash_kenz_slash_kenz_cplx;
    cGMP_dot_PKG_slash_kenz_2_k3 = 1.2e-18 vol_secINV;

  // Unit definitions:
  unit vol_secINV = litre / second;
  unit vol_uMINVsecINV = litre^2 / (1e-6 mole * second);
  unit substance = 1e-6 mole;
end
