// SBML level 2 version 1

model testid()
  // Condorelli2001_GuanylateCyclase
  // This model features the observations of <a href = "http://www.ncbi.nlm.nih.gov/entrez/query.fcgi?cmd=Retrieve&db=pubmed&dopt=Abstract&list_uids=11325714">Condorelli P, George SC. Biophys J. (2001) 80(5):2110-9</a>. They propose a in vivo mechanism for the binding of free NO to sGC based on in vitro data within both pulmonary and vascular smooth muscle. All the parameters used have been obtained from reported results based on experiments. One important conclusion they make is that control of sGC in vivo is most likely to be ultra-sensitive and that activation in vivo occurs at lower NO concentrations than reported.
  // This model originates from BioModels Database: A Database of Annotated Published Models (http://www.ebi.ac.uk/biomodels/). It is copyright (c) 2005-2011 The BioModels.net Team.
  // To the extent possible under law, all copyright and related or neighbouring rights to this encoded model have been dedicated to the public domain worldwide. Please refer to CC0 Public Domain Dedication for more information.
  // In summary, you are entitled to use this encoded model in absolutely any manner you deem suitable, verbatim, or with modification, alone or embedded it in a larger context, redistribute it, commercially or not, in a restricted way or not..
  // To cite BioModels Database, please use: Li C, Donizelli M, Rodriguez N, Dharuri H, Endler L, Chelliah V, Li L, He E, Henry A, Stefan MI, Snoep JL, Hucka M, Le Novère N, Laibe C (2010) BioModels Database: An enhanced, curated and annotated resource for published quantitative kinetic models. BMC Syst Biol., 4:92.
  // biomodels.db:MODEL4780441670
  // isDescribedBy pubmed:11325714
  // biomodels.db:MODEL4780441670
  // isDescribedBy pubmed:11325714
  // biomodels.db:MODEL4780441670
  // biomodels.db:MODEL4780441670

  // Compartments:
  compartment default_compartment = 1e-18;
  compartment geometry = 1.6667e-18;

  // Species:
  species GC_slash_NO_sGCpart_act in geometry = 0;
  species GC_slash_NO_sGCfull_act in geometry = 0;
  species GC_slash_NO_sGCfull_act_slash_full_act_sGC_slash_full_act_sGC_cplx in geometry = 0;
  species GC_slash_GTP in geometry = 1000;
  species GC_slash_cGMP in geometry = 0;
  species GC_slash_NO_a in geometry = 0.1;
  species GC_slash_sGC_basal in geometry = 3;
  species GC_slash_NO in geometry = 0;

  // Reactions:
  // kf*GC_slash_sGC_basal*GC_slash_NO-kb*GC_slash_NO_sGCpart_act
  // Rates at 4 degree C... used directly from paper by Condorelli P, 2001, Biophysical J, 80:2110-2119, which in turn have been obtained mainly from Zhao et al., PNAS,96:14753-14758.
  GC_slash_NObind_sGC: GC_slash_sGC_basal + GC_slash_NO -> GC_slash_NO_sGCpart_act; GC_slash_NObind_sGC_kf*GC_slash_sGC_basal*GC_slash_NO - GC_slash_NObind_sGC_kb*GC_slash_NO_sGCpart_act;
    GC_slash_NObind_sGC_kf = 1.633333e-15 vol_uMINVsecINV; GC_slash_NObind_sGC_kb = 5.833333e-16 vol_secINV;
  // kf*GC_slash_NO_sGCpart_act*GC_slash_NO_a-kb*GC_slash_NO_sGCfull_act
  // Rates from stopped flow experiments performed at 4 degree C from Zhao et al., 1999, PNAS,96:14753-14758. Same rates used by Condorelli P, for simulations...
  GC_slash_NOdepPway: GC_slash_NO_sGCpart_act + GC_slash_NO_a -> GC_slash_NO_sGCfull_act; GC_slash_NOdepPway_kf*GC_slash_NO_sGCpart_act*GC_slash_NO_a - GC_slash_NOdepPway_kb*GC_slash_NO_sGCfull_act;
    GC_slash_NOdepPway_kf = 2.8e-18 vol_uMINVsecINV; GC_slash_NOdepPway_kb = 0 vol_secINV;
  // kf*GC_slash_NO_sGCpart_act-kb*GC_slash_NO_sGCfull_act
  // Rates used directly from Condorelli et al., 2001, Biophysical J, 80:2110-2119 .... Rates originally from Zhao et al., 1999, PNAS, 96:14753-14758 from stopped flow spectroscopy experiments performed 4 degree C.
  GC_slash_NOindePway: GC_slash_NO_sGCpart_act -> GC_slash_NO_sGCfull_act; GC_slash_NOindePway_kf*GC_slash_NO_sGCpart_act - GC_slash_NOindePway_kb*GC_slash_NO_sGCfull_act;
    GC_slash_NOindePway_kf = 1.015e-19 vol_secINV; GC_slash_NOindePway_kb = 2.333333e-20 vol_secINV;
  // kf*GC_slash_NO_sGCfull_act-kb*GC_slash_NO*GC_slash_sGC_basal
  // This is a modification by Condorelli et al., 2001, Biophys J of the recent binding scheme of Zhao et al., to include the NO dissociation from fully active complex of sGC... The dissociation is characterised by the respective first order rate constants depicted in the model... Rates are obtained at 4 degree C...
  GC_slash_dissoNO: GC_slash_NO_sGCfull_act -> GC_slash_NO + GC_slash_sGC_basal; GC_slash_dissoNO_kf*GC_slash_NO_sGCfull_act - GC_slash_dissoNO_kb*GC_slash_NO*GC_slash_sGC_basal;
    GC_slash_dissoNO_kf = 1.166667e-19 vol_secINV; GC_slash_dissoNO_kb = 0 vol_uMINVsecINV;
  // k1*GC_slash_GTP*GC_slash_NO_sGCfull_act-k2*GC_slash_NO_sGCfull_act_slash_full_act_sGC_slash_full_act_sGC_cplx
  // Km values for the basal and fully activated forms of sGC have been determined as 85-120 uM and 58 uM, respectively ... (Ignarro et al., 1982, BBA, 718:49-59)..and the same has been used by Condorelli et al., 2001... Vmax values are around 10-100 nmol/min/mg (without NO) and 10-40 umol/min/mg (with NO) ..... thru personal correspondence with T Bellamy,
  GC_slash_NO_sGCfull_act_slash_full_act_sGC_1: GC_slash_GTP + GC_slash_NO_sGCfull_act -> GC_slash_NO_sGCfull_act_slash_full_act_sGC_slash_full_act_sGC_cplx; k1*GC_slash_GTP*GC_slash_NO_sGCfull_act - k2*GC_slash_NO_sGCfull_act_slash_full_act_sGC_slash_full_act_sGC_cplx;
    k1 = 5.747167e-18 vol_uMINVsecINV; k2 = 2.666667e-16 vol_secINV;
  // k3*GC_slash_NO_sGCfull_act_slash_full_act_sGC_slash_full_act_sGC_cplx
  GC_slash_NO_sGCfull_act_slash_full_act_sGC_2: GC_slash_NO_sGCfull_act_slash_full_act_sGC_slash_full_act_sGC_cplx => GC_slash_cGMP + GC_slash_NO_sGCfull_act; k3*GC_slash_NO_sGCfull_act_slash_full_act_sGC_slash_full_act_sGC_cplx;
    k3 = 6.666667e-17 vol_secINV;

  // Unit definitions:
  unit vol_secINV = litre / second;
  unit vol_uMINVsecINV = litre^2 / (1e-6 mole * second);
  unit substance = 1e-6 mole;
end
