// SBML level 2 version 1

model testid()
  // Hayashi1999_NOSynth_Phospho
  // This model features the phosphorylation of rat brain neuronal NOS expressed in E. coli or Sf9 cells, which leads to a decrease in Vmax of the phosphorylated enzyme, with little change of both the Km for L-arginine and Kact for CaM. This is based on <a href = "http://www.ncbi.nlm.nih.gov/entrez/query.fcgi?cmd=Retrieve&db=pubmed&dopt=Abstract&list_uids=10400690">Hayashi Y. et al. J Biol Chem. (1999) 274(29):20597-602</a>. They report of phosphorylatin being carried out by CaM kinases I alpha, II alpha and IV. The rates used have been obtained from their paper and from other reported data.
  // This model originates from BioModels Database: A Database of Annotated Published Models (http://www.ebi.ac.uk/biomodels/). It is copyright (c) 2005-2011 The BioModels.net Team.
  // To the extent possible under law, all copyright and related or neighbouring rights to this encoded model have been dedicated to the public domain worldwide. Please refer to CC0 Public Domain Dedication for more information.
  // In summary, you are entitled to use this encoded model in absolutely any manner you deem suitable, verbatim, or with modification, alone or embedded it in a larger context, redistribute it, commercially or not, in a restricted way or not..
  // To cite BioModels Database, please use: Li C, Donizelli M, Rodriguez N, Dharuri H, Endler L, Chelliah V, Li L, He E, Henry A, Stefan MI, Snoep JL, Hucka M, Le Novère N, Laibe C (2010) BioModels Database: An enhanced, curated and annotated resource for published quantitative kinetic models. BMC Syst Biol., 4:92.
  // biomodels.db:MODEL4780784080
  // isDescribedBy pubmed:10400690
  // biomodels.db:MODEL4780784080
  // isDescribedBy pubmed:10400690
  // biomodels.db:MODEL4780784080
  // biomodels.db:MODEL4780784080

  // Compartments:
  compartment default_compartment = 1e-18;
  compartment geometry = 1.6667e-18;

  // Species:
  species NOS_slash_nNOS in geometry = 0.5;
  species NOS_slash_NOS_star_ in geometry = 0;
  species NOS_slash_Ca_minus_CaMnNOS in geometry = 0;
  species NOS_slash_Ca_minus_CaMnNOS_slash_kenz_slash_kenz_cplx in geometry = 0;
  species NOS_slash_NO in geometry = 0;
  species NOS_slash_cit in geometry = 0;
  species NOS_slash_Larg in geometry = 100;
  species NOS_slash_CaMKIV_slash_kenz_slash_kenz_cplx in geometry = 0;
  species NOS_slash_CaMKIIalpha_slash_kenz_slash_kenz_cplx in geometry = 0;
  species NOS_slash_CaMKIalpha_slash_kenz_slash_kenz_cplx in geometry = 0;
  // Activity is similar to CaMKIalpha, with ~0.7 mol of 32p/mol of nNOS. (Hayashi et 1999,JBC,274(29):20597-20602)
  species $NOS_slash_CaMKIV in geometry = 1;
  // CaMKIIalpha caused the most rapid phosphorylation of nNOS, with half-maximal phosphorylation apparent at 3 min and plateau level at 10 min. (Hayashi et al., 1999,JBC,274(29):20597-20602). The Maximal Phosphorylation of nNOS was observed at ~0.4 mol of 32p/mol of nNOS under their conditions.
  species $NOS_slash_CaMKIIalpha in geometry = 1;
  // Phosphorylates nNOS, but not as effective as CaMKIIalpha. (Hayashi et al., 1999,JBC,274(29):20597-20602.) Report of Plateau Level in their phosphorylation plots reaching after 100 min. -- ~0.4 mol of 32p/mol of nNOS.
  species $NOS_slash_CaMKIalpha in geometry = 1;
  species $NOS_slash_CaM_minus_Ca4 in geometry = 20;

  // Reactions:
  // kf*NOS_slash_nNOS*NOS_slash_CaM_minus_Ca4-kb*NOS_slash_Ca_minus_CaMnNOS
  // Those binding CaM have a high Kd, including nNOS, ~<=10nM. The binding of CaM to nNOS has been demonstrated to act as the trigger necessary for electron transfer and catalytic activity. (Marletta, 1997;36:12337-12345).
  NOS_slash_Ca_minus_CaMbind_nNOS: NOS_slash_nNOS + $NOS_slash_CaM_minus_Ca4 -> NOS_slash_Ca_minus_CaMnNOS; NOS_slash_Ca_minus_CaMbind_nNOS_kf*NOS_slash_nNOS*NOS_slash_CaM_minus_Ca4 - NOS_slash_Ca_minus_CaMbind_nNOS_kb*NOS_slash_Ca_minus_CaMnNOS;
    NOS_slash_Ca_minus_CaMbind_nNOS_kf = 5.416667e-18 vol_uMINVsecINV; NOS_slash_Ca_minus_CaMbind_nNOS_kb = 8.333333e-20 vol_secINV;
  // kf*NOS_slash_NOS_star_-kb*NOS_slash_nNOS
  // kf -13.9 These rates used to keep the basal level of nNOS at reasonable levels.
  NOS_slash_dephosporyl: NOS_slash_NOS_star_ -> NOS_slash_nNOS; NOS_slash_dephosporyl_kf*NOS_slash_NOS_star_ - NOS_slash_dephosporyl_kb*NOS_slash_nNOS;
    NOS_slash_dephosporyl_kf = 2.316667e-17 vol_secINV; NOS_slash_dephosporyl_kb = 0 vol_secINV;
  // k1*NOS_slash_Larg*NOS_slash_Ca_minus_CaMnNOS-k2*NOS_slash_Ca_minus_CaMnNOS_slash_kenz_slash_kenz_cplx
  // Km for purified NOS is estimated between 1 - 10 uM. (Prog in Neurobiology, 2001, 64: 365-391) Vmax for unphosporylated NOS, the active form, is 500-1500 nmol/nmol/min (Montellano et al., 1998, JBC,26(12): 1185-1189). Hayashi et al., JBC, 1999, 274(29):20597-20602 report Vmax (nmol/min/mg) of nNOS Unphosporylated at 95.7 (+-) 4.2
  NOS_slash_Ca_minus_CaMnNOS_slash_kenz_1: NOS_slash_Larg + NOS_slash_Ca_minus_CaMnNOS -> NOS_slash_Ca_minus_CaMnNOS_slash_kenz_slash_kenz_cplx; NOS_slash_Ca_minus_CaMnNOS_slash_kenz_1_k1*NOS_slash_Larg*NOS_slash_Ca_minus_CaMnNOS - NOS_slash_Ca_minus_CaMnNOS_slash_kenz_1_k2*NOS_slash_Ca_minus_CaMnNOS_slash_kenz_slash_kenz_cplx;
    NOS_slash_Ca_minus_CaMnNOS_slash_kenz_1_k1 = 1.388917e-17 vol_uMINVsecINV; NOS_slash_Ca_minus_CaMnNOS_slash_kenz_1_k2 = 1.111133e-16 vol_secINV;
  // k3*NOS_slash_Ca_minus_CaMnNOS_slash_kenz_slash_kenz_cplx
  NOS_slash_Ca_minus_CaMnNOS_slash_kenz_2: NOS_slash_Ca_minus_CaMnNOS_slash_kenz_slash_kenz_cplx => NOS_slash_NO + NOS_slash_cit + NOS_slash_Ca_minus_CaMnNOS; NOS_slash_Ca_minus_CaMnNOS_slash_kenz_2_k3*NOS_slash_Ca_minus_CaMnNOS_slash_kenz_slash_kenz_cplx;
    NOS_slash_Ca_minus_CaMnNOS_slash_kenz_2_k3 = 2.777833e-17 vol_secINV;
  // k1*NOS_slash_nNOS*NOS_slash_CaMKIV-k2*NOS_slash_CaMKIV_slash_kenz_slash_kenz_cplx
  // Hayashi et al., 1999, JBC,274(29):20597-20602. and other reported data from sources.
  NOS_slash_CaMKIV_slash_kenz_1: NOS_slash_nNOS + $NOS_slash_CaMKIV -> NOS_slash_CaMKIV_slash_kenz_slash_kenz_cplx; NOS_slash_CaMKIV_slash_kenz_1_k1*NOS_slash_nNOS*NOS_slash_CaMKIV - NOS_slash_CaMKIV_slash_kenz_1_k2*NOS_slash_CaMKIV_slash_kenz_slash_kenz_cplx;
    NOS_slash_CaMKIV_slash_kenz_1_k1 = 3e-17 vol_uMINVsecINV; NOS_slash_CaMKIV_slash_kenz_1_k2 = 1.2e-16 vol_secINV;
  // k3*NOS_slash_CaMKIV_slash_kenz_slash_kenz_cplx
  NOS_slash_CaMKIV_slash_kenz_2: NOS_slash_CaMKIV_slash_kenz_slash_kenz_cplx => NOS_slash_NOS_star_ + $NOS_slash_CaMKIV; NOS_slash_CaMKIV_slash_kenz_2_k3*NOS_slash_CaMKIV_slash_kenz_slash_kenz_cplx;
    NOS_slash_CaMKIV_slash_kenz_2_k3 = 3e-17 vol_secINV;
  // k1*NOS_slash_nNOS*NOS_slash_CaMKIIalpha-k2*NOS_slash_CaMKIIalpha_slash_kenz_slash_kenz_cplx
  // Hayashi et al., 1999, JBC,274(29):20597-20602. and from various other datas.
  NOS_slash_CaMKIIalpha_slash_kenz_1: NOS_slash_nNOS + $NOS_slash_CaMKIIalpha -> NOS_slash_CaMKIIalpha_slash_kenz_slash_kenz_cplx; NOS_slash_CaMKIIalpha_slash_kenz_1_k1*NOS_slash_nNOS*NOS_slash_CaMKIIalpha - NOS_slash_CaMKIIalpha_slash_kenz_1_k2*NOS_slash_CaMKIIalpha_slash_kenz_slash_kenz_cplx;
    NOS_slash_CaMKIIalpha_slash_kenz_1_k1 = 4.75e-17 vol_uMINVsecINV; NOS_slash_CaMKIIalpha_slash_kenz_1_k2 = 1.9e-16 vol_secINV;
  // k3*NOS_slash_CaMKIIalpha_slash_kenz_slash_kenz_cplx
  NOS_slash_CaMKIIalpha_slash_kenz_2: NOS_slash_CaMKIIalpha_slash_kenz_slash_kenz_cplx => NOS_slash_NOS_star_ + $NOS_slash_CaMKIIalpha; NOS_slash_CaMKIIalpha_slash_kenz_2_k3*NOS_slash_CaMKIIalpha_slash_kenz_slash_kenz_cplx;
    NOS_slash_CaMKIIalpha_slash_kenz_2_k3 = 4.75e-17 vol_secINV;
  // k1*NOS_slash_nNOS*NOS_slash_CaMKIalpha-k2*NOS_slash_CaMKIalpha_slash_kenz_slash_kenz_cplx
  // enzyme parameters used from different literature. Hayashi et al., JBC,274(29):20597-20602.
  NOS_slash_CaMKIalpha_slash_kenz_1: NOS_slash_nNOS + $NOS_slash_CaMKIalpha -> NOS_slash_CaMKIalpha_slash_kenz_slash_kenz_cplx; NOS_slash_CaMKIalpha_slash_kenz_1_k1*NOS_slash_nNOS*NOS_slash_CaMKIalpha - NOS_slash_CaMKIalpha_slash_kenz_1_k2*NOS_slash_CaMKIalpha_slash_kenz_slash_kenz_cplx;
    NOS_slash_CaMKIalpha_slash_kenz_1_k1 = 2.833333e-17 vol_uMINVsecINV; NOS_slash_CaMKIalpha_slash_kenz_1_k2 = 1.133333e-16 vol_secINV;
  // k3*NOS_slash_CaMKIalpha_slash_kenz_slash_kenz_cplx
  NOS_slash_CaMKIalpha_slash_kenz_2: NOS_slash_CaMKIalpha_slash_kenz_slash_kenz_cplx => NOS_slash_NOS_star_ + $NOS_slash_CaMKIalpha; NOS_slash_CaMKIalpha_slash_kenz_2_k3*NOS_slash_CaMKIalpha_slash_kenz_slash_kenz_cplx;
    NOS_slash_CaMKIalpha_slash_kenz_2_k3 = 2.833333e-17 vol_secINV;

  // Unit definitions:
  unit vol_secINV = litre / second;
  unit vol_uMINVsecINV = litre^2 / (1e-6 mole * second);
  unit substance = 1e-6 mole;
end
