// SBML level 2 version 3

model model_0000001()
  // mahaney2000_SERCAregulation
  // This model originates from BioModels Database: A Database of Annotated Published Models. It is copyright (c) 2005-2011 The BioModels.net Team.
  // To the extent possible under law, all copyright and related or neighbouring rights to this encoded model have been dedicated to the public domain worldwide. Please refer to CC0 Public Domain Dedication for more information.
  // In summary, you are entitled to use this encoded model in absolutely any manner you deem suitable, verbatim, or with modification, alone or embedded it in a larger context, redistribute it, commercially or not, in a restricted way or not..
  // To cite BioModels Database, please use: Li C, Donizelli M, Rodriguez N, Dharuri H, Endler L, Chelliah V, Li L, He E, Henry A, Stefan MI, Snoep JL, Hucka M, Le Novère N, Laibe C (2010) BioModels Database: An enhanced, curated and annotated resource for published quantitative kinetic models. BMC Syst Biol., 4:92.
  // biomodels.db:MODEL4816599063
  // isDescribedBy pubmed:10692318
  // biomodels.db:MODEL4816599063
  // isDescribedBy pubmed:10692318
  // biomodels.db:MODEL4816599063
  // biomodels.db:MODEL4816599063

  // Compartments:
  compartment cell = 1;

  // Species:
  species E2 in cell = 0.0333;
  species E1 in cell = 0;
  species $Ca2plus in cell = 0.268;
  species Ca_E1 in cell = 0;
  species Ca_E1prime in cell = 0;
  species Ca2_E1prime in cell = 0;
  species $ATP in cell = 1;
  species ATP_Ca2_E1prime in cell = 0;
  species ADP in cell = 0;
  species EP in cell = 0;
  species EPi in cell = 0;
  species Pi in cell = 0;

  // Parameters:
  k1 = 0.35 persec;
  k_1 = 0.35 persec;
  k2 = 200 peruMpersec;
  k_2 = 120 persec;
  k3 = 0.4 persec;
  k_3 = 0.4 persec;
  k4 = 80 peruMpersec;
  k_4 = 3.2 persec;
  k5 = 4 peruMpersec;
  k_5 = 0 persec;
  k6 = 35 persec;
  k_6 = 0 peruMpersec;
  k7 = 0.3 persec;
  k_7 = 0.7 persec;
  k8 = 0.5 persec;
  k_8 = 0 peruMpersec;
  EPratio has dimensionless;

  // Assignment rules:
  EPratio := EP/(E2 + E1 + Ca_E1 + Ca_E1prime + Ca2_E1prime + ATP_Ca2_E1prime + EP + EPi);

  // Reactions:
  r1: E2 -> E1; cell*(k1*E2 - k_1*E1);
  r2: E1 + $Ca2plus -> Ca_E1; cell*(k2*E1*Ca2plus - k_2*Ca_E1);
  r3: Ca_E1 -> Ca_E1prime; cell*(k3*Ca_E1 - k_3*Ca_E1prime);
  r4: Ca_E1prime + $Ca2plus -> Ca2_E1prime; cell*(k4*Ca_E1prime*Ca2plus - k_4*Ca2_E1prime);
  r5: Ca2_E1prime + $ATP -> ATP_Ca2_E1prime; cell*(k5*Ca2_E1prime*ATP - k_5*ATP_Ca2_E1prime);
  r6: ATP_Ca2_E1prime -> EP + ADP; cell*(k6*ATP_Ca2_E1prime - k_6*EP*ADP);
  r7: EP -> EPi; cell*(k7*EP - k_7*EPi);
  r8: EPi -> E2 + Pi; cell*(k8*EPi - k_8*E2*Pi);

  // Unit definitions:
  unit persec = 1 / second;
  unit uM = 1e-6 mole / litre;
  unit peruMpersec = litre / (1e-6 mole * second);
end
