// SBML level 2 version 1

model testid()
  // Kierzek2001_LacZ
  // An approximation to the <a href = "http://www.ncbi.nlm.nih.gov/entrez/query.fcgi?cmd=Retrieve&db=pubmed&dopt=Abstract&list_uids=11062240 ">Kierzek AM. et al. J Biol Chem. (2001) 276(11):8165-72</a> model of LacZ gene expression in E. coli. They use stochastic simulation and model cell growth. Despite these discrepancies, the continuous fixed size model is within a factor of 3 of their results. Parameter values identical.
  // This model originates from BioModels Database: A Database of Annotated Published Models (http://www.ebi.ac.uk/biomodels/). It is copyright (c) 2005-2011 The BioModels.net Team.
  // To the extent possible under law, all copyright and related or neighbouring rights to this encoded model have been dedicated to the public domain worldwide. Please refer to CC0 Public Domain Dedication for more information.
  // In summary, you are entitled to use this encoded model in absolutely any manner you deem suitable, verbatim, or with modification, alone or embedded it in a larger context, redistribute it, commercially or not, in a restricted way or not..
  // To cite BioModels Database, please use: Li C, Donizelli M, Rodriguez N, Dharuri H, Endler L, Chelliah V, Li L, He E, Henry A, Stefan MI, Snoep JL, Hucka M, Le Novère N, Laibe C (2010) BioModels Database: An enhanced, curated and annotated resource for published quantitative kinetic models. BMC Syst Biol., 4:92.
  // biomodels.db:MODEL4821294342
  // isDescribedBy pubmed:11062240
  // biomodels.db:MODEL4821294342
  // isDescribedBy pubmed:11062240
  // biomodels.db:MODEL4821294342
  // biomodels.db:MODEL4821294342

  // Compartments:
  compartment default_compartment = 1e-18;
  compartment geometry = 9.9997e-16;

  // Species:
  species LacZ_slash_Protein in geometry = 0;
  species LacZ_slash_RBS in geometry = 0;
  species LacZ_slash_RibRBS in geometry = 0;
  species LacZ_slash_elRIB in geometry = 0;
  species LacZ_slash_P_RNAP in geometry = 0;
  species LacZ_slash_P in geometry = 0.001666722;
  species LacZ_slash_ElRNAP in geometry = 0;
  species LacZ_slash_TrRNAP in geometry = 0;
  // Ribosome pool The language in the paper is a little ambiguous, but from simulation it turns out that they assume that the number of free ribosomes is held fixed at 350. In other buffered.
  species $LacZ_slash_Ribosome in geometry = 0.5833528;
  species $LacZ_slash_AAs in geometry = 0;
  // RNA Polymerase. Kierzek et al assume mean 35 and delta = 3.5 molecules. Turns out they assume that this buffered.
  species $LacZ_slash_RNAP in geometry = 0.05833528;
  species $LacZ_slash_nucleotides in geometry = 0;

  // Reactions:
  // kf*LacZ_slash_RBS*LacZ_slash_Ribosome-kb*LacZ_slash_RibRBS
  // Equations 5 and 6 from Kierzek et al. Association rate set to order of magnitude of diffusion-limited aggregation. Dissociation rate set to reproduce translation frequency.
  LacZ_slash_Ribosome_binding: LacZ_slash_RBS + $LacZ_slash_Ribosome -> LacZ_slash_RibRBS; LacZ_slash_Ribosome_binding_kf*LacZ_slash_RBS*LacZ_slash_Ribosome - LacZ_slash_Ribosome_binding_kb*LacZ_slash_RibRBS;
    LacZ_slash_Ribosome_binding_kf = 9.998933e-14 vol_uMINVsecINV; LacZ_slash_Ribosome_binding_kb = 2.249925e-15 vol_secINV;
  // kf*LacZ_slash_elRIB-kb*LacZ_slash_Ribosome*LacZ_slash_Protein
  // Equation 9 from Kierzek et al. They say that this step should be RibRBS-> Protein, but based on text and the logic of the synthesis, it should really be ElRIB, the Ribosome elongating protein chain, that should give rise to the protein. The calculation is: ribosome moves at 15 AAs /sec. The protein is 1024 AAs long. So protein is formed 0.015/sec.
  LacZ_slash_Prot_elongation: LacZ_slash_elRIB -> $LacZ_slash_Ribosome + LacZ_slash_Protein; LacZ_slash_Prot_elongation_kf*LacZ_slash_elRIB - LacZ_slash_Prot_elongation_kb*LacZ_slash_Ribosome*LacZ_slash_Protein;
    LacZ_slash_Prot_elongation_kf = 1.49995e-17 vol_secINV; LacZ_slash_Prot_elongation_kb = 0 vol_uMINVsecINV;
  // kf*LacZ_slash_Protein-kb*LacZ_slash_AAs
  // Equation 10 from Kierzek et al. Assume a half-life of 3 hours for beta-galactosidase in E coli, from Berquist and Truman 1978 Mol. Cell. Genet. 164, 105-108.
  LacZ_slash_Prot_degradation: LacZ_slash_Protein -> $LacZ_slash_AAs; LacZ_slash_Prot_degradation_kf*LacZ_slash_Protein - LacZ_slash_Prot_degradation_kb*LacZ_slash_AAs;
    LacZ_slash_Prot_degradation_kf = 6.419786e-20 vol_secINV; LacZ_slash_Prot_degradation_kb = 0 vol_secINV;
  // kf*LacZ_slash_P*LacZ_slash_RNAP-kb*LacZ_slash_P_RNAP
  // Equations 1 and 2 from Kierzek et al. Reversible RNA binding.
  LacZ_slash_RNAPol_binding: LacZ_slash_P + $LacZ_slash_RNAP -> LacZ_slash_P_RNAP; LacZ_slash_RNAPol_binding_kf*LacZ_slash_P*LacZ_slash_RNAP - LacZ_slash_RNAPol_binding_kb*LacZ_slash_P_RNAP;
    LacZ_slash_RNAPol_binding_kf = 9.998933e-14 vol_uMINVsecINV; LacZ_slash_RNAPol_binding_kb = 9.999667e-15 vol_secINV;
  // kf*LacZ_slash_TrRNAP-kb*LacZ_slash_P*LacZ_slash_RBS*LacZ_slash_ElRNAP*LacZ_slash_RNAP
  // Equation 4 from Kierzek et al. They say: To clear the promoter region, active RNA polymerase must move 30 to 60 nucleotides (ref Record et al 1996 E coli and Salmonella 2nd ed pp 792-821 ASM Press, Washington DC) Since rate of polymerase movement is about 40 nucleotides/sec, this step takes about 1 sec. The length of the mRNA chain that is synthesized during this time corresponds roughly to the length of the leader region containing the ribosome binding site (RBS). Therefore the synthesis of the RBS and promotor clearance occur at approximately the same rate of 1 per sec. .... Therefore we modeled these two processes by the single first order reaction with a rate constant of 1 sec.
  LacZ_slash_RNASynthesis: LacZ_slash_TrRNAP -> LacZ_slash_P + LacZ_slash_RBS + LacZ_slash_ElRNAP + $LacZ_slash_RNAP; LacZ_slash_RNASynthesis_kf*LacZ_slash_TrRNAP - LacZ_slash_RNASynthesis_kb*LacZ_slash_P*LacZ_slash_RBS*LacZ_slash_ElRNAP*LacZ_slash_RNAP;
    LacZ_slash_RNASynthesis_kf = 9.999667e-16 vol_secINV; LacZ_slash_RNASynthesis_kb = 0 vol_uMINV3secINV;
  // kf*LacZ_slash_RBS-kb*LacZ_slash_nucleotides
  // Equation 8 from Kierzek et al, set equal to transcription initiaton frequency. This is the decay rate of RBS.
  LacZ_slash_RBS_degradation: LacZ_slash_RBS -> $LacZ_slash_nucleotides; LacZ_slash_RBS_degradation_kf*LacZ_slash_RBS - LacZ_slash_RBS_degradation_kb*LacZ_slash_nucleotides;
    LacZ_slash_RBS_degradation_kf = 2.9999e-16 vol_secINV; LacZ_slash_RBS_degradation_kb = 0 vol_secINV;
  // kf*LacZ_slash_RibRBS-kb*LacZ_slash_elRIB*LacZ_slash_RBS
  // Equation 7 from Kierzek et al. Based on Draper , DE 1996 E coli and Salmonella 2nd Ed pp 902-908 ASM Press, Washington DC. This is the rate at which the RBS cleared.
  LacZ_slash_Clearance: LacZ_slash_RibRBS -> LacZ_slash_elRIB + LacZ_slash_RBS; LacZ_slash_Clearance_kf*LacZ_slash_RibRBS - LacZ_slash_Clearance_kb*LacZ_slash_elRIB*LacZ_slash_RBS;
    LacZ_slash_Clearance_kf = 4.999833e-16 vol_secINV; LacZ_slash_Clearance_kb = 0 vol_uMINVsecINV;
  // kf*LacZ_slash_P_RNAP-kb*LacZ_slash_TrRNAP
  // Equation 3 from Kierzek et al. Isomerization of closed binary complex to open complex.
  LacZ_slash_Isomerization: LacZ_slash_P_RNAP -> LacZ_slash_TrRNAP; LacZ_slash_Isomerization_kf*LacZ_slash_P_RNAP - LacZ_slash_Isomerization_kb*LacZ_slash_TrRNAP;
    LacZ_slash_Isomerization_kf = 9.999667e-16 vol_secINV; LacZ_slash_Isomerization_kb = 0 vol_secINV;
  // kf*LacZ_slash_ElRNAP-kb*LacZ_slash_nucleotides
  // Also equation 8 from Kierzek et al. Since RBS is assumed to be the rate-limiting part of the protein synthesis, we don\'t really need to worry about the fate of the ElRNAP. For balance we degrade it at the same rate as the RBS.
  LacZ_slash_mRNA_degradation: LacZ_slash_ElRNAP -> $LacZ_slash_nucleotides; LacZ_slash_mRNA_degradation_kf*LacZ_slash_ElRNAP - LacZ_slash_mRNA_degradation_kb*LacZ_slash_nucleotides;
    LacZ_slash_mRNA_degradation_kf = 2.9999e-16 vol_secINV; LacZ_slash_mRNA_degradation_kb = 0 vol_secINV;

  // Unit definitions:
  unit vol_secINV = litre / second;
  unit vol_uMINVsecINV = litre^2 / (1e-6 mole * second);
  unit vol_uMINV3secINV = litre^4 / ((1e-6 mole)^3 * second);
  unit substance = 1e-6 mole;
end
