// SBML level 2 version 1

model testid()
  // Phillips2003_RasGTPase
  // Ras is an important regulator of cell growth in all eukaryotic cells. The model represent hydrolysis of active Ras-bound GTP to give inactive Ras-bound GDP catalyzed by GTPase activating proteins i.e NF1. The inactive Ras-bound GDP turns signalling off.
  // This model originates from BioModels Database: A Database of Annotated Published Models (http://www.ebi.ac.uk/biomodels/). It is copyright (c) 2005-2011 The BioModels.net Team.
  // To the extent possible under law, all copyright and related or neighbouring rights to this encoded model have been dedicated to the public domain worldwide. Please refer to CC0 Public Domain Dedication for more information.
  // In summary, you are entitled to use this encoded model in absolutely any manner you deem suitable, verbatim, or with modification, alone or embedded it in a larger context, redistribute it, commercially or not, in a restricted way or not..
  // To cite BioModels Database, please use: Li C, Donizelli M, Rodriguez N, Dharuri H, Endler L, Chelliah V, Li L, He E, Henry A, Stefan MI, Snoep JL, Hucka M, Le Novère N, Laibe C (2010) BioModels Database: An enhanced, curated and annotated resource for published quantitative kinetic models. BMC Syst Biol., 4:92.
  // biomodels.db:MODEL4968912141
  // isDescribedBy pubmed:12667087
  // biomodels.db:MODEL4968912141
  // isDescribedBy pubmed:12667087
  // biomodels.db:MODEL4968912141
  // biomodels.db:MODEL4968912141

  // Compartments:
  compartment default_compartment = 1e-18;
  compartment geometry = 5.236e-13;

  // Species:
  species Pi in geometry = 0;
  species RasGTP in geometry = 1;
  species RasGTP_minus_NF1 in geometry = 0;
  species RasGTP_minus_NF1_star_ in geometry = 0;
  species RasGDP_minus_NF1_Pi in geometry = 0;
  species RasGDP_NF1 in geometry = 0;
  species RasGDP in geometry = 0;
  species NF1 in geometry = 9.999363;

  // Reactions:
  // kf*RasGTP_minus_NF1_star_-kb*RasGDP_minus_NF1_Pi
  // First step in hydrolysis of GTP bound to Ras complexed with NF1 - a mammalian GAP Kf = 19.5 /sec Kb = 0.22 /sec Table 3, Phillips RA et al 2003 Biochemistry 3956-3965
  GTP_hydrolysis_sbo_1_sbc_: RasGTP_minus_NF1_star_ -> RasGDP_minus_NF1_Pi; GTP_hydrolysis_sbo_1_sbc__kf*RasGTP_minus_NF1_star_ - GTP_hydrolysis_sbo_1_sbc__kb*RasGDP_minus_NF1_Pi;
    GTP_hydrolysis_sbo_1_sbc__kf = 1.02102e-11 vol_secINV; GTP_hydrolysis_sbo_1_sbc__kb = 1.15192e-13 vol_secINV;
  // kf*RasGDP_minus_NF1_Pi-kb*Pi*RasGDP_NF1
  // Second step in hydrolysis of GTP bound to Ras is complexed with NF1 - a mammalian GAP Kf = 40 /sec Kb = 108 /M/sec = 1.08e-04 /uM/sec Phillips RA et al 2003 Biochemistry 3956-3965
  GTP_hydrolysis_sbo_2_sbc_: RasGDP_minus_NF1_Pi -> Pi + RasGDP_NF1; GTP_hydrolysis_sbo_2_sbc__kf*RasGDP_minus_NF1_Pi - GTP_hydrolysis_sbo_2_sbc__kb*Pi*RasGDP_NF1;
    GTP_hydrolysis_sbo_2_sbc__kf = 2.0944e-11 vol_secINV; GTP_hydrolysis_sbo_2_sbc__kb = 5.654816e-17 vol_uMINVsecINV;
  // kf*RasGTP_minus_NF1-kb*RasGTP_minus_NF1_star_
  // Activation of Ras by GAP (i.e NF1) Kf = 418 /sec Kb = 5.5 /sec Table 3, Phillips RA et al 2003 Biochemistry 3956-3965
  Ras_activation: RasGTP_minus_NF1 -> RasGTP_minus_NF1_star_; Ras_activation_kf*RasGTP_minus_NF1 - Ras_activation_kb*RasGTP_minus_NF1_star_;
    Ras_activation_kf = 2.188648e-10 vol_secINV; Ras_activation_kb = 2.8798e-12 vol_secINV;
  // kf*RasGDP_NF1-kb*RasGDP*NF1
  // Dissociation of NF1 from Ras.GDP NF1 is a mammalian GAP Kf = 46.5 /sec Kb = 1.2 /sec/uM Table 3, Phillips RA et al 2003 Biochemistry 3956-3965
  GAP_dissociation: RasGDP_NF1 -> RasGDP + NF1; GAP_dissociation_kf*RasGDP_NF1 - GAP_dissociation_kb*RasGDP*NF1;
    GAP_dissociation_kf = 2.43474e-11 vol_secINV; GAP_dissociation_kb = 6.283184e-13 vol_uMINVsecINV;
  // kf*RasGTP*NF1-kb*RasGTP_minus_NF1
  // Binding of NF1 to Ras.GTP NF1 is a mammalian GAP Kd = 5.3 uM Table 3, Phillips RA et al 2003 Biochemistry 3956-3965
  NF1_binding: RasGTP + NF1 -> RasGTP_minus_NF1; NF1_binding_kf*RasGTP*NF1 - NF1_binding_kb*RasGTP_minus_NF1;
    NF1_binding_kf = 6.283184e-13 vol_uMINVsecINV; NF1_binding_kb = 3.330096e-12 vol_secINV;

  // Unit definitions:
  unit vol_secINV = litre / second;
  unit vol_uMINVsecINV = litre^2 / (1e-6 mole * second);
  unit substance = 1e-6 mole;
end
