// SBML level 2 version 4

model banaji()
  // Banaji2005_Brain_Cell_Metabolism
  // This is a part of the model described in:
  // A physiological model of cerebral blood flow control
  // Murad Banaji, Ilias Tachtsidis, David Delpy, Stephen Baigent, Mathematical biosciences 2005 194:125-173; PMID: 15854674 , doi: 10.1016/j.mbs.2004.10.005
  // Abstract:
  // The construction of a computational model of the human brain circulation is described. We combine an existing model of the biophysics of the circulatory system, a basic model of brain metabolic biochemistry, and a model of the functioning of vascular smooth muscle (VSM) into a single model. This represents a first attempt to understand how the numerous different feedback pathways by which cerebral blood flow is controlled interact with each other. The present work comprises the following: Descriptions of the physiology underlying the model; general comments on the processes by which this physiology is translated into mathematics; comments on parameter setting; and some simulation results. The simulations presented are preliminary, but show qualitative agreement between model behaviour and experimental results.
  // The model represents the intracellular component of the model, and is translated from the implementation available with the braincirc package.
  // This model originates from BioModels Database: A Database of Annotated Published Models (http://www.ebi.ac.uk/biomodels/). It is copyright (c) 2005-2011 The BioModels.net Team.
  // To the extent possible under law, all copyright and related or neighbouring rights to this encoded model have been dedicated to the public domain worldwide. Please refer to CC0 Public Domain Dedication for more information.
  // In summary, you are entitled to use this encoded model in absolutely any manner you deem suitable, verbatim, or with modification, alone or embedded it in a larger context, redistribute it, commercially or not, in a restricted way or not. .
  // To cite BioModels Database, please use: Li C, Donizelli M, Rodriguez N, Dharuri H, Endler L, Chelliah V, Li L, He E, Henry A, Stefan MI, Snoep JL, Hucka M, Le Novère N, Laibe C (2010) BioModels Database: An enhanced, curated and annotated resource for published quantitative kinetic models. BMC Syst Biol., 4:92.
  // biomodels.db:MODEL4992089662
  // taxonomy:9606
  // isDescribedBy pubmed:15854674
  // biomodels.db:MODEL4992089662
  // isDescribedBy pubmed:15854674
  // biomodels.db:MODEL4992089662

  // Compartments:
  compartment Vol_exm = 0.72; Vol_exm is "cytoplasm";  // GO:0005737
  compartment Vol_ecs = 0.2; Vol_ecs is "extracellular";  // GO:0005576
  compartment Vol_inm = 0.08; Vol_inm is "mitochondrial matrix";  // GO:0005759

  // Species:
  species _Ad in Vol_exm = 1e-5; _Ad is "adenosine";  // CHEBI:16335
  species $_eAd in Vol_ecs = 1e-5; _eAd is "adenosine";  // CHEBI:16335
  species _ADP in Vol_exm = 0.35;  // CHEBI:16761
  species _mADP in Vol_inm = 0.8267717;  // CHEBI:16761
  species _AKG in Vol_inm = 0.1; _AKG is "alpha-ketoglutarate";  // CHEBI:16810
  species _AMP in Vol_exm = 0.1136653;  // CHEBI:16027
  species _ATP in Vol_exm = 3;  // CHEBI:15422
  species _mATP in Vol_inm = 14.17323;  // CHEBI:15422
  species _mBiC in Vol_inm = 90.98833; _mBiC is "bicarbonate ion";  // CHEBI:17544
  species _BiC in Vol_exm = 19.04603; _BiC is "bicarbonate ion";  // CHEBI:17544
  species $_eBiC in Vol_ecs = 25.0599; _eBiC is "bicarbonate ion";  // CHEBI:17544
  species _mCO2 in Vol_inm = 2.4624; _mCO2 is "carbon dioxide";  // CHEBI:16526
  species _CO2 in Vol_exm = 2.052; _CO2 is "carbon dioxide";  // CHEBI:16526
  species $_eCO2 in Vol_ecs = 1.7838252; _eCO2 is "carbon dioxide";  // CHEBI:16526
  species _Cr in Vol_exm = 3.9; _Cr is "creatine";  // CHEBI:16919
  species _mFAD in Vol_inm = 0.1;  // CHEBI:16238
  species _mFADH in Vol_inm = 1.22; _mFADH is "FADH2";  // CHEBI:17877
  species _gluc in Vol_exm = 1.4; _gluc is "glucose";  // CHEBI:17234
  species $_egluc in Vol_ecs = 2.08792; _egluc is "glucose";  // CHEBI:17234
  species _Hy in Vol_exm = 8.51138e-5; _Hy is "hydrogen ion";  // CHEBI:15378
  species _mHy in Vol_inm = 2.13796209e-5; _mHy is "hydrogen ion";  // CHEBI:15378
  species $_eHy in Vol_ecs = 5.623413e-5; _eHy is "hydrogen ion";  // CHEBI:15378
  species _Phos in Vol_exm = 1.5; _Phos is "inorganic phosphate";  // CHEBI:43474
  species _mPhos in Vol_inm = 3.2; _mPhos is "inorganic phosphate";  // CHEBI:43474
  species _L0 in Vol_exm = 2; _L0 is "lactate";  // CHEBI:24996
  species $_eL0 in Vol_ecs = 1.902; _eL0 is "lactate";  // CHEBI:24996
  species _lac in Vol_exm = 0.001233533; _lac is "lactic acid";  // CHEBI:28358
  species $_eL in Vol_ecs = 0.000775053; _eL is "lactic acid";  // CHEBI:28358
  species _NAD in Vol_exm = 0.2970297;  // CHEBI:15846
  species _mNAD in Vol_inm = 9.090909;  // CHEBI:15846
  species _NADH in Vol_exm = 0.002970297;  // CHEBI:16908
  species _mNADH in Vol_inm = 0.9090909;  // CHEBI:16908
  species _Ox in Vol_inm = 0.54; _Ox is "oxaloacetate";  // CHEBI:16452
  species _mO2 in Vol_inm = 0.02275; _mO2 is "oxygen";  // CHEBI:15379
  species _O2 in Vol_exm = 0.0455; _O2 is "oxygen";  // CHEBI:15379
  species $_eO2 in Vol_ecs = 0.05; _eO2 is "oxygen";  // CHEBI:15379
  species _PCr in Vol_exm = 5.85; _PCr is "phosphocreatine";  // CHEBI:17287
  species $_eK in Vol_ecs = 2.8; _eK is "potassium ion";  // CHEBI:29103
  species _K in Vol_exm = 180; _K is "potassium ion";  // CHEBI:29103
  species _Py0 in Vol_exm = 0.12; _Py0 is "pyruvate";  // CHEBI:15361
  species _mPy0 in Vol_inm = 0.3821829; _mPy0 is "pyruvate";  // CHEBI:15361
  species $_ePy0 in Vol_ecs = 0.12; _ePy0 is "pyruvate";  // CHEBI:15361
  species PbufH in Vol_exm = 2; PbufH is "sites on cellular proteins bound to protons";
  species Pbuf in Vol_exm = 10; Pbuf is "sites on cellular proteins capable of binding protons";
  species _Na in Vol_exm = 15; _Na is "sodium ion";  // CHEBI:29101
  species $_eNa in Vol_ecs = 138; _eNa is "sodium ion";  // CHEBI:29101
  species _suc in Vol_inm = 0.1; _suc is "succinate";  // CHEBI:15741

  // Parameters:
  _AMPn = 0.1136653 mM;
  _ATPn = 3 mM;
  C_elec = 26.73 mV;
  Inh_glucN = 3 dimensionless;
  PD_mit has mV;
  PD_mitn = 150 mV;
  pH_mc_diff = 0.6 dimensionless;
  PMF has mV;
  Vmax_glucN has mM_per_s;
  Vmax_glucNn = 0.12973 mM_per_s;

  // Assignment rules:
  PD_mit := PD_mitn/pH_mc_diff*log10(_Hy/_mHy);
  PMF := PD_mit + C_elec*ln(_Hy/_mHy);
  Vmax_glucN := Vmax_glucNn*(Inh_glucN + 1)/(1 + Inh_glucN*(_ATP/_ATPn)*(_AMPn/_AMP));

  // Reactions:
  glycol: _gluc + 2 _NAD + 2 _ADP + 2 _Phos -> 2 _NADH + 2 _Py0 + 4 _Hy + 2 _ATP; Vol_exm*(Vmax_glucN*_gluc*_NAD^2*_ADP^2*_Phos^2/((Km_glucNgl + _gluc)*(Km_glucNN^2 + _NAD^2)*(Km_glucNA^2 + _ADP^2)*(Km_glucNP^2 + _Phos^2))); glycol is "glycolysis in one step";
    Km_glucNA = 0.07 mM; Km_glucNN = 1 mM; Km_glucNP = 0.3 mM; Km_glucNgl = 0.05 mM;
  Krebs1: _mPy0 + _Ox + 2 _mNAD -> _AKG + 2 _mCO2 + 2 _mNADH + _mHy; Vol_inm*Vmax_PyN*(_mPy0/(_mPy0 + Km_PyNP)*_Ox/(_Ox + Km_PyNO)/(1 + Ka_PyNA/_mADP)*_mNAD^2/(_mNAD^2 + Km_PyNN^2)); Krebs1 is "PDH reaction plus first stages of the TCA cycle";  // modifiers: _mADP
    Ka_PyNA = 0.062 mM; Km_PyNN = 0.9090909 mM; Km_PyNO = 0.00064 mM; Km_PyNP = 0.03821829 mM; Vmax_PyN = 0.1965795 mM_per_s;
  Krebs2: _AKG + _mNAD + _mADP + _mPhos -> _mCO2 + _suc + _mNADH + _mHy + _mATP; Vol_inm*(Vmax_AKGN*_AKG*_mNAD*_mADP*_mPhos/((Km_AKGNA + _AKG)*(Km_AKGNN + _mNAD)*(Km_AKGNAD + _mADP)*(Km_AKGNP + _mPhos))); Krebs2 is "middle stages of the TCA cycle";
    Km_AKGNA = 0.3 mM; Km_AKGNAD = 0.08267717 mM; Km_AKGNN = 27.27273 mM; Km_AKGNP = 0.64 mM; Vmax_AKGN = 3.4721544 mM_per_s;
  Krebs3: _suc + _mNAD + _mFAD -> _Ox + _mNADH + _mHy + _mFADH; Vol_inm*(Vmax_sucN*_suc*_mNAD*_mFAD/((Km_sucNs + _suc)*(Km_sucNN + _mNAD)*(Km_sucNF + _mFAD))); Krebs3 is "final stages of the TCA cycle";
    Km_sucNF = 0.1 mM; Km_sucNN = 0.4545455 mM; Km_sucNs = 0.3 mM; Vmax_sucN = 1.3809705 mM_per_s;
  Noxy: 2 _mNADH + _mO2 + 22 _mHy -> 2 _mNAD + 20 _Hy; Vmax_NQ*(_mNADH/_mNAD/(_mNADH/_mNAD + Km_NQN)*_mO2/(_mO2 + Km_NQO)*(_mHy/_Hy)/(_mHy/_Hy + Km_NQH)); Noxy is "oxidation of NADH";
    Km_NQH = 0.2511886 dimensionless; Km_NQN = 0.2 dimensionless; Km_NQO = 0.05 mM; Vmax_NQ = 0.6308672 mmol_per_s;
  Foxy: 2 _mFADH + _mO2 + 16 _mHy -> 2 _mFAD + 16 _Hy; Vmax_FQ*(_mFADH/_mFAD/(_mFADH/_mFAD + Km_FQF)*_mO2/(_mO2 + Km_FQO)*(_mHy/_Hy)/(_mHy/_Hy + Km_FQH)); Foxy is "oxidation of FADH2";
    Km_FQF = 24.4 dimensionless; Km_FQH = 0.2511886 dimensionless; Km_FQO = 0.0011375 mM; Vmax_FQ = 0.041429115 mmol_per_s;
  Hyleak: _Hy -> _mHy; k1_lk*(exp(k2_lk*PMF) - 1); Hyleak is "proton leak";
    k1_lk = 6.278528e-5 mmol_per_s; k2_lk = 0.038 per_mV;
  Cortoxphos: _mADP + _mPhos + 3 _Hy -> _mATP + 3 _mHy; VmaxC_oxp*(((100*p_a_C + p_c1_C*exp(3*0.0374*50))*(K_F1*_mATP/_mADP/_mPhos) - exp(3*0.0374*PMF)*(p_a_C + p_c2_C*(K_F1*_mATP/_mADP/_mPhos)))/((1 + p_1_C*(K_F1*_mATP/_mADP/_mPhos))*exp(3*0.0374*50) + (p_2_C + p_3_C*(K_F1*_mATP/_mADP/_mPhos))*exp(3*0.0374*PMF)))/1000; Cortoxphos is "oxidative phosphorylation";
    K_F1 = 1710000 dimensionless; VmaxC_oxp = -34.98159 mM; p_1_C = 1.346e-8 dimensionless; p_2_C = 7.739e-7 dimensionless; p_3_C = 6.65e-15 dimensionless; p_a_C = 1.656e-5 per_s; p_c1_C = 9.651e-14 per_s; p_c2_C = 4.585e-14 per_s;
  CO2toHm: _mCO2 -> _mHy + _mBiC; Vol_inm*(k_CHm*_mCO2 - k_nCHm*_mHy*_mBiC); CO2toHm is "production and dissociation of carbonic acid";
    k_CHm = 0.02699532 per_s; k_nCHm = 34.17129 per_mM_per_s;
  PytoL: _Py0 + _NADH + _Hy -> _L0 + _NAD; Vol_exm*Vmax_PyL*(1/(1 + Km_PyLPy/_Py0 + Km_PyLNH/_NADH + Km_PyLPN/_Py0/_NADH + Km_PyLH/_Hy) - VR_PyL/(1 + Km_PyLL/_L0 + Km_PyLN/_NAD + Km_PyLLN/_L0/_NAD)); PytoL is "lactate to pyruvate interconversion";
    Km_PyLH = 0.0001702276 mM; Km_PyLL = 2 mM; Km_PyLLN = 0.24 mM_squared; Km_PyLN = 0.03 mM; Km_PyLNH = 0.0062 mM; Km_PyLPN = 3.4e-5 mM_squared; Km_PyLPy = 0.034 mM; VR_PyL = 0.4353688 dimensionless; Vmax_PyL = 0.05586005 mM_per_s;
  PCrtoATP: _PCr + _ADP + _Hy -> _Cr + _ATP; Vol_exm*(k_PCrATP*_PCr*_ADP*_Hy - k_nPCrATP*_Cr*_ATP); PCrtoATP is "PCr to ATP interconversion";
    k_PCrATP = 1.692582 per_mM_squared_per_s; k_nPCrATP = 2.521087e-5 per_mM_per_s;
  ATPuse: _ATP -> _ADP + _Phos; Vol_exm*(Vmax_ATPuse*_ATP/(Km_ATPuse + _ATP)); ATPuse is "non-pumping ATP use";
    Km_ATPuse = 0.3 mM; Vmax_ATPuse = 0.1489728 mM_per_s;
  aden1: 2 _ADP -> _ATP + _AMP; Vol_exm*(k_ADPATP*_ADP^2 - k_nADPATP*_ATP*_AMP); aden1 is "adenlyate kinase reaction";
    k_ADPATP = 1055 per_mM_per_s; k_nADPATP = 379 per_mM_per_s;
  aden2: _AMP -> _Ad; Vol_exm*(k_AMPAd*_AMP - k_nAMPAd*_Ad); aden2 is "AMP degradation";
    k_AMPAd = 1.219521e-6 per_s; k_nAMPAd = 0.01386172 per_s;
  lactic: _lac -> _L0 + _Hy; Vol_exm*(lactic_k_LH*_lac - lactic_k_nLH*_L0*_Hy); lactic is "lactic acid dissociation";
    lactic_k_LH = 23090.66 per_s; lactic_k_nLH = 167323.7 per_mM_per_s;
  CO2toH1: _CO2 -> _Hy + _BiC; Vol_exm*(k_CHi*_CO2 - k_nCHi*_Hy*_BiC); CO2toH1 is "production and dissociation of carbonic acid";
    k_CHi = 0.1955411 per_s; k_nCHi = 247.5204 per_mM_per_s;
  genbuf: PbufH -> Pbuf + _Hy; Vol_exm*(k_Pbuf*PbufH - k_nPbuf*Pbuf*_Hy); genbuf is "general buffer reaction";
    k_Pbuf = 0.2888113 per_s; k_nPbuf = 678.6474 per_mM_per_s;
  elactic: $_eL -> $_eL0 + $_eHy; Vol_ecs*(elactic_k_LH*_eL - elactic_k_nLH*_eL0*_eHy); elactic is "lactic acid dissociation";
    elactic_k_LH = 23090.66 per_s; elactic_k_nLH = 167323.7 per_mM_per_s;
  CO2toHe: $_eCO2 -> $_eHy + $_eBiC; Vol_ecs*(k_CHe*_eCO2 - k_nCHe*_eHy*_eBiC); CO2toHe is "production and dissociation of carbonic acid";
    k_CHe = 0.058826 per_s; k_nCHe = 74.46329 per_mM_per_s;
  MAshuttle: _NADH + _Hy + _mNAD -> _mNADH + _mHy + _NAD; k_MAshut*_NADH*_Hy*_mNAD - k_nMAshut*_mNADH*_mHy*_NAD; MAshuttle is "malate-aspartate shuttle";
    k_MAshut = 10000 l_per_mM_squared_per_s; k_nMAshut = 1000 l_per_mM_squared_per_s;
  pyrshuttle: _Py0 + _Hy -> _mPy0 + _mHy; Vmax_Pyshut*((_Py0*_Hy - _mPy0*_mHy)/((_Py0*_Hy + K_Pyshut*(1 + p_Pyshut))*(_mPy0*_mHy + K_Pyshut*(1 + p_Pyshut)) - K_Pyshut^2*p_Pyshut^2)); pyrshuttle is "pyruvate transport";
    K_Pyshut = 1.37246e-5 mM_squared; Vmax_Pyshut = 5.39974e-6 l_mM_cubed_per_s; p_Pyshut = 0.5 dimensionless;
  Phosshuttle: _Phos + _Hy -> _mPhos + _mHy; Vmax_Phosshut*((_Phos*_Hy - _mPhos*_mHy)/((_Phos*_Hy + K_Phosshut*(1 + p_Phosshut))*(_mPhos*_mHy + K_Phosshut*(1 + p_Phosshut)) - K_Phosshut^2*p_Phosshut^2)); Phosshuttle is "phosphate transport";
    K_Phosshut = 0.0004787651 mM_squared; Vmax_Phosshut = 0.001865612 l_mM_cubed_per_s; p_Phosshut = 0.5 dimensionless;
  ATPshuttle1: _ADP + _mATP -> _ATP + _mADP; Vmax_ANT*((1 - k1_ANT*_ATP*_mADP/(_ADP*_mATP))/(1 + k2_ANT*exp(-0.5*PD_mit/26.73)*_ATP/_ADP)/(1 + k3_ANT*_mADP/_mATP))/1000; ATPshuttle1 is "ATP-ADP antiport";
    Vmax_ANT = 493.7797 mM_per_s; k1_ANT = 0.8 dimensionless; k2_ANT = 0.1111 dimensionless; k3_ANT = 7.2 dimensionless;
  O2shuttle: _O2 -> _mO2; k_O2shut*(_O2 - _mO2); O2shuttle is "oxygen diffusion";
    k_O2shut = 1.734343 l_per_s;
  CO2shuttle: _CO2 -> _mCO2; k_CO2shut*(_CO2 - _mCO2); CO2shuttle is "CO2 diffusion";
    k_CO2shut = 0.09614108 l_per_s;
  BiCshuttle: _BiC -> _mBiC; k_BiCshut*_BiC - k_nBiCshut*_mBiC; BiCshuttle is "bicarbonate transport";
    k_BiCshut = 7.86598e-5 l_per_s; k_nBiCshut = 1.646537e-5 l_per_s;
  potpump: _ATP + 2 $_eK + 3 _Na -> _ADP + _Phos + 2 _K + 3 $_eNa; Vmax_KATP*(_ATP/(Km_KATPA + _ATP)*(_eK/_K)/(Km_KATPK + _eK/_K)*(_Na/_eNa)/(Km_KATPNa + _Na/_eNa)); potpump is "active sodium potassium exchange";
    Km_KATPA = 1.4 mM; Km_KATPK = 0.01088889 dimensionless; Km_KATPNa = 0.2173913 dimensionless; Vmax_KATP = 0.729371 mmol_per_s;
  ECdiffgluc: $_egluc -> _gluc; k_ecgluc*(_egluc - _gluc); ECdiffgluc is "glucose transport";
    k_ecgluc = 0.009826724 l_per_s;
  ECdiffO: $_eO2 -> _O2; k_ecOO*(_eO2 - _O2); ECdiffO is "oxygen diffusion";
    k_ecOO = 8.768067 l_per_s;
  ECdiffCO2: $_eCO2 -> _CO2; k_ecCC*(_eCO2 - _CO2); ECdiffCO2 is "CO2 diffusion";
    k_ecCC = 0.147129 l_per_s;
  ECdiffPy0: $_ePy0 -> _Py0; k_ecPy0*(_ePy0 - _Py0); ECdiffPy0 is "pyruvate diffusion";
    k_ecPy0 = 108.4926 l_per_s;
  ECdiffAd: $_eAd -> _Ad; k_ecAd*(_eAd - _Ad); ECdiffAd is "adenosine diffusion";
    k_ecAd = 0.00180821 l_per_s;
  ECdiffK: $_eK -> _K; k_ecKK*(_eK - _K); ECdiffK is "potassium diffusion";
    k_ecKK = 0.001100559 l_per_s;
  ECdiffNa: $_eNa -> _Na; k_ecNa*(_eNa - _Na); ECdiffNa is "sodium diffusion";
    k_ecNa = 0.00237828 l_per_s;
  ECdiffL0H: $_eL0 + $_eHy -> _L0 + _Hy; Vmax_ecL0H*(_eL0*_eHy - _L0*_Hy)/((_eL0*_eHy + K_ecL0H*(1 + p_ecL0H))*(_L0*_Hy + K_ecL0H*(1 + p_ecL0H)) - K_ecL0H^2*p_ecL0H^2); ECdiffL0H is "lactate transport";
    K_ecL0H = 0.0001149036 mM_squared; Vmax_ecL0H = 5.103463e-7 l_mM_cubed_per_s; p_ecL0H = 0.5 dimensionless;
  ECdiffL: $_eL -> _lac; k_ecL*(_eL - _lac); ECdiffL is "lactic acid diffusion";
    k_ecL = 0.0401243 l_per_s;

  // Unit definitions:
  unit substance = 1e-3 mole;
  unit l_mM_cubed_per_s = (1e-3 mole)^3 / ((10 litre)^2 * 10 second); l_mM_cubed_per_s is "litre millimolar cubed per second";
  unit l_per_mM_squared_per_s = (10 litre)^3 / ((1e-3 mole)^2 * 10 second); l_per_mM_squared_per_s is "litre per millimolar squared per second";
  unit l_per_s = 10 litre / (10 second); l_per_s is "litre per second";
  unit mM = 1e-3 mole / (10 litre); mM is "millimolar";
  unit mM_per_s = 1e-3 mole / (10 litre * 10 second); mM_per_s is "millimolar per second";
  unit mM_squared = (1e-3 mole)^2 / (10 litre)^2; mM_squared is "millimolar squared";
  unit mmol_per_s = 1e-3 mole / (10 second); mmol_per_s is "millimole per second";
  unit mV = 1e-3 volt; mV is "millivolt";
  unit per_mM_per_s = 10 litre / (1e-3 mole * 10 second); per_mM_per_s is "per millimolar per second";
  unit per_mM_squared_per_s = (10 litre)^2 / ((1e-3 mole)^2 * 10 second); per_mM_squared_per_s is "per millimolar squared per second";
  unit per_mV = 1 / (1e-3 volt); per_mV is "per millivolt";
  unit per_s = 1 / (10 second); per_s is "per second";
end
