// SBML level 2 version 4

model Dan_2006_Glycolysis_Reduction()
  // This model originates from BioModels Database: A Database of Annotated Published Models. It is copyright (c) 2005-2011 The BioModels.net Team.
  // To the extent possible under law, all copyright and related or neighbouring rights to this encoded model have been dedicated to the public domain worldwide. Please refer to CC0 Public Domain Dedication for more information.
  // In summary, you are entitled to use this encoded model in absolutely any manner you deem suitable, verbatim, or with modification, alone or embedded it in a larger context, redistribute it, commercially or not, in a restricted way or not..
  // To cite BioModels Database, please use: Li C, Donizelli M, Rodriguez N, Dharuri H, Endler L, Chelliah V, Li L, He E, Henry A, Stefan MI, Snoep JL, Hucka M, Le Novère N, Laibe C (2010) BioModels Database: An enhanced, curated and annotated resource for published quantitative kinetic models. BMC Syst Biol., 4:92.
  // biomodels.db:MODEL5952308332
  // isDescribedBy pubmed:17010168
  // biomodels.db:MODEL5952308332
  // isDescribedBy pubmed:17010168
  // biomodels.db:MODEL5952308332
  // biomodels.db:MODEL5952308332

  // Compartments:
  compartment compartment = 1;

  // Species:
  species $source in compartment = 0;
  species GlcX in compartment = 6.719449;
  species Glc in compartment = 5;
  species ATP in compartment = 2.102839;
  species trioseP in compartment = 7.847434;
  species ADP in compartment = 1.49716;
  species NAD in compartment = 0.65;
  species BPG in compartment = 0.0002755111;
  species NADH in compartment = 0.3300002;
  species ACA in compartment = 8.332761;
  species ACAX in compartment = 1.312175;
  species $sink in compartment = 0;

  // Parameters:
  k0 = 2.82529;
  V1 = 49.1132;
  Ktrans = 0.04;
  V2 = 10.5992;
  q = 2.64;
  Ki = 1.24464;
  k3 = 10.2311;
  k4 = 126519;
  k5 = 17.2154;
  k6 = 3.2;
  k7 = 1.5115;
  k8 = 1.87206;
  k9 = 0.690539;
  k10 = 0.869329;
  Atot = 3.6;
  Ntot = 0.98;
  yvol = 59;
  GlcX0 = 24;

  // Reactions:
  vinGlc: $source -> ; k0/yvol*(GlcX0 - GlcX);  // modifiers: GlcX
  vGlcTrans: GlcX -> 59 Glc; V1/yvol*GlcX/(Ktrans + GlcX);
  vHKPFK: Glc + 2 ATP -> 2 trioseP + 2 ADP; V2*Glc*ATP/(1 + (ATP/Ki)^q);
  vGAPDH: trioseP + NAD -> BPG + NADH; k3*trioseP*NAD;
  vlowpart: BPG + 2 ADP -> ACA + 2 ATP; k4*BPG*ADP;
  vADH: ACA + NADH -> NAD; k5*ACA*NADH;
  vATPase: ATP -> ADP; k6*ATP;
  vstorage: Glc + 2 ATP -> 2 ADP; k7*Glc*ATP;
  vglycerol: trioseP + NADH -> NAD; k8*trioseP*NADH;
  vdifACA: 59 ACA -> ACAX; k9/yvol*(ACA - ACAX);
  voutACA: ACAX -> $sink; (k0 + k10)/yvol*ACAX;
end
