// SBML level 2 version 4

model Koster1988_Histone_Expression()
  // This model is described in the article:
  // Kinetics of histone gene expression during early development of Xenopus laevis.
  // Koster JG, Destrée OH and Westerhoff HV. J Theor Biol. 1988 Nov 21;135(2):139-67. PMID: 3267765
  // Abstract:
  // Using literature data for transcriptional and translational rate constants, gene copy numbers, DNA concentrations, and stability constants, we have calculated the expected concentrations of histones and histone mRNA during embryogenesis of Xenopus laevis. The results led us to conclude that: (i) for X. laevis the gene copy number of the histone genes is too low to ensure the synthesis of sufficient histones during very early development, inheritance from the oocyte of either histone protein or histone mRNA (but not necessarily both) is necessary; (ii) from the known storage of histones in the oocyte and the rates of histone synthesis determined by Adamson and Woodland (1977), there would be sufficient histones to structure the newly synthesized DNA up to gastrulation but not thereafter (these empirical rates of histone synthesis may be underestimates); (iii) on the other hand, the amount of H3 mRNA recently observed during early embryogenesis (Koster, 1987, Koster et al., 1988) could direct a higher and sufficient synthesis of H3 protein, also after gastrulation. We present a quantitative model that accounts both for the observed H3 mRNA concentration as a function of time during embryogenesis and for the synthesis of sufficient histones to structure the DNA throughout early embryogenesis. The model suggests that X. laevis exhibits a major (i.e. some 14-fold) reduction in transcription of histone genes approximately 11 hours after fertilization. This reduction could be due to a decrease in the number of transcribed histone genes, a decreased rate constant of transcription with continued transcription of all the histone genes, and/or a reduction in the time during the cell cycle in which histone mRNA synthesis takes place. Alternatively, the histone mRNA stability might decrease approximately 16-fold 11 hours after fertilization.
  // This model originates from BioModels Database: A Database of Annotated Published Models. It is copyright (c) 2005-2011 The BioModels.net Team.
  // To the extent possible under law, all copyright and related or neighbouring rights to this encoded model have been dedicated to the public domain worldwide. Please refer to CC0 Public Domain Dedication for more information.
  // In summary, you are entitled to use this encoded model in absolutely any manner you deem suitable, verbatim, or with modification, alone or embedded it in a larger context, redistribute it, commercially or not, in a restricted way or not..
  // To cite BioModels Database, please use: Li C, Donizelli M, Rodriguez N, Dharuri H, Endler L, Chelliah V, Li L, He E, Henry A, Stefan MI, Snoep JL, Hucka M, Le Novère N, Laibe C (2010) BioModels Database: An enhanced, curated and annotated resource for published quantitative kinetic models. BMC Syst Biol., 4:92.
  // biomodels.db:MODEL5954483266
  // isDescribedBy pubmed:3267765
  // biomodels.db:MODEL5954483266
  // isDescribedBy pubmed:3267765
  // biomodels.db:MODEL5954483266
  // biomodels.db:MODEL5954483266

  // Compartments:
  compartment cell = 1;

  // Species:
  species $DNA in cell; DNA is "H3_DNA";
  species RNA in cell = 570000000; RNA is "H3_RNA";
  species Prot in cell = 1.33e12; Prot is "H3_Protein";

  // Parameters:
  kRd = 0.231;
  kPs = 343;
  kPd = 0.0077;
  mProt = 15300;
  mDNA = 3.15e-12;
  wfr = 0.236;
  nA = 6.02e23;
  ktranscriptionattenuation = 14;
  coef = 3.6;
  nfac = 1;
  // number of His genes
  ng = 50;

  // Assignment rules:
  kRs := piecewise(540, time < 11.35, 540/ktranscriptionattenuation);
  DNA := piecewise(2, time < 0.917, piecewise(42.71828^(1.188*(time - 1.5)), (nfac == 0) || (time < 8.1), 1000*(10.1 + 12.1*(time - 8.1) + 4.02*(time - 8.1)^coef/100000)));

  // Reactions:
  v1: -> RNA; DNA*kRs*ng;  // modifiers: DNA
  v2: RNA -> ; kRd*RNA;
  v3: -> Prot; kPs*RNA;  // modifiers: RNA
  v4: Prot -> ; kPd*Prot;
end
