// SBML level 2 version 1

model MODEL5974712823()
  // FangeElf2006_MinSystem_MesoRD
  // To the extent possible under law, all copyright and related or neighbouring rights to this encoded model have been dedicated to the public domain worldwide. Please refer to CC0 Public Domain Dedication for more information.
  // In summary, you are entitled to use this encoded model in absolutely any manner you deem suitable, verbatim, or with modification, alone or embedded it in a larger context, redistribute it, commercially or not, in a restricted way or not.
  // To cite BioModels Database, please use: Li C, Donizelli M, Rodriguez N, Dharuri H, Endler L, Chelliah V, Li L, He E, Henry A, Stefan MI, Snoep JL, Hucka M, Le Novère N, Laibe C (2010) BioModels Database: An enhanced, curated and annotated resource for published quantitative kinetic models. BMC Syst Biol., 4:92.
  // biomodels.db:MODEL5974712823
  // isDescribedBy pubmed:16846247
  // biomodels.db:MODEL5974712823
  // isDescribedBy pubmed:16846247
  // biomodels.db:MODEL5974712823
  // isDescribedBy pubmed:16846247

  // Compartments:
  compartment cytosole;
  compartment membrane;

  // Species:
  species D_ADP1 in cytosole = 8.18e-7;  // substance in mole
  species D_ATP1 in cytosole = 8.18e-7;  // substance in mole
  species E1 in cytosole = 4.25e-7;  // substance in mole
  substanceOnly species D1 in cytosole = 0;  // substance in item
  substanceOnly species DE1 in cytosole = 0;  // substance in item
  species D_ADP2 in membrane = 8.18e-7;  // substance in mole
  species D_ATP2 in membrane = 8.18e-7;  // substance in mole
  species E2 in membrane = 4.25e-7;  // substance in mole
  substanceOnly species D2 in membrane = 0;  // substance in item
  substanceOnly species DE2 in membrane = 0;  // substance in item

  // Parameters:
  sigma_d = 0.0125 umps;
  sigma_dD = 9000000 pMps;
  sigma_de = 0.7 ps;
  sigma_E = 55800000 pMps;
  sigma_D_ADP_ATP = 0.5 ps;

  // Reactions:
  Reaction1: D_ATP2 => D2; sigma_d/size_subVolume*D_ATP2;
  Reaction2: D_ATP2 => D2; sigma_dD*D2*D_ATP2;
  Reaction3: D2 + E2 => DE2; sigma_E*E2*D2;
  Reaction4: DE2 => D_ADP2 + E2; sigma_de*DE2;
  Reaction5: D_ADP1 => D_ATP1; sigma_D_ADP_ATP*D_ADP1;
  Reaction5_2: D_ADP2 => D_ATP2; sigma_D_ADP_ATP*D_ADP2;

  // Unit definitions:
  unit um = 1e-6 metre;
  unit pMps = litre / (mole * second);
  unit cm2ps = (1e-4 metre)^2 / second;
  unit ps = 1 / second;
  unit umps = 1e-6 metre / second;
end
