// SBML level 2 version 3

model cell()
  // Qiao2007_MAPK_Signaling_Bistable
  // This model originates from BioModels Database: A Database of Annotated Published Models (http://www.ebi.ac.uk/biomodels/). It is copyright (c) 2005-2011 The BioModels.net Team.
  // To the extent possible under law, all copyright and related or neighbouring rights to this encoded model have been dedicated to the public domain worldwide. Please refer to CC0 Public Domain Dedication for more information.
  // In summary, you are entitled to use this encoded model in absolutely any manner you deem suitable, verbatim, or with modification, alone or embedded it in a larger context, redistribute it, commercially or not, in a restricted way or not..
  // To cite BioModels Database, please use: Li C, Donizelli M, Rodriguez N, Dharuri H, Endler L, Chelliah V, Li L, He E, Henry A, Stefan MI, Snoep JL, Hucka M, Le Novère N, Laibe C (2010) BioModels Database: An enhanced, curated and annotated resource for published quantitative kinetic models. BMC Syst Biol., 4:92.
  // biomodels.db:MODEL6185511733
  // isDescribedBy pubmed:17907797
  // biomodels.db:MODEL6185511733
  // isDescribedBy pubmed:17907797
  // biomodels.db:MODEL6185511733
  // biomodels.db:MODEL6185511733

  // Compartments:
  compartment compartment = 1;

  // Species:
  species K in compartment = 0;
  species KKPP in compartment = 0.399846;
  species KKKPP in compartment = 0;
  species KP in compartment = 0;
  species KPase in compartment = 0.2774316;
  species KPKPase in compartment = 0;
  species KPKKPP in compartment = 0;
  species KPP in compartment = 0.9669159;
  species KPPKPase in compartment = 0;

  // Parameters:
  a1 = 1870.653;
  d1 = 502.7544;
  k1 = 36.9557;
  a2 = 1477.693;
  d2 = 321.9814;
  k2 = 722.3609;
  a3 = 2583.106;
  d3 = 46.55499;
  k3 = 195.8074;
  a4 = 4351.507;
  d4 = 31.15705;
  k4 = 117.2583;

  // Reactions:
  J0: K + KKPP => KKKPP; a1*K*KKPP;
  J1: KKKPP => K + KKPP; d1*KKKPP;
  J2: KKKPP => KP + KKPP; k1*KKKPP;
  J3: KP + KPase => KPKPase; a2*KP*KPase;
  J4: KPKPase => KP + KPase; d2*KPKPase;
  J5: KPKPase => K + KPase; k2*KPKPase;
  J6: KP + KKPP => KPKKPP; a3*KP*KKPP;
  J7: KPKKPP => KP + KKPP; d3*KPKKPP;
  J8: KPKKPP => KPP + KKPP; k3*KPKKPP;
  J9: KPP + KPase => KPPKPase; a4*KPP*KPase;
  J10: KPPKPase => KPP + KPase; d4*KPPKPase;
  J11: KPPKPase => KP + KPase; k4*KPPKPase;
end
