// SBML level 2 version 3

model cell()
  // Qiao2007_MAPK_Signaling_Oscillatory
  // This model originates from BioModels Database: A Database of Annotated Published Models (http://www.ebi.ac.uk/biomodels/). It is copyright (c) 2005-2011 The BioModels.net Team.
  // To the extent possible under law, all copyright and related or neighbouring rights to this encoded model have been dedicated to the public domain worldwide. Please refer to CC0 Public Domain Dedication for more information.
  // In summary, you are entitled to use this encoded model in absolutely any manner you deem suitable, verbatim, or with modification, alone or embedded it in a larger context, redistribute it, commercially or not, in a restricted way or not..
  // To cite BioModels Database, please use: Li C, Donizelli M, Rodriguez N, Dharuri H, Endler L, Chelliah V, Li L, He E, Henry A, Stefan MI, Snoep JL, Hucka M, Le Novère N, Laibe C (2010) BioModels Database: An enhanced, curated and annotated resource for published quantitative kinetic models. BMC Syst Biol., 4:92.
  // biomodels.db:MODEL6185746832
  // isDescribedBy pubmed:17907797
  // biomodels.db:MODEL6185746832
  // isDescribedBy pubmed:17907797
  // biomodels.db:MODEL6185746832
  // biomodels.db:MODEL6185746832

  // Compartments:
  compartment compartment = 1;

  // Species:
  species KKK in compartment = 0;
  species E1 in compartment = 6.30957e-6;
  species KKKE1 in compartment = 0;
  species KKKS in compartment = 0.00743468337;
  species E2 in compartment = 0.00011836217;
  species KKKSE2 in compartment = 0;
  species KK in compartment = 0;
  species KK_KKKS in compartment = 0;
  species KKP in compartment = 0;
  species KKPase in compartment = 0.00119813544;
  species KKPKKPase in compartment = 0;
  species KKPKKKS in compartment = 0;
  species KKPP in compartment = 3.749177;
  species KKPPKKPase in compartment = 0;

  // Parameters:
  a1 = 412.7081;
  d1 = 37.94672;
  k1 = 151.965;
  a2 = 614.2355;
  d2 = 30.67782;
  k2 = 38.38638;
  a3 = 2747.661;
  d3 = 36.76161;
  k3 = 31.62067;
  a4 = 4429.317;
  d4 = 80.50728;
  k4 = 91.91933;
  a5 = 2127.557;
  d5 = 57.71927;
  k5 = 231.5773;
  a6 = 1519.119;
  d6 = 106.461;
  k6 = 191.8529;

  // Reactions:
  J0: KKK + E1 => KKKE1; a1*KKK*E1;
  J1: KKKE1 => E1 + KKK; d1*KKKE1;
  J2: KKKE1 => KKKS + E1; k1*KKKE1;
  J3: KKKS + E2 => KKKSE2; a2*KKKS*E2;
  J4: KKKSE2 => E2 + KKKS; d2*KKKSE2;
  J5: KKKSE2 => E2 + KKK; k2*KKKSE2;
  J6: KK + KKKS => KK_KKKS; a3*KK*KKKS;
  J7: KK_KKKS => KKKS + KK; d3*KK_KKKS;
  J8: KK_KKKS => KKKS + KKP; k3*KK_KKKS;
  J9: KKP + KKPase => KKPKKPase; a4*KKP*KKPase;
  J10: KKPKKPase => KKP + KKPase; d4*KKPKKPase;
  J11: KKPKKPase => KK + KKPase; k4*KKPKKPase;
  J12: KKP + KKKS => KKPKKKS; a5*KKP*KKKS;
  J13: KKPKKKS => KKP + KKKS; d5*KKPKKKS;
  J14: KKPKKKS => KKPP + KKKS; k5*KKPKKKS;
  J15: KKPP + KKPase => KKPPKKPase; a6*KKPP*KKPase;
  J16: KKPPKKPase => KKPP + KKPase; d6*KKPPKKPase;
  J17: KKPPKKPase => KKP + KKPase; k6*KKPPKKPase;
end
