// SBML level 2 version 1

model Hoefnagel2002_Glycolysis()
  // This model originates from BioModels Database: A Database of Annotated Published Models (http://www.ebi.ac.uk/biomodels/). It is copyright (c) 2005-2011 The BioModels.net Team.
  // To the extent possible under law, all copyright and related or neighbouring rights to this encoded model have been dedicated to the public domain worldwide. Please refer to CC0 Public Domain Dedication for more information.
  // In summary, you are entitled to use this encoded model in absolutely any manner you deem suitable, verbatim, or with modification, alone or embedded it in a larger context, redistribute it, commercially or not, in a restricted way or not..
  // To cite BioModels Database, please use: Li C, Donizelli M, Rodriguez N, Dharuri H, Endler L, Chelliah V, Li L, He E, Henry A, Stefan MI, Snoep JL, Hucka M, Le Novère N, Laibe C (2010) BioModels Database: An enhanced, curated and annotated resource for published quantitative kinetic models. BMC Syst Biol., 4:92.
  // biomodels.db:MODEL6624091635
  // isDescribedBy pubmed:12241048
  // biomodels.db:MODEL6624091635
  // isDescribedBy pubmed:12241048
  // biomodels.db:MODEL6624091635
  // biomodels.db:MODEL6624091635

  // Compartments:
  compartment uVol = 1;

  // Species:
  species $Gluc in uVol = 2/uVol;
  species $Lac in uVol = 0.1/uVol;
  species $ACETOUT in uVol = 0.1/uVol;
  species $BUT in uVol = 0;
  species $FR in uVol = 0.02/uVol;
  species $AC in uVol = 0.02/uVol;
  species $ETOH in uVol = 0;
  species $O2 in uVol = 0.1/uVol;
  species $UDP in uVol = 0.1/uVol;
  species $TDP in uVol = 0.1/uVol;
  species $Cellwall in uVol = 1e-5/uVol;
  species F6P in uVol = 0.7/uVol;
  species ATP in uVol = 5/uVol;
  species FBP in uVol = 30/uVol;
  species G3P in uVol = 1/uVol;
  species DHAP in uVol = 11/uVol;
  species NAD in uVol = 5.2/uVol;
  species DPG in uVol = 0.1/uVol;
  species P3G in uVol = 20/uVol;
  species P2G in uVol = 1.8/uVol;
  species PYR in uVol = 0.3/uVol;
  species COA in uVol = 0.89/uVol;
  species P in uVol = 5/uVol;
  species ACP in uVol = 0.03145/uVol;
  species ACAL in uVol = 0.11/uVol;
  species G1P in uVol = 0.02/uVol;
  species Glucin in uVol = 1e-5/uVol;
  species ACLAC in uVol = 0.01/uVol;
  species ACET in uVol = 0.1/uVol;
  species PEP in uVol = 0.05/uVol;
  species ACCOA in uVol = 0.11/uVol;
  species ADP in uVol = 5/uVol;
  species NADH in uVol = 0.35/uVol;
  species G6P in uVol = 3/uVol;

  // Reactions:
  v1: PEP + $Gluc -> PYR + G6P; Vmax1*(Gluc/km1Gluc)*(PEP/km1PEP)/((1 + Gluc/km1Gluc + G6P/km1G6P)*(1 + PEP/km1PEP + PYR/km1PYR));
    Vmax1 = 160; km1Gluc = 0.015; km1PEP = 0.3; km1G6P = 500; km1PYR = 2;
  v2: G6P -> F6P; Vmax2*(G6P/km2G6P)*(1 - F6P/(G6P*Keq2))/(1 + G6P/km2G6P + F6P/km2F6P);
    Vmax2 = 1280; km2G6P = 1.5; Keq2 = 0.314; km2F6P = 0.2;
  v3: ATP + F6P -> ADP + FBP; Vmax3*(1 - PEP^n3PEP/(k3PEP^n3PEP + PEP^n3PEP))*1*(F6P^n3/km3F6P^n3)*(ATP/km3ATP)/((1 + F6P^n3/km3F6P^n3 + FBP/km3FBP)*(1 + ATP/km3ATP + ADP/km3ADP));  // modifiers: PEP
    Vmax3 = 227; n3PEP = 1; k3PEP = 2; n3 = 2.9; km3F6P = 0.25; km3ATP = 0.18; km3FBP = 5.8; km3ADP = 0.3;
  v4: FBP -> DHAP + G3P; Vmax4*FBP/K4FBP*(1 - G3P*DHAP/(FBP*Keq4))/(1 + FBP/K4FBP + DHAP/K4DHAP + G3P/K4G3P + FBP*G3P/(K4FBP*Ki4G3P) + DHAP*G3P/(K4DHAP*K4G3P));
    Vmax4 = 1100; K4FBP = 0.17; Keq4 = 0.056; K4DHAP = 0.13; K4G3P = 0.03; Ki4G3P = 0.23;
  v5: DHAP -> G3P; Vmax5*(DHAP/km5DHAP)*(1 - G3P/(DHAP*Keq5))/(1 + DHAP/km5DHAP + G3P/km5G3P);
    Vmax5 = 17500; km5DHAP = 2.8; Keq5 = 0.045; km5G3P = 0.3;
  v6: P + NAD + G3P -> NADH + DPG; Vmax6*(1 - DPG*NADH/(G3P*NAD*P*Keq6))*(G3P/km6G3P)*(NAD/km6NAD)*(P/km6P)/((1 + G3P/km6G3P + DPG/km6DPG)*(1 + P/km6P)*(1 + NAD/km6NAD + NADH/km6NADH));
    Vmax6 = 4984; Keq6 = 0.0007; km6G3P = 0.25; km6NAD = 0.2; km6P = 2.35; km6DPG = 0.05; km6NADH = 0.067;
  v7: ADP + DPG -> ATP + P3G; Vmax7*(DPG/km7DPG)*(ADP/km7ADP)*(1 - P3G*ATP/(DPG*ADP*Keq7))/((1 + DPG/km7DPG + P3G/km7P3G)*(1 + ADP/km7ADP + ATP/km7ATP));
    Vmax7 = 920; km7DPG = 0.003; km7ADP = 0.2; Keq7 = 3200; km7P3G = 0.53; km7ATP = 0.3;
  v8: P3G -> P2G; Vmax8*(P3G/km8P3G)*(1 - P2G/(P3G*Keq8))/(1 + P3G/km8P3G + P2G/km8P2G);
    Vmax8 = 1340; km8P3G = 1.2; Keq8 = 0.1; km8P2G = 0.1;
  v9: P2G -> PEP; Vmax9*(P2G/km9P2G)*(1 - PEP/(P2G*Keq9))/(1 + P2G/km9P2G + PEP/km9PEP);
    Vmax9 = 1600; km9P2G = 0.04; Keq9 = 4.6; km9PEP = 0.5;
  v10: ADP + PEP -> ATP + PYR; Vmax10*(PEP/km10PEP)^n10*(ADP/km10ADP)*(1 - PYR*ATP/(PEP*ADP*Keq10))/((1 + (PEP/km10PEP)^n10 + PYR/km10PYR)*(1 + ADP/km10ADP + ATP/km10ATP))*(1/(1 + P^3/(Ki10*(1 + FBP/K10FBP + G6P/K10G6P)^3)));  // modifiers: P, FBP, G6P
    Vmax10 = 2030; km10PEP = 0.17; n10 = 1.4; km10ADP = 1; Keq10 = 6500; km10PYR = 21; km10ATP = 10; Ki10 = 0.77; K10FBP = 9.1; K10G6P = 0.48;
  v11: NADH + PYR -> NAD + $Lac; FBP/(FBP + k11FBP)*Vmax11*(PYR/km11PYR)*(NADH/km11NADH)*(1 - Lac*NAD/(PYR*NADH*Keq11))/((1 + PYR/km11PYR + Lac/km11Lac)*(1 + NADH/km11NADH + NAD/km11NAD));  // modifiers: FBP
    k11FBP = 0.003; Vmax11 = 3300; km11PYR = 1.5; km11NADH = 0.2; Keq11 = 360000; km11Lac = 100; km11NAD = 2.4;
  v12: 2 PYR -> ACLAC; Vmax12*(PYR/K12PYR)*(1 - ACLAC/(PYR*Keq12))*(PYR/K12PYR + ACLAC/K12ACLAC)^(h12 - 1)/(1 + (PYR/K12PYR + ACLAC/K12ACLAC)^h12);
    Vmax12 = 600; K12PYR = 50; Keq12 = 900000; K12ACLAC = 100; h12 = 2.4;
  v13: ACLAC -> ACET; Vmax13*ACLAC/Km13ACLAC*(1 - ACET/(ACLAC*Keq13))*(ACLAC/Km13ACLAC + ACET/Km13ACET)^(h13 - 1)/(1 + (ACLAC/Km13ACLAC + ACET/Km13ACET)^h13);
    Vmax13 = 106; Km13ACLAC = 10; Keq13 = 900000; Km13ACET = 100; h13 = 1;
  v14: ACET -> $ACETOUT; Vmax14*(ACET/Km14ACET)/(1 + ACET/Km14ACET);
    Vmax14 = 83.3; Km14ACET = 5;
  v15: ACLAC -> ACET; Vmax15*ACLAC;
    Vmax15 = 0.0003;
  v16: NADH + ACET -> NAD + $BUT; Vmax16*(ACET/km16ACET)*(NADH/km16NADH)*(1 - BUT*NAD/(ACET*NADH*Keq16))/((1 + ACET/km16ACET + BUT/km16BUT)*(1 + NADH/km16NADH + NAD/km16NAD));
    Vmax16 = 43.3; km16ACET = 0.06; km16NADH = 0.02; Keq16 = 1400; km16BUT = 2.6; km16NAD = 0.16;
  v17: COA + PYR -> ACCOA + $FR; Vmax17*(PYR/km17PYR)*(COA/km17COA)*(1 - FR*ACCOA/(PYR*COA*Keq17))/((1 + (G3P + DHAP)/ki17)*(1 + PYR/km17PYR + FR/km17FOR)*(1 + COA/km17COA + ACCOA/km17ACCOA));  // modifiers: G3P, DHAP
    Vmax17 = 114; km17PYR = 1; km17COA = 0.007; Keq17 = 650; ki17 = 0.2; km17FOR = 24; km17ACCOA = 0.05;
  v18: P + ACCOA -> COA + ACP; Vmax18*(ACCOA/km18ACCOA)*(P/km18P)*(1 - ACP*COA/(ACCOA*P*Keq18))/((1 + ACCOA/km18ACCOA + ACP/km18ACP)*(1 + P/km18P + COA/km18COA));
    Vmax18 = 720; km18ACCOA = 0.06; km18P = 5; Keq18 = 0.0281; km18ACP = 0.48; km18COA = 0.1;
  v19: ADP + ACP -> ATP + $AC; Vmax19*(ACP/km19ACP)*(ADP/km19ADP)*(1 - AC*ATP/(ACP*ADP*Keq19))/((1 + ACP/km19ACP + AC/km19AC)*(1 + ADP/km19ADP + ATP/km19ATP));
    Vmax19 = 500; km19ACP = 0.16; km19ADP = 0.5; Keq19 = 174.22; km19AC = 7; km19ATP = 7;
  v20: COA + NAD + PYR -> ACCOA + NADH; Vmax20*(PYR/k20PYR)*(NAD/k20NAD)*(COA/k20COA)/((1 + PYR/k20PYR)*(1 + NAD/k20NAD + NADH/k20NADH)*(1 + COA/k20COA + ACCOA/k20ACCOA))*(1/(1 + Ki20*(NADH/NAD)));
    Vmax20 = 60; k20PYR = 1; k20NAD = 0.4; k20COA = 0.014; k20NADH = 0.1; k20ACCOA = 0.008; Ki20 = 49.36;
  v21: ACCOA + NADH -> ACAL + COA + NAD; (Vmax21*NADH*ACCOA/(K21NADH*K21ACCOA) - Vmax21*NAD*COA*ACAL/(K21NADH*K21ACCOA*KEQ21))/((1 + NADH/K21NADH + NAD/K21NAD)*(1 + ACCOA/K21ACCOA + COA/K21COA)*(1 + ACAL/K21ACAL));
    Vmax21 = 100; K21NADH = 0.025; K21ACCOA = 0.007; KEQ21 = 1; K21NAD = 0.08; K21COA = 0.008; K21ACAL = 10;
  v22: NADH + ACAL -> NAD + $ETOH; Vmax22*(ACAL/km22ACAL)*(NADH/km22NADH)*(1 - ETOH*NAD/(ACAL*NADH*Keq22))/((1 + ACAL/km22ACAL + ETOH/km22ETOH)*(1 + NADH/km22NADH + NAD/km22NAD));
    Vmax22 = 270; km22ACAL = 0.03; km22NADH = 0.05; Keq22 = 12355; km22ETOH = 1; km22NAD = 0.08;
  v23: ATP -> P + ADP; Vmax23*(ATP/ADP)^N23/(K23ATP^N23 + (ATP/ADP)^N23);
    Vmax23 = 1000; N23 = 2.58; K23ATP = 6.196;
  v24: $O2 + NADH -> NAD; Vmax24*NADH/KM24OXNADH*O2/KM24OXO/((1 + NADH/KM24OXNADH + NAD/KM24OXNAD)*(1 + O2/KM24OXO));
    Vmax24 = 30; KM24OXNADH = 0.041; KM24OXO = 0.01; KM24OXNAD = 0.2;
  v25: FBP -> P + F6P; Vmax25*(FBP/km25FBP)/(1 + FBP/km25FBP + F6P/km25F6P);
    Vmax25 = 0.01; km25FBP = 10; km25F6P = 2;
  v26: G6P -> P + Glucin; Vmax26*(G6P/K26G6P)/(1 + G6P/K26G6P);
    Vmax26 = 0.1; K26G6P = 20;
  v27: G6P -> G1P; Vmax27*(G6P/km27G6P)*(1 - G1P/(G6P*Keq27))/(1 + G6P/km27G6P + G1P/km27G1P);
    Vmax27 = 35; km27G6P = 0.05; Keq27 = 0.0585; km27G1P = 0.004;
  v28: 2 $TDP + 3 $UDP + 2 NADH + 5 ATP + 5 G1P -> $Cellwall + 2 NAD + 10 P + 5 ADP; Vmax28*(G1P/k28g1p)*(ATP/k28atp)*(NADH/k28nadh)/((1 + G1P/k28g1p + P/k28p)*(1 + ATP/k28atp + ADP/k28ADP)*(1 + NADH/k28nadh + NAD/k28nad));
    Vmax28 = 10; k28g1p = 0.05; k28atp = 7; k28nadh = 0.02; k28p = 30; k28ADP = 1; k28nad = 1;
  v29: ATP + Glucin -> ADP + G6P; Vmax29*(Glucin/km29Glucin)*(ATP/km29ATP)/((1 + Glucin/km29Glucin + G6P/km29G6P)*(1 + ATP/km29ATP + ADP/km29ADP));
    Vmax29 = 60; km29Glucin = 0.2; km29ATP = 0.05; km29G6P = 5; km29ADP = 5;
end
