// SBML level 2 version 3

model aguda_1999_b_version01()
  // Aguda1999_G2_Damage_Checkpoint
  // This a model from the article:
  // A quantitative analysis of the kinetics of the G(2) DNA damage checkpoint system.
  // Aguda BD. PNAS (1999) 96(20) pp 11352-7; Pubmed ID: 10500180 , full text at PubMed Central.
  // Abstract:
  // A detailed model of the G2 DNA damage checkpoint (G2DDC) system is presented that includes complex regulatory networks of the mitotic kinase Cdc2, phosphatase Cdc25, Wee1 kinase, and damage signal transduction pathways involving Chk1 and p53. Assumptions on the kinetic equations of the G2DDC are made, and computer simulations are carried out to demonstrate how the various subsystems operate to delay or arrest cell cycle progression. The detailed model could be used to explain various experiments relevant to G2DDC reported recently, including the nuclear export of 14–3–3-bound Cdc25, the down-regulation of cyclin B1 expression by p53, the effect of Chk1 and p53 on Cdc25 levels, and Wee1 degradation. It also is shown that, under certain conditions, p53 is necessary to sustain a G2 arrest.
  // This model was taken from the CellML repository and automatically converted to SBML.
  // The original model was: Aguda 1999, version02
  // The original CellML model was created by:
  // Lim, Jeelean
  // jlim063(at)aucklanduni.ac.nz
  // The University of Auckland
  // Auckland Bioengineering Institute
  // This model originates from BioModels Database: A Database of Annotated Published Models (http://www.ebi.ac.uk/biomodels/). It is copyright (c) 2005-2011 The BioModels.net Team.
  // To the extent possible under law, all copyright and related or neighbouring rights to this encoded model have been dedicated to the public domain worldwide. Please refer to CC0 Public Domain Dedication for more information.
  // In summary, you are entitled to use this encoded model in absolutely any manner you deem suitable, verbatim, or with modification, alone or embedded it in a larger context, redistribute it, commercially or not, in a restricted way or not..
  // To cite BioModels Database, please use: Li C, Donizelli M, Rodriguez N, Dharuri H, Endler L, Chelliah V, Li L, He E, Henry A, Stefan MI, Snoep JL, Hucka M, Le Novère N, Laibe C (2010) BioModels Database: An enhanced, curated and annotated resource for published quantitative kinetic models. BMC Syst Biol., 4:92.
  // biomodels.db:MODEL6960055446
  // isDescribedBy pubmed:10500180
  // biomodels.db:MODEL6960055446
  // isDescribedBy pubmed:10500180
  // biomodels.db:MODEL6960055446
  // biomodels.db:MODEL6960055446

  // Compartments:
  compartment Compartment = 1 litre;

  // Parameters:
  k1 = 1 first_order_rate_constant;
  kn1 = 10 first_order_rate_constant;
  k2 = 0.01 first_order_rate_constant;
  kn2 = 0.01 first_order_rate_constant;
  k2_ = 0.01 first_order_rate_constant;
  k3_ = 100 first_order_rate_constant;
  kn3_ = 0 first_order_rate_constant;
  k4 = 0 first_order_rate_constant;
  k5 = 1 first_order_rate_constant;
  k6 = 0.01 first_order_rate_constant;
  k7 = 1 first_order_rate_constant;
  kn7 = 0.01 first_order_rate_constant;
  k8 = 0.1 first_order_rate_constant;
  kn8 = 1 first_order_rate_constant;
  k8_ = 0 first_order_rate_constant;
  k9 = 1 first_order_rate_constant;
  kn9 = 1 first_order_rate_constant;
  k9_ = 0 first_order_rate_constant;
  k10 = 0 first_order_rate_constant;
  k11 = 1 first_order_rate_constant;
  k12 = 0.1 first_order_rate_constant;
  k13 = 1 first_order_rate_constant;
  k14 = 0.0005 first_order_rate_constant;
  k14_ = 1 first_order_rate_constant;
  k15 = 0.01 first_order_rate_constant;
  k16 = 0.0002 first_order_rate_constant;
  k17 = 0.01 first_order_rate_constant;
  k18 = 1 first_order_rate_constant;
  kn18 = 0.01 first_order_rate_constant;
  k20 = 0.1 first_order_rate_constant;
  k21 = 0.01 first_order_rate_constant;
  k22 = 0.1 first_order_rate_constant;
  k23 = 0.1 first_order_rate_constant;
  kn23 = 1 first_order_rate_constant;
  kPlk1 = 0 first_order_rate_constant;
  kPlk1_ = 0 first_order_rate_constant;
  kctak1 = 0 first_order_rate_constant;
  kctak1_ = 0 first_order_rate_constant;
  Chk1P = 1e-6 dimensionless;
  Rad3 = 0 dimensionless;
  p53 = 0 dimensionless;
  preMPF = 1e-6 dimensionless;
  MPF = 1e-8 dimensionless;
  p21 = 0 dimensionless;
  p21_MPF = 0 dimensionless;
  iCdc25 = 1e-6 dimensionless;
  iCdc25Ps216 = 2e-5 dimensionless;
  iCdc25Ps216_protein1433 = 0.03 dimensionless;
  aCdc25 = 1e-6 dimensionless;
  aCdc25Ps216 = 0 dimensionless;
  protein1433 = 2 dimensionless;
  Wee1 = 0.001 dimensionless;
  Wee1P = 0 dimensionless;
  aCdc25_T has dimensionless;
  V_1 has first_order_rate_constant;
  Chk1 has dimensionless;
  Chk1_T = 1 dimensionless;
  V_n1 has first_order_rate_constant;
  V_2 has first_order_rate_constant;
  V_n2 has first_order_rate_constant;
  V_2_ has first_order_rate_constant;
  V_3_ has first_order_rate_constant;
  V_n3_ has first_order_rate_constant;
  V_4 has first_order_rate_constant;
  V_5 has first_order_rate_constant;
  V_6 has first_order_rate_constant;
  V_7 has first_order_rate_constant;
  V_n7 has first_order_rate_constant;
  V_8 has first_order_rate_constant;
  V_n8 has first_order_rate_constant;
  V_9 has first_order_rate_constant;
  V_n9 has first_order_rate_constant;
  V_10 has first_order_rate_constant;
  V_11 has first_order_rate_constant;
  V_12 has first_order_rate_constant;
  V_13 has first_order_rate_constant;
  V_14 has first_order_rate_constant;
  V_15 has first_order_rate_constant;
  V_16 has first_order_rate_constant;
  V_17 has first_order_rate_constant;
  V_18 has first_order_rate_constant;
  V_n18 has first_order_rate_constant;
  V_20 has first_order_rate_constant;
  V_21 has first_order_rate_constant;
  V_22 has first_order_rate_constant;
  V_23 has first_order_rate_constant;
  V_n23 has first_order_rate_constant;

  // Assignment rules:
  aCdc25_T := aCdc25 + aCdc25Ps216;
  Chk1 := Chk1_T - Chk1P;
  V_1 := k1*Chk1*Rad3;
  V_n1 := kn1*Chk1P;
  V_2 := k2*Chk1P*aCdc25 + kctak1*aCdc25;
  V_n2 := kn2*aCdc25Ps216;
  V_2_ := k2_*Chk1P*iCdc25 + kctak1_*iCdc25;
  V_3_ := k3_*iCdc25Ps216*protein1433;
  V_n3_ := kn3_*iCdc25Ps216_protein1433;
  V_4 := k4;
  V_5 := k5*Rad3;
  V_6 := k6*p53;
  V_7 := k7*MPF*iCdc25 + kPlk1*iCdc25;
  V_n7 := kn7*aCdc25;
  V_8 := k8*MPF*Wee1 + k8_*Wee1;
  V_n8 := kn8*Wee1P;
  V_9 := k9*(aCdc25 + aCdc25Ps216)*preMPF + k9_*preMPF;
  V_n9 := kn9*MPF*Wee1;
  V_10 := k10;
  V_11 := k11*p53;
  V_12 := k12*protein1433;
  V_13 := k13;
  V_14 := k14/(1 + k14_*p53)*1;
  V_15 := k15*MPF^2;
  V_16 := k16;
  V_17 := k17*Wee1P;
  V_18 := k18*MPF*iCdc25Ps216 + kPlk1_*iCdc25Ps216;
  V_n18 := kn18*aCdc25Ps216;
  V_20 := k20*p53;
  V_21 := k21;
  V_22 := k22*p21;
  V_23 := k23*MPF*p21;
  V_n23 := kn23*p21/MPF;

  // Rate rules:
  Chk1P' = V_1 - V_n1;
  Rad3' = V_4 - V_5;
  p53' = V_10 - V_11;
  preMPF' = V_14 + V_n9 - V_9;
  MPF' = V_9 + V_n23 - (V_n9 + V_23 + V_15);
  p21' = V_20 + V_21 + V_n23 - (V_22 + V_23);
  p21_MPF' = V_23 - V_n23;
  iCdc25' = V_n7 + V_n3_ - (V_7 + V_2_);
  iCdc25Ps216' = V_2_ + V_n18 - (V_18 + V_3_);
  iCdc25Ps216_protein1433' = V_3_ - V_n3_;
  aCdc25' = V_7 + V_n2 - (V_n7 + V_2);
  aCdc25Ps216' = V_2 + V_18 - (V_n2 + V_n18);
  protein1433' = V_6 + V_13 + V_n3_ - (V_3_ + V_12);
  Wee1' = V_16 + V_n8 - V_8;
  Wee1P' = V_8 - (V_n8 + V_17);

  // Unit definitions:
  unit millimolar = 1e-3 mole / litre;
  unit minute = 60 second;
  unit first_order_rate_constant = 1 / (60 second);
  unit time = 60 second;
end
