// SBML level 2 version 3

model zhang_2000()
  // Zhang2000_Peripheral_Sinoatrial_Node
  // This the model describing the action potentials of the peripheral rabbit sinoatrial node from the article:
  // Mathematical models of action potentials in the periphery and center of the rabbit sinoatrial node.
  // Mathematical models of action potentials in the periphery and center of the rabbit sinoatrial node. Am J Physiol Heart Circ Physiol. 2000 Jul;279(1):H397-421. Pubmed ID: 10899081 , full text at AJP - Heart and Circulatory Physiology.
  // Abstract:
  // Mathematical models of the action potential in the periphery and center of the rabbit sinoatrial (SA) node have been developed on the basis of published experimental data. Simulated action potentials are consistent with those recorded experimentally: the model-generated peripheral action potential has a more negative takeoff potential, faster upstroke, more positive peak value, prominent phase 1 repolarization, greater amplitude, shorter duration, and more negative maximum diastolic potential than the model-generated central action potential. In addition, the model peripheral cell shows faster pacemaking. The models behave qualitatively the same as tissue from the periphery and center of the SA node in response to block of tetrodotoxin-sensitive Na(+) current, L- and T-type Ca(2+) currents, 4-aminopyridine-sensitive transient outward current, rapid and slow delayed rectifying K(+) currents, and hyperpolarization-activated current. A one-dimensional model of a string of SA node tissue, incorporating regional heterogeneity, coupled to a string of atrial tissue has been constructed to simulate the behavior of the intact SA node. In the one-dimensional model, the spontaneous action potential initiated in the center propagates to the periphery at approximately 0.06 m/s and then into the atrial muscle at 0.62 m/s.
  // This model was taken from the CellML repository and automatically converted to SBML.
  // The original model was: Zhang, Holden, Kodama, Honjo, Lei, Varghese, Boyett, 2000, version03
  // The original CellML model was created and curated by:
  // Garny, Alan
  // alan.garny(at)dpag.ox.ac.uk
  // University of Oxford
  // This model originates from BioModels Database: A Database of Annotated Published Models (http://www.ebi.ac.uk/biomodels/). It is copyright (c) 2005-2011 The BioModels.net Team.
  // To the extent possible under law, all copyright and related or neighbouring rights to this encoded model have been dedicated to the public domain worldwide. Please refer to CC0 Public Domain Dedication for more information.
  // In summary, you are entitled to use this encoded model in absolutely any manner you deem suitable, verbatim, or with modification, alone or embedded it in a larger context, redistribute it, commercially or not, in a restricted way or not..
  // To cite BioModels Database, please use: Li C, Donizelli M, Rodriguez N, Dharuri H, Endler L, Chelliah V, Li L, He E, Henry A, Stefan MI, Snoep JL, Hucka M, Le Novère N, Laibe C (2010) BioModels Database: An enhanced, curated and annotated resource for published quantitative kinetic models. BMC Syst Biol., 4:92.
  // biomodels.db:MODEL6962035527
  // isDescribedBy pubmed:10899081
  // biomodels.db:MODEL6962035527
  // isDescribedBy pubmed:10899081
  // biomodels.db:MODEL6962035527
  // biomodels.db:MODEL6962035527

  // Compartments:
  compartment Compartment = 1 litre;

  // Parameters:
  dCell = 0 dimensionless;
  FCell_membrane has dimensionless;
  V_membrane = -39.01356 millivolt;
  R = 8314 millijoule_per_mole_kelvin;
  T = 310 kelvin;
  F = 96845 coulomb_per_mole;
  Cm has microF;
  CmCentre = 2e-5 microF;
  CmPeriphery = 6.5e-5 microF;
  i_Na has nanoA;
  g_Na has microlitre_per_second;
  g_Na_Centre = 0 microlitre_per_second;
  g_Na_Periphery = 1.2e-6 microlitre_per_second;
  m = 0.0923617 dimensionless;
  m_infinity has dimensionless;
  tau_m has second;
  V_sodium_current_m_gate has millivolt;
  time_sodium_current_m_gate has second;
  h has dimensionless;
  F_Na has dimensionless;
  h1 = 0.01590538 dimensionless;
  h2 = 0.01445216 dimensionless;
  h1_infinity has dimensionless;
  h2_infinity has dimensionless;
  tau_h1 has second;
  tau_h2 has second;
  V_sodium_current_h_gate has millivolt;
  time_sodium_current_h_gate has second;
  i_Ca_L has nanoA;
  g_Ca_L_Centre = 0.0058 microS;
  g_Ca_L_Periphery = 0.0659 microS;
  g_Ca_L has microS;
  E_Ca_L = 46.4 millivolt;
  FCell_L_type_Ca_channel_d_gate has dimensionless;
  d_L = 0.04804901 dimensionless;
  alpha_d_L has per_second;
  beta_d_L has per_second;
  d_L_infinity has dimensionless;
  tau_d_L has second;
  V_L_type_Ca_channel_d_gate has millivolt;
  time_L_type_Ca_channel_d_gate has second;
  FCell_L_type_Ca_channel_f_gate has dimensionless;
  f_L = 0.4877985 dimensionless;
  alpha_f_L has per_second;
  beta_f_L has per_second;
  f_L_infinity has dimensionless;
  tau_f_L has second;
  V_L_type_Ca_channel_f_gate has millivolt;
  time_L_type_Ca_channel_f_gate has second;
  i_Ca_T has nanoA;
  g_Ca_T_Centre = 0.0043 microS;
  g_Ca_T_Periphery = 0.0139 microS;
  g_Ca_T has microS;
  E_Ca_T = 45 millivolt;
  d_T = 0.4207405 dimensionless;
  alpha_d_T has per_second;
  beta_d_T has per_second;
  d_T_infinity has dimensionless;
  tau_d_T has second;
  V_T_type_Ca_channel_d_gate has millivolt;
  time_T_type_Ca_channel_d_gate has second;
  FCell_T_type_Ca_channel_f_gate has dimensionless;
  f_T = 0.03896842 dimensionless;
  alpha_f_T has per_second;
  beta_f_T has per_second;
  f_T_infinity has dimensionless;
  tau_f_T has second;
  V_T_type_Ca_channel_f_gate has millivolt;
  time_T_type_Ca_channel_f_gate has second;
  i_to has nanoA;
  i_sus has nanoA;
  g_to_Centre = 0.00491 microS;
  g_to_Periphery = 0.03649 microS;
  g_to has microS;
  g_sus_Centre = 6.65e-5 microS;
  g_sus_Periphery = 0.0114 microS;
  g_sus has microS;
  FCell_four_AP_sensitive_currents_q_gate has dimensionless;
  q = 0.2976054 dimensionless;
  q_infinity has dimensionless;
  tau_q has second;
  V_four_AP_sensitive_currents_q_gate has millivolt;
  time_four_AP_sensitive_currents_q_gate has second;
  r = 0.06440295 dimensionless;
  r_infinity has dimensionless;
  tau_r has second;
  V_four_AP_sensitive_currents_r_gate has millivolt;
  time_four_AP_sensitive_currents_r_gate has second;
  i_K_r has nanoA;
  g_K_r_Centre = 0.000797 microS;
  g_K_r_Periphery = 0.016 microS;
  g_K_r has microS;
  P_a has dimensionless;
  P_af = 0.130342 dimensionless;
  P_af_infinity has dimensionless;
  tau_P_af has second;
  V_rapid_delayed_rectifying_potassium_current_P_af_gate has millivolt;
  time_rapid_delayed_rectifying_potassium_current_P_af_gate has second;
  P_as = 0.4696096 dimensionless;
  P_as_infinity has dimensionless;
  tau_P_as has second;
  V_rapid_delayed_rectifying_potassium_current_P_as_gate has millivolt;
  time_rapid_delayed_rectifying_potassium_current_P_as_gate has second;
  P_i = 0.8799338 dimensionless;
  P_i_infinity has dimensionless;
  tau_P_i = 0.002 second;
  V_rapid_delayed_rectifying_potassium_current_P_i_gate has millivolt;
  time_rapid_delayed_rectifying_potassium_current_P_i_gate has second;
  i_K_s has nanoA;
  g_K_s_Centre = 0.000518 microS;
  g_K_s_Periphery = 0.0104 microS;
  g_K_s has microS;
  xs = 0.08229383 dimensionless;
  alpha_xs has per_second;
  beta_xs has per_second;
  V_slow_delayed_rectifying_potassium_current_xs_gate has millivolt;
  time_slow_delayed_rectifying_potassium_current_xs_gate has second;
  i_f_Na has nanoA;
  i_f_K has nanoA;
  g_f_Na_Centre = 0.000548 microS;
  g_f_Na_Periphery = 0.0069 microS;
  g_f_Na has microS;
  g_f_K_Centre = 0.000548 microS;
  g_f_K_Periphery = 0.0069 microS;
  g_f_K has microS;
  y = 0.03889292 dimensionless;
  alpha_y has per_second;
  beta_y has per_second;
  V_hyperpolarisation_activated_current_y_gate has millivolt;
  time_hyperpolarisation_activated_current_y_gate has second;
  i_b_Na has nanoA;
  g_b_Na_Centre = 5.8e-5 microS;
  g_b_Na_Periphery = 0.000189 microS;
  g_b_Na has microS;
  i_b_K has nanoA;
  g_b_K_Centre = 2.52e-5 microS;
  g_b_K_Periphery = 8.19e-5 microS;
  g_b_K has microS;
  i_b_Ca has nanoA;
  g_b_Ca_Centre = 1.32e-5 microS;
  g_b_Ca_Periphery = 4.3e-5 microS;
  g_b_Ca has microS;
  i_NaCa has nanoA;
  k_NaCa_Centre = 2.7e-6 nanoA;
  k_NaCa_Periphery = 8.8e-6 nanoA;
  k_NaCa has nanoA;
  d_NaCa = 0.0001 dimensionless;
  gamma_NaCa = 0.5 dimensionless;
  i_p has nanoA;
  K_m_Na = 5.64 millimolar;
  K_m_K = 0.621 millimolar;
  i_p_max_Centre = 0.0478 nanoA;
  i_p_max_Periphery = 0.16 nanoA;
  i_p_max has nanoA;
  i_Ca_p has nanoA;
  i_Ca_p_max_Centre = 0 nanoA;
  i_Ca_p_max_Periphery = 0 nanoA;
  i_Ca_p_max has nanoA;
  Na_i = 8 millimolar;
  Na_o = 140 millimolar;
  Ca_i = 0.0001 millimolar;
  Ca_o = 2 millimolar;
  K_i = 140 millimolar;
  K_o = 5.4 millimolar;
  E_Na has millivolt;
  E_K has millivolt;
  E_K_s has millivolt;
  E_Ca has millivolt;

  // Assignment rules:
  FCell_membrane := 1.07*(3*dCell - 0.1)/(3*(1 + 0.7745*exp(-(3*dCell - 2.05)/0.295)));
  Cm := CmCentre + FCell_membrane*(CmPeriphery - CmCentre);
  g_Na := g_Na_Centre + FCell_membrane*(g_Na_Periphery - g_Na_Centre);
  i_Na := g_Na*m^3*h*Na_o*F^2/(R*T)*(exp((V_membrane - E_Na)*F/(R*T)) - 1)/(exp(V_membrane*F/(R*T)) - 1)*V_membrane;
  m_infinity := (1/(1 + exp(-V_sodium_current_m_gate/5.46)))^(1/3);
  tau_m := 0.0006247/(0.832*exp(-0.335*(V_sodium_current_m_gate + 56.7)) + 0.627*exp(0.082*(V_sodium_current_m_gate + 65.01))) + 4e-5;
  F_Na := 0.0952*exp(-0.063*(V_sodium_current_h_gate + 34.4))/(1 + 1.66*exp(-0.225*(V_sodium_current_h_gate + 63.7))) + 0.0869;
  h := (1 - F_Na)*h1 + F_Na*h2;
  h1_infinity := 1/(1 + exp((V_sodium_current_h_gate + 66.1)/6.4));
  h2_infinity := h1_infinity;
  tau_h1 := 3.717e-6*exp(-0.2815*(V_sodium_current_h_gate + 17.11))/(1 + 0.003732*exp(-0.3426*(V_sodium_current_h_gate + 37.76))) + 0.0005977;
  tau_h2 := 3.186e-8*exp(-0.6219*(V_sodium_current_h_gate + 18.8))/(1 + 7.189e-5*exp(-0.6683*(V_sodium_current_h_gate + 34.07))) + 0.003556;
  g_Ca_L := g_Ca_L_Centre + FCell_membrane*(g_Ca_L_Periphery - g_Ca_L_Centre);
  i_Ca_L := g_Ca_L*(f_L*d_L + 0.006/(1 + exp(-(V_membrane + 14.1)/6)))*(V_membrane - E_Ca_L);
  alpha_d_L := -28.38*(V_L_type_Ca_channel_d_gate + 35)/(exp(-(V_L_type_Ca_channel_d_gate + 35)/2.5) - 1) - 84.9*V_L_type_Ca_channel_d_gate/(exp(-0.208*V_L_type_Ca_channel_d_gate) - 1);
  beta_d_L := 11.42*(V_L_type_Ca_channel_d_gate - 5)/(exp(0.4*(V_L_type_Ca_channel_d_gate - 5)) - 1);
  tau_d_L := 2/(alpha_d_L + beta_d_L);
  d_L_infinity := 1/(1 + exp(-(V_L_type_Ca_channel_d_gate + 23.1)/6));
  alpha_f_L := 3.12*(V_L_type_Ca_channel_f_gate + 28)/(exp((V_L_type_Ca_channel_f_gate + 28)/4) - 1);
  beta_f_L := 25/(1 + exp(-(V_L_type_Ca_channel_f_gate + 28)/4));
  tau_f_L := 1/(alpha_f_L + beta_f_L);
  f_L_infinity := 1/(1 + exp((V_L_type_Ca_channel_f_gate + 45)/5));
  g_Ca_T := g_Ca_T_Centre + FCell_membrane*(g_Ca_T_Periphery - g_Ca_T_Centre);
  i_Ca_T := g_Ca_T*d_T*f_T*(V_membrane - E_Ca_T);
  alpha_d_T := 1068*exp((V_T_type_Ca_channel_d_gate + 26.3)/30);
  beta_d_T := 1068*exp(-(V_T_type_Ca_channel_d_gate + 26.3)/30);
  tau_d_T := 1/(alpha_d_T + beta_d_T);
  d_T_infinity := 1/(1 + exp(-(V_T_type_Ca_channel_d_gate + 37)/6.8));
  alpha_f_T := 15.3*exp(-(V_T_type_Ca_channel_f_gate + 71.7)/83.3);
  beta_f_T := 15*exp((V_T_type_Ca_channel_f_gate + 71.7)/15.38);
  tau_f_T := 1/(alpha_f_T + beta_f_T);
  f_T_infinity := 1/(1 + exp((V_T_type_Ca_channel_f_gate + 71)/9));
  g_to := g_to_Centre + FCell_membrane*(g_to_Periphery - g_to_Centre);
  g_sus := g_sus_Centre + FCell_membrane*(g_sus_Periphery - g_sus_Centre);
  i_to := g_to*q*r*(V_membrane - E_K);
  i_sus := g_sus*r*(V_membrane - E_K);
  q_infinity := 1/(1 + exp((V_four_AP_sensitive_currents_q_gate + 59.37)/13.1));
  tau_q := 0.0101 + 0.06517/(0.57*exp(-0.08*(V_four_AP_sensitive_currents_q_gate + 49))) + 2.4e-5*exp(0.1*(V_four_AP_sensitive_currents_q_gate + 50.93));
  r_infinity := 1/(1 + exp(-(V_four_AP_sensitive_currents_r_gate - 10.93)/19.7));
  tau_r := 0.001*(2.98 + 15.59/(1.037*exp(0.09*(V_four_AP_sensitive_currents_r_gate + 30.61)) + 0.369*exp(-0.12*(V_four_AP_sensitive_currents_r_gate + 23.84))));
  g_K_r := g_K_r_Centre + FCell_membrane*(g_K_r_Periphery - g_K_r_Centre);
  i_K_r := g_K_r*P_a*P_i*(V_membrane - E_K);
  P_a := 0.6*P_af + 0.4*P_as;
  P_af_infinity := 1/(1 + exp(-(V_rapid_delayed_rectifying_potassium_current_P_af_gate + 14.2)/10.6));
  tau_P_af := 1/(37.2*exp((V_rapid_delayed_rectifying_potassium_current_P_af_gate - 9)/15.9) + 0.96*exp(-(V_rapid_delayed_rectifying_potassium_current_P_af_gate - 9)/22.5));
  P_as_infinity := P_af_infinity;
  tau_P_as := 1/(4.2*exp((V_rapid_delayed_rectifying_potassium_current_P_as_gate - 9)/17) + 0.15*exp(-(V_rapid_delayed_rectifying_potassium_current_P_as_gate - 9)/21.6));
  P_i_infinity := 1/(1 + exp((V_rapid_delayed_rectifying_potassium_current_P_i_gate + 18.6)/10.1));
  g_K_s := g_K_s_Centre + FCell_membrane*(g_K_s_Periphery - g_K_s_Centre);
  i_K_s := g_K_s*xs^2*(V_membrane - E_K_s);
  alpha_xs := 14/(1 + exp(-(V_slow_delayed_rectifying_potassium_current_xs_gate - 40)/9));
  beta_xs := 1*exp(-V_slow_delayed_rectifying_potassium_current_xs_gate/45);
  g_f_Na := g_f_Na_Centre + FCell_membrane*(g_f_Na_Periphery - g_f_Na_Centre);
  i_f_Na := g_f_Na*y*(V_membrane - E_Na);
  g_f_K := g_f_K_Centre + FCell_membrane*(g_f_K_Periphery - g_f_K_Centre);
  i_f_K := g_f_K*y*(V_membrane - E_K);
  alpha_y := 1*exp(-(V_hyperpolarisation_activated_current_y_gate + 78.91)/26.62);
  beta_y := 1*exp((V_hyperpolarisation_activated_current_y_gate + 75.13)/21.25);
  g_b_Na := g_b_Na_Centre + FCell_membrane*(g_b_Na_Periphery - g_b_Na_Centre);
  i_b_Na := g_b_Na*(V_membrane - E_Na);
  g_b_K := g_b_K_Centre + FCell_membrane*(g_b_K_Periphery - g_b_K_Centre);
  i_b_K := g_b_K*(V_membrane - E_K);
  g_b_Ca := g_b_Ca_Centre + FCell_membrane*(g_b_Ca_Periphery - g_b_Ca_Centre);
  i_b_Ca := g_b_Ca*(V_membrane - E_Ca);
  k_NaCa := k_NaCa_Centre + FCell_membrane*(k_NaCa_Periphery - k_NaCa_Centre);
  i_NaCa := k_NaCa*(Na_i^3*Ca_o*exp(0.03743*V_membrane*gamma_NaCa) - Na_o^3*Ca_i*exp(0.0374*V_membrane*(gamma_NaCa - 1)))/(1 + d_NaCa*(Ca_i*Na_o^3 + Ca_o*Na_i^3));
  i_p_max := i_p_max_Centre + FCell_membrane*(i_p_max_Periphery - i_p_max_Centre);
  i_p := i_p_max*(Na_i/(K_m_Na + Na_i))^3*(K_o/(K_m_K + K_o))^2*1.6/(1.5 + exp(-(V_membrane + 60)/40));
  i_Ca_p_max := i_Ca_p_max_Centre + FCell_membrane*(i_Ca_p_max_Periphery - i_Ca_p_max_Centre);
  i_Ca_p := i_Ca_p_max*Ca_i/(Ca_i + 0.0004);
  E_Na := R*T/F*ln(Na_o/Na_i);
  E_K := R*T/F*ln(K_o/K_i);
  E_Ca := R*T/(2*F)*ln(Ca_o/Ca_i);
  E_K_s := R*T/F*ln((K_o + 0.12*Na_o)/(K_i + 0.12*Na_i));

  // Rate rules:
  V_membrane' = -1/Cm*(i_Na + i_Ca_L + i_Ca_T + i_to + i_sus + i_K_r + i_K_s + i_f_Na + i_f_K + i_b_Na + i_b_Ca + i_b_K + i_NaCa + i_p + i_Ca_p);
  m' = (m_infinity - m)/tau_m;
  h1' = (h1_infinity - h1)/tau_h1;
  h2' = (h2_infinity - h2)/tau_h2;
  d_L' = (d_L_infinity - d_L)/tau_d_L;
  f_L' = (f_L_infinity - f_L)/tau_f_L;
  d_T' = (d_T_infinity - d_T)/tau_d_T;
  f_T' = (f_T_infinity - f_T)/tau_f_T;
  q' = (q_infinity - q)/tau_q;
  r' = (r_infinity - r)/tau_r;
  P_af' = (P_af_infinity - P_af)/tau_P_af;
  P_as' = (P_as_infinity - P_as)/tau_P_as;
  P_i' = (P_i_infinity - P_i)/tau_P_i;
  xs' = alpha_xs*(1 - xs) - beta_xs*xs;
  y' = alpha_y*(1 - y) - beta_y*y;

  // Unit definitions:
  unit per_second = 1 / second;
  unit millivolt = 1e-3 volt;
  unit per_millivolt = 1 / (1e-3 volt);
  unit per_millivolt_second = 1 / (1e-3 volt * second);
  unit microS = 1e-6 siemens;
  unit microF = 1e-6 farad;
  unit nanoA = 1e-9 ampere;
  unit millimolar = 1e-3 mole / litre;
  unit millimolar4 = (1e-3 mole)^4 / litre^4;
  unit millijoule_per_mole_kelvin = 1e-3 joule / (mole * kelvin);
  unit coulomb_per_mole = coulomb / mole;
  unit microlitre_per_second = 1e-6 litre / second;
end
