// SBML level 2 version 3

model zager_schlosser_tran_model_2007_version03()
  // Zager2007_Genistein_Biliary_Excretion
  // This the model from the article without the time delays:
  // A Delayed Nonlinear PBPK Model for Genistein Dosimetry in Rats.
  // Zager MG, Schlosser PM, Tran HT. Bull Math Biol. 2007 Jan;69(1):93-117. Pubmed ID: 17024552 , doi: 0.1007/s11538-006-9068-x .
  // Abstract: Genistein is an endocrine-active compound (EAC) found in soy products. It has been linked to beneficial effects such as mammary tumor growth suppression and adverse endocrine-related effects such as reduced birth weight in rats and humans. In its conjugated form, genistein is excreted in the bile, which is a significant factor in its pharmacokinetics. Experimental data suggest that genistein induces a concentration-dependent suppression of biliary excretion. In this article, we describe a physiologically based pharmacokinetic (PBPK) model that focuses on biliary excretion with the goal of accurately simulating the observed suppression. The mathematical model is a system of nonlinear differential equations with state-dependent delay to describe biliary excretion. The model was analyzed to examine local existence and uniqueness of a solution to the equations. Furthermore, unknown parameters were estimated, and the mathematical model was compared against published experimental data.
  // This model was taken from the CellML repository and automatically converted to SBML.
  // Both the CellML version and the converted SBML version do not contain the time dalays of the original model.
  // The original model was: Zager, Schlosser, Tran, 2007 version03
  // The original CellML model was created and curated by:
  // Lloyd, Catherine, May
  // c.lloyd(at)auckland.ac.nz
  // The University of Auckland, Bioengineering Institute
  // This model originates from BioModels Database: A Database of Annotated Published Models (http://www.ebi.ac.uk/biomodels/). It is copyright (c) 2005-2011 The BioModels.net Team.
  // To the extent possible under law, all copyright and related or neighbouring rights to this encoded model have been dedicated to the public domain worldwide. Please refer to CC0 Public Domain Dedication for more information.
  // In summary, you are entitled to use this encoded model in absolutely any manner you deem suitable, verbatim, or with modification, alone or embedded it in a larger context, redistribute it, commercially or not, in a restricted way or not..
  // To cite BioModels Database, please use: Li C, Donizelli M, Rodriguez N, Dharuri H, Endler L, Chelliah V, Li L, He E, Henry A, Stefan MI, Snoep JL, Hucka M, Le Novère N, Laibe C (2010) BioModels Database: An enhanced, curated and annotated resource for published quantitative kinetic models. BMC Syst Biol., 4:92.
  // biomodels.db:MODEL6963432821
  // isDescribedBy pubmed:17024552
  // biomodels.db:MODEL6963432821
  // isDescribedBy pubmed:17024552
  // biomodels.db:MODEL6963432821
  // biomodels.db:MODEL6963432821

  // Compartments:
  compartment Compartment = 1 litre;

  // Parameters:
  Cgen_pp = 0 micromolar;
  Qpp has litre_per_hour;
  Ppp = 0.59 dimensionless;
  H_Cgen_pp has dimensionless;
  Vpp = 0.188 litre;
  Cgen_rp = 0 micromolar;
  Prp = 1.94 dimensionless;
  Qrp has litre_per_hour;
  H_Cgen_rp has dimensionless;
  Vrp = 0.012 litre;
  kgen_urine = 9.5 first_order_rate_constant;
  Cgen_l = 0 micromolar;
  Ql has litre_per_hour;
  H_Cgen_l has dimensionless;
  Vl = 0.0092 litre;
  Pl = 3.61 dimensionless;
  Cgen_GI = 0 micromolar;
  H_Cgen_GI has dimensionless;
  QGI has litre_per_hour;
  VGI = 0.011 litre;
  Ccon_l = 0 micromolar;
  H_Ccon_l has dimensionless;
  Ccon_ROB = 0 micromolar;
  H_Ccon_ROB has dimensionless;
  VROB = 0.2408 litre;
  kcon_urine = 0 first_order_rate_constant;
  Acon_b = 0 micromole;
  d_t_Cgen_l has hour;
  tbasal = 0.0865 hour;
  ct = 1.0107 hour;
  cgen = 0.06561 litre_per_hour_per_micromole;
  Cgen_B has micromolar;
  H_Cgen_B has dimensionless;
  vinf has micromole_per_hour;
  Qt has litre_per_hour;
  Vmax = 25.25 micromolar_per_hour;
  Km = 0.6231 micromolar;
  kbile = 111.72 first_order_rate_constant;
  cv = 1 micromole_per_hour;
  F has dimensionless;
  G has dimensionless;
  H has dimensionless;
  I has dimensionless;
  epsilon = 0.1 hour;
  m_rat = 0.25 dimensionless;

  // Assignment rules:
  Qt := 14.1*m_rat^0.75;
  H_Cgen_pp := piecewise(0, Cgen_pp < 0, 1);
  Qpp := 0.528*Qt;
  H_Cgen_rp := piecewise(0, Cgen_rp < 0, 1);
  Qrp := 0.289*Qt;
  H_Cgen_l := piecewise(0, Cgen_l < 0, 1);
  Ql := 0.03*Qt;
  H_Cgen_GI := piecewise(0, Cgen_GI < 0, 1);
  QGI := 0.153*Qt;
  H_Ccon_l := piecewise(0, Ccon_l < 0, 1);
  H_Ccon_ROB := piecewise(0, Ccon_ROB < 0, 1);
  d_t_Cgen_l := tbasal + cgen*H_Cgen_l*Cgen_l*exp(-(time/ct));
  Cgen_B := (Qrp*H_Cgen_rp*Cgen_rp/Prp + Qpp*H_Cgen_pp*Cgen_pp/Ppp + (Ql + QGI)*H_Cgen_l*Cgen_l/Pl)/Qt;
  H_Cgen_B := piecewise(0, Cgen_B < 0, 1);
  vinf := piecewise(cv*F, (time < epsilon) && (time >= 0), cv*G, (time <= 1 - epsilon) && (time >= epsilon), cv*H, (time <= 1) && (time > 1 - epsilon), cv*I, (time <= 1 + 5/60) && (time > 1));
  F := -2/epsilon^3*time^3 + 3/epsilon^2*time^2;
  G := 1;
  H := 3*(1 - time)^2/epsilon^2 - 2*(1 - time)^3/epsilon^3;
  I := 0;

  // Rate rules:
  Cgen_pp' = (Qpp*H_Cgen_B*Cgen_B - Qpp*H_Cgen_pp*Cgen_pp/Ppp)/Vpp;
  Cgen_rp' = (Qrp*H_Cgen_B*Cgen_B - Qrp*H_Cgen_rp*Cgen_rp/Prp)/Vrp - kgen_urine*H_Cgen_rp*Cgen_rp;
  Cgen_l' = (Ql*H_Cgen_B*Cgen_B - (Ql + QGI)*H_Cgen_l*Cgen_l/Pl + vinf + QGI*H_Cgen_GI*Cgen_GI/Prp)/Vl - Vmax*(H_Cgen_l*Cgen_l/(Km + H_Cgen_l*Cgen_l));
  Cgen_GI' = (QGI*H_Cgen_B*Cgen_B - QGI*H_Cgen_GI*Cgen_GI/Prp)/VGI;
  Ccon_l' = Vmax*(H_Cgen_l*Cgen_l/(Km + H_Cgen_l*Cgen_l)) - (kbile*H_Ccon_l*Ccon_l + (Ql + QGI)*(H_Ccon_l*Ccon_l - H_Ccon_ROB*Ccon_ROB)/Vl);
  Ccon_ROB' = (Ql + QGI)*(H_Ccon_l*Ccon_l - H_Ccon_ROB*Ccon_ROB)/VROB - kcon_urine*H_Ccon_ROB*Ccon_ROB;
  Acon_b' = kbile*H_Ccon_l*Ccon_l*Vl;

  // Unit definitions:
  unit hour = 3600 second;
  unit micromole = 1e-6 mole;
  unit micromolar = 1e-6 mole / litre;
  unit micromole_per_hour = 1e-6 mole / (3600 second);
  unit micromolar_per_hour = 1e-6 mole / (litre * 3600 second);
  unit litre_per_hour = litre / (3600 second);
  unit litre_per_hour_per_micromole = litre * 3600 second / (1e-6 mole);
  unit first_order_rate_constant = 1 / (3600 second);
  unit time = 3600 second;
end
