// SBML level 2 version 3

model Zou2007_MAPK_SignalingNetworks()
  // This a model from the article:
  // Modeling specificity in the yeast MAPK signaling networks
  // Zou X, Peng T, Pan Z J. Theor. Biol. (2008);250(1):139-55 17977559 ,
  // Abstract:
  // Cells sense several kinds of stimuli and trigger corresponding responses through signaling pathways. As a result, cells must process and integrate multiple signals in parallel to maintain specificity and avoid erroneous cross-talk. In this study, we focus our theoretical effort on understanding specificity of a model network system in yeast, Saccharomyces cerevisiae, which contains three mitogen-activated protein kinase (MAPK) signal transduction cascades that share multiple signaling components. The cellular response to the pheromone, the filamentous growth and osmotic pressure stimuli in yeast is described and an integrative mathematical model for the three MAPK cascades is developed using available literature and experimental data. The theoretical framework for analyzing the specificity of signaling networks [Bardwell, L., Zou, X.F., Nie, Q., Komarova, N.L., 2007. Mathematical models of specificity in cell signaling. Biophys. J. 92, 3425-3441] is extended to include multiple interacting pathways with shared components. Simulations are also performed with any one stimulus, with any two simultaneous stimuli, and with the simultaneous application of the three stimuli. The interactions between the three pathways are systematically investigated. Moreover, the specificity and fidelity of this model system are calculated using our newly developed concept under different stimuli or with specific mutants. Our simulated and calculated results demonstrate that the yeast MAPK signaling network can achieve specificity and fidelity by filtering out spurious cross-talk between the relevant pathways through different mechanisms, such as scaffolding, cross-inhibiting, and feedback control. Proof that Pbs2 and Hog1 are essential for the maintenance of signaling specificity is presented. Our studies provide novel insights into integration of relevant signaling pathways in a biological system and the mechanisms conferring specificity in cellular signaling networks.
  // This model originates from BioModels Database: A Database of Annotated Published Models (http://www.ebi.ac.uk/biomodels/). It is copyright (c) 2005-2011 The BioModels.net Team.
  // To the extent possible under law, all copyright and related or neighbouring rights to this encoded model have been dedicated to the public domain worldwide. Please refer to CC0 Public Domain Dedication for more information.
  // In summary, you are entitled to use this encoded model in absolutely any manner you deem suitable, verbatim, or with modification, alone or embedded it in a larger context, redistribute it, commercially or not, in a restricted way or not..
  // To cite BioModels Database, please use: Li C, Donizelli M, Rodriguez N, Dharuri H, Endler L, Chelliah V, Li L, He E, Henry A, Stefan MI, Snoep JL, Hucka M, Le Novère N, Laibe C (2010) BioModels Database: An enhanced, curated and annotated resource for published quantitative kinetic models. BMC Syst Biol., 4:92.
  // biomodels.db:MODEL7519354389
  // isDescribedBy pubmed:17977559
  // biomodels.db:MODEL7519354389
  // isDescribedBy pubmed:17977559
  // biomodels.db:MODEL7519354389
  // biomodels.db:MODEL7519354389

  // Compartments:
  compartment compartment = 1;

  // Species:
  species x in compartment = 0;
  species c1 in compartment = 42.3;
  species c2 in compartment = 13.2;
  species c3 in compartment = 5.6;
  species c10 in compartment = 0;
  species c11 in compartment = 0;
  species c16 in compartment = 0;
  species c19 in compartment = 42.9;
  species c20 in compartment = 4;
  species c5 in compartment = 0;
  species c6 in compartment = 217;
  species c7 in compartment = 0;
  species c12 in compartment = 54.4;
  species c13 in compartment = 0;
  species c8 in compartment = 0;
  species c15 in compartment = 0;
  species c24 in compartment = 0;
  species c17 in compartment = 57.4;
  species c49 in compartment = 8;
  species c21 in compartment = 79;
  species c25 in compartment = 35.9;
  species c26 in compartment = 0.07;
  species c28 in compartment = 0;
  species c29 in compartment = 13.7;
  species c30 in compartment = 0.25;
  species c31 in compartment = 0;
  species c32 in compartment = 0;
  species c33 in compartment = 0.1;
  species c34 in compartment = 270;
  species c35 in compartment = 1.06;
  species c36 in compartment = 0.2;
  species c37 in compartment = 0.0017;
  species c38 in compartment = 1.27;
  species c39 in compartment = 6.3e-8;
  species c40 in compartment = 100000;
  species c42 in compartment = 2.25;
  species c43 in compartment = 120;
  species c45 in compartment = 37.12;
  species c47 in compartment = 5.3;
  species c23 in compartment = 0.3;
  species c14 in compartment = 0;
  species c18 in compartment = 0;
  species c27 in compartment = 0;
  species c4 in compartment = 53;
  species c41 in compartment = 13.75;
  species c44 in compartment = 36;
  species c9 in compartment = 0;
  species c46 in compartment = 1.88;
  species c22 in compartment = 0;
  species c48 in compartment = 1.4;

  // Parameters:
  Pi_i = 0;
  V_os = 0;
  Pi_e_f = 2400000;
  t = 0;
  lambda_m = 0.3;
  Pi_e_o = 625000;
  Pi_t_0 = 875000;
  V_os_0 = 3.9e-17;
  V_Pi_t0 = 2.5e-17;
  G = 7.85e-11;
  Lp = 1.19e-12;
  k1 = 0.01;
  k2 = 1;
  k9 = 10;
  k15 = 0.1;
  k16 = 0.1;
  k21 = 0.1;
  k22 = 1;
  k3 = 1;
  k4 = 1;
  k11 = 1;
  k7 = 1;
  k8 = 0.1;
  k5 = 1;
  k6 = 1;
  k13 = 1;
  k14 = 1;
  k10 = 0.1;
  k27 = 10;
  k17 = 0.1;
  k64 = 0.1;
  k12 = 1;
  k18 = 0.1;
  k65 = 0.01;
  k19 = 0.01;
  h1 = 0.001;
  k20 = 0.1;
  k60 = 0;
  k61 = 0;
  k23 = 1;
  k24 = 1;
  k25 = 1;
  k26 = 1;
  k62 = 0;
  k63 = 1;
  k28 = 1;
  k29 = 10;
  k30 = 1;
  k66 = 0.1;
  k31 = 1;
  k32 = 1;
  k33 = 1;
  k34 = 1;
  k35 = 1;
  k36 = 1;
  k37 = 1;
  k38 = 0.01;
  k39 = 1;
  k40 = 1;
  k41 = 10;
  k_base = 0.01;
  k42 = 100;
  k46 = 1;
  k47 = 1;
  V_total = 6.5e-17;
  h4 = 0.375;
  vb = 2.6e-17;
  k43 = 0.01;
  k48 = 0.01;
  k44 = 10;
  k45 = 0.0001;
  k49 = 10;
  k50 = 0.0001;
  k51 = 5;
  k52 = 1;
  k53 = 0.003;
  k55 = 1;
  k67 = 1;
  k54 = 1;
  k56 = 1;
  k57 = 1;
  k58 = 1;
  k59 = 1;

  // Assignment rules:
  Pi_e := Pi_e_f*(1 - exp(-time/lambda_m) + Pi_e_o*exp(-time/lambda_m));
  Pi_t := Pi_t_0*(1 - (V_os_0 - V_os)/(V_os_0 - V_Pi_t0));
  alpha := piecewise(1, time <= 10, 0);
  beta := piecewise(1, time <= 42, 0);

  // Rate rules:
  Pi_i' = Pi_i*(k52*c38*c39 - k53*c40*(Pi_t/Pi_t_0)^2)/c40;
  V_os' = -G*Lp*(Pi_t + Pi_e - Pi_i);

  // Reactions:
  R1: c2 + c1 => c3; k1*c1*c2 - k2*c3;
  R2: c10 => 0.1 c11 + c4 + c1; k9*c10;
  R3: c2 => c16; k15*c2*beta;
  R4: c16 => c2; k16*c16;
  R5: c19 + c2 => c20; k21*c2*c18*c19 - k22*c20;  // modifiers: c18
  R6: c4 + c3 => c5; k3*c3*c4*alpha;
  R7: c6 + c5 => c7; k4*c5*c6;
  R8: c12 + c5 => c13; k11*c5*c12;
  R9: c10 + c6 => c8; k7*c6*c10;
  R10: c9 => c6; k8*c9;
  R11: c7 => c8; k5*c7;
  R12: c8 => c10 + c9; k6*c8;
  R13: c14 => c15 + c10; k13*c14;
  R14: c12 + c10 => c14; k14*c10*c12;
  R15: c11 => x; k10*c11;
  R16: c24 => c19 + 0.01 c11; k27*c24;
  R17: c12 => c15; k17*c12*c16 + k64*c11*c12;  // modifiers: c16, c11
  R18: c13 => c14; k12*c13;
  R19: c15 => x; k18*c15 + k65*c9*c15;  // modifiers: c9
  R20: c17 => c18; k19*c17 - h1*c23*c17;  // modifiers: c23
  R21: c18 => c17; k20*c18*(Pi_t/Pi_t_0)^3;
  R22: c19 => c49; k60*c47*c19 - k61*c49;  // modifiers: c47
  R23: c21 + c20 => c22; k23*c20*c21;
  R24: c22 => c24 + c23; k24*c22;
  R25: c21 + c24 => c22; k25*c21*c24;
  R26: c23 => c21; k26*c23;
  R27: c21 => c23; k62*c21*c49 - k63*c23;  // modifiers: c49
  R28: c25 => c26; k28*c25 - k29*c12*c26;  // modifiers: c12
  R29: c26 => c27; k30*c9*c26 + k66*c15*c26 - k31*c27;  // modifiers: c9, c15
  R30: x => c28; k32*c27;  // modifiers: c27
  R31: c28 => x; k33*c28;
  R32: c29 => c30; k34*c29 - k35*c12*c30;  // modifiers: c12
  R33: c30 => c31; k36*c15*c30 - k37*c31;  // modifiers: c15
  R34: c30 => x; k38*c9*c30;  // modifiers: c9
  R35: x => c32; k39*c31;  // modifiers: c31
  R36: c32 => x; k40*c32;
  R37: => c33; k41*c23 + k_base;  // modifiers: c23
  R38: c33 => x; k42*c33;
  R39: => c34; k46*c23 + k_base;  // modifiers: c23
  R40: c34 => ; k47*c34;
  R41: => c35; k42*c33/((V_total - h4*vb)/(h4*vb));  // modifiers: c33
  R42: c35 => x; k43*c35;
  R43: => c36; k47*c34/((V_total - h4*vb)/(h4*vb));  // modifiers: c34
  R44: c36 => ; k48*c36;
  R45: => c37; k44*c35;  // modifiers: c35
  R46: c37 => ; k45*c37;
  R47: => c38; k49*c36;  // modifiers: c36
  R48: c38 => ; k50*c38;
  R49: => c39; k51*c37;  // modifiers: c37
  R50: c39 => c40; k52*c38*c39;  // modifiers: c38
  R51: c40 => ; k53*c40*(Pi_t/Pi_t_0)^2;
  R52: c43 + c42 => c44 + c41; k55*c42*c43 - k67*c41*c44;
  R53: c41 => c42; k54*c41*(Pi_t/Pi_t_0)^2;
  R54: c45 + c44 => c46 + c43; k56*c44*c45;
  R55: c46 => c45; k57*c46;
  R56: c47 => c48; k58*c46*c47 - k59*c48;  // modifiers: c46

  // Unit definitions:
  unit nM = 1e-9 mole / litre;
end
