// SBML level 2 version 1

model Radulescu2008_NFkB_hierarchy_M_8_12_19()
  // NFkB model M(8,12,19)
  // This is a model of NFkB pathway functioning from hierarchy of models of decreasing complexity, created to demonstrate application of model reduction methods proposed in
  // Radulescu O, Gorban A., Zinovyev A., Lilienbaum. A. Robust simplifications of multiscale models in systems biology. Manuscript submitted.
  // The models are provided in CellDesigner v3.5 format. The name of the model M(x,y,z) should be deciphered as following:
  // x - number of species y - number of reactions z - number of parameters
  // Simulation protocol: The model can be simulated in CellDesigner directly, or in any simulator supporting events. The simulation period should be set up in 40 hours (t=144000 sec). The 'signal' event applies signal to the pathway at the moment t=20 hours=72000 sec.
  // For additional information please contact Andrei.Zinovyev at curie.fr
  // This model originates from BioModels Database: A Database of Annotated Published Models. It is copyright (c) 2005-2011 The BioModels.net Team.
  // To the extent possible under law, all copyright and related or neighbouring rights to this encoded model have been dedicated to the public domain worldwide. Please refer to CC0 Public Domain Dedication for more information.
  // In summary, you are entitled to use this encoded model in absolutely any manner you deem suitable, verbatim, or with modification, alone or embedded it in a larger context, redistribute it, commercially or not, in a restricted way or not..
  // To cite BioModels Database, please use: Li C, Donizelli M, Rodriguez N, Dharuri H, Endler L, Chelliah V, Li L, He E, Henry A, Stefan MI, Snoep JL, Hucka M, Le Novère N, Laibe C (2010) BioModels Database: An enhanced, curated and annotated resource for published quantitative kinetic models. BMC Syst Biol., 4:92.
  // biomodels.db:MODEL7743358405
  // isDescribedBy pubmed:18854041
  // biomodels.db:MODEL7743358405
  // isDescribedBy pubmed:18854041
  // biomodels.db:MODEL7743358405
  // biomodels.db:MODEL7743358405

  // Compartments:
  compartment default;
  compartment nucleus in default;

  // Species:
  species $IKBA in nucleus = 0;
  species $sa13_degraded in default = 0;
  species $sa12_degraded in default = 0;
  species mRNAIKBA in default = 0;
  species $A20_nucleus in nucleus = 0;
  species mRNAA20 in default = 0;
  species A20_default in default = 0;
  species NFKB_IKBA in default = 0.166/default; NFKB_IKBA is "NFKB.IKBA";
  species $sa96_degraded in default = 0;
  species $sa97_degraded in default = 0;
  species NFkB_IkB_alpha in nucleus = 0; NFkB_IkB_alpha is "NFkB/IkB_alpha";
  species IkB_alpha_default in default = 0;
  species NFKB in nucleus = 0;
  species IkB_alpha_nucleus in nucleus = 0;

  // Parameters:
  k1 = 0.0025;
  k2 = 0.000125;
  k3 = 2.5e-6;
  k4 = 0.1;
  k5 = 0.0015;
  k6 = 0.000125;
  k7 = 0.2;
  k8 = 0.1;
  k9 = 1;
  k10 = 0.1;
  k11 = 0.000125;
  k12 = 2e-5;
  kf13 = 18.4;
  kr13 = 0;
  kf14 = 18.4;
  kr14 = 0;
  kf15 = 0.0025;
  kr15 = 0;
  k16 = 0.5;
  k17 = 0.0004;
  k18 = 0.0003;
  k20 = 5e-7;
  k19 = 0;
  k21 = 0.0001;
  k22 = 0.5;
  kf23 = 0.001;
  kr23 = 0.0005;
  k27 = 0.0004;
  kf28 = 0.01;
  kr28 = 0;
  k26 = 5e-7;
  k15p1 = 3.397e-9; k15p1 is "=kf15*k3*k9/k4/kf13";
  k15p2 = 0.0001359; k15p2 is "=kf15/kf13";
  k15p3 = 0.015; k15p3 is "=k5/k4";
  k21p1 = 2e-5; k21p1 is "=k3*k9/k4";
  k21p2 = 0.0001359; k21p2 is "=kf15/kf13";
  k21p3 = 0.015; k21p3 is "=k5/k4";

  // Reactions:
  re44: $IKBA => mRNAIKBA; k26*NFKB;  // modifiers: NFKB
  re45: mRNAIKBA => $sa12_degraded; k27*mRNAIKBA;
  re46: IkB_alpha_default => $sa13_degraded; k21p1*IkB_alpha_default*NFKB_IKBA/((k21p2 + IkB_alpha_default)*(k21p3 + A20_default));  // modifiers: NFKB_IKBA, A20_default
  re47: mRNAIKBA => IkB_alpha_default + mRNAIKBA; k22*mRNAIKBA;
  re48: $A20_nucleus => mRNAA20; k19 + k20*NFKB;  // modifiers: NFKB
  re61: mRNAA20 => A20_default + mRNAA20; k16*mRNAA20;
  re68: 5 NFkB_IkB_alpha => NFKB_IKBA; kf28*NFkB_IkB_alpha - kr28*NFKB_IKBA;
  re69: NFKB + IkB_alpha_nucleus => NFkB_IkB_alpha; kf14*NFKB*IkB_alpha_nucleus - kr14*NFkB_IkB_alpha;
  re70: mRNAA20 => $sa96_degraded; k17*mRNAA20;
  re71: A20_default => $sa97_degraded; k18*A20_default;
  re72: IkB_alpha_default => 5 IkB_alpha_nucleus; kf23*IkB_alpha_default - kr23*IkB_alpha_nucleus;
  re73: NFKB_IKBA => 5 NFKB; k15p1*NFKB_IKBA/((k15p2 + IkB_alpha_default)*(k15p3 + A20_default));  // modifiers: IkB_alpha_default, A20_default
end
