// SBML level 2 version 1

model MODEL7743576806()
  // Radulescu2008 - NF-κB hierarchy ℳ(16,34,46)
  // This is a model of NF-κB pathway functioning from hierarchy of models of decreasing complexity, created to demonstrate application of model reduction methods proposed in the associated publication.
  // The name of the model M(x,y,z) should be deciphered as following:
  // x: number of species
  // y: number of reactions
  // z: number of parameters
  // Simulation protocol: the model can be simulated in CellDesigner directly, or in any simulator supporting events. The simulation period should be set up in 40 hours (t=144000 sec). The 'signal' event applies signal to the pathway at the moment t=20 hours=72000 sec.
  // This model is described in the article:
  // Robust simplifications of multiscale biochemical networks.
  // Radulescu O, Gorban AN, Zinovyev A, Lilienbaum A.
  // BMC Syst Biol 2008 Oct; 2(1):86
  // Abstract:
  // BACKGROUND: Cellular processes such as metabolism, decision making in development and differentiation, signalling, etc., can be modeled as large networks of biochemical reactions. In order to understand the functioning of these systems, there is a strong need for general model reduction techniques allowing to simplify models without loosing their main properties. In systems biology we also need to compare models or to couple them as parts of larger models. In these situations reduction to a common level of complexity is needed.
  // RESULTS: We propose a systematic treatment of model reduction of multiscale biochemical networks. First, we consider linear kinetic models, which appear as "pseudo-monomolecular" subsystems of multiscale nonlinear reaction networks. For such linear models, we propose a reduction algorithm which is based on a generalized theory of the limiting step that we have developed in 1. Second, for non-linear systems we develop an algorithm based on dominant solutions of quasi-stationarity equations. For oscillating systems, quasi-stationarity and averaging are combined to eliminate time scales much faster and much slower than the period of the oscillations. In all cases, we obtain robust simplifications and also identify the critical parameters of the model. The methods are demonstrated for simple examples and for a more complex model of NF-kappaB pathway.
  // CONCLUSION: Our approach allows critical parameter identification and produces hierarchies of models. Hierarchical modeling is important in "middle-out" approaches when there is need to zoom in and out several levels of complexity. Critical parameter identification is an important issue in systems biology with potential applications to biological control and therapeutics. Our approach also deals naturally with the presence of multiple time scales, which is a general property of systems biology models.
  // This model is hosted on BioModels Database and identified by: MODEL7743576806 .
  // To cite BioModels Database, please use: BioModels Database: An enhanced, curated and annotated resource for published quantitative kinetic models .
  // To the extent possible under law, all copyright and related or neighbouring rights to this encoded model have been dedicated to the public domain worldwide. Please refer to CC0 Public Domain Dedication for more information.
  // biomodels.db:MODEL7743576806
  // isDescribedBy pubmed:18854041
  // biomodels.db:MODEL7743576806
  // biomodels.db:MODEL7743576806
  // isDescribedBy pubmed:18854041

  // Compartments:
  compartment default;
  compartment nucleus in default;

  // Species:
  species IkB_alpha_nucleus in nucleus = 0;
  species $csa17_degraded in nucleus = 0;
  species $sa438_degraded in default = 0;
  species p50 in default = 0;
  species p65_default in default = 0;
  species $sa9_degraded in default = 0;
  species $sa13_degraded in default = 0;
  species IkB_alpha_default in default = 0;
  species sa12_degraded in default = 0;
  species A20_nucleus in nucleus = 0;
  species mRNAA20 in default = 0;
  species A20_default in default = 0;
  species $sa444_degraded in default = 0;
  species IKKi in default = 0;
  species $sa19_degraded in default = 0;
  species IKKa in default = 0;
  species IKKn in default = 0;
  species $sa20_degraded in default = 0;
  species IKK in nucleus = 0;
  species $sa96_degraded in default = 0;
  species $sa97_degraded in default = 0;
  species $csa21_degraded in default = 0;
  species $csa18_degraded in default = 0;
  species $csa9_degraded in nucleus = 0;
  species mRNAIKB_alpha in default = 0;
  species NFkB_IkB_alpha_default in default = 0; NFkB_IkB_alpha_default is "NFkB:IkB_alpha";
  species NFkB_IKKa_Ikb_alpha in default = 0; NFkB_IKKa_Ikb_alpha is "NFkB:IKKa:Ikb_alpha";
  species NFkB_default in default = 0;
  species IKKa_IKB_alpha in default = 0; IKKa_IKB_alpha is "IKKa:IKB_alpha";
  species NFkB_IkB_alpha_nucleus in nucleus = 0; NFkB_IkB_alpha_nucleus is "NFkB:IkB_alpha";
  species NFkB_nucleus in nucleus = 0;
  species $p65_nucleus in nucleus = 0;
  species p105 in nucleus = 0;
  species IKB_alpha in nucleus = 4.9e-324;

  // Parameters:
  k1 = 0;
  k2 = 0.000125;
  k3 = 1e-5;
  k4 = 0.1;
  k5 = 0.0015;
  k6 = 0.000125;
  k7 = 0.24;
  k8 = 0.1;
  k9 = 1.2;
  k10 = 0.1;
  k11 = 0.000125;
  k12 = 2e-5;
  kf13 = 0.5;
  kr13 = 0;
  kf14 = 0.5;
  kr14 = 0;
  kf15 = 0.0025;
  kr15 = 8e-5;
  k16 = 0.5;
  k17 = 0.0004;
  k18 = 0.0003;
  k20 = 5e-7;
  k19 = 0;
  k21 = 0.0001;
  k22 = 0.5;
  kf23 = 0.001;
  kr23 = 0.0005;
  k25 = 0;
  k27 = 0.0004;
  kf28 = 0.01;
  kr28 = 0;
  kf32 = 10;
  kr32 = 0.0001;
  k42 = 0.0005;
  k43 = 0.1;
  k33 = 0.0005;
  k34 = 0.1;
  k69 = 0.006;
  k70 = 0.06;
  k49 = 0.0005;
  k50 = 0.02;
  k61 = 0.06;
  k62 = 0.6;
  k35 = 0.01;
  k36 = 0.0041;
  k37 = 5e-5;
  k38 = 6e-5;
  k39 = 0.00013;
  k40 = 6.4e-5;
  kf41 = 10;
  kr41 = 0.0001;
  k44 = 0.016;
  k45 = 0.0053;
  k46 = 5e-5;
  k47 = 6.4e-5;
  kf48 = 10;
  kr48 = 0.0001;
  k51 = 0.025;
  kf52 = 0.003;
  kr52 = 0.001;
  k53 = 0.0002;
  k54 = 0.0002;
  kf55 = 0.62;
  kr55 = 0.00048;
  kf56 = 0.62;
  kr56 = 0.00048;
  kf57 = 18.4;
  kr57 = 0.055;
  kf58 = 18.4;
  kr58 = 0.055;
  kf59 = 0.0038;
  kr59 = 8e-13;
  kf60 = 0.0038;
  kr60 = 8e-13;
  kf63 = 0.62;
  kr63 = 0.00048;
  kf64 = 0.62;
  kr64 = 0.00048;
  kf65 = 18.4;
  kr65 = 0.055;
  kf66 = 18.4;
  kr66 = 0.055;
  kf67 = 0.0038;
  kr67 = 8e-13;
  kf68 = 0.0038;
  kr68 = 8e-13;
  k71 = 0.0002;
  k72 = 0.0002;
  concentration_of_promoters = 6.66e-6;
  k45p = 7.07e-5; k45p is "=k43*k45*P0 / k46";
  k39p1 = 2.2925e-7; k39p1 is "=k36*k39*P0*k34*kf68/(k37*kf64*(k38+k39))";
  k39p2 = 6.7e-8; k39p2 is "=k39*k36*kr66*k70*P0/(k37*kf66*(k38+k39))";
  k39p3 = 0.0061; k39p3 is "=kf68/kf64";
  k39p4 = 0.003; k39p4 is "=kr66/kf66";
  k39p5 = 1e-10; k39p5 is "dummy";
  k26p1 = 8.172e-10; k26p1 is "=P0*k50*k60/k56";
  k26p2 = 1.1957e-8; k26p2 is "=P0*kr58*k62/kf58";
  k26p3 = 0.0061; k26p3 is "=kf60/kf56";
  k26p4 = 0.003; k26p4 is "=kr58/kf58";
  k26p5 = 1e-10; k26p5 is "dummy";

  // Reactions:
  re33: NFkB_nucleus => $csa17_degraded; k54*NFkB_nucleus;
  re34: p105 => p50; (k39p1*(IkB_alpha_nucleus + k39p5) + k39p2*(NFkB_nucleus + k39p5))/((IkB_alpha_nucleus + k39p5)*(NFkB_nucleus + k39p5) + k39p3*(IkB_alpha_nucleus + k39p5) + k39p4*(NFkB_nucleus + k39p5));  // modifiers: NFkB_nucleus, IkB_alpha_nucleus
  re39: p50 => $sa438_degraded; k40*p50;
  re40: $p65_nucleus => p65_default; k45p;
  re42: p65_default => $sa9_degraded; k47*p65_default;
  re44: IKB_alpha => mRNAIKB_alpha; (k26p1*(IkB_alpha_nucleus + k26p5) + k26p2*(NFkB_nucleus + k26p5))/((IkB_alpha_nucleus + k26p5)*(NFkB_nucleus + k26p5) + k26p3*(IkB_alpha_nucleus + k26p5) + k26p4*(NFkB_nucleus + k26p5));  // modifiers: IkB_alpha_nucleus, NFkB_nucleus
  re45: mRNAIKB_alpha => sa12_degraded; k27*mRNAIKB_alpha;
  re46: IkB_alpha_default => $sa13_degraded; k21*IkB_alpha_default;
  re47: mRNAIKB_alpha => IkB_alpha_default + mRNAIKB_alpha; k22*mRNAIKB_alpha;
  re48: A20_nucleus => mRNAA20; k19 + k20*NFkB_nucleus;  // modifiers: NFkB_nucleus
  re49: IKKn => IKKa; k1*IKKn;
  re52: NFkB_IkB_alpha_default => NFkB_default; k12*NFkB_IkB_alpha_default;
  re53: IKKn => $sa19_degraded; k2*IKKn;
  re56: IKKa => $sa20_degraded; k6*IKKa;
  re57: IKKa_IKB_alpha => IKKa; k8*IKKa_IKB_alpha;
  re58: IKKa + NFkB_IkB_alpha_default => NFkB_IKKa_Ikb_alpha; k9*IKKa*NFkB_IkB_alpha_default;
  re59: NFkB_IKKa_Ikb_alpha => NFkB_default + IKKa; k10*NFkB_IKKa_Ikb_alpha;
  re60: IKKi => $sa444_degraded; k11*IKKi;
  re61: mRNAA20 => A20_default + mRNAA20; k16*mRNAA20;
  re62: p50 + p65_default => NFkB_default; kf52*p50*p65_default - kr52*NFkB_default;
  re63: IKKa => IKKi; k5*IKKa + k4*IKKa*A20_default;  // modifiers: A20_default
  re64: IKK => IKKn; k3;
  re65: IkB_alpha_default + NFkB_default => NFkB_IkB_alpha_default; kf13*NFkB_default*IkB_alpha_default - kr13*NFkB_IkB_alpha_default;
  re66: IkB_alpha_default + IKKa => IKKa_IKB_alpha; k7*IKKa*IkB_alpha_default;
  re67: NFkB_default => 5 NFkB_nucleus; kf15*NFkB_default - kr15*NFkB_nucleus;
  re68: 5 NFkB_IkB_alpha_nucleus => NFkB_IkB_alpha_default; kf28*NFkB_IkB_alpha_nucleus - kr28*NFkB_IkB_alpha_default;
  re69: NFkB_nucleus + IkB_alpha_nucleus => NFkB_IkB_alpha_nucleus; kf14*NFkB_nucleus*IkB_alpha_nucleus - kr14*NFkB_IkB_alpha_nucleus;
  re70: mRNAA20 => $sa96_degraded; k17*mRNAA20;
  re71: A20_default => $sa97_degraded; k18*A20_default;
  re72: IkB_alpha_default => 5 IkB_alpha_nucleus; kf23*IkB_alpha_default - kr23*IkB_alpha_nucleus;
  re74: NFkB_default => $csa21_degraded; k53*NFkB_default;
  re75: NFkB_IkB_alpha_default => $csa18_degraded; k71*NFkB_IkB_alpha_default;
  re76: NFkB_IkB_alpha_nucleus => $csa9_degraded; k72*NFkB_IkB_alpha_nucleus;

  // Events:
  signal: at (p65_default > 0.49): k1 = 0.0025;
end
