// SBML level 2 version 3

model Wang2008_Neonatal_heartfunction()
  // This a model from the article:
  // Mathematical model of the neonatal mouse ventricular action potential.
  // Wang LJ, Sobie EA. Am J Physiol Heart Circ Physiol. (2008) 294(6) pp H2565-75; 18408122 ,
  // Abstract:
  // Therapies for heart disease are based largely on our understanding of the adult myocardium. The dramatic differences in action potential (AP) shape between neonatal and adult cardiac myocytes, however, indicate that a different set of molecular interactions in neonatal myocytes necessitates different treatment for newborns. Computational modeling is useful for synthesizing data to determine how interactions between components lead to systems-level behavior, but this technique has not been used extensively to study neonatal heart cell function. We created a mathematical model of the neonatal (day 1) mouse myocyte by modifying, on the basis of experimental data, the densities and/or formulations of ion transport mechanisms in an adult cell model. The new model reproduces the characteristic AP shape of neonatal cells, with a brief plateau phase and longer duration than the adult (action potential duration at 80% repolarization = 60.1 vs. 12.6 ms). The simulation results are consistent with experimental data, including 1) decreased density and altered inactivation of transient outward K+ currents, 2) increased delayed rectifier K+ currents, 3) Ca2+ entry through T-type as well as L-type Ca2+ channels, 4) increased Ca2+ influx through Na+/Ca2+ exchange, and 5) Ca2+ transients resulting from transmembrane Ca2+ entry rather than release from the sarcoplasmic reticulum (SR). Simulations performed with the model generated novel predictions, including increased SR Ca2+ leak and elevated intracellular Na+ concentration in neonatal compared with adult myocytes. This new model can therefore be used for testing hypotheses and obtaining a better quantitative understanding of differences between neonatal and adult physiology.
  // This model was taken from the CellML repository and automatically converted to SBML.
  // The original model was: Wang_Sobie 2008, version01
  // The original CellML model was created by:
  // Lloyd, Catherine, May
  // c.lloyd(at)auckland.ac.nz
  // The University of Auckland
  // Auckland Bioengineering Institute
  // This model originates from BioModels Database: A Database of Annotated Published Models. It is copyright (c) 2005-2011 The BioModels.net Team.
  // To the extent possible under law, all copyright and related or neighbouring rights to this encoded model have been dedicated to the public domain worldwide. Please refer to CC0 Public Domain Dedication for more information.
  // In summary, you are entitled to use this encoded model in absolutely any manner you deem suitable, verbatim, or with modification, alone or embedded it in a larger context, redistribute it, commercially or not, in a restricted way or not..
  // To cite BioModels Database, please use: Li C, Donizelli M, Rodriguez N, Dharuri H, Endler L, Chelliah V, Li L, He E, Henry A, Stefan MI, Snoep JL, Hucka M, Le Novère N, Laibe C (2010) BioModels Database: An enhanced, curated and annotated resource for published quantitative kinetic models. BMC Syst Biol., 4:92.
  // biomodels.db:MODEL7814665196
  // isDescribedBy pubmed:18408122
  // biomodels.db:MODEL7814665196
  // isDescribedBy pubmed:18408122
  // biomodels.db:MODEL7814665196
  // biomodels.db:MODEL7814665196

  // Compartments:
  compartment Compartment = 1 litre;

  // Parameters:
  V_membrane = -80.6475 millivolt;
  Cm = 1 microF_per_cm2;
  Vmyo = 2.2826e-6 microlitre;
  VJSR = 1.2e-9 microlitre;
  VNSR = 2.098e-7 microlitre;
  Vss = 3.0734e-8 microlitre;
  Acap = 1.541e-5 cm2;
  Ko = 5400 micromolar;
  Nao = 140000 micromolar;
  Cao = 1000 micromolar;
  Clo = 132000 micromolar;
  Cli = 30000 micromolar;
  R = 8.314 joule_per_mole_kelvin;
  T = 298 kelvin;
  F = 96.5 coulomb_per_millimole;
  i_stim has picoA_per_picoF;
  stim_start = 20 millisecond;
  stim_end = 500000 millisecond;
  stim_period = 2000 millisecond;
  stim_duration = 0.5 millisecond;
  stim_amplitude = -80 picoA_per_picoF;
  Cai = 0.2049 micromolar;
  Cass = 0.1867 micromolar;
  CaJSR = 705.5417 micromolar;
  CaNSR = 703.3063 micromolar;
  Bi has dimensionless;
  Bss has dimensionless;
  BJSR has dimensionless;
  CMDN_tot = 25 micromolar;
  CSQN_tot = 15000 micromolar;
  Km_CMDN = 0.238 micromolar;
  Km_CSQN = 800 micromolar;
  J_leak has micromolar_per_millisecond;
  J_rel has micromolar_per_millisecond;
  J_up has micromolar_per_millisecond;
  J_tr has micromolar_per_millisecond;
  J_trpn has micromolar_per_millisecond;
  J_xfer has micromolar_per_millisecond;
  k_plus_htrpn = 0.00237 per_micromolar_millisecond;
  k_minus_htrpn = 3.2e-5 per_millisecond;
  k_plus_ltrpn = 0.0327 per_micromolar_millisecond;
  k_minus_ltrpn = 0.0196 per_millisecond;
  P_RyR = 2.8603e-14 dimensionless;
  v1 = 0.45 per_millisecond;
  tau_tr = 20 millisecond;
  v2 = 2.088e-5 per_millisecond;
  tau_xfer = 8 millisecond;
  v3 = 0.09 micromolar_per_millisecond;
  Km_up = 0.5 micromolar;
  LTRPN_tot = 35 micromolar;
  HTRPN_tot = 70 micromolar;
  LTRPN_Ca = 8.922 micromolar;
  HTRPN_Ca = 66.0407 micromolar;
  P_O1 = 0.0011 dimensionless;
  P_O2 = 2.9799e-8 dimensionless;
  P_C1 has dimensionless;
  P_C2 = 0.1003 dimensionless;
  k_plus_a = 0.00608 micromolar4_per_millisecond;
  k_minus_a = 0.07125 per_millisecond;
  k_plus_b = 0.00405 micromolar3_per_millisecond;
  k_minus_b = 0.965 per_millisecond;
  k_plus_c = 0.009 per_millisecond;
  k_minus_c = 0.0008 per_millisecond;
  m_ryanodine_receptors = 3 dimensionless;
  n = 4 dimensionless;
  i_CaL has picoA_per_picoF;
  i_CaL_max = 7 picoA_per_picoF;
  E_CaL = 63 millivolt;
  g_CaL = 0.19019 milliS_per_microF;
  O = 4.4776e-12 dimensionless;
  C1 has dimensionless;
  C2 = 0.00016996 dimensionless;
  C3 = 1.1754e-8 dimensionless;
  C4 = 6.1239e-10 dimensionless;
  I1 = 1.545e-9 dimensionless;
  I2 = 6.4226e-8 dimensionless;
  I3 = 6.5201e-7 dimensionless;
  alpha has per_millisecond;
  beta has per_millisecond;
  gamma has per_millisecond;
  Kpcf has per_millisecond;
  Kpcb = 0.0005 per_millisecond;
  Kpc_max = 0.23324 per_millisecond;
  Kpc_half = 20 micromolar;
  i_CaT has picoA_per_picoF;
  E_CaT = 50 millivolt;
  g_CaT = 0.055 milliS_per_microF;
  b = 0.0047 dimensionless;
  b_infinity has dimensionless;
  tau_b has millisecond;
  V_T_type_calcium_current_b_gate has millivolt;
  time_T_type_calcium_current_b_gate has millisecond;
  g = 0.902 dimensionless;
  g_infinity has dimensionless;
  tau_g has millisecond;
  V_T_type_calcium_current_g_gate has millivolt;
  time_T_type_calcium_current_g_gate has millisecond;
  i_pCa has picoA_per_picoF;
  i_pCa_max = 0.2 picoA_per_picoF;
  Km_pCa = 0.5 micromolar;
  i_NaCa has picoA_per_picoF;
  k_NaCa = 907.68 picoA_per_picoF;
  K_mNa = 87500 micromolar;
  K_mCa = 1380 micromolar;
  k_sat = 0.1 dimensionless;
  eta = 0.35 dimensionless;
  i_Cab has picoA_per_picoF;
  g_Cab = 0.00025 milliS_per_microF;
  E_CaN has millivolt;
  Nai = 21747 micromolar;
  i_Na has picoA_per_picoF;
  E_Na has millivolt;
  g_Na = 10 milliS_per_microF;
  m_fast_sodium_current_m_gate = 0.0032 dimensionless;
  alpha_m has per_millisecond;
  beta_m has per_millisecond;
  V_fast_sodium_current_m_gate has millivolt;
  time_fast_sodium_current_m_gate has millisecond;
  h = 0.9606 dimensionless;
  alpha_h has per_millisecond;
  beta_h has per_millisecond;
  V_fast_sodium_current_h_gate has millivolt;
  time_fast_sodium_current_h_gate has millisecond;
  j = 0.9744 dimensionless;
  alpha_j has per_millisecond;
  beta_j has per_millisecond;
  V_fast_sodium_current_j_gate has millivolt;
  time_fast_sodium_current_j_gate has millisecond;
  i_Nab has picoA_per_picoF;
  g_Nab = 0.0026 milliS_per_microF;
  Ki = 136450 micromolar;
  i_Kto_f has picoA_per_picoF;
  E_K has millivolt;
  g_Kto_f = 0.1017 milliS_per_microF;
  ato_f = 0.0032 dimensionless;
  ito_f = 0.753 dimensionless;
  ito_f_infinity has dimensionless;
  tau_ito_f has millisecond;
  alpha_a has per_millisecond;
  beta_a has per_millisecond;
  alpha_i_fast_transient_outward_potassium_current has per_millisecond;
  beta_i_fast_transient_outward_potassium_current has per_millisecond;
  i_Kur has picoA_per_picoF;
  ass has dimensionless;
  g_Kur = 0.0048 milliS_per_microF;
  aur = 0.00052471 dimensionless;
  iur = 0.9866 dimensionless;
  tau_aur has millisecond;
  tau_iur has millisecond;
  iss has dimensionless;
  i_Kss has picoA_per_picoF;
  g_Kss = 0.015 milliS_per_microF;
  aKss = 0.85 dimensionless;
  tau_Kss has millisecond;
  i_K1 has picoA_per_picoF;
  g_K1 = 0.235 milliS_per_microF;
  i_Ks has picoA_per_picoF;
  g_Ks = 0.046 milliS_per_microF;
  nKs = 0.0026 dimensionless;
  alpha_n has per_millisecond;
  beta_n has per_millisecond;
  i_Kr has picoA_per_picoF;
  g_Kr = 1.17 milliS_per_microF;
  O_K = 0.0021 dimensionless;
  C_K1 = 0.0011 dimensionless;
  C_K2 = 0.00083641 dimensionless;
  C_K0 has dimensionless;
  I_K = 0.00043522 dimensionless;
  alpha_a0 has per_millisecond;
  beta_a0 has per_millisecond;
  kb = 0.036778 per_millisecond;
  kf = 0.023761 per_millisecond;
  alpha_a1 has per_millisecond;
  beta_a1 has per_millisecond;
  alpha_i_rapid_delayed_rectifier_potassium_current has per_millisecond;
  beta_i_rapid_delayed_rectifier_potassium_current has per_millisecond;
  i_NaK has picoA_per_picoF;
  i_NaK_max = 0.88 picoA_per_picoF;
  Km_Nai = 21000 micromolar;
  Km_Ko = 1500 micromolar;
  f_NaK has dimensionless;
  sigma has dimensionless;
  i_ClCa has picoA_per_picoF;
  P_ClCa = 2.74e-7 cm_per_second;
  f_ClCa has dimensionless;
  Km_Cl = 4 micromolar;
  n_ClCa = 3 dimensionless;
  V_lim = -40 millivolt;

  // Assignment rules:
  i_stim := piecewise(stim_amplitude, (time >= stim_start) && (time <= stim_end) && (time - stim_start - floor((time - stim_start)/stim_period)*stim_period <= stim_duration), 0);
  Bi := (1 + CMDN_tot*Km_CMDN/(Km_CMDN + Cai)^2)^(-1);
  Bss := (1 + CMDN_tot*Km_CMDN/(Km_CMDN + Cass)^2)^(-1);
  BJSR := (1 + CSQN_tot*Km_CSQN/(Km_CSQN + CaJSR)^2)^(-1);
  J_rel := v1*(P_O1 + P_O2)*(CaJSR - Cass)*P_RyR;
  J_tr := (CaNSR - CaJSR)/tau_tr;
  J_xfer := (Cass - Cai)/tau_xfer;
  J_leak := v2*(CaNSR - Cai);
  J_up := v3*Cai^2/(Km_up^2 + Cai^2);
  J_trpn := k_plus_htrpn*Cai*(HTRPN_tot - HTRPN_Ca) + k_plus_ltrpn*Cai*(LTRPN_tot - LTRPN_Ca) - (k_minus_htrpn*HTRPN_Ca + k_minus_ltrpn*LTRPN_Ca);
  P_C1 := 1 - (P_C2 + P_O1 + P_O2);
  i_CaL := g_CaL*O*(V_membrane - E_CaL);
  C1 := 1 - (O + C2 + C2 + C3 + C4 + I1 + I2 + I3);
  alpha := 0.4*exp((V_membrane + 12)/10)*(1 + 0.7*exp(-(V_membrane + 40)^2/10) - 0.75*exp(-(V_membrane + 20)^2/400))/(1 + 0.12*exp((V_membrane + 12)/10));
  beta := 0.05*exp(-(V_membrane + 12)/13);
  gamma := Kpc_max*Cass/(Kpc_half + Cass);
  Kpcf := 13*(1 - exp(-(V_membrane + 14.5)^2/100));
  i_CaT := g_CaT*b*g*(V_membrane - E_CaT);
  b_infinity := 1/(1 + exp(-(V_T_type_calcium_current_b_gate + 48)/6.1));
  tau_b := 0.1 + 5.4/(1 + exp((V_T_type_calcium_current_b_gate + 100)/6.6));
  g_infinity := 1/(1 + exp((V_T_type_calcium_current_g_gate + 66)/6.6));
  tau_g := 8 + 32/(1 + exp((V_T_type_calcium_current_g_gate + 65)/5));
  i_pCa := i_pCa_max*Cai^2/(Km_pCa^2 + Cai^2);
  i_NaCa := k_NaCa*1/(K_mNa^3 + Nao^3)*1/(K_mCa + Cao)*1/(1 + k_sat*exp((eta - 1)*V_membrane*F/(R*T)))*(exp(eta*V_membrane*F/(R*T))*Nai^3*Cao - exp((eta - 1)*V_membrane*F/(R*T))*Nao^3*Cai);
  i_Cab := g_Cab*(V_membrane - E_CaN);
  E_CaN := R*T/(2*F)*ln(Cao/Cai);
  i_Na := g_Na*m_fast_sodium_current_m_gate^3*h*j*(V_membrane - E_Na);
  E_Na := R*T/F*ln(Nao/Nai);
  alpha_m := 0.32*(V_fast_sodium_current_m_gate + 47.13)/(1 - exp(-0.1*(V_fast_sodium_current_m_gate + 47.13)));
  beta_m := 0.08*exp(-V_fast_sodium_current_m_gate/11);
  alpha_h := piecewise(0.135*exp((80 + V_fast_sodium_current_h_gate)/(-6.8)), V_fast_sodium_current_h_gate < V_lim, 0);
  beta_h := piecewise(3.56*exp(0.079*V_fast_sodium_current_h_gate) + 310000*exp(0.35*V_fast_sodium_current_h_gate), V_fast_sodium_current_h_gate < V_lim, 1/(0.13*(1 + exp((V_fast_sodium_current_h_gate + 10.66)/(-11.1)))));
  alpha_j := piecewise(-(127140*exp(0.2444*V_fast_sodium_current_j_gate) + 3.474e-5*exp(-0.04391*V_fast_sodium_current_j_gate))*(V_fast_sodium_current_j_gate + 37.78)/(1 + exp(0.311*(V_fast_sodium_current_j_gate + 79.23))), V_fast_sodium_current_j_gate < V_lim, 0);
  beta_j := piecewise(0.1212*exp(-0.01052*V_fast_sodium_current_j_gate)/(1 + exp(-0.1378*(V_fast_sodium_current_j_gate + 40.14))), V_fast_sodium_current_j_gate < V_lim, 0.3*exp(-2.535e-7*V_fast_sodium_current_j_gate)/(1 + exp(-0.1*(V_fast_sodium_current_j_gate + 32))));
  i_Nab := g_Nab*(V_membrane - E_Na);
  i_Kto_f := g_Kto_f*ato_f^6.5*ito_f*(V_membrane - E_K);
  E_K := R*T/F*ln(Ko/Ki);
  ito_f_infinity := alpha_i_fast_transient_outward_potassium_current/(alpha_i_fast_transient_outward_potassium_current + beta_i_fast_transient_outward_potassium_current);
  tau_ito_f := 1/(0.000152*exp(-(V_membrane + 13.5)/7)/(0.067083*exp(-(V_membrane + 33.5)/7) + 1) + 0.00095*exp((V_membrane + 33.5)/7)/(0.051335*exp((V_membrane + 33.5)/7) + 1));
  alpha_a := 0.18064*exp(0.03577*(V_membrane + 30));
  beta_a := 0.3956*exp(-0.06237*(V_membrane + 30));
  alpha_i_fast_transient_outward_potassium_current := 0.000152*exp(-(V_membrane - 3.81)/15.75)/(0.0067083*exp(-(V_membrane + 132.05)/15.75) + 1);
  beta_i_fast_transient_outward_potassium_current := 0.00095*exp((V_membrane + 132.05)/15.75)/(0.051335*exp((V_membrane + 132.05)/15.75) + 1);
  i_Kur := g_Kur*aur*iur*(V_membrane - E_K);
  ass := 1/(1 + exp(-(V_membrane + 22.5)/7.7));
  tau_aur := 0.493*exp(-0.0629*V_membrane) + 2.058;
  iss := 1/(1 + exp((V_membrane + 45.2)/5.7));
  tau_iur := 1200 - 170/(1 + exp((V_membrane + 45.2)/5.7));
  i_Kss := g_Kss*aKss*(V_membrane - E_K);
  tau_Kss := 39.3*exp(-0.0862*V_membrane) + 13.17;
  i_K1 := g_K1*(Ko/(Ko + 210))*((V_membrane - E_K)/(1 + exp(0.0896*(V_membrane - E_K))));
  i_Ks := g_Ks*nKs^2*(V_membrane - E_K);
  alpha_n := 4.81333e-6*(V_membrane + 26.5)/(1 - exp(-0.128*(V_membrane + 26.5)));
  beta_n := 9.53333e-5*exp(-0.038*(V_membrane + 26.5));
  i_Kr := g_Kr*O_K*(V_membrane - E_K);
  C_K0 := 1 - (C_K1 + C_K2 + O_K + I_K);
  alpha_a0 := 0.022348*exp(0.01176*V_membrane);
  beta_a0 := 0.047002*exp(-0.0631*V_membrane);
  alpha_a1 := 0.013733*exp(0.038198*V_membrane);
  beta_a1 := 6.89e-5*exp(-0.04178*V_membrane);
  alpha_i_rapid_delayed_rectifier_potassium_current := 0.090821*exp(0.023391*(V_membrane + 5));
  beta_i_rapid_delayed_rectifier_potassium_current := 0.006497*exp(-0.03268*(V_membrane + 5));
  i_NaK := i_NaK_max*f_NaK*1/(1 + (Km_Nai/Nai)^1.5)*Ko/(Ko + Km_Ko);
  f_NaK := 1/(1 + 0.1245*exp(-0.1*V_membrane*F/(R*T)) + 0.0365*sigma*exp(-V_membrane*F/(R*T)));
  sigma := 1/7*(exp(Nao/67300) - 1);
  f_ClCa := (Cass/(Km_Cl + Cass))^n_ClCa;
  i_ClCa := 1*P_ClCa*f_ClCa*(V_membrane*F^2/(R*T))*((Clo*exp(V_membrane*F/(R*T)) - Cli)/(exp(V_membrane*F/(R*T)) - 1));

  // Rate rules:
  V_membrane' = -(i_CaL + i_CaT + i_pCa + i_NaCa + i_Cab + i_Na + i_Nab + i_NaK + i_Kto_f + i_K1 + i_Ks + i_Kur + i_Kss + i_Kr + i_ClCa + i_stim);
  Cai' = Bi*(J_leak + J_xfer - (J_up + J_trpn));
  Cass' = Bss*(J_rel*VJSR/Vss - (J_xfer*Vmyo/Vss + (i_CaL + i_Cab + i_pCa + i_CaT - 2*i_CaT)*(Acap*Cm/(2*Vss*F))));
  CaJSR' = BJSR*(J_xfer - J_rel);
  CaNSR' = (J_up - J_leak)*Vmyo/VNSR - J_tr*VJSR/VNSR;
  P_RyR' = 1*(-0.04*P_RyR - 0.1*(i_CaL/i_CaL_max)*exp(-(V_membrane - 5)^2/648));
  LTRPN_Ca' = k_plus_ltrpn*Cai*(LTRPN_tot - LTRPN_Ca) - k_minus_ltrpn*LTRPN_Ca;
  HTRPN_Ca' = k_plus_htrpn*Cai*(HTRPN_tot - HTRPN_Ca) - k_minus_htrpn*HTRPN_Ca;
  P_O1' = k_plus_a*Cass^n*P_C1 + k_minus_b*P_O2 + k_minus_c*P_C2 - (k_minus_a*P_O1 + k_plus_b*Cass^m_ryanodine_receptors*P_O1 + k_plus_c*P_O1);
  P_O2' = k_plus_b*Cass^m_ryanodine_receptors*P_O1 - k_minus_b*P_O2;
  P_C2' = k_plus_c*P_O1 - k_minus_c*P_C2;
  O' = alpha*C4 + Kpcb*I1 + 0.001*(alpha*I2 - Kpcf*O) - (4*beta*O + gamma*O);
  C2' = 4*alpha*C1 + 2*beta*C3 - (beta*C2 + 3*alpha*C2);
  C3' = 3*alpha*C2 + 3*beta*C4 - (2*beta*C3 + 2*alpha*C3);
  C4' = 2*alpha*C3 + 4*beta*O + 0.01*(4*Kpcb*beta*I1 - alpha*gamma*C4) + 0.002*(4*beta*I2 - Kpcf*C4) + 4*beta*Kpcb*I3 - (3*beta*C4 + alpha*C4 + 1*gamma*Kpcf*C4);
  I1' = gamma*O + 0.001*(alpha*I3 - Kpcf*I1) + 0.01*(alpha*gamma*C4 - 4*beta*Kpcf*I1) - Kpcb*I1;
  I2' = 0.001*(Kpcf*O - alpha*I2) + Kpcb*I3 + 0.002*(Kpcf*C4 - 4*beta*I2) - gamma*I2;
  I3' = 0.001*(Kpcf*I1 - alpha*I3) + gamma*I2 + 1*gamma*Kpcf*C4 - (4*beta*Kpcb*I3 + Kpcb*I3);
  b' = (b_infinity - b)/tau_b;
  g' = (g_infinity - g)/tau_g;
  Nai' = -(i_Na + i_Nab + 3*i_NaK + 3*i_NaCa)*Acap*Cm/(Vmyo*F);
  m_fast_sodium_current_m_gate' = alpha_m - (alpha_m + beta_m)*m_fast_sodium_current_m_gate;
  h' = alpha_h - (alpha_h + beta_h)*h;
  j' = alpha_j - (alpha_j + beta_j)*j;
  Ki' = -(i_Kto_f + i_K1 + i_Ks + i_Kss + i_Kur + i_Kr - 2*i_NaK)*Acap*Cm/(Vmyo*F);
  ato_f' = alpha_a*(1 - ato_f) - beta_a*ato_f;
  ito_f' = (ito_f_infinity - ito_f)/tau_ito_f;
  aur' = (ass - aur)/tau_aur;
  iur' = (iss - iur)/tau_iur;
  aKss' = (ass - aKss)/tau_Kss;
  nKs' = alpha_n*(1 - nKs) - beta_n*nKs;
  C_K2' = kf*C_K1 + beta_a1*O_K - (kb*C_K2 + alpha_a1*C_K2);
  C_K1' = alpha_a0*C_K0 + kb*C_K2 - (beta_a0*C_K1 + kf*C_K1);
  O_K' = alpha_a1*C_K2 + beta_i_rapid_delayed_rectifier_potassium_current*I_K - (beta_a1*O_K + alpha_i_rapid_delayed_rectifier_potassium_current*O_K);
  I_K' = alpha_i_rapid_delayed_rectifier_potassium_current*O_K - beta_i_rapid_delayed_rectifier_potassium_current*I_K;

  // Unit definitions:
  unit millisecond = 1e-3 second;
  unit per_millisecond = 1 / (1e-3 second);
  unit micromolar_per_millisecond = 1e-6 mole / (litre * 1e-3 second);
  unit per_micromolar_millisecond = litre / (1e-6 mole * 1e-3 second);
  unit micromolar3_per_millisecond = litre^3 / ((1e-6 mole)^3 * 1e-3 second);
  unit micromolar4_per_millisecond = litre^4 / ((1e-6 mole)^4 * 1e-3 second);
  unit millivolt = 1e-3 volt;
  unit per_millivolt = 1 / (1e-3 volt);
  unit millivolt2 = (1e-3 volt)^2;
  unit per_millivolt_millisecond = 1 / (1e-3 volt * 1e-3 second);
  unit milliS_per_microF = 1e-3 siemens / (1e-6 farad);
  unit picoF = 1e-12 farad;
  unit per_picoF = 1 / (1e-12 farad);
  unit microF_per_cm2 = 1e-6 farad / (0.01 metre)^2;
  unit picoA_per_picoF = 1e-12 ampere / (1e-12 farad);
  unit micromolar = 1e-6 mole / litre;
  unit joule_per_mole_kelvin = joule / (mole * kelvin);
  unit coulomb_per_millimole = coulomb / (1e-3 mole);
  unit cm2 = (0.01 metre)^2;
  unit cm2_per_microF = (0.01 metre)^2 / (1e-6 farad);
  unit cm_per_second = 0.01 metre / second;
  unit microlitre = 1e-6 litre;
  unit time = 1e-3 second;
end
