// SBML level 2 version 3

model Wang2008_Rilusole_SkeletalMuscleCells()
  // This a model from the article:
  // Riluzole-induced block of voltage-gated Na+ current and activation of BKCa channels in cultured differentiated human skeletal muscle cells.
  // Wang YJ, Lin MW, Lin AA, Wu SN. Life Sci. (2008) 82(1-2) pp 11-20; Pubmed ID: 18068197 ,
  // Abstract:
  // Riluzole is known to be of therapeutic use in the management of amyotrophic lateral sclerosis. In this study, we investigated the effects of riluzole on ion currents in cultured differentiated human skeletal muscle cells (dHSkMCs). Western blotting revealed the protein expression of alpha-subunits for both large-conductance Ca2+-activated K+ (BK(Ca)) channel and Na+ channel (Na(v)1.5) in these cells. Riluzole could reduce the frequency of spontaneous beating in dHSkMCs. In whole-cell configuration, riluzole suppressed voltage-gated Na+ current (I(Na)) in a concentration-dependent manner with an IC50 value of 2.3 microM. Riluzole (10 microM) also effectively increased Ca2+-activated K+ current (I(K(Ca))) which could be reversed by iberiotoxin (200 nM) and paxilline (1 microM), but not by apamin (200 nM). In inside-out patches, when applied to the inside of the cell membrane, riluzole (10 microM) increased BK(Ca)-channel activity with a decrease in mean closed time. Simulation studies also unraveled that both decreased conductance of I(Na) and increased conductance of I(K(Ca)) utilized to mimic riluzole actions in skeletal muscle cells could combine to decrease the amplitude of action potentials and increase the repolarization of action potentials. Taken together, inhibition of I(Na) and stimulation of BK(Ca)-channel activity caused by this drug are partly, if not entirely, responsible for its muscle relaxant actions in clinical setting.
  // This model was taken from the CellML repository and automatically converted to SBML.
  // The original model was: Wang_Lin_Lin_Wu, 1999, version02
  // The original CellML model was created by:
  // Nunns, Geoffrey, Rogan
  // gnunns1(at)jhem.jhu.edu
  // The University of Auckland
  // Auckland Bioengineering Institute
  // This model originates from BioModels Database: A Database of Annotated Published Models (http://www.ebi.ac.uk/biomodels/). It is copyright (c) 2005-2011 The BioModels.net Team.
  // To the extent possible under law, all copyright and related or neighbouring rights to this encoded model have been dedicated to the public domain worldwide. Please refer to CC0 Public Domain Dedication for more information.
  // In summary, you are entitled to use this encoded model in absolutely any manner you deem suitable, verbatim, or with modification, alone or embedded it in a larger context, redistribute it, commercially or not, in a restricted way or not..
  // To cite BioModels Database, please use: Li C, Donizelli M, Rodriguez N, Dharuri H, Endler L, Chelliah V, Li L, He E, Henry A, Stefan MI, Snoep JL, Hucka M, Le Novère N, Laibe C (2010) BioModels Database: An enhanced, curated and annotated resource for published quantitative kinetic models. BMC Syst Biol., 4:92.
  // biomodels.db:MODEL7817907010
  // isDescribedBy pubmed:18068197
  // biomodels.db:MODEL7817907010
  // isDescribedBy pubmed:18068197
  // biomodels.db:MODEL7817907010
  // biomodels.db:MODEL7817907010

  // Compartments:
  compartment Compartment = 1 litre;

  // Parameters:
  RT_parameters = 2577 joule_per_mole;
  V_m_membrane = -75 millivolt;
  C_m = 0.009 picofarad;
  I_stim has picoampere;
  I_mag = 2 picoampere;
  t_0 = 5 millisecond;
  t_1 = 6 millisecond;
  H_0 has dimensionless;
  H_1 has dimensionless;
  I_Na has picoampere;
  g_Na = 0.45 nanosiemens;
  E_Na = 50 millivolt;
  m = 0 dimensionless;
  time_m has millisecond;
  V_m_m has millivolt;
  E_m = -42 millivolt;
  V_alpha_m = 10 millivolt;
  V_beta_m = 18 millivolt;
  alpha_m has per_millisecond;
  beta_m has per_millisecond;
  alpha_m_max = 0.208 per_millivolt_per_millisecond;
  beta_m_max = 2.081 per_millisecond;
  h = 1 dimensionless;
  time_h has millisecond;
  V_m_h has millivolt;
  E_h = -41 millivolt;
  V_alpha_h = 14.7 millivolt;
  V_beta_h = 7.6 millivolt;
  alpha_h has per_millisecond;
  beta_h has per_millisecond;
  alpha_h_max = 0.0156 per_millisecond;
  beta_h_max = 3.382 per_millisecond;
  I_T has picoampere;
  R_s = 15 per_nanosiemens;
  C_t = 0.04 picofarad;
  V_T = -70 millivolt;
  time_V_T has millisecond;
  V_m_V_T has millivolt;
  I_KCa has picoampere;
  g_KCa = 0.5 nanosiemens;
  o = 0.15 dimensionless;
  time_o has millisecond;
  V_m_o has millivolt;
  c_o has dimensionless;
  o_oinf has dimensionless;
  alpha_Vm has per_millisecond;
  beta_Vm has per_millisecond;
  tau_Vm has millisecond;
  d_1 = 0.84 dimensionless;
  d_2 = 1 dimensionless;
  k_1 = 0.18 dimensionless;
  k_2 = 0.011 dimensionless;
  a_bar = 0.48 per_millisecond;
  b_bar = 0.28 per_millisecond;
  RT_o has joule_per_mole;
  w has dimensionless;
  time_w has millisecond;
  kd = 0.18 dimensionless;
  c_w has dimensionless;
  c_calcium_handling = 0.15 dimensionless;
  cer = 200 dimensionless;
  j_mem has picoampere;
  j_leak has picoampere;
  j_serca has picoampere;
  j_er has picoampere;
  alpha = 4.5e-6 dimensionless;
  k_pmca = 0.2 dimensionless;
  k_serca = 0.4 picoampere;
  p_leak = 0.0005 picoampere;
  f_er = 0.01 per_picoampere_per_millisecond;
  f_cyt = 0.01 per_picoampere_per_millisecond;
  v_cytver = 5 dimensionless;
  I_Ca has picoampere;
  g_Ca has nanosiemens;
  g_Ca0 = 0.05 nanosiemens_per_millivolt;
  E_Ca = 50 millivolt;
  d = 0 dimensionless;
  V_m_d has millivolt;
  time_d has millisecond;
  alpha_d has per_millisecond;
  beta_d has per_millisecond;
  tau_d has millisecond;
  d_infinity has dimensionless;
  I_L has picoampere;
  E_L = -75 millivolt;
  g_Lmax = 0.0024 nanosiemens;
  I_K has picoampere;
  E_K = -70 millivolt;
  g_K = 0.415 nanosiemens;
  n = 0 dimensionless;
  time_n has millisecond;
  V_m_n has millivolt;
  E_n = -40 millivolt;
  E_d = -24.6 millivolt;
  V_alpha_n = 7 millivolt;
  V_beta_n = 40 millivolt;
  alpha_n has per_millisecond;
  beta_n has per_millisecond;
  alpha_n_max = 0.0229 per_millivolt_per_millisecond;
  beta_n_max = 0.09616 per_millisecond;

  // Assignment rules:
  H_0 := piecewise(0, time < t_0, 1);
  H_1 := piecewise(0, time < t_1, 1);
  I_stim := I_mag*(H_0 - H_1);
  I_Na := g_Na*m^3*h*(V_m_membrane - E_Na);
  alpha_m := alpha_m_max*(V_m_m - E_m)/(1 - exp((E_m - V_m_m)/V_alpha_m));
  beta_m := beta_m_max*exp((E_m - V_m_m)/V_beta_m);
  alpha_h := alpha_h_max*exp((V_m_h - E_h)/V_alpha_h);
  beta_h := beta_h_max/(1 + exp((E_h - V_m_h)/V_beta_h));
  I_T := (V_m_membrane - V_T)/R_s;
  I_KCa := g_KCa*o*w*(V_m_membrane - E_K);
  alpha_Vm := a_bar/(1 + k_1*exp(-2*d_1*96.485*V_m_o/(RT_o*c_o)));
  beta_Vm := b_bar/(1 + c_o/(k_2*exp(-2*d_2*96.485*V_m_o/RT_o)));
  tau_Vm := 1/(alpha_Vm + beta_Vm);
  o_oinf := alpha_Vm*tau_Vm;
  w := c_w^5/(c_w^5 + kd^5);
  j_mem := -alpha*I_Ca*k_pmca*c_calcium_handling;
  j_leak := p_leak*(cer - c_calcium_handling);
  j_serca := k_serca*c_calcium_handling;
  j_er := j_leak - j_serca;
  g_Ca := -g_Ca0*V_m_membrane/(exp(0.117*V_m_membrane) - 1);
  I_Ca := g_Ca*d^2*(V_m_membrane - E_Ca);
  d_infinity := 1/(1 + exp((E_d - V_m_d)/11.3));
  tau_d := 80*1/cosh(-0.031*(V_m_d + 37.1));
  alpha_d := d_infinity/tau_d;
  beta_d := (1 - d_infinity)/tau_d;
  I_L := g_Lmax*(V_m_membrane - E_L);
  I_K := g_K*n^4*(V_m_membrane - E_K);
  alpha_n := alpha_n_max*(V_m_n - E_n)/(1 - exp((E_n - V_m_n)/V_alpha_n));
  beta_n := beta_n_max*exp((E_n - V_m_n)/V_beta_n);

  // Rate rules:
  V_m_membrane' = (I_stim - (I_Na + I_Ca + I_K + I_L + I_T + I_KCa))/C_m;
  m' = alpha_m*(1 - m) - beta_m*m;
  h' = alpha_h*(1 - h) - beta_h*h;
  V_T' = (V_m_V_T - V_T)/(R_s*C_t);
  o' = (o_oinf - o)/tau_Vm;
  c_calcium_handling' = f_cyt*(j_mem + j_er);
  cer' = -f_er*v_cytver*j_er;
  d' = alpha_d*(1 - d) - beta_d*d;
  n' = alpha_n*(1 - n) - beta_n*n;

  // Unit definitions:
  unit kilocoulombs_per_mole = 1000 coulomb / mole;
  unit millisecond = 1e-3 second;
  unit millivolt = 1e-3 volt;
  unit picofarad = 1e-12 farad;
  unit picoampere = 1e-12 ampere;
  unit per_picoampere_per_millisecond = 1 / (1e-12 ampere * 1e-3 second);
  unit nanosiemens = 1e-9 siemens;
  unit per_nanosiemens = 1 / (1e-9 siemens);
  unit per_millisecond = 1 / (1e-3 second);
  unit per_millivolt = 1 / (1e-3 volt);
  unit per_millivolt_per_millisecond = 1 / (1e-3 second * 1e-3 volt);
  unit joule_per_mole = joule / mole;
  unit kilojoule_per_mole = 1000 joule / mole;
  unit nanosiemens_per_millivolt = 1e-9 siemens / (1e-3 volt);
  unit time = 1e-3 second;
end
