// SBML level 2 version 3

model vempati_model_2007()
  // Vempati2007_MMP9_Regulation
  // This is the model described in the article:
  // A biochemical model of matrix metalloproteinase 9 activation and inhibition.
  // Vempati P, Karagiannis ED, Popel AS. J Biol Chem. 2007 Dec 28;282(52):37585-96. Pubmed ID: 17848556 , doi: 10.1074/jbc.M611500200 .
  // Abstract:
  // Matrix metalloproteinases (MMPs) are a class of extracellular and membrane-bound proteases involved in an array of physiological processes, including angiogenesis. We present a detailed computational model of MMP9 activation and inhibition. Our model is validated to existing biochemical experimental data. We determine kinetic rate constants for the processes of MMP9 activation by MMP3, MMP10, MMP13, and trypsin; inhibition by the tissue inhibitors of metalloproteinases (TIMPs) 1 and 2; and MMP9 deactivation. This computational approach allows us to investigate discrepancies in our understanding of the interaction of MMP9 with TIMP1. Specifically, we find that inhibition due to a single binding event cannot describe MMP9 inhibition by TIMP1. Temporally accurate biphasic inhibition requires either an additional isomerization step or a second lower affinity isoform of MMP9. We also theoretically characterize the MMP3/TIMP2/pro-MMP9 and MMP3/TIMP1/pro-MMP9 systems. We speculate that these systems differ significantly in their time scales of activation and inhibition such that MMP9 is able to temporarily overshoot its final equilibrium value in the latter. Our numerical simulations suggest that the ability of pro-MMP9 to complex TIMP1 increases this overshoot. In all, our analysis serves as a summary of existing kinetic data for MMP9 and a foundation for future models utilizing MMP9 or other MMPs under physiologically well defined microenvironments.
  // This model was taken from the CellML repository and automatically converted to SBML.
  // The original model is: Vempati, Karagiannis, Popel, 2007 version 1
  // The original CellML model was created and curated by:
  // Catherine May Lloyd
  // c.lloyd(at)auckland.ac.nz
  // The University of Auckland, Bioengineering Institute
  // This model originates from BioModels Database: A Database of Annotated Published Models (http://www.ebi.ac.uk/biomodels/). It is copyright (c) 2005-2011 The BioModels.net Team.
  // To the extent possible under law, all copyright and related or neighbouring rights to this encoded model have been dedicated to the public domain worldwide. Please refer to CC0 Public Domain Dedication for more information.
  // In summary, you are entitled to use this encoded model in absolutely any manner you deem suitable, verbatim, or with modification, alone or embedded it in a larger context, redistribute it, commercially or not, in a restricted way or not..
  // To cite BioModels Database, please use: Li C, Donizelli M, Rodriguez N, Dharuri H, Endler L, Chelliah V, Li L, He E, Henry A, Stefan MI, Snoep JL, Hucka M, Le Novère N, Laibe C (2010) BioModels Database: An enhanced, curated and annotated resource for published quantitative kinetic models. BMC Syst Biol., 4:92.
  // biomodels.db:MODEL7888000034
  // isDescribedBy pubmed:17848556
  // biomodels.db:MODEL7888000034
  // isDescribedBy pubmed:17848556
  // biomodels.db:MODEL7888000034
  // biomodels.db:MODEL7888000034

  // Compartments:
  compartment Compartment = 1 litre;

  // Parameters:
  v1 has flux;
  v2 has flux;
  v3 has flux;
  v4 has flux;
  v5 has flux;
  v6 has flux;
  v7 has flux;
  v8 has flux;
  v9 has flux;
  v10 has flux;
  v11 has flux;
  v12 has flux;
  v13 has flux;
  v14 has flux;
  v15 has flux;
  v16 has flux;
  v17 has flux;
  v18 has flux;
  v19 has flux;
  v20 has flux;
  pM9 = 3e-7 molar;
  M3 = 5e-8 molar;
  M3_pM9 = 0 molar;
  T1 = 3e-7 molar;
  M3_T1 = 0 molar;
  pM9_T1 = 0 molar;
  M3_pM9_T1 = 0 molar;
  M9_T1_star = 0 molar;
  M9 = 0 molar;
  M9_T1 = 0 molar;
  pM9_T1_M3 = 0 molar;
  M3_pM9_T1_M3 = 0 molar;
  M9_T1_M3 = 0 molar;
  Tr = 1e-7 molar;
  Tr_pM9 = 0 molar;
  Tr_pM9_T1 = 0 molar;
  Tr_pM9_T1_M3 = 0 molar;
  kon_pM9T1 = 34000 second_order_rate_constant;
  koff_pM9T1 = 7.48e-5 first_order_rate_constant;
  kon_pM9T1M3 = 34000 second_order_rate_constant;
  koff_pM9T1M3 = 7.48e-5 first_order_rate_constant;
  kon_M3pM9 = 10000 second_order_rate_constant;
  koff_M3pM9 = 0.001 first_order_rate_constant;
  kon_M3pM9T1 = 10000 second_order_rate_constant;
  koff_M3pM9T1 = 0.001 first_order_rate_constant;
  kon_M3pM9T1M3 = 10000 second_order_rate_constant;
  koff_M3pM9T1M3 = 0.001 first_order_rate_constant;
  kon_M3T1 = 1900000 second_order_rate_constant;
  koff_M3T1 = 0.000126 first_order_rate_constant;
  kon_M9T1_star = 5600000 second_order_rate_constant;
  koff_M9T1_star = 1.6e-5 first_order_rate_constant;
  kon_M9T1 = 0.00063 first_order_rate_constant;
  koff_M9T1 = 0.00025 first_order_rate_constant;
  kon_M3_pM9T1 = 1900000 second_order_rate_constant;
  koff_M3_pM9T1 = 0.000126 first_order_rate_constant;
  kon_TrpM9 = 10000 second_order_rate_constant;
  koff_TrpM9 = 0.007 first_order_rate_constant;
  kon_TrpM9T1 = 10000 second_order_rate_constant;
  koff_TrpM9T1 = 0.007 first_order_rate_constant;
  kon_TrpM9T1M3 = 10000 second_order_rate_constant;
  koff_TrpM9T1M3 = 0.007 first_order_rate_constant;
  kon_M9_M3T1 = 7.48e-5 first_order_rate_constant;
  koff_M9_M3T1 = 34000 second_order_rate_constant;
  kact_M3pM9T1 = 0.00057 first_order_rate_constant;
  kact_M3pM9T1M3 = 0.00057 first_order_rate_constant;
  kact_M9T1M3 = 0.000126 first_order_rate_constant;
  kact_TrpM9 = 0.002 first_order_rate_constant;
  kact_TrpM9T1 = 0.0006 first_order_rate_constant;
  kact_TrpM9T1M3 = 0.0006 first_order_rate_constant;
  kact_M3pM9 = 0.0019 first_order_rate_constant;

  // Assignment rules:
  v1 := kon_M3pM9*M3*pM9 - koff_M3pM9*M3_pM9;
  v2 := kact_M3pM9*M3_pM9;
  v3 := kon_M3T1*M3*T1 - koff_M3T1*M3_T1;
  v4 := kon_pM9T1*pM9*T1 - koff_pM9T1*pM9_T1;
  v5 := kon_M3pM9T1*pM9_T1*M3 - koff_M3pM9T1*M3_pM9_T1;
  v6 := kact_M3pM9T1*M3_pM9_T1;
  v7 := kon_M9T1_star*T1*M9 - koff_M9T1_star*M9_T1_star;
  v8 := kon_M9T1*M9_T1_star - koff_M9T1*M9_T1;
  v9 := kon_M9_M3T1*M9_T1_M3 - koff_M9_M3T1*M9*M3_T1;
  v10 := kon_M3_pM9T1*pM9_T1*M3 - koff_M3_pM9T1*pM9_T1_M3;
  v11 := kon_pM9T1M3*pM9*M3_T1 - koff_pM9T1M3*pM9_T1_M3;
  v12 := kon_M3pM9T1M3*M3*pM9_T1_M3 - koff_M3pM9T1M3*M3_pM9_T1_M3;
  v13 := kact_M3pM9T1M3*M3_pM9_T1_M3;
  v14 := kact_M9T1M3*M9_T1_M3;
  v15 := kon_TrpM9*Tr*pM9 - koff_TrpM9*Tr_pM9;
  v16 := kact_TrpM9*Tr_pM9;
  v17 := kon_TrpM9T1*pM9_T1*Tr - koff_TrpM9T1*Tr_pM9_T1;
  v18 := kact_TrpM9T1*Tr_pM9_T1;
  v19 := kon_TrpM9T1M3*Tr*pM9_T1_M3 - koff_TrpM9T1M3*Tr_pM9_T1_M3;
  v20 := kact_TrpM9T1M3*Tr_pM9_T1_M3;

  // Rate rules:
  pM9' = -(v1 + v4 + v15 + v11);
  M3' = v2 + v6 + v13 + v14 - (v1 + v3 + v5 + v10 + v12);
  M3_pM9' = v1 - v2;
  T1' = -(v3 + v4 + v7);
  M3_T1' = v3 + v9 - v11;
  pM9_T1' = v4 - (v5 + v10 + v17);
  M3_pM9_T1' = v5 - v6;
  M9_T1_star' = v7 + v14 - v8;
  M9' = v2 + v9 + v16 - v7;
  M9_T1' = v8 + v18;
  pM9_T1_M3' = v10 + v11 - (v12 + v19);
  M3_pM9_T1_M3' = v12 - v13;
  M9_T1_M3' = v13 + v20 - (v14 + v9);
  Tr' = v16 + v18 + v20 - (v15 + v17 + v19);
  Tr_pM9' = v15 - v16;
  Tr_pM9_T1' = v17 - v18;
  Tr_pM9_T1_M3' = v19 - v20;

  // Unit definitions:
  unit molar = mole / litre;
  unit flux = mole / (litre * second);
  unit first_order_rate_constant = 1 / second;
  unit second_order_rate_constant = litre / (mole * second);
end
