// SBML level 2 version 3

model beeler_reuter_1977_version06()
  // Beeler1977_Ventricular_Myocardial_Fiber_AP
  // This is the model described in the article:
  // Reconstruction of the action potential of ventricular myocardial fibres.
  // Beeler GW, Reuter H. J Physiol. 1977 Jun;268(1):177-210. Pubmed ID: 874889 , full text at PubMed central (PMCID:PMC1283659).
  // Abstract:
  // 1. A mathematical model of membrane action potentials of mammalian ventricular myocardial fibres is described. The reconstruction model is based as closely as possible on ionic currents which have been measured by the voltage-clamp method.
  // 2. Four individual components of ionic current were formulated mathematically in terms of Hodgkin-Huxley type equations. The model incorporates two voltage- and time-dependent inward currents, the excitatory inward sodium current, i(Na), and a secondary or slow inward current, i(s), primarily carried by calcium ions. A time-independent outward potassium current, i(K1), exhibiting inward-going rectification, and a voltage- and time-dependent outward current, i(x1), primarily carried by potassium ions, are further elements of the model.
  // 3. The i(Na) is primarily responsible for the rapid upstroke of the action potential, while the other current components determine the configuration of the plateau of the action potential and the re-polarization phase. The relative importance of inactivation of i(s) and of activation of i(x1) for termination of the plateau is evaluated by the model.
  // 4. Experimental phenomena like slow recovery of the sodium system from inactivation, frequency dependence of the action potential duration, all-or-nothing re-polarization, membrane oscillations are adequately described by the model.
  // 5. Possible inadequacies and shortcomings of the model are discussed.
  // This model was taken from the CellML repository and automatically converted to SBML.
  // The original model was: Beeler, Reuter, 1977 version 8
  // The original CellML model was created and curated by:
  // Catherine May Lloyd
  // c.lloyd(at)auckland.ac.nz
  // University of Auckland, Auckland Bioengineering Institute
  // This model originates from BioModels Database: A Database of Annotated Published Models (http://www.ebi.ac.uk/biomodels/). It is copyright (c) 2005-2011 The BioModels.net Team.
  // To the extent possible under law, all copyright and related or neighbouring rights to this encoded model have been dedicated to the public domain worldwide. Please refer to CC0 Public Domain Dedication for more information.
  // In summary, you are entitled to use this encoded model in absolutely any manner you deem suitable, verbatim, or with modification, alone or embedded it in a larger context, redistribute it, commercially or not, in a restricted way or not..
  // To cite BioModels Database, please use: Li C, Donizelli M, Rodriguez N, Dharuri H, Endler L, Chelliah V, Li L, He E, Henry A, Stefan MI, Snoep JL, Hucka M, Le Novère N, Laibe C (2010) BioModels Database: An enhanced, curated and annotated resource for published quantitative kinetic models. BMC Syst Biol., 4:92.
  // biomodels.db:MODEL7889395724
  // isDescribedBy pubmed:874889
  // biomodels.db:MODEL7889395724
  // isDescribedBy pubmed:874889
  // biomodels.db:MODEL7889395724
  // biomodels.db:MODEL7889395724

  // Compartments:
  compartment Compartment = 1 litre;

  // Parameters:
  V_membrane = -84.624 mV;
  C = 0.01 uF_per_mm2;
  i_Na has uA_per_mm2;
  g_Na = 0.04 mS_per_mm2;
  E_Na = 50 mV;
  g_Nac = 3e-5 mS_per_mm2;
  m = 0.011 dimensionless;
  alpha_m has per_ms;
  beta_m has per_ms;
  V_sodium_current_m_gate has mV;
  time_sodium_current_m_gate has ms;
  h = 0.988 dimensionless;
  alpha_h has per_ms;
  beta_h has per_ms;
  V_sodium_current_h_gate has mV;
  time_sodium_current_h_gate has ms;
  j = 0.975 dimensionless;
  alpha_j has per_ms;
  beta_j has per_ms;
  V_sodium_current_j_gate has mV;
  time_sodium_current_j_gate has ms;
  i_s has uA_per_mm2;
  g_s = 0.0009 mS_per_mm2;
  E_s has mV;
  Cai = 0.0001 concentration_units;
  d = 0.003 dimensionless;
  alpha_d has per_ms;
  beta_d has per_ms;
  V_slow_inward_current_d_gate has mV;
  time_slow_inward_current_d_gate has ms;
  f = 0.994 dimensionless;
  alpha_f has per_ms;
  beta_f has per_ms;
  V_slow_inward_current_f_gate has mV;
  time_slow_inward_current_f_gate has ms;
  i_x1 has uA_per_mm2;
  x1 = 0.0001 dimensionless;
  alpha_x1 has per_ms;
  beta_x1 has per_ms;
  V_time_dependent_outward_current_x1_gate has mV;
  time_time_dependent_outward_current_x1_gate has ms;
  i_K1 has uA_per_mm2;
  Istim has uA_per_mm2;
  IstimStart = 10 ms;
  IstimEnd = 50000 ms;
  IstimAmplitude = 0.5 uA_per_mm2;
  IstimPeriod = 1000 ms;
  IstimPulseDuration = 1 ms;

  // Assignment rules:
  i_Na := (g_Na*m^3*h*j + g_Nac)*(V_membrane - E_Na);
  alpha_m := -1*(V_sodium_current_m_gate + 47)/(exp(-0.1*(V_sodium_current_m_gate + 47)) - 1);
  beta_m := 40*exp(-0.056*(V_sodium_current_m_gate + 72));
  alpha_h := 0.126*exp(-0.25*(V_sodium_current_h_gate + 77));
  beta_h := 1.7/(exp(-0.082*(V_sodium_current_h_gate + 22.5)) + 1);
  alpha_j := 0.055*exp(-0.25*(V_sodium_current_j_gate + 78))/(exp(-0.2*(V_sodium_current_j_gate + 78)) + 1);
  beta_j := 0.3/(exp(-0.1*(V_sodium_current_j_gate + 32)) + 1);
  E_s := -1*(82.3 + 13.0287*ln(Cai*0.001));
  i_s := g_s*d*f*(V_membrane - E_s);
  alpha_d := 0.095*exp(-(V_slow_inward_current_d_gate - 5)/100)/(1 + exp(-(V_slow_inward_current_d_gate - 5)/13.89));
  beta_d := 0.07*exp(-(V_slow_inward_current_d_gate + 44)/59)/(1 + exp((V_slow_inward_current_d_gate + 44)/20));
  alpha_f := 0.012*exp(-(V_slow_inward_current_f_gate + 28)/125)/(1 + exp((V_slow_inward_current_f_gate + 28)/6.67));
  beta_f := 0.0065*exp(-(V_slow_inward_current_f_gate + 30)/50)/(1 + exp(-(V_slow_inward_current_f_gate + 30)/5));
  i_x1 := x1*0.008*(exp(0.04*(V_membrane + 77)) - 1)/exp(0.04*(V_membrane + 35));
  alpha_x1 := 0.0005*exp((V_time_dependent_outward_current_x1_gate + 50)/12.1)/(1 + exp((V_time_dependent_outward_current_x1_gate + 50)/17.5));
  beta_x1 := 0.0013*exp(-(V_time_dependent_outward_current_x1_gate + 20)/16.67)/(1 + exp(-(V_time_dependent_outward_current_x1_gate + 20)/25));
  i_K1 := 0.0035*(4*(exp(0.04*(V_membrane + 85)) - 1)/(exp(0.08*(V_membrane + 53)) + exp(0.04*(V_membrane + 53))) + 0.2*(V_membrane + 23)/(1 - exp(-0.04*(V_membrane + 23))));
  Istim := piecewise(IstimAmplitude, (time >= IstimStart) && (time <= IstimEnd) && (time - IstimStart - floor((time - IstimStart)/IstimPeriod)*IstimPeriod <= IstimPulseDuration), 0);

  // Rate rules:
  V_membrane' = (Istim - (i_Na + i_s + i_x1 + i_K1))/C;
  m' = alpha_m*(1 - m) - beta_m*m;
  h' = alpha_h*(1 - h) - beta_h*h;
  j' = alpha_j*(1 - j) - beta_j*j;
  Cai' = -0.01*i_s/1 + 0.07*(0.0001 - Cai);
  d' = alpha_d*(1 - d) - beta_d*d;
  f' = alpha_f*(1 - f) - beta_f*f;
  x1' = alpha_x1*(1 - x1) - beta_x1*x1;

  // Unit definitions:
  unit ms = 1e-3 second;
  unit per_ms = 1 / (1e-3 second);
  unit mV = 1e-3 volt;
  unit per_mV = 1 / (1e-3 volt);
  unit per_mV_ms = 1 / (1e-3 volt * 1e-3 second);
  unit mS_per_mm2 = 1e-3 siemens / (1e-3 metre)^2;
  unit uF_per_mm2 = 1e-6 farad / (1e-3 metre)^2;
  unit uA_per_mm2 = 1e-6 ampere / (1e-3 metre)^2;
  unit concentration_units = 1e-9 mole / (1e-3 metre)^3;
  unit per_concentration_units = (1e-3 metre)^3 / (1e-9 mole);
  unit coulomb_per_mole = coulomb / mole;
  unit per_mm = 1 / (1e-3 metre);
  unit time = 1e-3 second;
end
