// SBML level 2 version 3

model butera_rinzel_smith_1999_version01()
  // Butera1999_Bursting_Pacemaker_Neuron_Model_1
  // This is the model without the slow potassium current, model 1, described in the article:
  // Models of respiratory rhythm generation in the pre-Bötzinger complex. I. Bursting pacemaker neurons.
  // Butera RJ Jr, Rinzel J, Smith JC. J Neurophysiol. 1999 Jul;82(1):382-97. Pubmed ID: 10400966 , full text at the Journal of Neurophysiology .
  // Abstract:
  // A network of oscillatory bursting neurons with excitatory coupling is hypothesized to define the primary kernel for respiratory rhythm generation in the pre-Bötzinger complex (pre-BötC) in mammals. Two minimal models of these neurons are proposed. In model 1, bursting arises via fast activation and slow inactivation of a persistent Na+ current INaP-h. In model 2, bursting arises via a fast-activating persistent Na+ current INaP and slow activation of a K+ current IKS. In both models, action potentials are generated via fast Na+ and K+ currents. The two models have few differences in parameters to facilitate a rigorous comparison of the two different burst-generating mechanisms. Both models are consistent with many of the dynamic features of electrophysiological recordings from pre-BötC oscillatory bursting neurons in vitro, including voltage-dependent activity modes (silence, bursting, and beating), a voltage-dependent burst frequency that can vary from 0.05 to > 1 Hz, and a decaying spike frequency during bursting. These results are robust and persist across a wide range of parameter values for both models. However, the dynamics of model 1 are more consistent with experimental data in that the burst duration decreases as the baseline membrane potential is depolarized and the model has a relatively flat membrane potential trajectory during the interburst interval. We propose several experimental tests to demonstrate the validity of either model and to differentiate between the two mechanisms.
  // This model was taken from the CellML repository and automatically converted to SBML.
  // The original model was: Butera, Rinzel, Smith, 1999 version 05
  // The original CellML model was created and curated by:
  // Catherine May Lloyd
  // c.lloyd(at)auckland.ac.nz
  // The University of Auckland, Bioengineering Institute
  // This model originates from BioModels Database: A Database of Annotated Published Models (http://www.ebi.ac.uk/biomodels/). It is copyright (c) 2005-2011 The BioModels.net Team.
  // To the extent possible under law, all copyright and related or neighbouring rights to this encoded model have been dedicated to the public domain worldwide. Please refer to CC0 Public Domain Dedication for more information.
  // In summary, you are entitled to use this encoded model in absolutely any manner you deem suitable, verbatim, or with modification, alone or embedded it in a larger context, redistribute it, commercially or not, in a restricted way or not..
  // To cite BioModels Database, please use: Li C, Donizelli M, Rodriguez N, Dharuri H, Endler L, Chelliah V, Li L, He E, Henry A, Stefan MI, Snoep JL, Hucka M, Le Novère N, Laibe C (2010) BioModels Database: An enhanced, curated and annotated resource for published quantitative kinetic models. BMC Syst Biol., 4:92.
  // biomodels.db:MODEL7891585309
  // isDescribedBy pubmed:10400966
  // biomodels.db:MODEL7891585309
  // isDescribedBy pubmed:10400966
  // biomodels.db:MODEL7891585309
  // biomodels.db:MODEL7891585309

  // Compartments:
  compartment Compartment = 1 litre;

  // Parameters:
  V_membrane has millivolt;
  C = 21 picoF;
  i_app = 0 picoA;
  i_Na has picoA;
  E_Na = 50 millivolt;
  g_Na = 28 nanoS;
  m_infinity_fast_sodium_current_m_gate has dimensionless;
  theta_m_fast_sodium_current_m_gate = -34 millivolt;
  omega_m_fast_sodium_current_m_gate = -5 millivolt;
  V_fast_sodium_current_m_gate has millivolt;
  n_fast_sodium_current_n_gate has dimensionless;
  n_infinity_fast_sodium_current_n_gate has dimensionless;
  tau_n_fast_sodium_current_n_gate has millisecond;
  tau_n_max_fast_sodium_current_n_gate = 10 millisecond;
  theta_n_fast_sodium_current_n_gate = -29 millivolt;
  omega_n_fast_sodium_current_n_gate = -4 millivolt;
  V_fast_sodium_current_n_gate has millivolt;
  time_fast_sodium_current_n_gate has millisecond;
  i_K has picoA;
  g_K = 11.2 nanoS;
  E_K = -85 millivolt;
  n_potassium_current_n_gate has dimensionless;
  n_infinity_potassium_current_n_gate has dimensionless;
  tau_n_potassium_current_n_gate has millisecond;
  tau_n_max_potassium_current_n_gate = 10 millisecond;
  theta_n_potassium_current_n_gate = -29 millivolt;
  omega_n_potassium_current_n_gate = -4 millivolt;
  V_potassium_current_n_gate has millivolt;
  time_potassium_current_n_gate has millisecond;
  i_NaP has picoA;
  g_NaP = 2.8 nanoS;
  m_infinity_persistent_sodium_current_m_gate has dimensionless;
  theta_m_persistent_sodium_current_m_gate = -40 millivolt;
  omega_m_persistent_sodium_current_m_gate = -6 millivolt;
  V_persistent_sodium_current_m_gate has millivolt;
  h has dimensionless;
  h_infinity has dimensionless;
  tau_h has millisecond;
  tau_h_max = 10000 millisecond;
  theta_h = -48 millivolt;
  omega_h = 6 millivolt;
  V_persistent_sodium_current_h_gate has millivolt;
  time_persistent_sodium_current_h_gate has millisecond;
  i_L has picoA;
  g_L = 2.8 nanoS;
  E_L = -65 millivolt;
  i_tonic_e has picoA;
  g_tonic_e = 0 nanoS;
  E_syn_e = 0 millivolt;

  // Assignment rules:
  i_Na := g_Na*m_infinity_fast_sodium_current_m_gate^3*(1 - n_fast_sodium_current_n_gate)*(V_membrane - E_Na);
  m_infinity_fast_sodium_current_m_gate := 1/(1 + exp((V_fast_sodium_current_m_gate - theta_m_fast_sodium_current_m_gate)/omega_m_fast_sodium_current_m_gate));
  n_infinity_fast_sodium_current_n_gate := 1/(1 + exp((V_fast_sodium_current_n_gate - theta_n_fast_sodium_current_n_gate)/omega_n_fast_sodium_current_n_gate));
  tau_n_fast_sodium_current_n_gate := tau_n_max_fast_sodium_current_n_gate/cosh((V_fast_sodium_current_n_gate - theta_n_fast_sodium_current_n_gate)/(2*omega_n_fast_sodium_current_n_gate));
  i_K := g_K*n_potassium_current_n_gate^4*(V_membrane - E_K);
  n_infinity_potassium_current_n_gate := 1/(1 + exp((V_potassium_current_n_gate - theta_n_potassium_current_n_gate)/omega_n_potassium_current_n_gate));
  tau_n_potassium_current_n_gate := tau_n_max_potassium_current_n_gate/cosh((V_potassium_current_n_gate - theta_n_potassium_current_n_gate)/(2*omega_n_potassium_current_n_gate));
  i_NaP := g_NaP*m_infinity_persistent_sodium_current_m_gate*h*(V_membrane - E_Na);
  m_infinity_persistent_sodium_current_m_gate := 1/(1 + exp((V_persistent_sodium_current_m_gate - theta_m_persistent_sodium_current_m_gate)/omega_m_persistent_sodium_current_m_gate));
  h_infinity := 1/(1 + exp((V_persistent_sodium_current_h_gate - theta_h)/omega_h));
  tau_h := tau_h_max/cosh((V_persistent_sodium_current_h_gate - theta_h)/(2*omega_h));
  i_L := g_L*(V_membrane - E_L);

  // Rate rules:
  V_membrane' = (-(i_NaP + i_Na + i_K + i_L + i_tonic_e) + i_app)/C;
  n_fast_sodium_current_n_gate' = (n_infinity_fast_sodium_current_n_gate - n_fast_sodium_current_n_gate)/tau_n_fast_sodium_current_n_gate;
  n_potassium_current_n_gate' = (n_infinity_potassium_current_n_gate - n_potassium_current_n_gate)/tau_n_potassium_current_n_gate;
  h' = (h_infinity - h)/tau_h;

  // Unit definitions:
  unit millisecond = 1e-3 second;
  unit millivolt = 1e-3 volt;
  unit picoA = 1e-9 ampere;
  unit nanoS = 1e-9 siemens;
  unit picoF = 1e-12 farad;
  unit time = 1e-3 second;
end
