// SBML level 2 version 3

model Terkildsen2008_CardiomyocyteFunction()
  // This a model from the article:
  // Using Physiome standards to couple cellular functions for rat cardiac excitation-contraction.
  // Terkildsen JR, Niederer S, Crampin EJ, Hunter P, Smith NP. Exp Physiol. (2008) 93(7) pp 919-29; Pubmed ID: 18344258 ,
  // Abstract:
  // Scientific endeavour is reliant upon the extension and reuse of previous knowledge. The formalization of this process for computational modelling is facilitated by the use of accepted standards with which to describe and simulate models, ensuring consistency between the models and thus reducing the development and propagation of errors. CellML 1.1, an XML-based programming language, has been designed as a modelling standard which, by virtue of its import and grouping functions, facilitates model combination and reuse. Using CellML 1.1, we demonstrate the process of formalized model reuse by combining three separate models of rat cardiomyocyte function (an electrophysiology model, a model of cellular calcium dynamics and a mechanics model) which together make up the Pandit-Hinch-Niederer et al. cell model. Not only is this integrative model of rat electromechanics a useful tool for cardiac modelling but it is also an ideal framework with which to demonstrate both the power of model reuse and the challenges associated with this process. We highlight and classify a number of these issues associated with combining models and provide some suggested solutions.
  // This model was taken from the CellML repository and automatically converted to SBML.
  // The original model was: terkildsen_niederer_crampin_hunter_smith, 2008, version02
  // The original CellML model was created by:
  // Terkildsen, Jonna
  // ij.terkildsen(at)auckland.ac.nz
  // The University of Auckland
  // Auckland Bioengineering Institute
  // This model originates from BioModels Database: A Database of Annotated Published Models (http://www.ebi.ac.uk/biomodels/). It is copyright (c) 2005-2011 The BioModels.net Team.
  // To the extent possible under law, all copyright and related or neighbouring rights to this encoded model have been dedicated to the public domain worldwide. Please refer to CC0 Public Domain Dedication for more information.
  // In summary, you are entitled to use this encoded model in absolutely any manner you deem suitable, verbatim, or with modification, alone or embedded it in a larger context, redistribute it, commercially or not, in a restricted way or not..
  // To cite BioModels Database, please use: Li C, Donizelli M, Rodriguez N, Dharuri H, Endler L, Chelliah V, Li L, He E, Henry A, Stefan MI, Snoep JL, Hucka M, Le Novère N, Laibe C (2010) BioModels Database: An enhanced, curated and annotated resource for published quantitative kinetic models. BMC Syst Biol., 4:92.
  // biomodels.db:MODEL7893871775
  // isDescribedBy pubmed:18344258
  // biomodels.db:MODEL7893871775
  // isDescribedBy pubmed:18344258
  // biomodels.db:MODEL7893871775
  // biomodels.db:MODEL7893871775

  // Compartments:
  compartment Compartment = 1 litre;

  // Parameters:
  V_membrane = -78.8 mV;
  R = 8314.5 mJ_per_mole_K;
  T = 295 kelvin;
  F = 96487 C_per_mole;
  Cm = 0.0001 uF;
  I_Stim has uA;
  stim_period has ms;
  stim_duration = 10 ms;
  stim_amplitude = -0.0006 uA;
  FVRT has dimensionless;
  FVRT_Ca_membrane has dimensionless;
  V_myo_cell_geometry = 25850 um3;
  V_SR = 2098 um3;
  V_myo_uL = 2.585e-5 uL;
  V_SR_uL = 2.098e-6 uL;
  i_Na has uA;
  E_Na has mV;
  g_Na = 0.0008 mSi;
  g_Na_endo has mSi;
  m = 0.0054828 dimensionless;
  m_infinity has dimensionless;
  tau_m has ms;
  V_sodium_current_m_gate has mV;
  time_sodium_current_m_gate has ms;
  h = 0.6095126 dimensionless;
  h_infinity has dimensionless;
  tau_h has ms;
  V_sodium_current_h_gate has mV;
  time_sodium_current_h_gate has ms;
  j = 0.60876276 dimensionless;
  j_infinity has dimensionless;
  tau_j has ms;
  V_sodium_current_j_gate has mV;
  time_sodium_current_j_gate has ms;
  i_t has uA;
  E_K has mV;
  g_t = 3.5e-5 mSi;
  g_t_endo has mSi;
  a_endo = 0.583 dimensionless;
  b_endo = 0.417 dimensionless;
  r = 0.002542 dimensionless;
  tau_r has ms;
  r_infinity has dimensionless;
  V_Ca_independent_transient_outward_K_current_r_gate has mV;
  time_Ca_independent_transient_outward_K_current_r_gate has ms;
  s = 0.8823 dimensionless;
  tau_s_endo has ms;
  s_infinity has dimensionless;
  V_Ca_independent_transient_outward_K_current_s_gate has mV;
  time_Ca_independent_transient_outward_K_current_s_gate has ms;
  s_slow = 0.42756 dimensionless;
  tau_s_slow_endo has ms;
  s_slow_infinity has dimensionless;
  V_Ca_independent_transient_outward_K_current_s_slow_gate has mV;
  time_Ca_independent_transient_outward_K_current_s_slow_gate has ms;
  i_ss has uA;
  g_ss = 7e-6 mSi;
  r_ss = 0.0033545 dimensionless;
  tau_r_ss has ms;
  r_ss_infinity has dimensionless;
  V_steady_state_outward_K_current_r_ss_gate has mV;
  time_steady_state_outward_K_current_r_ss_gate has ms;
  s_ss = 0.266596 dimensionless;
  tau_s_ss has ms;
  s_ss_infinity has dimensionless;
  V_steady_state_outward_K_current_s_ss_gate has mV;
  time_steady_state_outward_K_current_s_ss_gate has ms;
  i_K1 has uA;
  g_K1 = 2.4e-5 mSi;
  i_f has uA;
  i_f_Na has uA;
  i_f_K has uA;
  g_f = 1.45e-6 mSi;
  f_Na = 0.2 dimensionless;
  f_K has dimensionless;
  y = 0.0026369 dimensionless;
  tau_y has ms;
  y_infinity has dimensionless;
  V_hyperpolarisation_activated_current_y_gate has mV;
  time_hyperpolarisation_activated_current_y_gate has ms;
  i_B_Na has uA;
  i_B_K has uA;
  g_B_Na = 8.015e-8 mSi;
  g_B_K = 1.38e-7 mSi;
  i_NaK has uA;
  i_NaK_max = 9.5e-5 uA;
  K_m_K = 1.5 mM;
  K_m_Na = 10 mM;
  sigma has dimensionless;
  Na_o = 140 mM;
  Ca_o_pandit_standard_ionic_concentrations = 1.2 mM;
  K_o = 5.4 mM;
  g_D = 0.065 um3_per_ms;
  J_R = 0.02 um3_per_ms;
  J_L = 0.000913 um3_per_ms;
  N = 50000 dimensionless;
  V_CaRU_Transitions has mV;
  Ca_i_CaRU_Transitions has mM;
  V_L = -2 mV;
  del_VL = 7 mV;
  phi_L = 2.35 dimensionless;
  t_L = 1 ms;
  tau_L = 650 ms;
  t_R has ms;
  tau_R = 2.43 ms;
  phi_R = 0.05 dimensionless;
  theta_R = 0.012 dimensionless;
  K_RyR = 0.041 mM;
  K_L = 0.00022 mM;
  a_CaRU_Transitions = 0.0625 dimensionless;
  b = 14 dimensionless;
  c = 0.01 dimensionless;
  d = 100 dimensionless;
  expVL has dimensionless;
  alpha_p has per_ms;
  alpha_m has per_ms;
  beta_poc has per_ms;
  beta_pcc has per_ms;
  beta_m has per_ms;
  epsilon_pco has per_ms;
  epsilon_pcc has per_ms;
  epsilon_m has per_ms;
  mu_poc has per_ms;
  mu_pcc has per_ms;
  mu_moc has per_ms;
  mu_mcc has per_ms;
  Ca_i_DS_Calcium_Concentrations has mM;
  Ca_SR_DS_Calcium_Concentrations has mM;
  Ca_o_DS_Calcium_Concentrations has mM;
  FVRT_Ca_DS_Calcium_Concentrations has dimensionless;
  C_cc has mM;
  C_oc has mM;
  C_co has mM;
  C_oo has mM;
  Ca_i_LCC_and_RyR_fluxes has mM;
  Ca_SR_LCC_and_RyR_fluxes has mM;
  Ca_o_LCC_and_RyR_fluxes has mM;
  FVRT_Ca_LCC_and_RyR_fluxes has dimensionless;
  J_Loo has um3_mM_per_ms;
  J_Loc has um3_mM_per_ms;
  J_Rco has um3_mM_per_ms;
  J_Roo has um3_mM_per_ms;
  denom has per_ms3;
  y_oc has dimensionless;
  y_co has dimensionless;
  y_oo has dimensionless;
  y_cc has dimensionless;
  y_ci has dimensionless;
  y_oi has dimensionless;
  y_ic has dimensionless;
  y_io has dimensionless;
  y_ii has dimensionless;
  r_1 has per_ms;
  r_2 has per_ms;
  r_3 has per_ms;
  r_4 has per_ms;
  r_5 has per_ms;
  r_6 has per_ms;
  r_7 has per_ms;
  r_8 has per_ms;
  z_1 = 0.98794 dimensionless;
  z_2 = 0.00887 dimensionless;
  z_3 = 0.003156 dimensionless;
  z_4 has dimensionless;
  time_CaRU_reduced_states has ms;
  V_myo_RyR_current has um3;
  J_R1 has um3_mM_per_ms;
  J_R3 has um3_mM_per_ms;
  I_RyR_RyR_current has mM_per_ms;
  V_myo_LCC_current has um3;
  J_L1 has um3_mM_per_ms;
  J_L2 has um3_mM_per_ms;
  I_LCC_LCC_current has mM_per_ms;
  K_mNa = 87.5 mM;
  K_mCa = 1.38 mM;
  eta = 0.35 dimensionless;
  k_sat = 0.1 dimensionless;
  g_NCX = 0.0385 mM_per_ms;
  I_NaCa_hinch_Na_Ca_Exchanger has mM_per_ms;
  g_SERCA = 0.00045 mM_per_ms;
  K_SERCA = 0.0005 mM;
  I_SERCA has mM_per_ms;
  g_pCa = 3.5e-6 mM_per_ms;
  K_mpCa = 0.0005 mM;
  I_pCa_hinch_Sarcolemmal_Ca_pump has mM_per_ms;
  E_Ca has mV;
  g_CaB = 2.6875e-8 mM_per_mV_ms;
  I_CaB_hinch_Background_Ca_current has mM_per_ms;
  g_SRl = 1.8951e-5 per_ms;
  I_SR has mM_per_ms;
  k_CMDN = 0.002382 mM;
  B_CMDN = 0.05 mM;
  beta_CMDN has dimensionless;
  hinch_I_LCC has mM_per_ms;
  hinch_I_RyR has mM_per_ms;
  I_LCC_convert_hinch has uA;
  I_NaCa_convert_hinch has uA;
  I_pCa_convert_hinch has uA;
  I_CaB_convert_hinch has uA;
  I_RyR_convert_hinch has mM_per_ms;
  z = 0.020023 dimensionless;
  z_max has dimensionless;
  alpha_0 = 0.008 per_ms;
  alpha_r1 = 0.002 per_ms;
  alpha_r2 = 0.00175 per_ms;
  n_Rel = 3 dimensionless;
  K_z = 0.15 dimensionless;
  n_Hill = 3 dimensionless;
  Ca_50ref = 0.00105 mM;
  z_p = 0.85 dimensionless;
  beta_1 = -4 dimensionless;
  Ca_50 has mM;
  Ca_TRPN_50 has mM;
  K_2 has per_ms;
  K_1 has per_ms;
  alpha_Tm has per_ms;
  beta_Tm has per_ms;
  I_TRPN has mM_per_ms;
  Ca_TRPN_Max = 0.07 mM;
  k_off has per_ms;
  k_on = 100 per_mM_ms;
  k_Ref_off = 0.2 per_ms;
  gamma_trpn = 2 dimensionless;
  lambda has dimensionless;
  ExtensionRatio has dimensionless;
  dExtensionRatiodt has per_ms;
  lambda_prev has dimensionless;
  overlap has dimensionless;
  beta_0 = 4.9 dimensionless;
  T_ref = 56.2 N_per_mm2;
  T_Base has N_per_mm2;
  T_0 has N_per_mm2;
  Q has dimensionless;
  a_niederer_Cross_Bridges = 0.35 dimensionless;
  Q_1 = 0 dimensionless;
  Q_2 = 0 dimensionless;
  Q_3 = 0 dimensionless;
  A_1 = -29 dimensionless;
  A_2 = 138 dimensionless;
  A_3 = 129 dimensionless;
  alpha_1 = 0.03 per_ms;
  alpha_2 = 0.13 per_ms;
  alpha_3 = 0.625 per_ms;
  Tension has N_per_mm2;
  Na_i = 11.28 mM;
  Ca_i_intracellular_ion_concentrations = 0.00011423 mM;
  Ca_SR_intracellular_ion_concentrations = 0.72196 mM;
  K_i = 138.7225 mM;
  TRPN = 0.0661796 mM;
  Ca_b has mM;

  // Assignment rules:
  stim_period := piecewise(500, (time >= 5000) && (time <= 10000), 1000);
  I_Stim := piecewise(stim_amplitude, (time - floor(time/stim_period)*stim_period >= 0) && (time - floor(time/stim_period)*stim_period <= stim_duration), 0);
  FVRT := F*V_membrane/(R*T);
  FVRT_Ca_membrane := 2*FVRT;
  g_Na_endo := 1.33*g_Na;
  E_Na := R*T/F*ln(Na_o/Na_i);
  i_Na := g_Na_endo*m^3*h*j*(V_membrane - E_Na);
  m_infinity := 1/(1 + exp((V_sodium_current_m_gate + 45)/(-6.5)));
  tau_m := 1.36/(0.32*(V_sodium_current_m_gate + 47.13)/(1 - exp(-0.1*(V_sodium_current_m_gate + 47.13))) + 0.08*exp(-V_sodium_current_m_gate/11));
  h_infinity := 1/(1 + exp((V_sodium_current_h_gate + 76.1)/6.07));
  tau_h := piecewise(0.4537*(1 + exp(-(V_sodium_current_h_gate + 10.66)/11.1)), V_sodium_current_h_gate + 40 >= 0, 3.49/(0.135*exp(-(V_sodium_current_h_gate + 80)/6.8) + 3.56*exp(0.079*V_sodium_current_h_gate) + 310000*exp(0.35*V_sodium_current_h_gate)));
  j_infinity := 1/(1 + exp((V_sodium_current_j_gate + 76.1)/6.07));
  tau_j := piecewise(11.63*(1 + exp(-0.1*(V_sodium_current_j_gate + 32)))/exp(-2.535e-7*V_sodium_current_j_gate), V_sodium_current_j_gate + 40 >= 0, 3.49/((V_sodium_current_j_gate + 37.78)/(1 + exp(0.311*(V_sodium_current_j_gate + 79.23)))*(-127140*exp(0.2444*V_sodium_current_j_gate) - 3.474e-5*exp(-0.04391*V_sodium_current_j_gate)) + 0.1212*exp(-0.01052*V_sodium_current_j_gate)/(1 + exp(-0.1378*(V_sodium_current_j_gate + 40.14)))));
  g_t_endo := 0.4647*g_t;
  E_K := R*T/F*ln(K_o/K_i);
  i_t := g_t_endo*r*(a_endo*s + b_endo*s_slow)*(V_membrane - E_K);
  r_infinity := 1/(1 + exp((V_Ca_independent_transient_outward_K_current_r_gate + 10.6)/(-11.42)));
  tau_r := 1000/(45.16*exp(0.03577*(V_Ca_independent_transient_outward_K_current_r_gate + 50)) + 98.9*exp(-0.1*(V_Ca_independent_transient_outward_K_current_r_gate + 38)));
  s_infinity := 1/(1 + exp((V_Ca_independent_transient_outward_K_current_s_gate + 45.3)/6.8841));
  tau_s_endo := 550*exp(-((V_Ca_independent_transient_outward_K_current_s_gate + 70)/25)^2) + 49;
  s_slow_infinity := 1/(1 + exp((V_Ca_independent_transient_outward_K_current_s_slow_gate + 45.3)/6.8841));
  tau_s_slow_endo := 3300*exp(-((V_Ca_independent_transient_outward_K_current_s_slow_gate + 70)/30)^2) + 49;
  i_ss := g_ss*r_ss*s_ss*(V_membrane - E_K);
  r_ss_infinity := 1/(1 + exp((V_steady_state_outward_K_current_r_ss_gate + 11.5)/(-11.82)));
  tau_r_ss := 10000/(45.16*exp(0.03577*(V_steady_state_outward_K_current_r_ss_gate + 50)) + 98.9*exp(-0.1*(V_steady_state_outward_K_current_r_ss_gate + 38)));
  s_ss_infinity := 1/(1 + exp((V_steady_state_outward_K_current_s_ss_gate + 87.5)/10.3));
  tau_s_ss := 2100;
  i_K1 := (0.048/(exp((V_membrane + 37)/25) + exp((V_membrane + 37)/(-25))) + 0.01)*(0.001/(1 + exp((V_membrane - (E_K + 76.77))/(-17)))) + g_K1*(V_membrane - (E_K + 1.73))/((1 + exp(1.613*F*(V_membrane - (E_K + 1.73))/(R*T)))*(1 + exp((K_o - 0.9988)/(-0.124))));
  f_K := 1 - f_Na;
  i_f_Na := g_f*y*f_Na*(V_membrane - E_Na);
  i_f_K := g_f*y*f_K*(V_membrane - E_K);
  i_f := i_f_Na + i_f_K;
  y_infinity := 1/(1 + exp((V_hyperpolarisation_activated_current_y_gate + 138.6)/10.48));
  tau_y := 1000/(0.11885*exp((V_hyperpolarisation_activated_current_y_gate + 80)/28.37) + 0.5623*exp((V_hyperpolarisation_activated_current_y_gate + 80)/(-14.19)));
  i_B_Na := g_B_Na*(V_membrane - E_Na);
  i_B_K := g_B_K*(V_membrane - E_K);
  sigma := (exp(Na_o/67.3) - 1)/7;
  i_NaK := i_NaK_max*1/(1 + 0.1245*exp(-0.1*V_membrane*F/(R*T)) + 0.0365*sigma*exp(-V_membrane*F/(R*T)))*K_o/(K_o + K_m_K)*1/(1 + (K_m_Na/Na_i)^4);
  expVL := exp((V_CaRU_Transitions - V_L)/del_VL);
  t_R := 1.17*t_L;
  alpha_p := expVL/(t_L*(expVL + 1));
  alpha_m := phi_L/t_L;
  beta_poc := C_oc^2/(t_R*(C_oc^2 + K_RyR^2));
  beta_pcc := Ca_i_CaRU_Transitions^2/(t_R*(Ca_i_CaRU_Transitions^2 + K_RyR^2));
  beta_m := phi_R/t_R;
  epsilon_pco := C_co*(expVL + a_CaRU_Transitions)/(tau_L*K_L*(expVL + 1));
  epsilon_pcc := Ca_i_CaRU_Transitions*(expVL + a_CaRU_Transitions)/(tau_L*K_L*(expVL + 1));
  epsilon_m := b*(expVL + a_CaRU_Transitions)/(tau_L*(b*expVL + a_CaRU_Transitions));
  mu_poc := (C_oc^2 + c*K_RyR^2)/(tau_R*(C_oc^2 + K_RyR^2));
  mu_pcc := (Ca_i_CaRU_Transitions^2 + c*K_RyR^2)/(tau_R*(Ca_i_CaRU_Transitions^2 + K_RyR^2));
  mu_moc := theta_R*d*(C_oc^2 + c*K_RyR^2)/(tau_R*(d*C_oc^2 + c*K_RyR^2));
  mu_mcc := theta_R*d*(Ca_i_CaRU_Transitions^2 + c*K_RyR^2)/(tau_R*(d*Ca_i_CaRU_Transitions^2 + c*K_RyR^2));
  C_cc := Ca_i_DS_Calcium_Concentrations;
  C_co := (Ca_i_DS_Calcium_Concentrations + J_R/g_D*Ca_SR_DS_Calcium_Concentrations)/(1 + J_R/g_D);
  C_oc := piecewise((Ca_i_DS_Calcium_Concentrations + J_L/g_D*Ca_o_DS_Calcium_Concentrations*FVRT_Ca_DS_Calcium_Concentrations*exp(-FVRT_Ca_DS_Calcium_Concentrations)/(1 - exp(-FVRT_Ca_DS_Calcium_Concentrations)))/(1 + J_L/g_D*FVRT_Ca_DS_Calcium_Concentrations/(1 - exp(-FVRT_Ca_DS_Calcium_Concentrations))), abs(FVRT_Ca_DS_Calcium_Concentrations) > 1e-9, (Ca_i_DS_Calcium_Concentrations + J_L/g_D*Ca_o_DS_Calcium_Concentrations)/(1 + J_L/g_D));
  C_oo := piecewise((Ca_i_DS_Calcium_Concentrations + J_R/g_D*Ca_SR_DS_Calcium_Concentrations + J_L/g_D*Ca_o_DS_Calcium_Concentrations*FVRT_Ca_DS_Calcium_Concentrations*exp(-FVRT_Ca_DS_Calcium_Concentrations)/(1 - exp(-FVRT_Ca_DS_Calcium_Concentrations)))/(1 + J_R/g_D + J_L/g_D*FVRT_Ca_DS_Calcium_Concentrations/(1 - exp(-FVRT_Ca_DS_Calcium_Concentrations))), abs(FVRT_Ca_DS_Calcium_Concentrations) > 1e-9, (Ca_i_DS_Calcium_Concentrations + J_R/g_D*Ca_SR_DS_Calcium_Concentrations + J_L/g_D*Ca_o_DS_Calcium_Concentrations)/(1 + J_R/g_D + J_L/g_D));
  J_Rco := J_R*(Ca_SR_LCC_and_RyR_fluxes - Ca_i_LCC_and_RyR_fluxes)/(1 + J_R/g_D);
  J_Roo := piecewise(J_R*(Ca_SR_LCC_and_RyR_fluxes - Ca_i_LCC_and_RyR_fluxes + J_L/g_D*FVRT_Ca_LCC_and_RyR_fluxes/(1 - exp(-FVRT_Ca_LCC_and_RyR_fluxes))*(Ca_SR_LCC_and_RyR_fluxes - Ca_o_LCC_and_RyR_fluxes*exp(-FVRT_Ca_LCC_and_RyR_fluxes)))/(1 + J_R/g_D + J_L/g_D*FVRT_Ca_LCC_and_RyR_fluxes/(1 - exp(-FVRT_Ca_LCC_and_RyR_fluxes))), abs(FVRT_Ca_LCC_and_RyR_fluxes) > 1e-5, J_R*(Ca_SR_LCC_and_RyR_fluxes - Ca_i_LCC_and_RyR_fluxes + J_L/g_D*1e-5/(1 - exp(-1e-5))*(Ca_SR_LCC_and_RyR_fluxes - Ca_o_LCC_and_RyR_fluxes*exp(-1e-5)))/(1 + J_R/g_D + J_L/g_D*1e-5/(1 - exp(-1e-5))));
  J_Loc := piecewise(J_L*FVRT_Ca_LCC_and_RyR_fluxes/(1 - exp(-FVRT_Ca_LCC_and_RyR_fluxes))*(Ca_o_LCC_and_RyR_fluxes*exp(-FVRT_Ca_LCC_and_RyR_fluxes) - Ca_i_LCC_and_RyR_fluxes)/(1 + J_L/g_D*FVRT_Ca_LCC_and_RyR_fluxes/(1 - exp(-FVRT_Ca_LCC_and_RyR_fluxes))), abs(FVRT_Ca_LCC_and_RyR_fluxes) > 1e-5, J_L*1e-5/(1 - exp(-1e-5))*(Ca_o_LCC_and_RyR_fluxes*exp(-1e-5) - Ca_i_LCC_and_RyR_fluxes)/(1 + J_L/g_D*1e-5/(1 - exp(-1e-5))));
  J_Loo := piecewise(J_L*FVRT_Ca_LCC_and_RyR_fluxes/(1 - exp(-FVRT_Ca_LCC_and_RyR_fluxes))*(Ca_o_LCC_and_RyR_fluxes*exp(-FVRT_Ca_LCC_and_RyR_fluxes) - Ca_i_LCC_and_RyR_fluxes + J_R/g_D*(Ca_o_LCC_and_RyR_fluxes*exp(-FVRT_Ca_LCC_and_RyR_fluxes) - Ca_SR_LCC_and_RyR_fluxes))/(1 + J_R/g_D + J_L/g_D*FVRT_Ca_LCC_and_RyR_fluxes/(1 - exp(FVRT_Ca_LCC_and_RyR_fluxes))), abs(FVRT_Ca_LCC_and_RyR_fluxes) > 1e-5, J_L*1e-5/(1 - exp(-1e-5))*(Ca_o_LCC_and_RyR_fluxes*exp(-1e-5) - Ca_i_LCC_and_RyR_fluxes + J_R/g_D*(Ca_o_LCC_and_RyR_fluxes*exp(-1e-5) - Ca_SR_LCC_and_RyR_fluxes))/(1 + J_R/g_D + J_L/g_D*1e-5/(1 - exp(-1e-5))));
  denom := (alpha_p + alpha_m)*((alpha_m + beta_m + beta_poc)*(beta_m + beta_pcc) + alpha_p*(beta_m + beta_poc));
  y_oc := alpha_p*beta_m*(alpha_p + alpha_m + beta_m + beta_pcc)/denom;
  y_co := alpha_m*(beta_pcc*(alpha_m + beta_m + beta_poc) + beta_poc*alpha_p)/denom;
  y_oo := alpha_p*(beta_poc*(alpha_p + beta_m + beta_pcc) + beta_pcc*alpha_m)/denom;
  y_cc := alpha_m*beta_m*(alpha_m + alpha_p + beta_m + beta_poc)/denom;
  y_ci := alpha_m/(alpha_p + alpha_m);
  y_oi := alpha_p/(alpha_p + alpha_m);
  y_ic := beta_m/(beta_pcc + beta_m);
  y_io := beta_pcc/(beta_pcc + beta_m);
  y_ii := 1 - y_oc - y_co - y_oo - y_cc - y_ci - y_ic - y_oi - y_io;
  r_1 := y_oc*mu_poc + y_cc*mu_pcc;
  r_2 := (alpha_p*mu_moc + alpha_m*mu_mcc)/(alpha_p + alpha_m);
  r_3 := beta_m*mu_pcc/(beta_m + beta_pcc);
  r_4 := mu_mcc;
  r_5 := y_co*epsilon_pco + y_cc*epsilon_pcc;
  r_6 := epsilon_m;
  r_7 := alpha_m*epsilon_pcc/(alpha_p + alpha_m);
  r_8 := epsilon_m;
  z_4 := 1 - z_1 - z_2 - z_3;
  J_R1 := y_oo*J_Roo + J_Rco*y_co;
  J_R3 := J_Rco*beta_pcc/(beta_m + beta_pcc);
  I_RyR_RyR_current := (z_1*J_R1 + z_3*J_R3)*N/V_myo_RyR_current;
  J_L1 := J_Loo*y_oo + J_Loc*y_oc;
  J_L2 := J_Loc*alpha_p/(alpha_p + alpha_m);
  I_LCC_LCC_current := (z_1*J_L1 + z_2*J_L2)*N/V_myo_LCC_current;
  I_NaCa_hinch_Na_Ca_Exchanger := g_NCX*(exp(eta*FVRT)*Na_i^3*Ca_o_pandit_standard_ionic_concentrations - exp((eta - 1)*FVRT)*Na_o^3*Ca_i_intracellular_ion_concentrations)/((Na_o^3 + K_mNa^3)*(Ca_o_pandit_standard_ionic_concentrations + K_mCa)*(1 + k_sat*exp((eta - 1)*FVRT)));
  I_SERCA := g_SERCA*Ca_i_intracellular_ion_concentrations^2/(K_SERCA^2 + Ca_i_intracellular_ion_concentrations^2);
  I_pCa_hinch_Sarcolemmal_Ca_pump := g_pCa*Ca_i_intracellular_ion_concentrations/(K_mpCa + Ca_i_intracellular_ion_concentrations);
  E_Ca := R*T/(2*F)*ln(Ca_o_pandit_standard_ionic_concentrations/Ca_i_intracellular_ion_concentrations);
  I_CaB_hinch_Background_Ca_current := g_CaB*(E_Ca - V_membrane);
  I_SR := g_SRl*(Ca_SR_intracellular_ion_concentrations - Ca_i_intracellular_ion_concentrations);
  beta_CMDN := (1 + k_CMDN*B_CMDN/(k_CMDN + Ca_i_intracellular_ion_concentrations)^2)^(-1);
  I_LCC_convert_hinch := -1.5*hinch_I_LCC*2*V_myo_uL*F;
  I_NaCa_convert_hinch := I_NaCa_hinch_Na_Ca_Exchanger*V_myo_uL*F;
  I_pCa_convert_hinch := I_pCa_hinch_Sarcolemmal_Ca_pump*2*V_myo_uL*F;
  I_CaB_convert_hinch := -I_CaB_hinch_Background_Ca_current*2*V_myo_uL*F;
  I_RyR_convert_hinch := 1.5*hinch_I_RyR;
  K_2 := alpha_r2*z_p^n_Rel/(z_p^n_Rel + K_z^n_Rel)*(1 - n_Rel*K_z^n_Rel/(z_p^n_Rel + K_z^n_Rel));
  K_1 := alpha_r2*z_p^(n_Rel - 1)*n_Rel*K_z^n_Rel/(z_p^n_Rel + K_z^n_Rel)^2;
  z_max := (alpha_0/(Ca_TRPN_50/Ca_TRPN_Max)^n_Hill - K_2)/(alpha_r1 + K_1 + alpha_0/(Ca_TRPN_50/Ca_TRPN_Max)^n_Hill);
  Ca_50 := Ca_50ref*(1 + beta_1*(lambda - 1));
  Ca_TRPN_50 := Ca_50*Ca_TRPN_Max/(Ca_50 + k_Ref_off/k_on*(1 - (1 + beta_0*(lambda - 1))*0.5/gamma_trpn));
  alpha_Tm := alpha_0*(Ca_b/Ca_TRPN_50)^n_Hill;
  beta_Tm := alpha_r1 + alpha_r2*z^(n_Rel - 1)/(z^n_Rel + K_z^n_Rel);
  k_off := piecewise(k_Ref_off*(1 - Tension/(gamma_trpn*T_ref)), 1 - Tension/(gamma_trpn*T_ref) > 0.1, k_Ref_off*0.1);
  I_TRPN := k_off*(Ca_TRPN_Max - TRPN) - k_on*Ca_i_intracellular_ion_concentrations*TRPN;
  ExtensionRatio := piecewise(1, time > 300000, 1);
  lambda_prev := ExtensionRatio;
  dExtensionRatiodt := 0;
  lambda := piecewise(ExtensionRatio, (ExtensionRatio > 0.8) && (ExtensionRatio <= 1.15), 1.15, ExtensionRatio > 1.15, 0.8);
  overlap := 1 + beta_0*(lambda - 1);
  T_Base := T_ref*z/z_max;
  T_0 := T_Base*overlap;
  Q := Q_1 + Q_2 + Q_3;
  Tension := piecewise(T_0*(a_niederer_Cross_Bridges*Q + 1)/(1 - Q), Q < 0, T_0*(1 + (a_niederer_Cross_Bridges + 2)*Q)/(1 + Q));
  Ca_b := Ca_TRPN_Max - TRPN;

  // Rate rules:
  V_membrane' = -(i_Na + i_t + i_ss + i_f + i_K1 + i_B_Na + i_B_K + i_NaK + I_Stim + I_CaB_convert_hinch + I_NaCa_convert_hinch + I_pCa_convert_hinch + I_LCC_convert_hinch)/Cm;
  m' = (m_infinity - m)/tau_m;
  h' = (h_infinity - h)/tau_h;
  j' = (j_infinity - j)/tau_j;
  r' = (r_infinity - r)/tau_r;
  s' = (s_infinity - s)/tau_s_endo;
  s_slow' = (s_slow_infinity - s_slow)/tau_s_slow_endo;
  r_ss' = (r_ss_infinity - r_ss)/tau_r_ss;
  s_ss' = (s_ss_infinity - s_ss)/tau_s_ss;
  y' = (y_infinity - y)/tau_y;
  z_1' = -(r_1 + r_5)*z_1 + r_2*z_2 + r_6*z_3;
  z_2' = r_1*z_1 - (r_2 + r_7)*z_2 + r_8*z_4;
  z_3' = r_5*z_1 - (r_6 + r_3)*z_3 + r_4*z_4;
  z' = alpha_Tm*(1 - z) - beta_Tm*z;
  Q_1' = A_1*dExtensionRatiodt - alpha_1*Q_1;
  Q_2' = A_2*dExtensionRatiodt - alpha_2*Q_2;
  Q_3' = A_3*dExtensionRatiodt - alpha_3*Q_3;
  Na_i' = -(i_Na + i_B_Na + I_NaCa_convert_hinch*3 + i_NaK*3 + i_f_Na)*1/(V_myo_uL*F);
  K_i' = -(I_Stim + i_ss + i_B_K + i_t + i_K1 + i_f_K + (-2*i_NaK))*1/(V_myo_uL*F);
  TRPN' = I_TRPN;
  Ca_i_intracellular_ion_concentrations' = beta_CMDN*(I_RyR_convert_hinch - I_SERCA + I_SR + I_TRPN - (-2*I_NaCa_convert_hinch + I_pCa_convert_hinch + I_CaB_convert_hinch + I_LCC_convert_hinch)/(2*V_myo_uL*F));
  Ca_SR_intracellular_ion_concentrations' = V_myo_uL/V_SR_uL*(-I_RyR_convert_hinch + I_SERCA - I_SR);

  // Unit definitions:
  unit uL = 1e-6 litre;
  unit uA = 1e-6 ampere;
  unit uF = 1e-6 farad;
  unit mSi = 1e-3 siemens;
  unit per_ms = 1 / (1e-3 second);
  unit ms = 1e-3 second;
  unit mV = 1e-3 volt;
  unit per_mV = 1 / (1e-3 volt);
  unit mM = 1e-3 mole / litre;
  unit mM_per_ms = 1e-3 mole / (litre * 1e-3 second);
  unit um3 = (1e-6 metre)^3;
  unit um3_per_ms = (1e-6 metre)^3 / (1e-3 second);
  unit um3_mM_per_ms = (1e-6 metre)^3 * 1e-3 mole / (litre * 1e-3 second);
  unit mM_per_mV_ms = 1e-3 mole / (litre * 1e-3 second * 1e-3 volt);
  unit per_ms3 = 1 / (1e-3 second)^3;
  unit per_mM_ms = litre / (1e-3 mole * 1e-3 second);
  unit mJ_per_mole_K = 1e-3 joule / (mole * kelvin);
  unit C_per_mole = coulomb / mole;
  unit N_per_mm2 = newton / (1e-3 metre)^2;
  unit time = 1e-3 second;
end
