// SBML level 2 version 3

model Soboleva2005_ProlactinRegulation()
  // Sobaleva2005_ProlactinRegulation
  // This a model from the article:
  // Mathematical modelling of prolactin-receptor interaction and the corollary for prolactin receptor gene expression in skin
  // Soboleva TK, Vetharaniam I, Nixon AJ, Montenegro R, Pearson AJ, Sneyd J. J Theor Biol. (2005) 234(2); 289-98 15757685 ,
  // Abstract:
  // A mathematical model of prolactin regulating its own receptors was developed, and compared with experimental data on a qualitative level. The model incorporates the kinetics of prolactin-receptor interactions and subsequent signalling by prolactin-receptor dimers to regulate the production of receptor mRNA and hence the receptor population. The model relates changes in plasma prolactin concentration to prolactin receptor (PRLR) gene expression, and can be used for predictive purposes. The cell signalling that leads to the activation of target genes, and the mechanisms for regulation of transcription, were treated empirically in the model. The model's parameters were adjusted so that model simulations agreed with experimentally observed responses to administration of prolactin in sheep. In particular, the model correctly predicts insensitivity of receptor mRNA regulation to a series of subcutaneous injections of prolactin, versus sensitivity to prolonged infusion of prolactin. In the latter case, response was an acute down-regulation followed by a prolonged up-regulation of mRNA, with the magnitude of the up-regulation increasing with the duration of infusion period. The model demonstrates the feasibility of predicting the in vivo response of prolactin target genes to external manipulation of plasma prolactin, and could provide a useful tool for identifying optimal prolactin treatments for desirable outcomes.
  // This model was taken from the CellML repository and automatically converted to SBML.
  // The original model was: soboleva, vetharaniam, nixon, montenegro, pearson, sneyd, 2005, version01
  // The original CellML model was created by:
  // Lloyd, Catherine, May
  // c.lloyd(at)auckland.ac.nz
  // The University of Auckland
  // Auckland Bioengineering Institute
  // This model originates from BioModels Database: A Database of Annotated Published Models (http://www.ebi.ac.uk/biomodels/). It is copyright (c) 2005-2011 The BioModels.net Team.
  // To the extent possible under law, all copyright and related or neighbouring rights to this encoded model have been dedicated to the public domain worldwide. Please refer to CC0 Public Domain Dedication for more information.
  // In summary, you are entitled to use this encoded model in absolutely any manner you deem suitable, verbatim, or with modification, alone or embedded it in a larger context, redistribute it, commercially or not, in a restricted way or not..
  // To cite BioModels Database, please use: Li C, Donizelli M, Rodriguez N, Dharuri H, Endler L, Chelliah V, Li L, He E, Henry A, Stefan MI, Snoep JL, Hucka M, Le Novère N, Laibe C (2010) BioModels Database: An enhanced, curated and annotated resource for published quantitative kinetic models. BMC Syst Biol., 4:92.
  // biomodels.db:MODEL7896869925
  // isDescribedBy pubmed:15757685
  // biomodels.db:MODEL7896869925
  // isDescribedBy pubmed:15757685
  // biomodels.db:MODEL7896869925
  // biomodels.db:MODEL7896869925

  // Compartments:
  compartment Compartment = 1 litre;

  // Parameters:
  R = 1 nanomolar;
  delta_R = 1.905 first_order_rate_constant;
  U = 1 nanomolar;
  delta_U = 7.5 first_order_rate_constant;
  B1 = 1 nanomolar;
  delta_b1 = 7.5 first_order_rate_constant;
  B2 = 1 nanomolar;
  delta_b2 = 50 first_order_rate_constant;
  P has nanomolar;
  PE = 20.55 nanomolar;
  q has dimensionless;
  G = 35.6 first_order_rate_constant;
  ti = 1 day;
  T = 9 day;
  f1 has flux;
  a = 358000 flux;
  a0 = 23300 flux;
  b = 100 nanomolar;
  b0 = 263 nanomolar;
  x = 1 flux;
  P1 = 20 nanomolar;
  s = 371000 nanomolar_day2;
  delta_x = 0.207 first_order_rate_constant;
  f2 has flux;
  kappa = 240000 flux;
  kappa0 = 6550 nanomolar;
  alpha0 = 4.15 per_nanomolar_day;
  alpha1 = 3.02 per_nanomolar_day;
  d01 = 13 first_order_rate_constant;
  d12 = 4720 first_order_rate_constant;
  P0 = 0.25 nanomolar;

  // Assignment rules:
  P := P0 + PE*q;
  q := piecewise(0, time < ti, 1 - exp(-G*(time - ti)), (time < T + ti) && (time >= ti), exp(G*T - 1)*exp(G*(time - ti)));
  f1 := a0*(1 - B2/(b + B2)) + x*(1 - exp(-x/a))*B2/(b0 + B2);
  f2 := kappa*R/(kappa0 + R);

  // Rate rules:
  R' = f1 - delta_R*R;
  U' = f2 + d01*B1 + d12*B2 - (delta_U*U + alpha0*P*U + alpha1*B1*U);
  B1' = alpha0*P*U + d12*B2 - (d01*B1 + delta_b1*B1 + alpha1*B1*U);
  B2' = alpha1*B1*U - (d12*B2 + delta_b2*B2);
  x' = s*((P - P0)/(P + P1)) - delta_x*x;

  // Unit definitions:
  unit day = 86400 second;
  unit nanomole = 1e-9 mole;
  unit nanomolar = 1e-9 mole / litre;
  unit first_order_rate_constant = 1 / (86400 second);
  unit flux = 1e-9 mole / (litre * 86400 second);
  unit per_nanomolar_day = litre / (1e-9 mole * 86400 second);
  unit nanomolar_day2 = 1e-9 mole / (litre * (86400 second)^2);
  unit time = 86400 second;
end
