// SBML level 2 version 3

model Smith1980_HypothalamicRegulation()
  // This a model from the article:
  // Hypothalamic regulation of pituitary secretion of luteinizing hormone.II. Feedback control of gonadotropin secretion.
  // Smith WR Bull Math Biol. (1980) 42(1): 57-78 6986927 ,
  // Abstract:
  // No Abstract Available
  // This model was taken from the CellML repository and automatically converted to SBML.
  // The original model was: smith,1980,version02
  // The original CellML model was created by:
  // Lloyd, Catherine, May
  // c.lloyd@auckland.ac.nz
  // The University of Auckland
  // Auckland Bioengineering Institute
  // This model originates from BioModels Database: A Database of Annotated Published Models (http://www.ebi.ac.uk/biomodels/). It is copyright (c) 2005-2011 The BioModels.net Team.
  // To the extent possible under law, all copyright and related or neighbouring rights to this encoded model have been dedicated to the public domain worldwide. Please refer to CC0 Public Domain Dedication for more information.
  // In summary, you are entitled to use this encoded model in absolutely any manner you deem suitable, verbatim, or with modification, alone or embedded it in a larger context, redistribute it, commercially or not, in a restricted way or not..
  // To cite BioModels Database, please use: Li C, Donizelli M, Rodriguez N, Dharuri H, Endler L, Chelliah V, Li L, He E, Henry A, Stefan MI, Snoep JL, Hucka M, Le Novère N, Laibe C (2010) BioModels Database: An enhanced, curated and annotated resource for published quantitative kinetic models. BMC Syst Biol., 4:92.
  // biomodels.db:MODEL7898438988
  // isDescribedBy pubmed:6986927
  // biomodels.db:MODEL7898438988
  // isDescribedBy pubmed:6986927
  // biomodels.db:MODEL7898438988
  // biomodels.db:MODEL7898438988

  // Compartments:
  compartment Compartment = 1 litre;

  // Parameters:
  R = 0.5 ng_ml;
  h = 12 first_order_rate_constant;
  c = 100 pg_ml_hr;
  b1 = 1.29 first_order_rate_constant;
  H has dimensionless;
  x has pg_ml;
  L = 22 ng_ml;
  g1 = 10 first_order_rate_constant;
  b2 = 0.97 first_order_rate_constant;
  T = 15 pg_ml;
  g2 = 0.7 first_order_rate_constant;
  b3 = 1.39;

  // Assignment rules:
  x := T - c/h;
  H := piecewise(1, x > 0, 0);

  // Rate rules:
  R' = (c - h*T)*(1 - H) - b1*R;
  L' = g1*R - b2*L;
  T' = g2*L - b3*T;

  // Unit definitions:
  unit hour = 3600 second;
  unit pg_ml = 1e-12 gram / (1e-3 litre);
  unit ng_ml = 1e-9 gram / (1e-3 litre);
  unit pg_ml_hr = 1e-12 gram / (1e-3 litre * 3600 second);
  unit first_order_rate_constant = 1 / (3600 second);
  unit time = 3600 second;
end
