// SBML level 2 version 3

model Schneider2006_CardiacContractionModel()
  // This a model from the article:
  // Mechanism of the Frank-Starling law--a simulation study with a novel cardiac muscle contraction model that includes titin and troponin I.
  // Schneider NS, Shimayoshi T, Amano A, Matsuda T. J Mol Cell Cardiol. 2006;41(3):522-36. 16860336 ,
  // Abstract:
  // A stretch-induced increase of active tension is one of the most important properties of the heart, known as the Frank-Starling law. Although a variation of myofilament Ca(2+) sensitivity with sarcomere length (SL) change was found to be involved, the underlying molecular mechanisms are not fully clarified. Some recent experimental studies indicate that a reduction of the lattice spacing between thin and thick filaments, through the increase of passive tension caused by the sarcomeric protein titin with an increase in SL within the physiological range, promotes formation of force-generating crossbridges (Xbs). However, the mechanism by which the Xb concentration determines the degree of cooperativity for a given SL has so far evaded experimental elucidation. In this simulation study, a novel, rather simple molecular-based cardiac contraction model, appropriate for integration into a ventricular cell model, was designed, being the first model to introduce experimental data on titin-based radial tension to account for the SL-dependent modulation of the interfilament lattice spacing and to include a conformational change of troponin I (TnI). Simulation results for the isometric twitch contraction time course, the length-tension and the force-[Ca(2+)] relationships are comparable to experimental data. A complete potential Frank-Starling mechanism was analyzed by this simulation study. The SL-dependent modulation of the myosin binding rate through titin's passive tension determines the Xb concentration which then alters the degree of positive cooperativity affecting the rate of the TnI conformation change and causing the Hill coefficient to be SL-dependent.
  // This model was taken from the CellML repository and automatically converted to SBML.
  // The original model was: schneider, shimayoshi, amano, matsuda. (2006) - version01
  // The original CellML model was created by:
  // Nunns, Geoffrey, Rogan
  // gnunns1@jhem.jhu.edu
  // The University of Auckland
  // Auckland Bioengineering Institute
  // This model originates from BioModels Database: A Database of Annotated Published Models (http://www.ebi.ac.uk/biomodels/). It is copyright (c) 2005-2011 The BioModels.net Team.
  // To the extent possible under law, all copyright and related or neighbouring rights to this encoded model have been dedicated to the public domain worldwide. Please refer to CC0 Public Domain Dedication for more information.
  // In summary, you are entitled to use this encoded model in absolutely any manner you deem suitable, verbatim, or with modification, alone or embedded it in a larger context, redistribute it, commercially or not, in a restricted way or not..
  // To cite BioModels Database, please use: Li C, Donizelli M, Rodriguez N, Dharuri H, Endler L, Chelliah V, Li L, He E, Henry A, Stefan MI, Snoep JL, Hucka M, Le Novère N, Laibe C (2010) BioModels Database: An enhanced, curated and annotated resource for published quantitative kinetic models. BMC Syst Biol., 4:92.
  // biomodels.db:MODEL7907879432
  // isDescribedBy pubmed:16860336
  // biomodels.db:MODEL7907879432
  // isDescribedBy pubmed:16860336
  // biomodels.db:MODEL7907879432
  // biomodels.db:MODEL7907879432

  // Compartments:
  compartment Compartment = 1 litre;

  // Parameters:
  A_iso = 9000 mN_per_mm2_per_mM;
  k_off = 0.2 per_msec;
  k_on = 17.3 per_mM_per_msec;
  k_onI = 0.2 per_msec;
  k_offi = 0.075 per_msec;
  k_OFF = -0.32 dimensionless;
  k_xboff = -1.37 dimensionless;
  k_tmoff = 0.067 per_msec;
  k_tmonc = 0.014 per_msec;
  k_tmRU = 10 dimensionless;
  k_tmxb = -1.86 dimensionless;
  k_12 = 2 per_mM_per_msec;
  k_minus12 = 0.6 per_msec;
  k_Titin_parameters = 0.2 dimensionless;
  k_3c = 0.025 per_msec;
  k_3f = 50 dimensionless;
  k_3xb = -1.23 dimensionless;
  k_minus3 = 0.008 per_msec;
  k_4 = 0.077 per_msec;
  k_minus4 = 0.001 per_msec;
  k_5 = 0.03723 per_msec;
  F_b has mN_per_mm2;
  Q_CaB has mM_per_msec;
  Q_TCaA has mM_per_msec;
  k_offI has per_msec;
  Q_TMA has mM_per_msec;
  k_tmon has per_msec;
  Q_MB has mM_per_msec;
  KTitin has dimensionless;
  f_titinNormal has dimensionless;
  f_titinDamaged has dimensionless;
  k_Titin_KTitin has dimensionless;
  L_KTitin has mmeter;
  L_0_KTitin has mmeter;
  Q_Fgen has mM_per_msec;
  k_3 has per_msec;
  Q_PiR has mM_per_msec;
  Q_ADPR has mM_per_msec;
  RUTCa_off = 0 mM;
  RUTCa_on = 0 mM;
  RUTM_on = 0 mM;
  RUAMADPPi = 0 mM;
  RUA_MADPPi = 0 mM;
  RUA_MADP = 0 mM;
  Ca = 0.01 mM;
  RUNA has mM;
  RUA has mM;
  RUTM_on_eff has mM;
  RUTCa_on_eff has mM;
  RU_total = 0.0726 mM;
  MADPPi = 0.1375 mM;
  alpha has dimensionless;
  L_alpha has mmeter;
  L_0_alpha has mmeter;
  L_length has mmeter;
  L_0_length = 0.001 mmeter;

  // Assignment rules:
  F_b := A_iso*(RUA_MADPPi + RUA_MADP);
  Q_CaB := k_on*RUNA*Ca - k_off*RUTCa_off;
  Q_TCaA := k_onI*RUTCa_off - k_offI*RUTCa_on;
  k_offI := k_offi*(1 + k_OFF*(RUA/RU_total))^2*(1 + k_xboff*((RUA_MADPPi + RUA_MADP)/RU_total))^4.4;
  Q_TMA := k_tmon*RUTCa_on - k_tmoff*RUTM_on;
  k_tmon := k_tmonc*(RUTCa_on/RU_total)*(1 + k_tmRU*(RUTM_on/RU_total))^2*(1 + k_tmxb*((RUA_MADPPi + RUA_MADP)/RU_total))^2;
  Q_MB := k_12*KTitin*MADPPi*RUTM_on_eff - k_minus12*RUAMADPPi;
  f_titinNormal := k_Titin_KTitin*(9.9663/(1 + exp((L_KTitin/L_0_KTitin + 1.0639)/0.0696)));
  f_titinDamaged := k_Titin_KTitin*(-31*(L_KTitin/L_0_KTitin) + 40);
  KTitin := piecewise(f_titinNormal, L_KTitin <= 1.1, f_titinDamaged);
  Q_Fgen := k_3*RUAMADPPi - k_minus3*RUA_MADPPi;
  k_3 := k_3c*(1 + k_3f*(RUTCa_on_eff + RUTM_on_eff + RUAMADPPi)/RU_total)^2*(1 + k_3xb*(RUA_MADPPi + RUA_MADP)/RU_total)^2;
  Q_PiR := k_4*RUA_MADPPi - k_minus4*RUA_MADP;
  Q_ADPR := k_5*RUA_MADP;
  RUNA := RU_total - (RUTCa_off + RUTCa_on + RUTM_on + RUAMADPPi + RUA_MADPPi + RUA_MADP);
  RUA := RUTCa_on + RUTM_on + RUAMADPPi + RUA_MADPPi + RUA_MADP;
  RUTM_on_eff := alpha*RUTM_on;
  RUTCa_on_eff := alpha*RUTCa_on;
  alpha := piecewise(1.5*(L_alpha/L_0_alpha) - 0.5, L_alpha < 1, 1, (1 <= L_alpha) && (L_alpha < 1.1), -1.6*(L_alpha/L_0_alpha) + 2.76);
  L_length := L_0_length;

  // Rate rules:
  RUTCa_off' = Q_CaB - Q_TCaA;
  RUTCa_on' = Q_TCaA - Q_TMA;
  RUTM_on' = Q_TMA - Q_MB + Q_ADPR;
  RUAMADPPi' = Q_MB - Q_Fgen;
  RUA_MADPPi' = Q_Fgen - Q_PiR;
  RUA_MADP' = Q_PiR - Q_ADPR;
  Ca' = -Q_CaB;

  // Unit definitions:
  unit millisecond = 1e-3 second;
  unit mM = 1e-3 mole / litre;
  unit mM_per_msec = 1e-3 mole / (litre * 1e-3 second);
  unit per_msec = 1 / (1e-3 second);
  unit per_mM_per_msec = litre / (1e-3 mole * 1e-3 second);
  unit mN_per_mm2 = 1e-3 newton / (1e-3 metre)^2;
  unit mmeter = 1e-3 metre;
  unit mN_per_mm2_per_mM = 1e-3 newton * litre / ((1e-3 metre)^2 * 1e-3 mole);
  unit time = 1e-3 second;
end
