// SBML level 2 version 3

model Reidl2006_CalciumOscillationInCilia()
  // This a model from the article:
  // Model of calcium oscillations due to negative feedback in olfactory cilia.
  // Reidl J, Borowski P, Sensse A, Starke J, Zapotocky M, Eiswirth M. Biophys J. 2006;90(4):1147-55. 16326896 ,
  // Abstract:
  // We present a mathematical model for calcium oscillations in the cilia of olfactory sensory neurons. The underlying mechanism is based on direct negative regulation of cyclic nucleotide-gated channels by calcium/calmodulin and does not require any autocatalysis such as calcium-induced calcium release. The model is in quantitative agreement with available experimental data, both with respect to oscillations and to fast adaptation. We give predictions for the ranges of parameters in which oscillations should be observable. Relevance of the model to calcium oscillations in other systems is discussed.
  // This model was taken from the CellML repository and automatically converted to SBML.
  // The original model was: reidl, borowski, sensse, starke, zapotocky, eiswirth (2006) - version03
  // The original CellML model was created by:
  // Nunns, Geoffrey, Rogan
  // gnunns1@jhem.jhu.edu
  // The University of Auckland
  // Auckland Bioengineering Institute
  // This model originates from BioModels Database: A Database of Annotated Published Models (http://www.ebi.ac.uk/biomodels/). It is copyright (c) 2005-2011 The BioModels.net Team.
  // To the extent possible under law, all copyright and related or neighbouring rights to this encoded model have been dedicated to the public domain worldwide. Please refer to CC0 Public Domain Dedication for more information.
  // In summary, you are entitled to use this encoded model in absolutely any manner you deem suitable, verbatim, or with modification, alone or embedded it in a larger context, redistribute it, commercially or not, in a restricted way or not..
  // To cite BioModels Database, please use: Li C, Donizelli M, Rodriguez N, Dharuri H, Endler L, Chelliah V, Li L, He E, Henry A, Stefan MI, Snoep JL, Hucka M, Le Novère N, Laibe C (2010) BioModels Database: An enhanced, curated and annotated resource for published quantitative kinetic models. BMC Syst Biol., 4:92.
  // biomodels.db:MODEL7908934508
  // isDescribedBy pubmed:16326896
  // biomodels.db:MODEL7908934508
  // isDescribedBy pubmed:16326896
  // biomodels.db:MODEL7908934508
  // biomodels.db:MODEL7908934508

  // Compartments:
  compartment Compartment = 1 litre;

  // Parameters:
  sigma = 5e-7 dm;
  CNG_tot = 1.3e-13 mole_per_dm_squared;
  CaM_tot = 2e-5 mole_per_dm_cubed;
  km_CNG_0 = 0.01 per_second;
  km_CaM4 = 2.5 per_second;
  kp_CaM4 = 1100000000 dm_6_per_second_per_mole_squared;
  kp_CNG_i = 2100000 dm_3_per_second_per_mole;
  km_CNG_i = 0.34 per_second;
  i_Ca = 20000 per_second;
  k_Ca = 1e-10 mole_per_dm_squared_per_second;
  K_Ca = 1.2e-7 mole_per_dm_cubed;
  kp_act has per_second;
  CNG_o = 0 mole_per_dm_squared;
  CNG_o_normalized has dimensionless;
  Ca = 0 mole_per_dm_cubed;
  Ca_normalized has dimensionless;
  CaM4 = 0 mole_per_dm_cubed;
  CaM4_normalized has dimensionless;
  CNG_i = 0 mole_per_dm_squared;
  CNG_i_normalized has dimensionless;
  CNG_c has mole_per_dm_squared;
  CaM has mole_per_dm_cubed;

  // Assignment rules:
  kp_act := piecewise(5.5, (time > 0.1) && (time < 0.2), 5.5, (time > 4.1) && (time < 4.2), 1.6e-5);
  CNG_o_normalized := CNG_o/CNG_tot;
  Ca_normalized := Ca*10000;
  CaM4_normalized := CaM4/CaM_tot;
  CNG_i_normalized := CNG_i/CNG_tot;
  CNG_c := CNG_tot - CNG_o - CNG_i;
  CaM := CaM_tot - CaM4 - 1/sigma*CNG_i;

  // Rate rules:
  CNG_o' = kp_act*(CNG_tot - CNG_o - CNG_i) - km_CNG_0*CNG_o - kp_CNG_i*CNG_o*CaM4;
  Ca' = CNG_o/sigma*i_Ca - k_Ca/sigma*Ca/(Ca + K_Ca) - 4*(kp_CaM4*Ca^2*(CaM_tot - CaM4 - CNG_i/sigma) - km_CaM4*CaM4);
  CaM4' = kp_CaM4*Ca^2*(CaM_tot - CaM4 - CNG_i/sigma) - km_CaM4*CaM4 - kp_CNG_i/sigma*CaM4*(CNG_tot - CNG_o) + km_CNG_i/sigma*CNG_i;
  CNG_i' = -km_CNG_i*CNG_i + kp_CNG_i*CaM4*(CNG_tot - CNG_i);

  // Unit definitions:
  unit per_second = 1 / second;
  unit dm = metre;
  unit mole_per_dm_squared = mole / metre^2;
  unit mole_per_dm_cubed = mole / metre^3;
  unit mole_per_dm_squared_per_second = mole / (metre^2 * second);
  unit dm_3_per_second_per_mole = metre^3 / (second * mole);
  unit dm_6_per_second_per_mole_squared = metre^6 / (second * mole^2);
end
