// SBML level 2 version 3

model Razumova2000_MyofilamentContractileBehaviour()
  // This a model from the article:
  // Different myofilament nearest-neighbor interactions have distinctive effects on contractile behavior.
  // Razumova MV, Bukatina AE, Campbell KB. Biophys J. 2000;78(6):3120-37 10827989 ,
  // Abstract:
  // Cooperativity in contractile behavior of myofilament systems almost assuredly arises because of interactions between neighboring sites. These interactions may be of different kinds. Tropomyosin thin-filament regulatory units may have neighbors in steric blocking positions (off) or steric permissive positions (on). The position of these neighbors influence the tendency for the regulatory unit to assume the on or off state. Likewise, the tendency of a myosin cross-bridge to achieve a force-bearing state may be influenced by whether neighboring cross-bridges are in force-bearing states. Also, a cross-bridge in the force-bearing state may influence the tendency of a regulatory unit to enter the on state. We used a mathematical model to examine the influence of each of these three kinds of neighbor interactions on the steady-state force-pCa relation and on the dynamic force redevelopment process. Each neighbor interaction was unique in its effects on maximal Ca(2+)-activated force, position, and symmetry of the force-pCa curve and on the Hill coefficient. Also, each neighbor interaction had a distinctive effect on the time course of force development as assessed by its rate coefficient, k(dev). These diverse effects suggest that variations in all three kinds of nearest-neighbor interactions may be responsible for a wide variety of currently unexplained observations of myofilament contractile behavior.
  // This model was taken from the CellML repository and automatically converted to SBML.
  // The original model was: razumova, bukatina, campbell. (2000) - version03
  // The original CellML model was created by:
  // Nunns, Geoffrey, Rogan
  // gnunns1@jhem.jhu.edu
  // The University of Auckland
  // Auckland Bioengineering Institute
  // This model originates from BioModels Database: A Database of Annotated Published Models (http://www.ebi.ac.uk/biomodels/). It is copyright (c) 2005-2011 The BioModels.net Team.
  // To the extent possible under law, all copyright and related or neighbouring rights to this encoded model have been dedicated to the public domain worldwide. Please refer to CC0 Public Domain Dedication for more information.
  // In summary, you are entitled to use this encoded model in absolutely any manner you deem suitable, verbatim, or with modification, alone or embedded it in a larger context, redistribute it, commercially or not, in a restricted way or not..
  // To cite BioModels Database, please use: Li C, Donizelli M, Rodriguez N, Dharuri H, Endler L, Chelliah V, Li L, He E, Henry A, Stefan MI, Snoep JL, Hucka M, Le Novère N, Laibe C (2010) BioModels Database: An enhanced, curated and annotated resource for published quantitative kinetic models. BMC Syst Biol., 4:92.
  // biomodels.db:MODEL7909395757
  // isDescribedBy pubmed:10827989
  // biomodels.db:MODEL7909395757
  // isDescribedBy pubmed:10827989
  // biomodels.db:MODEL7909395757
  // biomodels.db:MODEL7909395757

  // Compartments:
  compartment Compartment = 1 litre;

  // Parameters:
  F has dimensionless;
  R_T = 1 dimensionless;
  R_off has dimensionless;
  D = 0 dimensionless;
  A_1 = 0 dimensionless;
  A_2 = 0 dimensionless;
  lambda_off has dimensionless;
  lambda_on has dimensionless;
  lambda_D has dimensionless;
  lambda_A_1 has dimensionless;
  lambda_A_2 has dimensionless;
  lambda_A2_cyc has dimensionless;
  Ca has dimensionless;
  Ca_50 has dimensionless;
  k_0_on = 0 per_second;
  k_0_off = 100 per_second;
  k_Ca_on = 120 per_second;
  k_Ca_off = 50 per_second;
  f_0 = 50 per_second;
  f_prime_0 = 400 per_second;
  h = 8 per_second;
  h_prime = 6 per_second;
  g = 4 per_second;
  n_H = 1 dimensionless;
  u = 1 dimensionless;
  w = 1 dimensionless;
  v = 1 dimensionless;
  k_u_on has per_second;
  k_u_off has per_second;
  k_w_on has per_second;
  k_w_off has per_second;
  f has per_second;
  f_prime has per_second;
  k_on has per_second;
  k_off has per_second;

  // Assignment rules:
  R_off := R_T - (D + A_1 + A_2);
  lambda_off := R_off/R_T;
  lambda_on := (D + A_1 + A_2)/R_T;
  lambda_D := D/R_T;
  lambda_A_1 := A_1/R_T;
  lambda_A_2 := A_2/R_T;
  lambda_A2_cyc := A_2/(D + A_1 + A_2);
  Ca := Ca_50*100;
  Ca_50 := k_Ca_off/k_Ca_on;
  F := 1/(1 + (Ca/Ca_50)^(-n_H));
  k_u_on := k_0_on + (k_Ca_on - k_0_on)*Ca/(Ca_50 + Ca);
  k_u_off := k_0_off + (k_Ca_off - k_0_off)*Ca/(Ca_50 + Ca);
  k_w_on := k_u_on*(1 + lambda_on*(u - 1))^2;
  k_w_off := k_u_off*(u - lambda_on*(u - 1))^2;
  f := f_0*(1 + lambda_A_2*(exp(v - 1) - 1))^2;
  f_prime := f_prime_0*(1 + lambda_A_2*(exp(-(v - 1)) - 1))^2;
  k_on := k_w_on*(1 + lambda_A_2*(exp(w - 1) - 1))^2;
  k_off := k_w_off*(1 + lambda_A_2*(exp(-(w - 1)) - 1))^2;

  // Rate rules:
  D' = k_on*R_off + f_prime*A_1 + g*A_2 - (k_off + f)*D;
  A_1' = f*D + h_prime*A_2 - (f_prime + h)*A_1;
  A_2' = h*A_1 - (h_prime + g)*A_2;

  // Unit definitions:
  unit per_second = 1 / second;
end
