// SBML level 2 version 3

model TenTusscher2006_VentricularCellModel()
  // This a model from the article:
  // Alternans and spiral breakup in a human ventricular tissue model.
  // ten Tusscher KH, Panfilov AV. Am J Physiol Heart Circ Physiol. (2006) 291(3); H1088-100 16565318 ,
  // Abstract:
  // Ventricular fibrillation (VF) is one of the main causes of death in the Western world. According to one hypothesis, the chaotic excitation dynamics during VF are the result of dynamical instabilities in action potential duration (APD) the occurrence of which requires that the slope of the APD restitution curve exceeds 1. Other factors such as electrotonic coupling and cardiac memory also determine whether these instabilities can develop. In this paper we study the conditions for alternans and spiral breakup in human cardiac tissue. Therefore, we develop a new version of our human ventricular cell model, which is based on recent experimental measurements of human APD restitution and includes a more extensive description of intracellular calcium dynamics. We apply this model to study the conditions for electrical instability in single cells, for reentrant waves in a ring of cells, and for reentry in two-dimensional sheets of ventricular tissue. We show that an important determinant for the onset of instability is the recovery dynamics of the fast sodium current. Slower sodium current recovery leads to longer periods of spiral wave rotation and more gradual conduction velocity restitution, both of which suppress restitution-mediated instability. As a result, maximum restitution slopes considerably exceeding 1 (up to 1.5) may be necessary for electrical instability to occur. Although slopes necessary for the onset of instabilities found in our study exceed 1, they are within the range of experimentally measured slopes. Therefore, we conclude that steep APD restitution-mediated instability is a potential mechanism for VF in the human heart.
  // This model was taken from the CellML repository and automatically converted to SBML.
  // The original model was: tentusscher, panfilov, 2006, version04
  // The original CellML model was created by:
  // Noble, Penny, J
  // penny.noble(at)dpag.ox.ac.uk
  // The University of Oxford
  // Department of Physiology, Anatomy and Genetics
  // This model originates from BioModels Database: A Database of Annotated Published Models (http://www.ebi.ac.uk/biomodels/). It is copyright (c) 2005-2011 The BioModels.net Team.
  // To the extent possible under law, all copyright and related or neighbouring rights to this encoded model have been dedicated to the public domain worldwide. Please refer to CC0 Public Domain Dedication for more information.
  // In summary, you are entitled to use this encoded model in absolutely any manner you deem suitable, verbatim, or with modification, alone or embedded it in a larger context, redistribute it, commercially or not, in a restricted way or not..
  // To cite BioModels Database, please use: Li C, Donizelli M, Rodriguez N, Dharuri H, Endler L, Chelliah V, Li L, He E, Henry A, Stefan MI, Snoep JL, Hucka M, Le Novère N, Laibe C (2010) BioModels Database: An enhanced, curated and annotated resource for published quantitative kinetic models. BMC Syst Biol., 4:92.
  // biomodels.db:MODEL7910499126
  // isDescribedBy pubmed:16565318
  // biomodels.db:MODEL7910499126
  // isDescribedBy pubmed:16565318
  // biomodels.db:MODEL7910499126
  // biomodels.db:MODEL7910499126

  // Compartments:
  compartment Compartment = 1 litre;

  // Parameters:
  V_membrane = -85.23 millivolt;
  R = 8314.472 joule_per_mole_kelvin;
  T = 310 kelvin;
  F = 9.64853415e4 coulomb_per_millimole;
  Cm = 0.185 microF;
  V_c = 0.016404 micrometre3;
  i_Stim has picoA_per_picoF;
  E_Na has millivolt;
  E_K has millivolt;
  E_Ks has millivolt;
  E_Ca has millivolt;
  P_kna = 0.03 dimensionless;
  i_K1 has picoA_per_picoF;
  g_K1 = 5.405 nanoS_per_picoF;
  xK1_inf has dimensionless;
  alpha_K1 has dimensionless;
  beta_K1 has dimensionless;
  i_Kr has picoA_per_picoF;
  g_Kr = 0.153 nanoS_per_picoF;
  Xr1 = 0.00621 dimensionless;
  V_rapid_time_dependent_potassium_current_Xr1_gate has millivolt;
  time_rapid_time_dependent_potassium_current_Xr1_gate has millisecond;
  xr1_inf has dimensionless;
  alpha_xr1 has dimensionless;
  beta_xr1 has dimensionless;
  tau_xr1 has millisecond;
  Xr2 = 0.4712 dimensionless;
  V_rapid_time_dependent_potassium_current_Xr2_gate has millivolt;
  time_rapid_time_dependent_potassium_current_Xr2_gate has millisecond;
  xr2_inf has dimensionless;
  alpha_xr2 has dimensionless;
  beta_xr2 has dimensionless;
  tau_xr2 has millisecond;
  i_Ks has picoA_per_picoF;
  g_Ks = 0.392 nanoS_per_picoF;
  Xs = 0.0095 dimensionless;
  V_slow_time_dependent_potassium_current_Xs_gate has millivolt;
  time_slow_time_dependent_potassium_current_Xs_gate has millisecond;
  xs_inf has dimensionless;
  alpha_xs has dimensionless;
  beta_xs has dimensionless;
  tau_xs has millisecond;
  i_Na has picoA_per_picoF;
  g_Na = 14.838 nanoS_per_picoF;
  m = 0.00172 dimensionless;
  V_fast_sodium_current_m_gate has millivolt;
  time_fast_sodium_current_m_gate has millisecond;
  m_inf has dimensionless;
  alpha_m has dimensionless;
  beta_m has dimensionless;
  tau_m has millisecond;
  h = 0.7444 dimensionless;
  V_fast_sodium_current_h_gate has millivolt;
  time_fast_sodium_current_h_gate has millisecond;
  h_inf has dimensionless;
  alpha_h has per_millisecond;
  beta_h has per_millisecond;
  tau_h has millisecond;
  j = 0.7045 dimensionless;
  V_fast_sodium_current_j_gate has millivolt;
  time_fast_sodium_current_j_gate has millisecond;
  j_inf has dimensionless;
  alpha_j has per_millisecond;
  beta_j has per_millisecond;
  tau_j has millisecond;
  i_b_Na has picoA_per_picoF;
  g_bna = 0.00029 nanoS_per_picoF;
  i_CaL has picoA_per_picoF;
  g_CaL = 3.98e-5 litre_per_farad_second;
  d_L_type_Ca_current_d_gate = 3.373e-5 dimensionless;
  V_L_type_Ca_current_d_gate has millivolt;
  time_L_type_Ca_current_d_gate has millisecond;
  d_inf has dimensionless;
  alpha_d has dimensionless;
  beta_d has dimensionless;
  gamma_d has millisecond;
  tau_d has millisecond;
  f = 0.7888 dimensionless;
  V_L_type_Ca_current_f_gate has millivolt;
  time_L_type_Ca_current_f_gate has millisecond;
  f_inf has dimensionless;
  tau_f has millisecond;
  f2 = 0.9755 dimensionless;
  V_L_type_Ca_current_f2_gate has millivolt;
  time_L_type_Ca_current_f2_gate has millisecond;
  f2_inf has dimensionless;
  tau_f2 has millisecond;
  fCass = 0.9953 dimensionless;
  Ca_ss_L_type_Ca_current_fCass_gate has millimolar;
  V_L_type_Ca_current_fCass_gate has millivolt;
  time_L_type_Ca_current_fCass_gate has millisecond;
  fCass_inf has dimensionless;
  tau_fCass has millisecond;
  i_b_Ca has picoA_per_picoF;
  g_bca = 0.000592 nanoS_per_picoF;
  i_to has picoA_per_picoF;
  g_to = 0.294 nanoS_per_picoF;
  s = 0.999998 dimensionless;
  V_transient_outward_current_s_gate has millivolt;
  time_transient_outward_current_s_gate has millisecond;
  s_inf has dimensionless;
  tau_s has millisecond;
  r = 2.42e-8 dimensionless;
  V_transient_outward_current_r_gate has millivolt;
  time_transient_outward_current_r_gate has millisecond;
  r_inf has dimensionless;
  tau_r has millisecond;
  i_NaK has picoA_per_picoF;
  P_NaK = 2.724 picoA_per_picoF;
  K_mk = 1 millimolar;
  K_mNa = 40 millimolar;
  i_NaCa has picoA_per_picoF;
  K_NaCa = 1000 picoA_per_picoF;
  K_sat = 0.1 dimensionless;
  alpha = 2.5 dimensionless;
  gamma = 0.35 dimensionless;
  Km_Ca = 1.38 millimolar;
  Km_Nai = 87.5 millimolar;
  i_p_Ca has picoA_per_picoF;
  g_pCa = 0.1238 picoA_per_picoF;
  K_pCa = 0.0005 millimolar;
  i_p_K has picoA_per_picoF;
  g_pK = 0.0146 nanoS_per_picoF;
  Ca_i = 0.000126 millimolar;
  Ca_o = 2 millimolar;
  Ca_SR = 3.64 millimolar;
  Ca_ss_calcium_dynamics = 0.00036 millimolar;
  i_rel has millimolar_per_millisecond;
  i_up has millimolar_per_millisecond;
  i_leak has millimolar_per_millisecond;
  i_xfer has millimolar_per_millisecond;
  O has dimensionless;
  R_prime = 0.9073 dimensionless;
  k1 has per_millimolar2_per_millisecond;
  k2 has per_millimolar_per_millisecond;
  k1_prime = 0.15 per_millimolar2_per_millisecond;
  k2_prime = 0.045 per_millimolar_per_millisecond;
  k3 = 0.06 per_millisecond;
  k4 = 0.005 per_millisecond;
  EC = 1.5 millimolar;
  max_sr = 2.5 dimensionless;
  min_sr = 1 dimensionless;
  kcasr has dimensionless;
  V_rel = 0.102 per_millisecond;
  V_xfer = 0.0038 per_millisecond;
  K_up = 0.00025 millimolar;
  V_leak = 0.00036 per_millisecond;
  Vmax_up = 0.006375 millimolar_per_millisecond;
  Ca_i_bufc has dimensionless;
  Ca_sr_bufsr has dimensionless;
  Ca_ss_bufss has dimensionless;
  Buf_c = 0.2 millimolar;
  K_buf_c = 0.001 millimolar;
  Buf_sr = 10 millimolar;
  K_buf_sr = 0.3 millimolar;
  Buf_ss = 0.4 millimolar;
  K_buf_ss = 0.00025 millimolar;
  V_sr = 0.001094 micrometre3;
  V_ss = 5.468e-5 micrometre3;
  d_calcium_dynamics has dimensionless;
  Na_i = 8.604 millimolar;
  Na_o = 140 millimolar;
  K_i = 136.89 millimolar;
  K_o = 5.4 millimolar;
  Istim has picoA_per_picoF;
  IstimStart = 10 millisecond;
  IstimEnd = 50000 millisecond;
  IstimAmplitude = -52 picoA_per_picoF;
  IstimPeriod = 1000 millisecond;
  IstimPulseDuration = 1 millisecond;

  // Assignment rules:
  i_Stim := Istim;
  E_Na := R*T/F*ln(Na_o/Na_i);
  E_K := R*T/F*ln(K_o/K_i);
  E_Ks := R*T/F*ln((K_o + P_kna*Na_o)/(K_i + P_kna*Na_i));
  E_Ca := 0.5*R*T/F*ln(Ca_o/Ca_i);
  alpha_K1 := 0.1/(1 + exp(0.06*(V_membrane - E_K - 200)));
  beta_K1 := (3*exp(0.0002*(V_membrane - E_K + 100)) + exp(0.1*(V_membrane - E_K - 10)))/(1 + exp(-0.5*(V_membrane - E_K)));
  xK1_inf := alpha_K1/(alpha_K1 + beta_K1);
  i_K1 := g_K1*xK1_inf*sqrt(K_o/5.4)*(V_membrane - E_K);
  i_Kr := g_Kr*sqrt(K_o/5.4)*Xr1*Xr2*(V_membrane - E_K);
  xr1_inf := 1/(1 + exp(-(26 + V_rapid_time_dependent_potassium_current_Xr1_gate)/7));
  alpha_xr1 := 450/(1 + exp(-(45 + V_rapid_time_dependent_potassium_current_Xr1_gate)/10));
  beta_xr1 := 6/(1 + exp((V_rapid_time_dependent_potassium_current_Xr1_gate + 30)/11.5));
  tau_xr1 := 1*alpha_xr1*beta_xr1;
  xr2_inf := 1/(1 + exp((V_rapid_time_dependent_potassium_current_Xr2_gate + 88)/24));
  alpha_xr2 := 3/(1 + exp(-(60 + V_rapid_time_dependent_potassium_current_Xr2_gate)/20));
  beta_xr2 := 1.12/(1 + exp((V_rapid_time_dependent_potassium_current_Xr2_gate - 60)/20));
  tau_xr2 := 1*alpha_xr2*beta_xr2;
  i_Ks := g_Ks*Xs^2*(V_membrane - E_Ks);
  xs_inf := 1/(1 + exp(-(5 + V_slow_time_dependent_potassium_current_Xs_gate)/14));
  alpha_xs := 1400/sqrt(1 + exp((5 - V_slow_time_dependent_potassium_current_Xs_gate)/6));
  beta_xs := 1/(1 + exp((V_slow_time_dependent_potassium_current_Xs_gate - 35)/15));
  tau_xs := 1*alpha_xs*beta_xs + 80;
  i_Na := g_Na*m^3*h*j*(V_membrane - E_Na);
  m_inf := 1/(1 + exp(-(56.86 + V_fast_sodium_current_m_gate)/9.03))^2;
  alpha_m := 1/(1 + exp(-(60 + V_fast_sodium_current_m_gate)/5));
  beta_m := 0.1/(1 + exp((V_fast_sodium_current_m_gate + 35)/5)) + 0.1/(1 + exp((V_fast_sodium_current_m_gate - 50)/200));
  tau_m := 1*alpha_m*beta_m;
  h_inf := 1/(1 + exp((V_fast_sodium_current_h_gate + 71.55)/7.43))^2;
  alpha_h := piecewise(0.057*exp(-(V_fast_sodium_current_h_gate + 80)/6.8), V_fast_sodium_current_h_gate + 40 < 0, 0);
  beta_h := piecewise(2.7*exp(0.079*V_fast_sodium_current_h_gate) + 310000*exp(0.3485*V_fast_sodium_current_h_gate), V_fast_sodium_current_h_gate + 40 < 0, 0.77/(0.13*(1 + exp((V_fast_sodium_current_h_gate + 10.66)/(-11.1)))));
  tau_h := 1/(alpha_h + beta_h);
  j_inf := 1/(1 + exp((V_fast_sodium_current_j_gate + 71.55)/7.43))^2;
  alpha_j := piecewise((-25428*exp(0.2444*V_fast_sodium_current_j_gate) - 6.948e-6*exp(-0.04391*V_fast_sodium_current_j_gate))*(V_fast_sodium_current_j_gate + 37.78)/1/(1 + exp(0.311*(V_fast_sodium_current_j_gate + 79.23))), V_fast_sodium_current_j_gate + 40 < 0, 0);
  beta_j := piecewise(0.02424*exp(-0.01052*V_fast_sodium_current_j_gate)/(1 + exp(-0.1378*(V_fast_sodium_current_j_gate + 40.14))), V_fast_sodium_current_j_gate - 40 < 0, 0.6*exp(0.057*V_fast_sodium_current_j_gate)/(1 + exp(-0.1*(V_fast_sodium_current_j_gate + 32))));
  tau_j := 1/(alpha_j + beta_j);
  i_b_Na := g_bna*(V_membrane - E_Na);
  i_CaL := g_CaL*d_calcium_dynamics*f*f2*fCass*4*(V_membrane - 15)*F^2/(R*T)*(0.25*Ca_ss_calcium_dynamics*exp(2*(V_membrane - 15)*F/(R*T)) - Ca_o)/(exp(2*(V_membrane - 15)*F/(R*T)) - 1);
  d_inf := 1/(1 + exp(-(8 + V_L_type_Ca_current_d_gate)/7.5));
  alpha_d := 1.4/(1 + exp(-(35 + V_L_type_Ca_current_d_gate)/13)) + 0.25;
  beta_d := 1.4/(1 + exp((V_L_type_Ca_current_d_gate + 5)/5));
  gamma_d := 1/(1 + exp((50 - V_L_type_Ca_current_d_gate)/20));
  tau_d := 1*alpha_d*beta_d + gamma_d;
  f_inf := 1/(1 + exp((V_L_type_Ca_current_f_gate + 20)/7));
  tau_f := 1102.5*exp(-(V_L_type_Ca_current_f_gate + 27)^2/225) + 200/(1 + exp((13 - V_L_type_Ca_current_f_gate)/10)) + 180/(1 + exp((V_L_type_Ca_current_f_gate + 30)/10)) + 20;
  f2_inf := 0.67/(1 + exp((V_L_type_Ca_current_f2_gate + 35)/7)) + 0.33;
  tau_f2 := 562*exp(-(V_L_type_Ca_current_f2_gate + 27)^2/240) + 31/(1 + exp((25 - V_L_type_Ca_current_f2_gate)/10)) + 80/(1 + exp((V_L_type_Ca_current_f2_gate + 30)/10));
  fCass_inf := 0.6/(1 + (Ca_ss_L_type_Ca_current_fCass_gate/0.05)^2) + 0.4;
  tau_fCass := 80/(1 + (Ca_ss_L_type_Ca_current_fCass_gate/0.05)^2) + 2;
  i_b_Ca := g_bca*(V_membrane - E_Ca);
  i_to := g_to*r*s*(V_membrane - E_K);
  s_inf := 1/(1 + exp((V_transient_outward_current_s_gate + 20)/5));
  tau_s := 85*exp(-(V_transient_outward_current_s_gate + 45)^2/320) + 5/(1 + exp((V_transient_outward_current_s_gate - 20)/5)) + 3;
  r_inf := 1/(1 + exp((20 - V_transient_outward_current_r_gate)/6));
  tau_r := 9.5*exp(-(V_transient_outward_current_r_gate + 40)^2/1800) + 0.8;
  i_NaK := P_NaK*K_o/(K_o + K_mk)*Na_i/(Na_i + K_mNa)/(1 + 0.1245*exp(-0.1*V_membrane*F/(R*T)) + 0.0353*exp(-V_membrane*F/(R*T)));
  i_NaCa := K_NaCa*(exp(gamma*V_membrane*F/(R*T))*Na_i^3*Ca_o - exp((gamma - 1)*V_membrane*F/(R*T))*Na_o^3*Ca_i*alpha)/((Km_Nai^3 + Na_o^3)*(Km_Ca + Ca_o)*(1 + K_sat*exp((gamma - 1)*V_membrane*F/(R*T))));
  i_p_Ca := g_pCa*Ca_i/(Ca_i + K_pCa);
  i_p_K := g_pK*(V_membrane - E_K)/(1 + exp((25 - V_membrane)/5.98));
  i_rel := V_rel*O*(Ca_SR - Ca_ss_calcium_dynamics);
  i_up := Vmax_up/(1 + K_up^2/Ca_i^2);
  i_leak := V_leak*(Ca_SR - Ca_i);
  i_xfer := V_xfer*(Ca_ss_calcium_dynamics - Ca_i);
  O := k1*Ca_ss_calcium_dynamics^2*R_prime/(k3 + k1*Ca_ss_calcium_dynamics^2);
  k1 := k1_prime/kcasr;
  k2 := k2_prime*kcasr;
  kcasr := max_sr - (max_sr - min_sr)/(1 + (EC/Ca_SR)^2);
  Ca_i_bufc := 1/(1 + Buf_c*K_buf_c/(Ca_i + K_buf_c)^2);
  Ca_sr_bufsr := 1/(1 + Buf_sr*K_buf_sr/(Ca_SR + K_buf_sr)^2);
  Ca_ss_bufss := 1/(1 + Buf_ss*K_buf_ss/(Ca_ss_calcium_dynamics + K_buf_ss)^2);
  Istim := piecewise(IstimAmplitude, (time >= IstimStart) && (time <= IstimEnd) && (time - IstimStart - floor((time - IstimStart)/IstimPeriod)*IstimPeriod <= IstimPulseDuration), 0);

  // Rate rules:
  V_membrane' = -1/1*(i_K1 + i_to + i_Kr + i_Ks + i_CaL + i_NaK + i_Na + i_b_Na + i_NaCa + i_b_Ca + i_p_K + i_p_Ca + i_Stim);
  Xr1' = (xr1_inf - Xr1)/tau_xr1;
  Xr2' = (xr2_inf - Xr2)/tau_xr2;
  Xs' = (xs_inf - Xs)/tau_xs;
  m' = (m_inf - m)/tau_m;
  h' = (h_inf - h)/tau_h;
  j' = (j_inf - j)/tau_j;
  d_L_type_Ca_current_d_gate' = (d_inf - d_L_type_Ca_current_d_gate)/tau_d;
  f' = (f_inf - f)/tau_f;
  f2' = (f2_inf - f2)/tau_f2;
  fCass' = (fCass_inf - fCass)/tau_fCass;
  s' = (s_inf - s)/tau_s;
  r' = (r_inf - r)/tau_r;
  R_prime' = -k2*Ca_ss_calcium_dynamics*R_prime + k4*(1 - R_prime);
  Ca_i' = Ca_i_bufc*((i_leak - i_up)*V_sr/V_c + i_xfer - 1*(i_b_Ca + i_p_Ca - 2*i_NaCa)*Cm/(2*1*V_c*F));
  Ca_SR' = Ca_sr_bufsr*(i_up - (i_rel + i_leak));
  Ca_ss_calcium_dynamics' = Ca_ss_bufss*(-1*i_CaL*Cm/(2*1*V_ss*F) + i_rel*V_sr/V_ss - i_xfer*V_c/V_ss);
  Na_i' = -1*(i_Na + i_b_Na + 3*i_NaK + 3*i_NaCa)/(1*V_c*F)*Cm;
  K_i' = -1*(i_K1 + i_to + i_Kr + i_Ks + i_p_K + i_Stim - 2*i_NaK)/(1*V_c*F)*Cm;

  // Unit definitions:
  unit micrometre = 1e-6 metre;
  unit micrometre3 = (1e-6 metre)^3;
  unit litre_micrometre3 = litre / (1e-6 metre)^3;
  unit millisecond = 1e-3 second;
  unit per_millisecond = 1 / (1e-3 second);
  unit millivolt = 1e-3 volt;
  unit millivolt_square = (1e-3 volt)^2;
  unit per_millivolt = 1 / (1e-3 volt);
  unit nanoS_per_picoF = 1e-9 siemens / (1e-12 farad);
  unit microF = 1e-6 farad;
  unit picoA = 1e-12 ampere;
  unit mA_pA = (1e-3 ampere)^0 / (1e-12 ampere);
  unit picoA_per_picoF = 1e-12 ampere / (1e-12 farad);
  unit nanoA_per_millimolar = 1e-9 ampere * litre / (1e-3 mole);
  unit millimolar = 1e-3 mole / litre;
  unit millimolar_per_millisecond = 1e-3 mole / (litre * 1e-3 second);
  unit per_millimolar_per_millisecond = litre / (1e-3 mole * 1e-3 second);
  unit per_millimolar2_per_millisecond = litre^2 / ((1e-3 mole)^2 * 1e-3 second);
  unit joule_per_mole_kelvin = joule / (mole * kelvin);
  unit coulomb_per_millimole = coulomb / (1e-3 mole);
  unit cm2 = (0.01 metre)^2;
  unit microF_per_cm2 = 1e-6 farad / (0.01 metre)^2;
  unit litre_per_farad_second = litre / (farad * second);
  unit time = 1e-3 second;
end
