// SBML level 2 version 3

model Shannon2004_VentricularMyocyte()
  // This a model from the article:
  // A mathematical treatment of integrated Ca dynamics within the ventricular myocyte.
  // Shannon TR, Wang F, Puglisi J, Weber C, Bers DM. Biophys J. 15347581 , doi: 10.1529/biophysj.104.047449
  // Abstract:
  // We have developed a detailed mathematical model for Ca2+ handling and ionic currents in the rabbit ventricular myocyte. The objective was to develop a model that: 1), accurately reflects Ca-dependent Ca release; 2), uses realistic parameters, particularly those that concern Ca transport from the cytosol; 3), comes to steady state; 4), simulates basic excitation-contraction coupling phenomena; and 5), runs on a normal desktop computer. The model includes the following novel features: 1), the addition of a subsarcolemmal compartment to the other two commonly formulated cytosolic compartments (junctional and bulk) because ion channels in the membrane sense ion concentrations that differ from bulk; 2), the use of realistic cytosolic Ca buffering parameters; 3), a reversible sarcoplasmic reticulum (SR) Ca pump; 4), a scheme for Na-Ca exchange transport that is [Na]i dependent and allosterically regulated by [Ca]i; and 5), a practical model of SR Ca release including both inactivation/adaptation and SR Ca load dependence. The data describe normal electrical activity and Ca handling characteristics of the cardiac myocyte and the SR Ca load dependence of these processes. The model includes a realistic balance of Ca removal mechanisms (e.g., SR Ca pump versus Na-Ca exchange), and the phenomena of rest decay and frequency-dependent inotropy. A particular emphasis is placed upon reproducing the nonlinear dependence of gain and fractional SR Ca release upon SR Ca load. We conclude that this model is more robust than many previously existing models and reproduces many experimental results using parameters based largely on experimental measurements in myocytes.
  // This model was taken from the CellML repository and automatically converted to SBML.
  // The original model was: shannon, wang, puglisi, weber, bers, 2004, version04
  // The original CellML model was created by:
  // Fink, Martin,
  // Oxford University
  // This model originates from BioModels Database: A Database of Annotated Published Models (http://www.ebi.ac.uk/biomodels/). It is copyright (c) 2005-2011 The BioModels.net Team.
  // To the extent possible under law, all copyright and related or neighbouring rights to this encoded model have been dedicated to the public domain worldwide. Please refer to CC0 Public Domain Dedication for more information.
  // In summary, you are entitled to use this encoded model in absolutely any manner you deem suitable, verbatim, or with modification, alone or embedded it in a larger context, redistribute it, commercially or not, in a restricted way or not..
  // To cite BioModels Database, please use: Li C, Donizelli M, Rodriguez N, Dharuri H, Endler L, Chelliah V, Li L, He E, Henry A, Stefan MI, Snoep JL, Hucka M, Le Novère N, Laibe C (2010) BioModels Database: An enhanced, curated and annotated resource for published quantitative kinetic models. BMC Syst Biol., 4:92.
  // biomodels.db:MODEL7914464799
  // isDescribedBy pubmed:15347581
  // biomodels.db:MODEL7914464799
  // isDescribedBy pubmed:15347581
  // biomodels.db:MODEL7914464799
  // biomodels.db:MODEL7914464799

  // Compartments:
  compartment Compartment = 1 litre;

  // Parameters:
  V_cell = -85.71969 millivolt;
  i_Stim has microA_per_microF;
  stim_start = 100 millisecond;
  stim_period = 1000 millisecond;
  stim_duration = 5 millisecond;
  stim_amplitude = 9.5 microA_per_microF;
  millivolt = 1 millivolt;
  Ko = 5.4 millimolar;
  Nao = 140 millimolar;
  Cao = 1.8 millimolar;
  Clo = 150 millimolar;
  Ki = 135 millimolar;
  Mgi = 1 millimolar;
  Cli = 15 millimolar;
  R_model_parameters = 8314.3 joule_per_kilomole_kelvin;
  T = 310 kelvin;
  F = 9.64867e4 coulomb_per_mole;
  Cm has farad;
  Cm_per_area = 2e-6 farad_per_cm2;
  cell_length = 100 micrometre;
  cell_radius = 10.25 micrometre;
  Vol_Cell has litre;
  Vol_SR has litre;
  Vol_SL has litre;
  Vol_jct has litre;
  Vol_cytosol has litre;
  Vol_mito has litre;
  E_Na_jct has millivolt;
  E_Na_SL has millivolt;
  E_Ca_jct has millivolt;
  E_Ca_SL has millivolt;
  E_K_reversal_potentials has millivolt;
  E_Cl has millivolt;
  i_Na has microA_per_microF;
  i_Na_jct has microA_per_microF;
  i_Na_SL has microA_per_microF;
  G_INa = 16 milliS_per_microF;
  Fx_Na_jct = 0.11 dimensionless;
  Fx_Na_SL = 0.89 dimensionless;
  openProb has dimensionless;
  h = 0.9871404 dimensionless;
  alpha_h has per_millisecond;
  beta_h has per_millisecond;
  tau_h has millisecond;
  h_infinity has dimensionless;
  V_INa_h_gate has millivolt;
  time_INa_h_gate has millisecond;
  j = 0.9918227 dimensionless;
  alpha_j has per_millisecond;
  beta_j has per_millisecond;
  tau_j has millisecond;
  j_infinity has dimensionless;
  V_INa_j_gate has millivolt;
  time_INa_j_gate has millisecond;
  m = 0.001370685 dimensionless;
  alpha_m has per_millisecond;
  beta_m has per_millisecond;
  tau_m has millisecond;
  m_infinity has dimensionless;
  V_INa_m_gate has millivolt;
  time_INa_m_gate has millisecond;
  i_Nab has microA_per_microF;
  i_Nab_jct has microA_per_microF;
  i_Nab_SL has microA_per_microF;
  G_NaBk = 0.000297 milliS_per_microF;
  Fx_NaBk_jct = 0.11 dimensionless;
  Fx_NaBk_SL = 0.89 dimensionless;
  i_NaK has microA_per_microF;
  i_NaK_jct has microA_per_microF;
  i_NaK_SL has microA_per_microF;
  f_NaK has dimensionless;
  Q10_NaK = 1.63 dimensionless;
  Q_NaK has dimensionless;
  H_NaK = 4 dimensionless;
  Q10_Km_Nai = 1.49 dimensionless;
  Q_Km_Nai has dimensionless;
  Km_Nai = 11 millimolar;
  Km_Ko = 1.5 millimolar;
  I_NaK_max = 1.91 microA_per_microF;
  sigma has dimensionless;
  Fx_NaK_jct = 0.11 dimensionless;
  Fx_NaK_SL = 0.89 dimensionless;
  i_Kr has microA_per_microF;
  G_IKr has milliS_per_microF;
  Xr = 0.008471551 dimensionless;
  Xr_infinity has dimensionless;
  tau_Xr has millisecond;
  V_IKr_Xr_gate has millivolt;
  time_IKr_Xr_gate has millisecond;
  Rr has dimensionless;
  V_IKr_Rr_gate has millivolt;
  i_Ks has microA_per_microF;
  i_Ks_jct has microA_per_microF;
  i_Ks_SL has microA_per_microF;
  G_Ks_SL has milliS_per_microF;
  G_Ks_jct has milliS_per_microF;
  Fx_Ks_jct = 0.11 dimensionless;
  Fx_Ks_SL = 0.89 dimensionless;
  E_Ks_jct has millivolt;
  E_Ks_SL has millivolt;
  E_Ks has millivolt;
  pKNa = 0.01833 dimensionless;
  pCa_jct has dimensionless;
  pCa_SL has dimensionless;
  Xs = 0.00687399199 dimensionless;
  Xs_infinity has dimensionless;
  tau_Xs has millisecond;
  V_IKs_Xs_gate has millivolt;
  time_IKs_Xs_gate has millisecond;
  i_tos has microA_per_microF;
  G_tos = 0.06 milliS_per_microF;
  X_tos = 0.004011272 dimensionless;
  X_tos_infinity has dimensionless;
  tau_X_tos has millisecond;
  V_Itos_X_gate has millivolt;
  time_Itos_X_gate has millisecond;
  Y_tos = 0.2935199 dimensionless;
  Y_tos_infinity has dimensionless;
  tau_Y_tos has millisecond;
  V_Itos_Y_gate has millivolt;
  time_Itos_Y_gate has millisecond;
  R_tos = 0.3834306 dimensionless;
  R_tos_infinity has dimensionless;
  R_tos_other has dimensionless;
  V_Itos_R_gate has millivolt;
  tau_R_tos has millisecond;
  time_Itos_R_gate has millisecond;
  i_tof has microA_per_microF;
  G_tof = 0.02 milliS_per_microF;
  X_tof = 0.00401120993 dimensionless;
  X_tof_infinity has dimensionless;
  tau_X_tof has millisecond;
  V_Itof_X_gate has millivolt;
  time_Itof_X_gate has millisecond;
  Y_tof = 0.9946315 dimensionless;
  Y_tof_infinity has dimensionless;
  tau_Y_tof has millisecond;
  V_Itof_Y_gate has millivolt;
  time_Itof_Y_gate has millisecond;
  i_K1 has microA_per_microF;
  G_K1 has milliS_per_microF;
  K1_infinity has dimensionless;
  alpha_K1 has per_millisecond;
  beta_K1 has per_millisecond;
  E_K_IK1_K1_gate has millivolt;
  V_IK1_K1_gate has millivolt;
  i_Cl_Ca has microA_per_microF;
  G_Cl = 0.109625 milliS_per_microF;
  Kd_ClCa = 0.1 millimolar;
  Fx_Cl_jct = 0.11 dimensionless;
  Fx_Cl_SL = 0.89 dimensionless;
  i_Clb has microA_per_microF;
  G_ClBk = 0.009 milliS_per_microF;
  i_CaL has microA_per_microF;
  i_CaL_Ca_SL has microA_per_microF;
  i_CaL_Ca_jct has microA_per_microF;
  i_CaL_Na_SL has microA_per_microF;
  i_CaL_Na_jct has microA_per_microF;
  i_CaL_K has microA_per_microF;
  PCa = 0.00054 litre_per_farad_millisecond;
  PNa = 1.5e-8 litre_per_farad_millisecond;
  PK = 2.7e-7 litre_per_farad_millisecond;
  Fx_ICaL_jct = 0.9 dimensionless;
  Fx_ICaL_SL = 0.1 dimensionless;
  gamma_Cai = 0.341 dimensionless;
  gamma_Cao = 0.341 dimensionless;
  gamma_Nai = 0.75 dimensionless;
  gamma_Nao = 0.75 dimensionless;
  gamma_Ki = 0.75 dimensionless;
  gamma_Ko = 0.75 dimensionless;
  Q10_CaL = 1.8 dimensionless;
  Q_CaL has dimensionless;
  temp has coulomb_per_mole;
  d = 6.997531e-6 dimensionless;
  d_infinity has dimensionless;
  tau_d has millisecond;
  V_ICaL_d_gate has millivolt;
  time_ICaL_d_gate has millisecond;
  f = 1.000676 dimensionless;
  f_infinity has dimensionless;
  tau_f has millisecond;
  V_ICaL_f_gate has millivolt;
  time_ICaL_f_gate has millisecond;
  fCa_SL has dimensionless;
  fCa_jct has dimensionless;
  fCaB_SL = 0.01535289 dimensionless;
  fCaB_jct = 0.02460918 dimensionless;
  Ca_SL_ICaL_fCa_gate has millimolar;
  Ca_jct_ICaL_fCa_gate has millimolar;
  time_ICaL_fCa_gate has millisecond;
  i_NaCa has microA_per_microF;
  i_NaCa_SL has microA_per_microF;
  i_NaCa_jct has microA_per_microF;
  V_max_INaCa = 9 microA_per_microF;
  Fx_NCX_jct = 0.11 dimensionless;
  Fx_NCX_SL = 0.89 dimensionless;
  Q10_NCX = 1.57 dimensionless;
  Q_NCX has dimensionless;
  K_mNai = 12.29 millimolar;
  K_mCao = 1.3 millimolar;
  K_mNao = 87.5 millimolar;
  K_mCai = 0.00359 millimolar;
  Ka_SL has dimensionless;
  Ka_jct has dimensionless;
  Kd_act = 0.000256 millimolar;
  ksat = 0.27 dimensionless;
  eta = 0.35 dimensionless;
  HNa = 3 dimensionless;
  temp_jct has millimolar4;
  temp_SL has millimolar4;
  i_Cap has microA_per_microF;
  i_Cap_SL has microA_per_microF;
  i_Cap_jct has microA_per_microF;
  V_max_ICap = 2.2e-6 millimolar_per_millisecond;
  Fx_SLCaP_jct = 0.11 dimensionless;
  Fx_SLCaP_SL = 0.89 dimensionless;
  Q10_SLCaP = 2.35 dimensionless;
  Q_SLCaP has dimensionless;
  Km = 0.0005 millimolar;
  H_ICap = 1.6 dimensionless;
  V_maxAF_old has microA_per_microF;
  V_maxAF = 0.0673 microA_per_microF;
  i_Cab has microA_per_microF;
  i_Cab_jct has microA_per_microF;
  i_Cab_SL has microA_per_microF;
  G_CaBk = 0.0002513 milliS_per_microF;
  Fx_CaBk_jct = 0.11 dimensionless;
  Fx_CaBk_SL = 0.89 dimensionless;
  j_rel_SR has millimolar_per_millisecond;
  Max_SR = 15 dimensionless;
  Min_SR = 1 dimensionless;
  EC50_SR = 0.45 millimolar;
  R_Jrel_SR = 0.8846735 dimensionless;
  I = 9.272e-8 dimensionless;
  RI has dimensionless;
  O = 7.11264e-7 dimensionless;
  ks = 25 per_millisecond;
  koCa = 10 per_millimolar2_per_millisecond;
  kom = 0.06 per_millisecond;
  kiCa = 0.5 per_millimolar_per_millisecond;
  kim = 0.005 per_millisecond;
  HSR = 2.5 dimensionless;
  kCaSR has dimensionless;
  koSRCa has per_millimolar2_per_millisecond;
  kiSRCa has per_millimolar_per_millisecond;
  j_leak_SR has millimolar_per_millisecond;
  KSRleak = 5.348e-6 per_millisecond;
  j_pump_SR has millimolar_per_millisecond;
  V_max_Jpump_SR = 0.000286 millimolar_per_millisecond;
  Q10_SRCaP = 2.6 dimensionless;
  Q_SRCaP has dimensionless;
  Kmf = 0.000246 millimolar;
  Kmr = 1.7 millimolar;
  H_Jpump_SR = 1.787 dimensionless;
  J_Na_jct_SL has millimole_per_millisecond;
  J_Na_SL_cytosol has millimole_per_millisecond;
  J_Ca_jct_SL has millimole_per_millisecond;
  J_Ca_SL_cytosol has millimole_per_millisecond;
  D_Ca_jct_SL = 1.64e-6 dm2_per_second;
  D_Ca_SL_cytosol = 1.22e-6 dm2_per_second;
  D_Na_jct_SL = 1.09e-5 dm2_per_second;
  D_Na_SL_cytosol = 1.79e-5 dm2_per_second;
  x_jct_SL = 0.5 micrometre;
  x_SL_cytosol = 0.45 micrometre;
  A_jct_SL = 3.01e-6 cm2;
  A_SL_cytosol = 0.00013 cm2;
  J_Na_jct_SL_old has millimole_per_millisecond;
  J_Na_SL_cytosol_old has millimole_per_millisecond;
  J_Ca_jct_SL_old has millimole_per_millisecond;
  J_Ca_SL_cytosol_old has millimole_per_millisecond;
  Na_SL = 8.874077 millimolar;
  Na_jct = 8.872824 millimolar;
  Na_SL_buf = 0.7761214 millimolar;
  Na_jct_buf = 3.557055 millimolar;
  Nai = 8.874461 millimolar;
  Bmax_SL = 1.65 millimolar;
  Bmax_jct = 7.561 millimolar;
  kon = 0.0001 per_millimolar_per_millisecond;
  koff = 0.001 per_millisecond;
  dNa_jct_buf has millimolar_per_millisecond;
  dNa_SL_buf has millimolar_per_millisecond;
  Ca_SR = 0.5456113 millimolar;
  Ca_SL_Ca_buffer = 0.000106395937 millimolar;
  Ca_jct_Ca_buffer = 0.000174843061 millimolar;
  Cai = 8.7350002e-5 millimolar;
  Ca_SLB_SL = 0.009868629 millimolar;
  Ca_SLB_jct = 0.007780802 millimolar;
  Ca_SLHigh_SL = 0.114439 millimolar;
  Ca_SLHigh_jct = 0.07750387 millimolar;
  Ca_Calsequestrin = 1.186497 millimolar;
  Bmax_SLB_SL = 0.0374 millimolar;
  Bmax_SLB_jct = 0.0046 millimolar;
  Bmax_SLHigh_SL = 0.0134 millimolar;
  Bmax_SLHigh_jct = 0.00165 millimolar;
  Bmax_Calsequestrin = 0.14 millimolar;
  kon_SL = 100 per_millimolar_per_millisecond;
  kon_Calsequestrin = 100 per_millimolar_per_millisecond;
  koff_SLB = 1.3 per_millisecond;
  koff_SLHigh = 0.03 per_millisecond;
  koff_Calsequestrin = 65 per_millisecond;
  dCalsequestrin has millimolar_per_millisecond;
  dCa_SLB_SL has millimolar_per_millisecond;
  dCa_SLB_jct has millimolar_per_millisecond;
  dCa_SLHigh_SL has millimolar_per_millisecond;
  dCa_SLHigh_jct has millimolar_per_millisecond;
  dCa_jct_tot_bound has millimolar_per_millisecond;
  dCa_SL_tot_bound has millimolar_per_millisecond;
  i_Ca_jct_tot has microA_per_microF;
  i_Ca_SL_tot has microA_per_microF;
  Ca_TroponinC = 0.008963736 millimolar;
  Ca_TroponinC_Ca_Mg = 0.1179952 millimolar;
  Mg_TroponinC_Ca_Mg = 0.01033765 millimolar;
  Ca_Calmodulin = 0.000295961245 millimolar;
  Ca_Myosin = 0.001984672 millimolar;
  Mg_Myosin = 0.1374977 millimolar;
  Ca_SRB = 0.002177112 millimolar;
  Bmax_TroponinC = 0.07 millimolar;
  Bmax_TroponinC_Ca_Mg_Ca = 0.14 millimolar;
  Bmax_TroponinC_Ca_Mg_Mg = 0.14 millimolar;
  Bmax_Calmodulin = 0.024 millimolar;
  Bmax_Myosin_Ca = 0.14 millimolar;
  Bmax_Myosin_Mg = 0.14 millimolar;
  Bmax_SRB = 0.0171 millimolar;
  kon_TroponinC = 32.7 per_millimolar_per_millisecond;
  kon_TroponinC_Ca_Mg_Ca = 2.37 per_millimolar_per_millisecond;
  kon_TroponinC_Ca_Mg_Mg = 0.003 per_millimolar_per_millisecond;
  kon_Calmodulin = 34 per_millimolar_per_millisecond;
  kon_Myosin_Ca = 13.8 per_millimolar_per_millisecond;
  kon_Myosin_Mg = 0.0157 per_millimolar_per_millisecond;
  kon_SRB = 100 per_millimolar_per_millisecond;
  koff_TroponinC = 0.0196 per_millisecond;
  koff_TroponinC_Ca_Mg_Ca = 3.2e-5 per_millisecond;
  koff_TroponinC_Ca_Mg_Mg = 0.00333 per_millisecond;
  koff_Calmodulin = 0.238 per_millisecond;
  koff_Myosin_Ca = 0.00046 per_millisecond;
  koff_Myosin_Mg = 5.7e-5 per_millisecond;
  koff_SRB = 0.06 per_millisecond;
  dCa_TroponinC has millimolar_per_millisecond;
  dCa_TroponinC_Ca_Mg has millimolar_per_millisecond;
  dMg_TroponinC_Ca_Mg has millimolar_per_millisecond;
  dCa_Calmodulin has millimolar_per_millisecond;
  dCa_Myosin has millimolar_per_millisecond;
  dMg_Myosin has millimolar_per_millisecond;
  dCa_SRB has millimolar_per_millisecond;
  dCa_cytosol_tot_bound has millimolar_per_millisecond;
  Indo1 = 0 millimolar;
  Fluo3 = 0 millimolar;
  Ca_Indo1_Cytosol = 0 millimolar;
  Ca_Indo1_SL = 0 millimolar;
  Ca_Indo1_jct = 0 millimolar;
  Ca_Fluo3_Cytosol = 0 millimolar;
  Ca_Fluo3_SL = 0 millimolar;
  Ca_Fluo3_jct = 0 millimolar;
  Bmax_Indo1_Cytosol = 0.025 millimolar;
  Bmax_Indo1_SL = 0.00077 millimolar;
  Bmax_Indo1_jct = 2e-5 millimolar;
  Bmax_Fluo3_Cytosol = 0.025 millimolar;
  Bmax_Fluo3_SL = 0.00077 millimolar;
  Bmax_Fluo3_jct = 2e-5 millimolar;
  kon_Indo1 = 100 per_millimolar2_per_millisecond;
  kon_Fluo3 = 100 per_millimolar2_per_millisecond;
  koff_Indo1 = 0.06 per_millisecond;
  koff_Fluo3 = 0.11 per_millisecond;
  Indo1Bound has millimolar;
  Fluo3Bound has millimolar;
  dCa_Indo1_Cytosol has millimolar_per_millisecond;
  dCa_Indo1_jct has millimolar_per_millisecond;
  dCa_Indo1_SL has millimolar_per_millisecond;
  dCa_Fluo3_Cytosol has millimolar_per_millisecond;
  dCa_Fluo3_jct has millimolar_per_millisecond;
  dCa_Fluo3_SL has millimolar_per_millisecond;

  // Assignment rules:
  i_Stim := piecewise(-stim_amplitude, (time - floor(time/stim_period)*stim_period >= stim_start) && (time - floor(time/stim_period)*stim_period <= stim_start + stim_duration), 0);
  Cm := Cm_per_area*2*cell_radius/10000*pi*cell_length/10000;
  Vol_Cell := 3.141593*(cell_radius/1000)^2*cell_length/1000^3;
  Vol_SR := 0.035*Vol_Cell;
  Vol_SL := 0.02*Vol_Cell;
  Vol_jct := 0.00051*Vol_Cell;
  Vol_cytosol := 0.65*Vol_Cell;
  Vol_mito := Vol_Cell - (Vol_SR + Vol_SL + Vol_jct + Vol_cytosol);
  E_Na_jct := R_model_parameters*T/F*ln(Nao/Na_jct);
  E_Na_SL := R_model_parameters*T/F*ln(Nao/Na_SL);
  E_Ca_jct := R_model_parameters*T/(2*F)*ln(Cao/Ca_jct_Ca_buffer);
  E_Ca_SL := R_model_parameters*T/(2*F)*ln(Cao/Ca_SL_Ca_buffer);
  E_K_reversal_potentials := R_model_parameters*T/F*ln(Ko/Ki);
  E_Cl := -R_model_parameters*T/F*ln(Clo/Cli);
  openProb := m^3*h*j;
  i_Na_jct := Fx_Na_jct*G_INa*openProb*(V_cell - E_Na_jct);
  i_Na_SL := Fx_Na_SL*G_INa*openProb*(V_cell - E_Na_SL);
  i_Na := i_Na_jct + i_Na_SL;
  alpha_h := piecewise(0.135*exp((80 + V_INa_h_gate)/(-6.8)), V_INa_h_gate < -40*millivolt, 0);
  beta_h := piecewise(3.56*exp(0.079*V_INa_h_gate) + 310000*exp(0.35*V_INa_h_gate), V_INa_h_gate < -40*millivolt, 1/(0.13*(1 + exp((V_INa_h_gate + 10.66)/(-11.1)))));
  tau_h := 1/(alpha_h + beta_h);
  h_infinity := alpha_h/(alpha_h + beta_h);
  alpha_j := piecewise((-127140*exp(0.2444*V_INa_j_gate) - 3.474e-5*exp(-0.04391*V_INa_j_gate))*(V_INa_j_gate + 37.78)/1/(1 + exp(0.311*(V_INa_j_gate + 79.23))), V_INa_j_gate < -40*millivolt, 0);
  beta_j := piecewise(0.1212*exp(-0.01052*V_INa_j_gate)/(1 + exp(-0.1378*(V_INa_j_gate + 40.14))), V_INa_j_gate < -40*millivolt, 0.3*exp(-2.535e-7*V_INa_j_gate)/(1 + exp(-0.1*(V_INa_j_gate + 32))));
  tau_j := 1/(alpha_j + beta_j);
  j_infinity := alpha_j/(alpha_j + beta_j);
  alpha_m := 0.32*(V_INa_m_gate + 47.13)/1/(1 - exp(-0.1*(V_INa_m_gate + 47.13)));
  beta_m := 0.08*exp(-V_INa_m_gate/11);
  tau_m := 1/(alpha_m + beta_m);
  m_infinity := alpha_m/(alpha_m + beta_m);
  i_Nab_jct := Fx_NaBk_jct*G_NaBk*(V_cell - E_Na_jct);
  i_Nab_SL := Fx_NaBk_SL*G_NaBk*(V_cell - E_Na_SL);
  i_Nab := i_Nab_jct + i_Nab_SL;
  Q_NaK := Q10_NaK^((T - 310)/10);
  Q_Km_Nai := Q10_Km_Nai^((T - 310)/10);
  sigma := (exp(Nao/67.3) - 1)/7;
  f_NaK := 1/(1 + 0.1245*exp(-0.1*V_cell*F/(R_model_parameters*T)) + 0.0365*sigma*exp(-V_cell*F/(R_model_parameters*T)));
  i_NaK_jct := Fx_NaK_jct*Q_NaK*I_NaK_max*f_NaK/(1 + (Q_Km_Nai*Km_Nai/Na_jct)^H_NaK)*Ko/(Ko + Km_Ko);
  i_NaK_SL := Fx_NaK_SL*Q_NaK*I_NaK_max*f_NaK/(1 + (Q_Km_Nai*Km_Nai/Na_SL)^H_NaK)*Ko/(Ko + Km_Ko);
  i_NaK := i_NaK_jct + i_NaK_SL;
  G_IKr := 0.03*sqrt(Ko/5.4);
  i_Kr := G_IKr*Xr*Rr*(V_cell - E_K_reversal_potentials);
  Xr_infinity := 1/(1 + exp(-(50 + V_IKr_Xr_gate)/7.5));
  tau_Xr := 1/(0.00138*(V_IKr_Xr_gate + 7)/(1 - exp(-0.123*(V_IKr_Xr_gate + 7))) + 0.00061*(V_IKr_Xr_gate + 10)/(exp(0.145*(V_IKr_Xr_gate + 10)) - 1));
  Rr := 1/(1 + exp((33 + V_IKr_Rr_gate)/22.4));
  pCa_jct := -log10(Ca_jct_Ca_buffer/1) + 3;
  pCa_SL := -log10(Ca_SL_Ca_buffer/1) + 3;
  G_Ks_jct := 0.07*(0.057 + 0.19/(1 + exp((pCa_jct - 7.2)/0.6)));
  G_Ks_SL := 0.07*(0.057 + 0.19/(1 + exp((pCa_SL - 7.2)/0.6)));
  E_Ks_jct := R_model_parameters*T/F*ln((Ko + pKNa*Nao)/(Ki + pKNa*Na_jct));
  E_Ks_SL := R_model_parameters*T/F*ln((Ko + pKNa*Nao)/(Ki + pKNa*Na_SL));
  E_Ks := R_model_parameters*T/F*ln((Ko + pKNa*Nao)/(Ki + pKNa*Nai));
  i_Ks_jct := Fx_Ks_jct*G_Ks_jct*Xs^2*(V_cell - E_Ks);
  i_Ks_SL := Fx_Ks_SL*G_Ks_SL*Xs^2*(V_cell - E_Ks);
  i_Ks := i_Ks_jct + i_Ks_SL;
  Xs_infinity := 1/(1 + exp(-(V_IKs_Xs_gate - 1.5)/16.7));
  tau_Xs := 1/(7.19e-5*(V_IKs_Xs_gate + 30)/(1 - exp(-0.148*(V_IKs_Xs_gate + 30))) + 0.000131*(V_IKs_Xs_gate + 30)/(exp(0.0687*(V_IKs_Xs_gate + 30)) - 1));
  i_tos := G_tos*X_tos*(Y_tos + 0.5*R_tos)*(V_cell - E_K_reversal_potentials);
  X_tos_infinity := 1/(1 + exp(-(V_Itos_X_gate + 3)/15));
  tau_X_tos := 9/(1 + exp((V_Itos_X_gate + 3)/15)) + 0.5;
  Y_tos_infinity := 1/(1 + exp((V_Itos_Y_gate + 33.5)/10));
  tau_Y_tos := 3000/(1 + exp((V_Itos_Y_gate + 60)/10)) + 30;
  R_tos_infinity := 1/(1 + exp((V_Itos_R_gate + 33.5)/10));
  tau_R_tos := 2800/(1 + exp((V_Itos_R_gate + 60)/10)) + 220;
  R_tos_other := R_tos_infinity;
  i_tof := G_tof*X_tof*Y_tof*(V_cell - E_K_reversal_potentials);
  X_tof_infinity := 1/(1 + exp(-(V_Itof_X_gate + 3)/15));
  tau_X_tof := 3.5*exp(-(V_Itof_X_gate/30)^2) + 1.5;
  Y_tof_infinity := 1/(1 + exp((V_Itof_Y_gate + 33.5)/10));
  tau_Y_tof := 20/(1 + exp((V_Itof_Y_gate + 33.5)/10)) + 20;
  G_K1 := 0.9*sqrt(Ko/5.4);
  i_K1 := G_K1*K1_infinity*(V_cell - E_K_reversal_potentials);
  K1_infinity := alpha_K1/(alpha_K1 + beta_K1);
  alpha_K1 := 1.02/(1 + exp(0.2385*(V_IK1_K1_gate - (E_K_IK1_K1_gate + 59.215))));
  beta_K1 := (0.49124*exp(0.08032*(V_IK1_K1_gate - E_K_IK1_K1_gate + 5.476)) + 1*exp(0.06175*(V_IK1_K1_gate - (E_K_IK1_K1_gate + 594.31))))/(1 + exp(-0.5143*(V_IK1_K1_gate - E_K_IK1_K1_gate + 4.753)));
  i_Cl_Ca := G_Cl*(V_cell - E_Cl)*(Fx_Cl_jct/(1 + Kd_ClCa/Ca_jct_Ca_buffer) + Fx_Cl_SL/(1 + Kd_ClCa/Ca_SL_Ca_buffer));
  i_Clb := G_ClBk*(V_cell - E_Cl);
  Q_CaL := Q10_CaL^((T - 310)/10);
  temp := 0.45*d*f*Q_CaL*V_cell*F^2/(R_model_parameters*T);
  i_CaL_Ca_jct := temp*fCa_jct*Fx_ICaL_jct*PCa*4*(gamma_Cai*Ca_jct_Ca_buffer*exp(2*V_cell*F/(R_model_parameters*T)) - gamma_Cao*Cao)/(exp(2*V_cell*F/(R_model_parameters*T)) - 1);
  i_CaL_Na_jct := temp*fCa_jct*Fx_ICaL_jct*PNa*(gamma_Nai*Na_jct*exp(V_cell*F/(R_model_parameters*T)) - gamma_Nao*Nao)/(exp(V_cell*F/(R_model_parameters*T)) - 1);
  i_CaL_Ca_SL := temp*fCa_SL*Fx_ICaL_SL*PCa*4*(gamma_Cai*Ca_SL_Ca_buffer*exp(2*V_cell*F/(R_model_parameters*T)) - gamma_Cao*Cao)/(exp(2*V_cell*F/(R_model_parameters*T)) - 1);
  i_CaL_Na_SL := temp*fCa_SL*Fx_ICaL_SL*PNa*(gamma_Nai*Na_SL*exp(V_cell*F/(R_model_parameters*T)) - gamma_Nao*Nao)/(exp(V_cell*F/(R_model_parameters*T)) - 1);
  i_CaL_K := temp*(fCa_SL*Fx_ICaL_SL + fCa_jct*Fx_ICaL_jct)*PK*(gamma_Ki*Ki*exp(V_cell*F/(R_model_parameters*T)) - gamma_Ko*Ko)/(exp(V_cell*F/(R_model_parameters*T)) - 1);
  i_CaL := i_CaL_Ca_SL + i_CaL_Ca_jct + i_CaL_Na_SL + i_CaL_Na_jct + i_CaL_K;
  d_infinity := 1/(1 + exp(-(V_ICaL_d_gate + 14.5)/6));
  tau_d := 1*d_infinity*(1 - exp(-(V_ICaL_d_gate + 14.5)/6))/(0.035*(V_ICaL_d_gate + 14.5));
  f_infinity := 1/(1 + exp((V_ICaL_f_gate + 35.06)/3.6)) + 0.6/(1 + exp((50 - V_ICaL_f_gate)/20));
  tau_f := 1/(0.0197*exp(-(0.0337*(V_ICaL_f_gate + 14.5))^2) + 0.02);
  fCa_SL := 1 - fCaB_SL;
  fCa_jct := 1 - fCaB_jct;
  temp_jct := (exp(eta*V_cell*F/(R_model_parameters*T))*Na_jct^HNa*Cao - exp((eta - 1)*V_cell*F/(R_model_parameters*T))*Nao^HNa*Ca_jct_Ca_buffer)/(1 + ksat*exp((eta - 1)*V_cell*F/(R_model_parameters*T)));
  temp_SL := (exp(eta*V_cell*F/(R_model_parameters*T))*Na_SL^HNa*Cao - exp((eta - 1)*V_cell*F/(R_model_parameters*T))*Nao^HNa*Ca_SL_Ca_buffer)/(1 + ksat*exp((eta - 1)*V_cell*F/(R_model_parameters*T)));
  Q_NCX := Q10_NCX^((T - 310)/10);
  Ka_SL := 1/(1 + (Kd_act/Ca_SL_Ca_buffer)^3);
  Ka_jct := 1/(1 + (Kd_act/Ca_jct_Ca_buffer)^3);
  i_NaCa_jct := Fx_NCX_jct*V_max_INaCa*Ka_jct*Q_NCX*temp_jct/(K_mCai*Nao^HNa*(1 + (Na_jct/K_mNai)^HNa) + K_mNao^HNa*Ca_jct_Ca_buffer*(1 + Ca_jct_Ca_buffer/K_mCai) + K_mCao*Na_jct^HNa + Na_jct^HNa*Cao + Nao^HNa*Ca_jct_Ca_buffer);
  i_NaCa_SL := Fx_NCX_SL*V_max_INaCa*Ka_SL*Q_NCX*temp_SL/(K_mCai*Nao^HNa*(1 + (Na_SL/K_mNai)^HNa) + K_mNao^HNa*Ca_SL_Ca_buffer*(1 + Ca_SL_Ca_buffer/K_mCai) + K_mCao*Na_SL^HNa + Na_SL^HNa*Cao + Nao^HNa*Ca_SL_Ca_buffer);
  i_NaCa := i_NaCa_jct + i_NaCa_SL;
  V_maxAF_old := V_max_ICap*Vol_cytosol*2*F/Cm;
  Q_SLCaP := Q10_SLCaP^((T - 310)/10);
  i_Cap_jct := Q_SLCaP*V_maxAF*Fx_SLCaP_jct/(1 + (Km/Ca_jct_Ca_buffer)^H_ICap);
  i_Cap_SL := Q_SLCaP*V_maxAF*Fx_SLCaP_SL/(1 + (Km/Ca_SL_Ca_buffer)^H_ICap);
  i_Cap := i_Cap_jct + i_Cap_SL;
  i_Cab_jct := G_CaBk*Fx_CaBk_jct*(V_cell - E_Ca_jct);
  i_Cab_SL := G_CaBk*Fx_CaBk_SL*(V_cell - E_Ca_SL);
  i_Cab := i_Cab_SL + i_Cab_jct;
  kCaSR := Max_SR - (Max_SR - Min_SR)/(1 + (EC50_SR/Ca_SR)^HSR);
  koSRCa := koCa/kCaSR;
  kiSRCa := kiCa*kCaSR;
  RI := 1 - R_Jrel_SR - O - I;
  j_rel_SR := ks*O*(Ca_SR - Ca_jct_Ca_buffer);
  j_leak_SR := KSRleak*(Ca_SR - Ca_jct_Ca_buffer);
  Q_SRCaP := Q10_SRCaP^((T - 310)/10);
  j_pump_SR := Q_SRCaP*V_max_Jpump_SR*Vol_cytosol/Vol_SR*((Cai/Kmf)^H_Jpump_SR - (Ca_SR/Kmr)^H_Jpump_SR)/(1 + (Cai/Kmf)^H_Jpump_SR + (Ca_SR/Kmr)^H_Jpump_SR);
  J_Na_jct_SL := (Na_jct - Na_SL)*1.8313e-14;
  J_Na_SL_cytosol := (Na_SL - Nai)*1.6386e-12;
  J_Ca_jct_SL := (Ca_jct_Ca_buffer - Ca_SL_Ca_buffer)*8.2413e-13;
  J_Ca_SL_cytosol := (Ca_SL_Ca_buffer - Cai)*3.7243e-12;
  J_Na_jct_SL_old := D_Na_jct_SL*A_jct_SL*(Na_jct - Na_SL)/x_jct_SL;
  J_Na_SL_cytosol_old := D_Na_SL_cytosol*A_SL_cytosol*(Na_SL - Nai)/x_SL_cytosol;
  J_Ca_jct_SL_old := D_Ca_jct_SL*A_jct_SL*(Ca_jct_Ca_buffer - Ca_SL_Ca_buffer)/x_jct_SL;
  J_Ca_SL_cytosol_old := D_Ca_SL_cytosol*A_SL_cytosol*(Ca_SL_Ca_buffer - Cai)/x_SL_cytosol;
  dNa_jct_buf := kon*Na_jct*(Bmax_jct - Na_jct_buf) - koff*Na_jct_buf;
  dNa_SL_buf := kon*Na_SL*(Bmax_SL - Na_SL_buf) - koff*Na_SL_buf;
  dCalsequestrin := kon_Calsequestrin*Ca_SR*(Bmax_Calsequestrin*Vol_cytosol/Vol_SR - Ca_Calsequestrin) - koff_Calsequestrin*Ca_Calsequestrin;
  dCa_SLB_SL := kon_SL*Ca_SL_Ca_buffer*(Bmax_SLB_SL*Vol_cytosol/Vol_SL - Ca_SLB_SL) - koff_SLB*Ca_SLB_SL;
  dCa_SLB_jct := kon_SL*Ca_jct_Ca_buffer*(Bmax_SLB_jct*0.1*Vol_cytosol/Vol_jct - Ca_SLB_jct) - koff_SLB*Ca_SLB_jct;
  dCa_SLHigh_SL := kon_SL*Ca_SL_Ca_buffer*(Bmax_SLHigh_SL*Vol_cytosol/Vol_SL - Ca_SLHigh_SL) - koff_SLHigh*Ca_SLHigh_SL;
  dCa_SLHigh_jct := kon_SL*Ca_jct_Ca_buffer*(Bmax_SLHigh_jct*0.1*Vol_cytosol/Vol_jct - Ca_SLHigh_jct) - koff_SLHigh*Ca_SLHigh_jct;
  dCa_jct_tot_bound := dCa_SLB_jct + dCa_SLHigh_jct;
  dCa_SL_tot_bound := dCa_SLB_SL + dCa_SLHigh_SL;
  i_Ca_jct_tot := i_CaL_Ca_jct - 2*i_NaCa_jct + i_Cab_jct + i_Cap_jct;
  i_Ca_SL_tot := i_CaL_Ca_SL - 2*i_NaCa_SL + i_Cab_SL + i_Cap_SL;
  dCa_TroponinC := kon_TroponinC*Cai*(Bmax_TroponinC - Ca_TroponinC) - koff_TroponinC*Ca_TroponinC;
  dCa_TroponinC_Ca_Mg := kon_TroponinC_Ca_Mg_Ca*Cai*(Bmax_TroponinC_Ca_Mg_Ca - (Ca_TroponinC_Ca_Mg + Mg_TroponinC_Ca_Mg)) - koff_TroponinC_Ca_Mg_Ca*Ca_TroponinC_Ca_Mg;
  dMg_TroponinC_Ca_Mg := kon_TroponinC_Ca_Mg_Mg*Mgi*(Bmax_TroponinC_Ca_Mg_Mg - (Ca_TroponinC_Ca_Mg + Mg_TroponinC_Ca_Mg)) - koff_TroponinC_Ca_Mg_Mg*Mg_TroponinC_Ca_Mg;
  dCa_Calmodulin := kon_Calmodulin*Cai*(Bmax_Calmodulin - Ca_Calmodulin) - koff_Calmodulin*Ca_Calmodulin;
  dCa_Myosin := kon_Myosin_Ca*Cai*(Bmax_Myosin_Ca - (Ca_Myosin + Mg_Myosin)) - koff_Myosin_Ca*Ca_Myosin;
  dMg_Myosin := kon_Myosin_Mg*Mgi*(Bmax_Myosin_Mg - (Ca_Myosin + Mg_Myosin)) - koff_Myosin_Mg*Mg_Myosin;
  dCa_SRB := kon_SRB*Cai*(Bmax_SRB - Ca_SRB) - koff_SRB*Ca_SRB;
  dCa_cytosol_tot_bound := dCa_TroponinC + dCa_TroponinC_Ca_Mg + dMg_TroponinC_Ca_Mg + dCa_Calmodulin + dCa_Myosin + dMg_Myosin + dCa_SRB;
  Indo1Bound := Ca_Indo1_Cytosol + Ca_Indo1_jct*Vol_jct/Vol_cytosol + Ca_Indo1_SL*Vol_SL/Vol_cytosol;
  Fluo3Bound := Ca_Fluo3_Cytosol + Ca_Fluo3_jct*Vol_jct/Vol_cytosol + Ca_Fluo3_SL*Vol_SL/Vol_cytosol;
  dCa_Indo1_Cytosol := kon_Indo1*(Indo1 - Indo1Bound)*Cai*(Bmax_Indo1_Cytosol - Ca_Indo1_Cytosol) - koff_Indo1*Ca_Indo1_Cytosol;
  dCa_Indo1_jct := kon_Indo1*(Indo1 - Indo1Bound)*Ca_jct_Ca_buffer*(Bmax_Indo1_jct*Vol_cytosol/Vol_jct - Ca_Indo1_jct) - koff_Indo1*Ca_Indo1_jct;
  dCa_Indo1_SL := kon_Indo1*(Indo1 - Indo1Bound)*Ca_SL_Ca_buffer*(Bmax_Indo1_SL*Vol_cytosol/Vol_SL - Ca_Indo1_SL) - koff_Indo1*Ca_Indo1_SL;
  dCa_Fluo3_Cytosol := kon_Fluo3*(Fluo3 - Fluo3Bound)*Cai*(Bmax_Fluo3_Cytosol - Ca_Fluo3_Cytosol) - koff_Fluo3*Ca_Fluo3_Cytosol;
  dCa_Fluo3_jct := kon_Fluo3*(Fluo3 - Fluo3Bound)*Ca_jct_Ca_buffer*(Bmax_Fluo3_jct*Vol_cytosol/Vol_jct - Ca_Fluo3_jct) - koff_Fluo3*Ca_Fluo3_jct;
  dCa_Fluo3_SL := kon_Fluo3*(Fluo3 - Fluo3Bound)*Ca_SL_Ca_buffer*(Bmax_Fluo3_SL*Vol_cytosol/Vol_SL - Ca_Fluo3_SL) - koff_Fluo3*Ca_Fluo3_SL;

  // Rate rules:
  V_cell' = -(i_Na + i_Nab + i_NaK + i_Kr + i_Ks + i_tos + i_tof + i_K1 + i_NaCa + i_Cl_Ca + i_Clb + i_CaL + i_Cab + i_Cap + i_Stim);
  h' = (h_infinity - h)/tau_h;
  j' = (j_infinity - j)/tau_j;
  m' = (m_infinity - m)/tau_m;
  Xr' = (Xr_infinity - Xr)/tau_Xr;
  Xs' = (Xs_infinity - Xs)/tau_Xs;
  X_tos' = (X_tos_infinity - X_tos)/tau_X_tos;
  Y_tos' = (Y_tos_infinity - Y_tos)/tau_Y_tos;
  R_tos' = (R_tos_infinity - R_tos)/tau_R_tos;
  X_tof' = (X_tof_infinity - X_tof)/tau_X_tof;
  Y_tof' = (Y_tof_infinity - Y_tof)/tau_Y_tof;
  d' = (d_infinity - d)/tau_d;
  f' = (f_infinity - f)/tau_f;
  fCaB_SL' = 1.7*Ca_SL_ICaL_fCa_gate*(1 - fCaB_SL) - 0.0119*fCaB_SL;
  fCaB_jct' = 1.7*Ca_jct_ICaL_fCa_gate*(1 - fCaB_jct) - 0.0119*fCaB_jct;
  R_Jrel_SR' = kim*RI - kiSRCa*Ca_jct_Ca_buffer*R_Jrel_SR - (koSRCa*Ca_jct_Ca_buffer^2*R_Jrel_SR - kom*O);
  O' = koSRCa*Ca_jct_Ca_buffer^2*R_Jrel_SR - kom*O - (kiSRCa*Ca_jct_Ca_buffer*O - kim*I);
  I' = kiSRCa*Ca_jct_Ca_buffer*O - kim*I - (kom*I - koSRCa*Ca_jct_Ca_buffer^2*RI);
  Na_jct_buf' = dNa_jct_buf;
  Na_SL_buf' = dNa_SL_buf;
  Na_jct' = -Cm*(i_Na_jct + 3*i_NaCa_jct + i_Nab_jct + 3*i_NaK_jct + i_CaL_Na_jct)/(Vol_jct*F) - J_Na_jct_SL/Vol_jct - dNa_jct_buf;
  Na_SL' = -Cm*(i_Na_SL + 3*i_NaCa_SL + i_Nab_SL + 3*i_NaK_SL + i_CaL_Na_SL)/(Vol_SL*F) + (J_Na_jct_SL - J_Na_SL_cytosol)/Vol_SL - dNa_SL_buf;
  Nai' = J_Na_SL_cytosol/Vol_cytosol;
  Ca_Calsequestrin' = dCalsequestrin;
  Ca_SLB_SL' = dCa_SLB_SL;
  Ca_SLB_jct' = dCa_SLB_jct;
  Ca_SLHigh_SL' = dCa_SLHigh_SL;
  Ca_SLHigh_jct' = dCa_SLHigh_jct;
  Ca_SR' = j_pump_SR - (j_leak_SR*Vol_cytosol/Vol_SR + j_rel_SR) - dCalsequestrin;
  Ca_jct_Ca_buffer' = -i_Ca_jct_tot*Cm/(Vol_jct*2*F) - J_Ca_jct_SL/Vol_jct + j_rel_SR*Vol_SR/Vol_jct + j_leak_SR*Vol_cytosol/Vol_jct - 1*dCa_jct_tot_bound;
  Ca_SL_Ca_buffer' = -i_Ca_SL_tot*Cm/(Vol_SL*2*F) + (J_Ca_jct_SL - J_Ca_SL_cytosol)/Vol_SL - 1*dCa_SL_tot_bound;
  Cai' = -j_pump_SR*Vol_SR/Vol_cytosol + J_Ca_SL_cytosol/Vol_cytosol - 1*dCa_cytosol_tot_bound;
  Ca_TroponinC' = dCa_TroponinC;
  Ca_TroponinC_Ca_Mg' = dCa_TroponinC_Ca_Mg;
  Mg_TroponinC_Ca_Mg' = dMg_TroponinC_Ca_Mg;
  Ca_Calmodulin' = dCa_Calmodulin;
  Ca_Myosin' = dCa_Myosin;
  Mg_Myosin' = dMg_Myosin;
  Ca_SRB' = dCa_SRB;
  Ca_Indo1_Cytosol' = dCa_Indo1_Cytosol;
  Ca_Indo1_SL' = dCa_Indo1_SL;
  Ca_Indo1_jct' = dCa_Indo1_jct;
  Ca_Fluo3_Cytosol' = dCa_Fluo3_Cytosol;
  Ca_Fluo3_SL' = dCa_Fluo3_SL;
  Ca_Fluo3_jct' = dCa_Fluo3_jct;

  // Unit definitions:
  unit thou_mill = 1e-3 second / second;
  unit centi2micro = 1e-6 metre / (0.01 metre);
  unit millimolar_per_second = 1e-3 mole / (litre * second);
  unit per_millimolar_millisecond = litre / (1e-3 mole * 1e-3 second);
  unit cm_per_second = 0.01 metre / second;
  unit per_second = 1 / second;
  unit per_millisecond = 1 / (1e-3 second);
  unit litre_per_millisecond = litre / (1e-3 second);
  unit millivolt = 1e-3 volt;
  unit per_millivolt = 1 / (1e-3 volt);
  unit millisecond = 1e-3 second;
  unit millimolar = 1e-3 mole / litre;
  unit millimolar4 = (1e-3 mole)^4 / litre^4;
  unit milliS_per_microF = 1e-3 siemens / (1e-6 farad);
  unit microF = 1e-6 farad;
  unit farad_per_cm2 = farad / (0.01 metre)^2;
  unit microA_per_microF = 1e-6 ampere / (1e-6 farad);
  unit millimole_per_millisecond = 1e-3 mole / (1e-3 second);
  unit millimolar_per_millisecond = 1e-3 mole / (litre * 1e-3 second);
  unit dm2_per_second = (0.1 metre)^2 / second;
  unit per_millimolar_per_millisecond = litre / (1e-3 mole * 1e-3 second);
  unit per_millimolar2_per_millisecond = litre^2 / ((1e-3 mole)^2 * 1e-3 second);
  unit micrometre = 1e-6 metre;
  unit cm2 = (0.01 metre)^2;
  unit nanolitre = 1e-9 litre;
  unit litre_per_farad_millisecond = litre / (farad * 1e-3 second);
  unit joule_per_kilomole_kelvin = joule / (1000 mole * kelvin);
  unit coulomb_per_mole = coulomb / mole;
  unit time = 1e-3 second;
end
