// SBML level 2 version 3

model Sachse2008_FibroblastInteractingMyocytes()
  // This a model from the article:
  // Electrophysiological modeling of fibroblasts and their interaction with myocytes.
  // Sachse FB, Moreno AP, Abildskov JA. Ann Biomed Eng. year volume page 17999190 ,
  // Abstract:
  // Experimental studies have shown that cardiac fibroblasts are electrically inexcitable, but can contribute to electrophysiology of myocardium in various manners. The aim of this computational study was to give insights in the electrophysiological role of fibroblasts and their interaction with myocytes. We developed a mathematical model of fibroblasts based on data from whole-cell patch clamp and polymerase chain reaction (PCR) studies. The fibroblast model was applied together with models of ventricular myocytes to assess effects of heterogeneous intercellular electrical coupling. We investigated the modulation of action potentials of a single myocyte varying the number of coupled fibroblasts and intercellular resistance. Coupling to fibroblasts had only a minor impact on the myocyte's resting and peak transmembrane voltage, but led to significant changes of action potential duration and upstroke velocity. We examined the impact of fibroblasts on conduction in one-dimensional strands of myocytes. Coupled fibroblasts reduced conduction and upstroke velocity. We studied electrical bridging between ventricular myocytes via fibroblast insets for various coupling resistors. The simulations showed significant conduction delays up to 20.3 ms. In summary, the simulations support strongly the hypothesis that coupling of fibroblasts to myocytes modulates electrophysiology of cardiac cells and tissues.
  // This model was taken from the CellML repository and automatically converted to SBML.
  // The original model was: sachse, moreno, abildskov.(2008) - version05
  // The original CellML model was created by:
  // Lloyd, Catherine, May
  // c.lloyd@auckland.ac.nz
  // The University of Auckland
  // Auckland Bioengineering Institute
  // This model originates from BioModels Database: A Database of Annotated Published Models (http://www.ebi.ac.uk/biomodels/). It is copyright (c) 2005-2011 The BioModels.net Team.
  // To the extent possible under law, all copyright and related or neighbouring rights to this encoded model have been dedicated to the public domain worldwide. Please refer to CC0 Public Domain Dedication for more information.
  // In summary, you are entitled to use this encoded model in absolutely any manner you deem suitable, verbatim, or with modification, alone or embedded it in a larger context, redistribute it, commercially or not, in a restricted way or not..
  // To cite BioModels Database, please use: Li C, Donizelli M, Rodriguez N, Dharuri H, Endler L, Chelliah V, Li L, He E, Henry A, Stefan MI, Snoep JL, Hucka M, Le Novère N, Laibe C (2010) BioModels Database: An enhanced, curated and annotated resource for published quantitative kinetic models. BMC Syst Biol., 4:92.
  // biomodels.db:MODEL7914759868
  // isDescribedBy pubmed:17999190
  // biomodels.db:MODEL7914759868
  // isDescribedBy pubmed:17999190
  // biomodels.db:MODEL7914759868
  // biomodels.db:MODEL7914759868

  // Compartments:
  compartment Compartment = 1 litre;

  // Parameters:
  V_membrane = -80.50146 millivolt;
  R = 8314.5 millijoule_per_mole_kelvin;
  T = 295 kelvin;
  F = 96487 coulomb_per_mole;
  Cm_membrane = 0.0001 microF;
  i_Stim has nanoA;
  stim_start = 0.01 second;
  stim_end = 10 second;
  stim_period = 1 second;
  stim_duration = 0.001 second;
  stim_amplitude = -5 nanoA;
  i_Na has nanoA;
  E_Na has millivolt;
  g_Na = 0.8 microS;
  m_sodium_current_m_gate = 0.004164108 dimensionless;
  m_infinity has dimensionless;
  tau_m has second;
  V_sodium_current_m_gate has millivolt;
  time_sodium_current_m_gate has second;
  h = 0.6735613 dimensionless;
  h_infinity has dimensionless;
  tau_h has second;
  V_sodium_current_h_gate has millivolt;
  V_upper_range = -40 millivolt;
  time_sodium_current_h_gate has second;
  j = 0.6729362 dimensionless;
  j_infinity has dimensionless;
  tau_j has second;
  V_sodium_current_j_gate has millivolt;
  time_sodium_current_j_gate has second;
  i_Ca_L has nanoA;
  g_Ca_L = 0.031 microS;
  E_Ca_L = 65 millivolt;
  d = 2.171081e-6 dimensionless;
  d_infinity has dimensionless;
  tau_d has second;
  V_L_type_Ca_channel_d_gate has millivolt;
  time_L_type_Ca_channel_d_gate has second;
  f_11 = 0.9999529 dimensionless;
  f_11_infinity has dimensionless;
  tau_f_11 has second;
  V_L_type_Ca_channel_f_11_gate has millivolt;
  time_L_type_Ca_channel_f_11_gate has second;
  f_12 = 0.9999529 dimensionless;
  f_12_infinity has dimensionless;
  tau_f_12 has second;
  V_L_type_Ca_channel_f_12_gate has millivolt;
  time_L_type_Ca_channel_f_12_gate has second;
  Ca_inact = 0.9913102 dimensionless;
  tau_Ca_inact = 0.009 second;
  Ca_inact_infinity has dimensionless;
  V_L_type_Ca_channel_Ca_inact_gate has millivolt;
  time_L_type_Ca_channel_Ca_inact_gate has second;
  Ca_ss_L_type_Ca_channel_Ca_inact_gate has millimolar;
  i_t has nanoA;
  E_K has millivolt;
  g_t = 0.035 microS;
  a = 0.886 dimensionless;
  b = 0.114 dimensionless;
  r = 0.002191519 dimensionless;
  tau_r has second;
  r_infinity has dimensionless;
  V_Ca_independent_transient_outward_K_current_r_gate has millivolt;
  time_Ca_independent_transient_outward_K_current_r_gate has second;
  s = 0.9842542 dimensionless;
  tau_s has second;
  s_infinity has dimensionless;
  V_Ca_independent_transient_outward_K_current_s_gate has millivolt;
  time_Ca_independent_transient_outward_K_current_s_gate has second;
  s_slow = 0.6421196 dimensionless;
  tau_s_slow has second;
  s_slow_infinity has dimensionless;
  V_Ca_independent_transient_outward_K_current_s_slow_gate has millivolt;
  time_Ca_independent_transient_outward_K_current_s_slow_gate has second;
  i_ss has nanoA;
  g_ss = 0.007 microS;
  r_ss = 0.002907171 dimensionless;
  tau_r_ss has second;
  r_ss_infinity has dimensionless;
  V_steady_state_outward_K_current_r_ss_gate has millivolt;
  time_steady_state_outward_K_current_r_ss_gate has second;
  s_ss = 0.3142767 dimensionless;
  tau_s_ss has second;
  s_ss_infinity has dimensionless;
  V_steady_state_outward_K_current_s_ss_gate has millivolt;
  time_steady_state_outward_K_current_s_ss_gate has second;
  i_K1 has nanoA;
  g_K1 = 0.024 microS;
  i_f has nanoA;
  i_f_Na has nanoA;
  i_f_K has nanoA;
  g_f = 0.00145 microS;
  f_Na = 0.2 dimensionless;
  f_K has dimensionless;
  y = 0.003578708 dimensionless;
  tau_y has second;
  y_infinity has dimensionless;
  V_hyperpolarisation_activated_current_y_gate has millivolt;
  time_hyperpolarisation_activated_current_y_gate has second;
  i_B has nanoA;
  i_B_Na has nanoA;
  i_B_Ca has nanoA;
  i_B_K has nanoA;
  g_B_Na = 8.015e-5 microS;
  g_B_Ca = 3.24e-5 microS;
  g_B_K = 0.000138 microS;
  E_Ca has millivolt;
  i_NaK has nanoA;
  i_NaK_max = 0.08 nanoA;
  K_m_K = 1.5 millimolar;
  K_m_Na = 10 millimolar;
  sigma has dimensionless;
  i_Ca_P has nanoA;
  i_Ca_P_max = 0.004 nanoA;
  i_NaCa has nanoA;
  K_NaCa = 9.984e-6 nanoA_millimolar_4;
  d_NaCa = 0.0001 millimolar_4;
  gamma_NaCa = 0.5 dimensionless;
  J_rel has millimolar_per_second;
  v1 = 1800 per_second;
  k_a_plus = 1.215e13 per_second;
  k_a_minus = 576 per_second;
  k_b_plus = 4.05e9 per_second;
  k_b_minus = 1930 per_second;
  k_c_plus = 100 per_second;
  k_c_minus = 0.8 per_second;
  P_O1 = 0.0004327548 dimensionless;
  P_O2 = 6.06254e-10 dimensionless;
  P_C1 = 0.6348229 dimensionless;
  P_C2 = 0.3647471 dimensionless;
  n = 4 dimensionless;
  m_SR_Ca_release_channel = 3 dimensionless;
  J_up has millimolar_per_second;
  K_fb = 0.000168 millimolar;
  K_rb = 3.29 millimolar;
  fb has dimensionless;
  rb has dimensionless;
  Vmaxf = 0.04 millimolar_per_second;
  Vmaxr = 0.9 millimolar_per_second;
  K_SR = 1 dimensionless;
  N_fb = 1.2 dimensionless;
  N_rb = 1 dimensionless;
  J_tr has millimolar_per_second;
  J_xfer has millimolar_per_second;
  J_trpn has millimolar_per_second;
  tau_tr = 0.0005747 second;
  tau_xfer = 0.0267 second;
  HTRPNCa = 0.1394301 millimolar;
  LTRPNCa = 0.0051619 millimolar;
  J_HTRPNCa has millimolar_per_second;
  J_LTRPNCa has millimolar_per_second;
  HTRPN_tot = 0.14 millimolar;
  LTRPN_tot = 0.07 millimolar;
  k_htrpn_plus = 200000 per_millimolar_per_second;
  k_htrpn_minus = 0.066 per_second;
  k_ltrpn_plus = 40000 per_millimolar_per_second;
  k_ltrpn_minus = 40 per_second;
  Na_i = 10.73519 millimolar;
  Ca_i = 7.901351e-5 millimolar;
  K_i = 139.2751 millimolar;
  Ca_ss_intracellular_ion_concentrations = 8.737212e-5 millimolar;
  Ca_JSR = 0.06607948 millimolar;
  Ca_NSR = 0.06600742 millimolar;
  V_myo = 9.36e-6 micro_litre;
  V_JSR = 5.6e-7 micro_litre;
  V_NSR = 5.04e-6 micro_litre;
  V_SS = 1.2e-8 micro_litre;
  K_mCMDN = 0.00238 millimolar;
  K_mCSQN = 0.8 millimolar;
  K_mEGTA = 0.00015 millimolar;
  CMDN_tot = 0.05 millimolar;
  CSQN_tot = 15 millimolar;
  EGTA_tot = 10 millimolar;
  beta_i has dimensionless;
  beta_SS has dimensionless;
  beta_JSR has dimensionless;
  Na_o = 140 millimolar;
  Ca_o = 1.2 millimolar;
  K_o = 5.4 millimolar;
  V_fibro has millivolt;
  Cm_membrane_fibro = 4.5e-6 microF;
  VmReal = -80 millivolt;
  I_Kir has nanoA;
  GKir = 0.001 microS;
  aKir = 0.94 dimensionless;
  bKir = 1.26 dimensionless;
  EK has millivolt;
  OKir has dimensionless;
  I_Shkr has nanoA;
  PShkr = 5.4e-9 microlitre_per_second;
  C0ShkrReal = 0.911 dimensionless;
  C1ShkrReal = 0.0857 dimensionless;
  C2ShkrReal = 0.00302 dimensionless;
  C3ShkrReal = 4.74e-5 dimensionless;
  C4ShkrReal = 2.79e-7 dimensionless;
  OShkrReal = 0 dimensionless;
  C0Shkr has dimensionless;
  C1Shkr has dimensionless;
  C2Shkr has dimensionless;
  C3Shkr has dimensionless;
  C4Shkr has dimensionless;
  OShkr has dimensionless;
  kv has per_second;
  k_v has per_second;
  kv0 = 30 per_second;
  zv = 1.28 dimensionless;
  k_v0 = 2 per_second;
  z_v = -1.53 dimensionless;
  ko = 77 per_second;
  k_o = 18 per_second;
  I_b has nanoA;
  Gb = 6.9e-6 microS;
  Eb = 0 millivolt;
  I_inter_fibro has nanoA;
  I_inter_myo has nanoA;
  R_mf = 100000000 ohm;
  number_of_fibroblasts = 1 dimensionless;

  // Assignment rules:
  i_Stim := piecewise(stim_amplitude, (time >= stim_start) && ((time <= stim_end) && (time - stim_start - floor((time - stim_start)/stim_period)*stim_period <= stim_duration)), 0);
  E_Na := R*T/F*ln(Na_o/Na_i);
  i_Na := g_Na*m_sodium_current_m_gate^3*h*j*(V_membrane - E_Na);
  m_infinity := 1/(1 + exp((V_sodium_current_m_gate + 45)/(-6.5)));
  tau_m := 0.00136/(0.32*(V_sodium_current_m_gate + 47.13)/(1 - exp(-0.1*(V_sodium_current_m_gate + 47.13))) + 0.08*exp(-V_sodium_current_m_gate/11));
  h_infinity := 1/(1 + exp((V_sodium_current_h_gate + 76.1)/6.07));
  tau_h := piecewise(0.0004537*(1 + exp(-(V_sodium_current_h_gate + 10.66)/11.1)), V_sodium_current_h_gate >= V_upper_range, 0.00349/(0.135*exp(-(V_sodium_current_h_gate + 80)/6.8) + 3.56*exp(0.079*V_sodium_current_h_gate) + 310000*exp(0.35*V_sodium_current_h_gate)));
  j_infinity := 1/(1 + exp((V_sodium_current_j_gate + 76.1)/6.07));
  tau_j := piecewise(0.01163*(1 + exp(-0.1*(V_sodium_current_j_gate + 32)))/exp(-2.535e-7*V_sodium_current_j_gate), V_sodium_current_j_gate >= V_upper_range, 0.00349/((V_sodium_current_j_gate + 37.78)/(1 + exp(0.311*(V_sodium_current_j_gate + 79.23)))*(-127140*exp(0.2444*V_sodium_current_j_gate) - 3.474e-5*exp(-0.04391*V_sodium_current_j_gate)) + 0.1212*exp(-0.01052*V_sodium_current_j_gate)/(1 + exp(-0.1378*(V_sodium_current_j_gate + 40.14)))));
  i_Ca_L := g_Ca_L*d*((0.9 + Ca_inact/10)*f_11 + (0.1 - Ca_inact/10)*f_12)*(V_membrane - E_Ca_L);
  d_infinity := 1/(1 + exp((V_L_type_Ca_channel_d_gate + 15.3)/(-5)));
  tau_d := 0.00305*exp(-0.0045*(V_L_type_Ca_channel_d_gate + 7)^2) + 0.00105*exp(-0.002*(V_L_type_Ca_channel_d_gate - 18)^2) + 0.00025;
  f_11_infinity := 1/(1 + exp((V_L_type_Ca_channel_f_11_gate + 26.7)/5.4));
  tau_f_11 := 0.105*exp(-((V_L_type_Ca_channel_f_11_gate + 45)/12)^2) + 0.04/(1 + exp((-V_L_type_Ca_channel_f_11_gate + 25)/25)) + 0.015/(1 + exp((V_L_type_Ca_channel_f_11_gate + 75)/25)) + 0.0017;
  f_12_infinity := 1/(1 + exp((V_L_type_Ca_channel_f_12_gate + 26.7)/5.4));
  tau_f_12 := 0.041*exp(-((V_L_type_Ca_channel_f_12_gate + 47)/12)^2) + 0.08/(1 + exp((V_L_type_Ca_channel_f_12_gate + 55)/(-5))) + 0.015/(1 + exp((V_L_type_Ca_channel_f_12_gate + 75)/25)) + 0.0017;
  Ca_inact_infinity := 1/(1 + Ca_ss_L_type_Ca_channel_Ca_inact_gate/0.01);
  E_K := R*T/F*ln(K_o/K_i);
  i_t := g_t*r*(a*s + b*s_slow)*(V_membrane - E_K);
  r_infinity := 1/(1 + exp((V_Ca_independent_transient_outward_K_current_r_gate + 10.6)/(-11.42)));
  tau_r := 1/(45.16*exp(0.03577*(V_Ca_independent_transient_outward_K_current_r_gate + 50)) + 98.9*exp(-0.1*(V_Ca_independent_transient_outward_K_current_r_gate + 38)));
  s_infinity := 1/(1 + exp((V_Ca_independent_transient_outward_K_current_s_gate + 45.3)/6.8841));
  tau_s := 0.35*exp(-((V_Ca_independent_transient_outward_K_current_s_gate + 70)/15)^2) + 0.035;
  s_slow_infinity := 1/(1 + exp((V_Ca_independent_transient_outward_K_current_s_slow_gate + 45.3)/6.8841));
  tau_s_slow := 3.7*exp(-((V_Ca_independent_transient_outward_K_current_s_slow_gate + 70)/30)^2) + 0.035;
  i_ss := g_ss*r_ss*s_ss*(V_membrane - E_K);
  r_ss_infinity := 1/(1 + exp((V_steady_state_outward_K_current_r_ss_gate + 11.5)/(-11.82)));
  tau_r_ss := 10/(45.16*exp(0.03577*(V_steady_state_outward_K_current_r_ss_gate + 50)) + 98.9*exp(-0.1*(V_steady_state_outward_K_current_r_ss_gate + 38)));
  s_ss_infinity := 1/(1 + exp((V_steady_state_outward_K_current_s_ss_gate + 87.5)/10.3));
  tau_s_ss := 2.1;
  i_K1 := (48/(exp((V_membrane + 37)/25) + exp((V_membrane + 37)/(-25))) + 10)*0.001/(1 + exp((V_membrane - (E_K + 76.77))/(-17))) + g_K1*(V_membrane - (E_K + 1.73))/((1 + exp(1.613*F*(V_membrane - (E_K + 1.73))/(R*T)))*(1 + exp((K_o - 0.9988)/(-0.124))));
  f_K := 1 - f_Na;
  i_f_Na := g_f*y*f_Na*(V_membrane - E_Na);
  i_f_K := g_f*y*f_K*(V_membrane - E_K);
  i_f := i_f_Na + i_f_K;
  y_infinity := 1/(1 + exp((V_hyperpolarisation_activated_current_y_gate + 138.6)/10.48));
  tau_y := 1/(0.11885*exp((V_hyperpolarisation_activated_current_y_gate + 80)/28.37) + 0.5623*exp((V_hyperpolarisation_activated_current_y_gate + 80)/(-14.19)));
  E_Ca := 0.5*R*T/F*ln(Ca_o/Ca_i);
  i_B_Na := g_B_Na*(V_membrane - E_Na);
  i_B_Ca := g_B_Ca*(V_membrane - E_Ca);
  i_B_K := g_B_K*(V_membrane - E_K);
  i_B := i_B_Na + i_B_Ca + i_B_K;
  sigma := (exp(Na_o/67.3) - 1)/7;
  i_NaK := i_NaK_max*1/(1 + 0.1245*exp(-0.1*V_membrane*F/(R*T)) + 0.0365*sigma*exp(-V_membrane*F/(R*T)))*K_o/(K_o + K_m_K)*1/(1 + (K_m_Na/Na_i)^1.5);
  i_Ca_P := i_Ca_P_max*Ca_i/(Ca_i + 0.0004);
  i_NaCa := K_NaCa*(Na_i^3*Ca_o*exp(0.03743*V_membrane*gamma_NaCa) - Na_o^3*Ca_i*exp(0.03743*V_membrane*(gamma_NaCa - 1)))/(1 + d_NaCa*(Ca_i*Na_o^3 + Ca_o*Na_i^3));
  J_rel := v1*(P_O1 + P_O2)*(Ca_JSR - Ca_ss_intracellular_ion_concentrations);
  fb := (Ca_i/K_fb)^N_fb;
  rb := (Ca_NSR/K_rb)^N_rb;
  J_up := K_SR*(Vmaxf*fb - Vmaxr*rb)/(1 + fb + rb);
  J_tr := (Ca_NSR - Ca_JSR)/tau_tr;
  J_xfer := (Ca_ss_intracellular_ion_concentrations - Ca_i)/tau_xfer;
  J_HTRPNCa := k_htrpn_plus*Ca_i*(HTRPN_tot - HTRPNCa) - k_htrpn_minus*HTRPNCa;
  J_LTRPNCa := k_ltrpn_plus*Ca_i*(LTRPN_tot - LTRPNCa) - k_ltrpn_minus*LTRPNCa;
  J_trpn := J_HTRPNCa + J_LTRPNCa;
  beta_i := 1/(1 + CMDN_tot*K_mCMDN/(K_mCMDN + Ca_i)^2 + EGTA_tot*K_mEGTA/(K_mEGTA + Ca_i)^2);
  beta_SS := 1/(1 + CMDN_tot*K_mCMDN/(K_mCMDN + Ca_ss_intracellular_ion_concentrations)^2);
  beta_JSR := 1/(1 + CSQN_tot*K_mCSQN/(K_mCSQN + Ca_JSR)^2);
  V_fibro := piecewise(1e-7, abs(VmReal) < 1e-7, VmReal);
  I_Kir := GKir*OKir*sqrt(K_o*0.001)*(V_fibro - EK);
  OKir := 1/(aKir + exp(bKir*(V_fibro - EK)*F/(R*T)));
  EK := R*T/F*ln(K_o/K_i);
  I_Shkr := PShkr*OShkr*V_fibro*F^2/(R*T)*(K_i - K_o*exp(-V_fibro*F/(R*T)))/(1 - exp(-V_fibro*F/(R*T)));
  C0Shkr := piecewise(0, C0ShkrReal < 0, 1, C0ShkrReal > 1, C0ShkrReal);
  C1Shkr := piecewise(0, C1ShkrReal < 0, 1, C1ShkrReal > 1, C1ShkrReal);
  C2Shkr := piecewise(0, C2ShkrReal < 0, 1, C2ShkrReal > 1, C2ShkrReal);
  C3Shkr := piecewise(0, C3ShkrReal < 0, 1, C3ShkrReal > 1, C3ShkrReal);
  C4Shkr := piecewise(0, C4ShkrReal < 0, 1, C4ShkrReal > 1, C4ShkrReal);
  OShkr := piecewise(0, OShkrReal < 0, 1, OShkrReal > 1, OShkrReal);
  kv := kv0*exp(V_fibro*zv*F/(R*T));
  k_v := k_v0*exp(V_fibro*z_v*F/(R*T));
  I_b := Gb*(V_fibro - Eb);
  I_inter_fibro := 1000000*(V_fibro - V_membrane)/R_mf;
  I_inter_myo := -1*I_inter_fibro*number_of_fibroblasts;

  // Rate rules:
  V_membrane' = -(i_Na + i_Ca_L + i_t + i_ss + i_f + i_K1 + i_B + i_NaK + i_NaCa + i_Ca_P + i_Stim + I_inter_myo)/Cm_membrane;
  m_sodium_current_m_gate' = (m_infinity - m_sodium_current_m_gate)/tau_m;
  h' = (h_infinity - h)/tau_h;
  j' = (j_infinity - j)/tau_j;
  d' = (d_infinity - d)/tau_d;
  f_11' = (f_11_infinity - f_11)/tau_f_11;
  f_12' = (f_12_infinity - f_12)/tau_f_12;
  Ca_inact' = (Ca_inact_infinity - Ca_inact)/tau_Ca_inact;
  r' = (r_infinity - r)/tau_r;
  s' = (s_infinity - s)/tau_s;
  s_slow' = (s_slow_infinity - s_slow)/tau_s_slow;
  r_ss' = (r_ss_infinity - r_ss)/tau_r_ss;
  s_ss' = (s_ss_infinity - s_ss)/tau_s_ss;
  y' = (y_infinity - y)/tau_y;
  P_C1' = -k_a_plus*(Ca_ss_intracellular_ion_concentrations/1)^n*P_C1 + k_a_minus*P_O1;
  P_O1' = k_a_plus*(Ca_ss_intracellular_ion_concentrations/1)^n*P_C1 - (k_a_minus*P_O1 + k_b_plus*(Ca_ss_intracellular_ion_concentrations/1)^m_SR_Ca_release_channel*P_O1 + k_c_plus*P_O1) + k_b_minus*P_O2 + k_c_minus*P_C2;
  P_O2' = k_b_plus*(Ca_ss_intracellular_ion_concentrations/1)^m_SR_Ca_release_channel*P_O1 - k_b_minus*P_O2;
  P_C2' = k_c_plus*P_O1 - k_c_minus*P_C2;
  Ca_i' = beta_i*(J_xfer - (J_up + J_trpn + (i_B_Ca - 2*i_NaCa + i_Ca_P)*1/(2*V_myo*F)));
  Na_i' = -(i_Na + i_B_Na + i_NaCa*3 + i_NaK*3 + i_f_Na)*1/(V_myo*F);
  K_i' = -(i_ss + i_B_K + i_t + i_K1 + i_f_K + i_NaK*(-2))*1/(V_myo*F);
  Ca_ss_intracellular_ion_concentrations' = beta_SS*(J_rel*V_JSR/V_SS - J_xfer*V_myo/V_SS - i_Ca_L*1/(2*V_SS*F));
  Ca_JSR' = beta_JSR*(J_tr - J_rel);
  Ca_NSR' = J_up*V_myo/V_NSR - J_tr*V_JSR/V_NSR;
  VmReal' = -(I_Kir + I_Shkr + I_b + I_inter_fibro)/Cm_membrane_fibro;
  C0ShkrReal' = k_v*C1Shkr - 4*kv*C0Shkr;
  C1ShkrReal' = 2*k_v*C2Shkr + 4*kv*C0Shkr - (3*kv + k_v)*C1Shkr;
  C2ShkrReal' = 3*k_v*C3Shkr + 3*kv*C1Shkr - (2*kv + 2*k_v)*C2Shkr;
  C3ShkrReal' = 4*k_v*C4Shkr + 2*kv*C2Shkr - (kv + 3*k_v)*C3Shkr;
  C4ShkrReal' = k_o*OShkr + kv*C3Shkr - (ko + 4*k_v)*C4Shkr;
  OShkrReal' = ko*C4Shkr - k_o*OShkr;

  // Unit definitions:
  unit per_second = 1 / second;
  unit millivolt = 1e-3 volt;
  unit per_millivolt = 1 / (1e-3 volt);
  unit per_millivolt2 = 1 / (1e-3 volt)^2;
  unit microS = 1e-6 siemens;
  unit microF = 1e-6 farad;
  unit nanoA = 1e-9 ampere;
  unit millimolar = 1e-3 mole / litre;
  unit millimolar_per_second = 1e-3 mole / (litre * second);
  unit per_millimolar = litre / (1e-3 mole);
  unit per_millimolar_per_second = litre / (1e-3 mole * second);
  unit millimolar3_per_second = litre^3 / ((1e-3 mole)^3 * second);
  unit millimolar4_per_second = litre^4 / ((1e-3 mole)^4 * second);
  unit millimolar_4 = litre^4 / (1e-3 mole)^4;
  unit nanoA_millimolar_4 = 1e-9 ampere * litre^4 / (1e-3 mole)^4;
  unit millijoule_per_mole_kelvin = 1e-3 joule / (kelvin * mole);
  unit coulomb_per_mole = coulomb / mole;
  unit microlitre_per_second = 1e-6 litre / second;
  unit micro_litre = 1e-6 litre;
  unit nanoA_per_milliA = 1e-9 ampere / (1e-3 ampere);
end
