// SBML level 2 version 3

model Purvis2005_IonicCurrentModel()
  // This a model from the article:
  // Ionic current model of a hypoglossal motoneuron.
  // Purvis LK, Butera RJ. J Neurophysiol. 2005:93(2):723-33. 18068197 ,
  // Abstract:
  // We have developed a single-compartment, electrophysiological, hypoglossal motoneuron (HM) model based primarily on experimental data from neonatal rat HMs. The model is able to reproduce the fine features of the HM action potential: the fast afterhyperpolarization, the afterdepolarization, and the medium-duration afterhyperpolarization (mAHP). The model also reproduces the repetitive firing properties seen in neonatal HMs and replicates the neuron's response to pharmacological experiments. The model was used to study the role of specific ionic currents in HM firing and how variations in the densities of these currents may account for age-dependent changes in excitability seen in HMs. By varying the density of a fast inactivating calcium current, the model alternates between accelerating and adapting firing patterns. Modeling the age-dependent increase in H current density accounts for the decrease in mAHP duration observed experimentally, but does not fully account for the decrease in input resistance. An increase in the density of the voltage-dependent potassium currents and the H current is required to account for the decrease in input resistance. These changes also account for the age-dependent decrease in action potential duration.
  // This model was taken from the CellML repository and automatically converted to SBML.
  // The original model was: purvis, butera, (2005) - version03
  // The original CellML model was created by:
  // Nunns, Geoffrey, Rogan
  // gnunns1@jhem.jhu.edu
  // The University of Auckland
  // Auckland Bioengineering Institute
  // This model originates from BioModels Database: A Database of Annotated Published Models (http://www.ebi.ac.uk/biomodels/). It is copyright (c) 2005-2011 The BioModels.net Team.
  // To the extent possible under law, all copyright and related or neighbouring rights to this encoded model have been dedicated to the public domain worldwide. Please refer to CC0 Public Domain Dedication for more information.
  // In summary, you are entitled to use this encoded model in absolutely any manner you deem suitable, verbatim, or with modification, alone or embedded it in a larger context, redistribute it, commercially or not, in a restricted way or not..
  // To cite BioModels Database, please use: Li C, Donizelli M, Rodriguez N, Dharuri H, Endler L, Chelliah V, Li L, He E, Henry A, Stefan MI, Snoep JL, Hucka M, Le Novère N, Laibe C (2010) BioModels Database: An enhanced, curated and annotated resource for published quantitative kinetic models. BMC Syst Biol., 4:92.
  // biomodels.db:MODEL7980735163
  // isDescribedBy pubmed:15653786
  // biomodels.db:MODEL7980735163
  // isDescribedBy pubmed:15653786
  // biomodels.db:MODEL7980735163
  // biomodels.db:MODEL7980735163

  // Compartments:
  compartment Compartment = 1 litre;

  // Parameters:
  V_membrane = -71.847 millivolt;
  C = 0.04 uF;
  i_Na has nanoA;
  g_Na = 0.7 uS;
  E_Na = 60 millivolt;
  V_sodium_current_h_gate has millivolt;
  time_sodium_current_h_gate has millisecond;
  h_sodium_current_h_gate = 0.981 dimensionless;
  theta_h_sodium_current_h_gate = 44.1 millivolt;
  sigma_h_sodium_current_h_gate = 7 millivolt;
  theta_1_sodium_current_h_gate = 35 millivolt;
  sigma_1_sodium_current_h_gate = 4 millivolt;
  sigma_2_sodium_current_h_gate = 25 millivolt;
  tau_h_sodium_current_h_gate has millisecond;
  h_infinity_sodium_current_h_gate has dimensionless;
  V_sodium_current_m_gate has millivolt;
  time_sodium_current_m_gate has millisecond;
  m_sodium_current_m_gate = 0.015 dimensionless;
  theta_m_sodium_current_m_gate = 36 millivolt;
  sigma_m_sodium_current_m_gate = 8.5 millivolt;
  tau_m_sodium_current_m_gate = 0.1 millisecond;
  m_infinity_sodium_current_m_gate has dimensionless;
  i_NaP has nanoA;
  g_NaP = 0.05 uS;
  V_persistent_sodium_current_h_gate has millivolt;
  time_persistent_sodium_current_h_gate has millisecond;
  h_persistent_sodium_current_h_gate = 0.797 dimensionless;
  theta_h_persistent_sodium_current_h_gate = 65 millivolt;
  sigma_h_persistent_sodium_current_h_gate = 5 millivolt;
  tau_h_persistent_sodium_current_h_gate = 150 millisecond;
  h_infinity_persistent_sodium_current_h_gate has dimensionless;
  V_persistent_sodium_current_m_gate has millivolt;
  time_persistent_sodium_current_m_gate has millisecond;
  m_persistent_sodium_current_m_gate = 0.002 dimensionless;
  theta_m_persistent_sodium_current_m_gate = 47.1 millivolt;
  sigma_m_persistent_sodium_current_m_gate = 4.1 millivolt;
  tau_m_persistent_sodium_current_m_gate = 0.1 millisecond;
  m_infinity_persistent_sodium_current_m_gate has dimensionless;
  i_K has nanoA;
  g_K = 1.3 uS;
  E_K = -80 millivolt;
  V_delayed_rectifier_current_n_gate has millivolt;
  time_delayed_rectifier_current_n_gate has millisecond;
  n = 0.158 dimensionless;
  theta_n = 30 millivolt;
  sigma_n = 25 millivolt;
  theta_1_delayed_rectifier_current_n_gate = 30 millivolt;
  sigma_1_delayed_rectifier_current_n_gate = 40 millivolt;
  sigma_2_delayed_rectifier_current_n_gate = 50 millivolt;
  tau_n has millisecond;
  n_infinity has dimensionless;
  i_leak has nanoA;
  g_leak = 0.005 uS;
  E_leak = -50 millivolt;
  i_T_LVA_calcium_current has nanoA;
  g_T = 0.1 uS;
  E_Ca = 40 millivolt;
  V_LVA_calcium_current_m_gate has millivolt;
  time_LVA_calcium_current_m_gate has millisecond;
  m_LVA_calcium_current_m_gate = 0.001 dimensionless;
  theta_m_LVA_calcium_current_m_gate = 38 millivolt;
  sigma_m_LVA_calcium_current_m_gate = 5 millivolt;
  theta_1_LVA_calcium_current_m_gate = 28 millivolt;
  sigma_1_LVA_calcium_current_m_gate = 25 millivolt;
  sigma_2_LVA_calcium_current_m_gate = 70 millivolt;
  tau_m_LVA_calcium_current_m_gate has millisecond;
  m_infinity_LVA_calcium_current_m_gate has dimensionless;
  V_LVA_calcium_current_h_gate has millivolt;
  time_LVA_calcium_current_h_gate has millisecond;
  h_LVA_calcium_current_h_gate = 0.562 dimensionless;
  theta_h_LVA_calcium_current_h_gate = 70.1 millivolt;
  sigma_h_LVA_calcium_current_h_gate = 7 millivolt;
  theta_1_LVA_calcium_current_h_gate = 70 millivolt;
  sigma_1_LVA_calcium_current_h_gate = 65 millivolt;
  tau_h_LVA_calcium_current_h_gate has millisecond;
  h_infinity_LVA_calcium_current_h_gate has dimensionless;
  i_N_N_HVA_calcium_current has nanoA;
  g_N = 0.05 uS;
  V_N_HVA_calcium_current_m_gate has millivolt;
  time_N_HVA_calcium_current_m_gate has millisecond;
  m_N_HVA_calcium_current_m_gate = 0.001 dimensionless;
  theta_m_N_HVA_calcium_current_m_gate = 30 millivolt;
  sigma_m_N_HVA_calcium_current_m_gate = 6 millivolt;
  tau_m_N_HVA_calcium_current_m_gate = 5 millisecond;
  m_infinity_N_HVA_calcium_current_m_gate has dimensionless;
  V_N_HVA_calcium_current_h_gate has millivolt;
  time_N_HVA_calcium_current_h_gate has millisecond;
  h_N_HVA_calcium_current_h_gate = 0.649 dimensionless;
  theta_h_N_HVA_calcium_current_h_gate = 70 millivolt;
  sigma_h_N_HVA_calcium_current_h_gate = 3 millivolt;
  tau_h_N_HVA_calcium_current_h_gate = 25 millisecond;
  h_infinity_N_HVA_calcium_current_h_gate has dimensionless;
  i_P_P_HVA_calcium_current has nanoA;
  g_P = 0.05 uS;
  V_P_HVA_calcium_current_m_gate has millivolt;
  time_P_HVA_calcium_current_m_gate has millisecond;
  m_P_HVA_calcium_current_m_gate = 0 dimensionless;
  theta_m_P_HVA_calcium_current_m_gate = 17 millivolt;
  sigma_m_P_HVA_calcium_current_m_gate = 3 millivolt;
  tau_m_P_HVA_calcium_current_m_gate = 10 millisecond;
  m_infinity_P_HVA_calcium_current_m_gate has dimensionless;
  i_SK has nanoA;
  g_SK = 0.3 uS;
  V_calcium_dependent_potassium_current_z_gate has millivolt;
  time_calcium_dependent_potassium_current_z_gate has millisecond;
  i_T_calcium_dependent_potassium_current_z_gate has nanoA;
  i_N_calcium_dependent_potassium_current_z_gate has nanoA;
  i_P_calcium_dependent_potassium_current_z_gate has nanoA;
  z = 0 dimensionless;
  K1 = -500 uM_per_nanocoulomb;
  K2 = 0.04 per_ms;
  Ca_conc = 0.0604 uM;
  tau_z = 1 millisecond;
  z_infinity has dimensionless;
  i_A has nanoA;
  g_A = 1 uS;
  V_fast_transient_potassium_current_m_gate has millivolt;
  time_fast_transient_potassium_current_m_gate has millisecond;
  m_fast_transient_potassium_current_m_gate = 0.057 dimensionless;
  theta_m_fast_transient_potassium_current_m_gate = 27 millivolt;
  sigma_m_fast_transient_potassium_current_m_gate = 16 millivolt;
  theta_1_fast_transient_potassium_current_m_gate = 40 millivolt;
  theta_2 = 74 millivolt;
  sigma_1_fast_transient_potassium_current_m_gate = 5 millivolt;
  sigma_2_fast_transient_potassium_current_m_gate = 7.5 millivolt;
  tau_m_fast_transient_potassium_current_m_gate has millisecond;
  m_infinity_fast_transient_potassium_current_m_gate has dimensionless;
  V_fast_transient_potassium_current_h_gate has millivolt;
  time_fast_transient_potassium_current_h_gate has millisecond;
  h_fast_transient_potassium_current_h_gate = 0.287 dimensionless;
  theta_h_fast_transient_potassium_current_h_gate = 80 millivolt;
  sigma_h_fast_transient_potassium_current_h_gate = 11 millivolt;
  tau_h_fast_transient_potassium_current_h_gate = 20 millisecond;
  h_infinity_fast_transient_potassium_current_h_gate has dimensionless;
  i_H has nanoA;
  g_H = 0.005 uS;
  E_H = -38.8 millivolt;
  V_hyperpolarization_activated_current_m_gate has millivolt;
  time_hyperpolarization_activated_current_m_gate has millisecond;
  m_hyperpolarization_activated_current_m_gate = 0.182 dimensionless;
  theta_m_hyperpolarization_activated_current_m_gate = 79.8 millivolt;
  sigma_m_hyperpolarization_activated_current_m_gate = 5.3 millivolt;
  theta_1_hyperpolarization_activated_current_m_gate = 70 millivolt;
  sigma_1_hyperpolarization_activated_current_m_gate = 11 millivolt;
  tau_m_hyperpolarization_activated_current_m_gate has millisecond;
  m_infinity_hyperpolarization_activated_current_m_gate has dimensionless;
  i_app has nanoA;
  i_stimStart = 10 millisecond;
  i_stimEnd = 11 millisecond;
  i_stimAmplitude = 10 nanoA;

  // Assignment rules:
  i_Na := g_Na*m_sodium_current_m_gate^3*h_sodium_current_h_gate*(V_membrane - E_Na);
  tau_h_sodium_current_h_gate := 3.5/(exp((V_sodium_current_h_gate + theta_1_sodium_current_h_gate)/sigma_1_sodium_current_h_gate) + exp(-(V_sodium_current_h_gate + theta_1_sodium_current_h_gate)/sigma_2_sodium_current_h_gate)) + 1;
  h_infinity_sodium_current_h_gate := 1/(1 + exp((V_sodium_current_h_gate + theta_h_sodium_current_h_gate)/sigma_h_sodium_current_h_gate));
  m_infinity_sodium_current_m_gate := 1/(1 + exp((V_sodium_current_m_gate + theta_m_sodium_current_m_gate)/(-sigma_m_sodium_current_m_gate)));
  i_NaP := g_NaP*m_persistent_sodium_current_m_gate*h_persistent_sodium_current_h_gate*(V_membrane - E_Na);
  h_infinity_persistent_sodium_current_h_gate := 1/(1 + exp((V_persistent_sodium_current_h_gate + theta_h_persistent_sodium_current_h_gate)/sigma_h_persistent_sodium_current_h_gate));
  m_infinity_persistent_sodium_current_m_gate := 1/(1 + exp(-(V_persistent_sodium_current_m_gate + theta_m_persistent_sodium_current_m_gate)/sigma_m_persistent_sodium_current_m_gate));
  i_K := g_K*n^4*(V_membrane - E_K);
  tau_n := 2.5/(exp((V_delayed_rectifier_current_n_gate + theta_1_delayed_rectifier_current_n_gate)/sigma_1_delayed_rectifier_current_n_gate) + exp(-(V_delayed_rectifier_current_n_gate + theta_1_delayed_rectifier_current_n_gate)/sigma_2_delayed_rectifier_current_n_gate)) + 0.01;
  n_infinity := 1/(1 + exp(-(V_delayed_rectifier_current_n_gate + theta_n)/sigma_n));
  i_leak := g_leak*(V_membrane - E_leak);
  i_T_LVA_calcium_current := g_T*m_LVA_calcium_current_m_gate*h_LVA_calcium_current_h_gate*(V_membrane - E_Ca);
  tau_m_LVA_calcium_current_m_gate := 5/(exp((V_LVA_calcium_current_m_gate + theta_1_LVA_calcium_current_m_gate)/sigma_1_LVA_calcium_current_m_gate) + exp(-(V_LVA_calcium_current_m_gate + theta_1_LVA_calcium_current_m_gate)/sigma_2_LVA_calcium_current_m_gate)) + 2;
  m_infinity_LVA_calcium_current_m_gate := 1/(1 + exp(-(V_LVA_calcium_current_m_gate + theta_m_LVA_calcium_current_m_gate)/sigma_m_LVA_calcium_current_m_gate));
  tau_h_LVA_calcium_current_h_gate := 20/(exp((V_LVA_calcium_current_h_gate + theta_1_LVA_calcium_current_h_gate)/sigma_1_LVA_calcium_current_h_gate) + exp(-(V_LVA_calcium_current_h_gate + theta_1_LVA_calcium_current_h_gate)/sigma_1_LVA_calcium_current_h_gate)) + 1;
  h_infinity_LVA_calcium_current_h_gate := 1/(1 + exp((V_LVA_calcium_current_h_gate + theta_h_LVA_calcium_current_h_gate)/sigma_h_LVA_calcium_current_h_gate));
  i_N_N_HVA_calcium_current := g_N*m_N_HVA_calcium_current_m_gate*h_N_HVA_calcium_current_h_gate*(V_membrane - E_Ca);
  m_infinity_N_HVA_calcium_current_m_gate := 1/(1 + exp(-(V_N_HVA_calcium_current_m_gate + theta_m_N_HVA_calcium_current_m_gate)/sigma_m_N_HVA_calcium_current_m_gate));
  h_infinity_N_HVA_calcium_current_h_gate := 1/(1 + exp((V_N_HVA_calcium_current_h_gate + theta_h_N_HVA_calcium_current_h_gate)/sigma_h_N_HVA_calcium_current_h_gate));
  i_P_P_HVA_calcium_current := g_P*m_P_HVA_calcium_current_m_gate*(V_membrane - E_Ca);
  m_infinity_P_HVA_calcium_current_m_gate := 1/(1 + exp(-(V_P_HVA_calcium_current_m_gate + theta_m_P_HVA_calcium_current_m_gate)/sigma_m_P_HVA_calcium_current_m_gate));
  i_SK := g_SK*z^2*(V_membrane - E_K);
  z_infinity := 1/(1 + (0.003/Ca_conc)^2);
  i_A := g_A*m_fast_transient_potassium_current_m_gate*h_fast_transient_potassium_current_h_gate*(V_membrane - E_K);
  tau_m_fast_transient_potassium_current_m_gate := 1/(exp((V_fast_transient_potassium_current_m_gate + theta_1_fast_transient_potassium_current_m_gate)/sigma_1_fast_transient_potassium_current_m_gate) + exp(-(V_fast_transient_potassium_current_m_gate + theta_2)/sigma_2_fast_transient_potassium_current_m_gate)) + 0.37;
  m_infinity_fast_transient_potassium_current_m_gate := 1/(1 + exp(-(V_fast_transient_potassium_current_m_gate + theta_m_fast_transient_potassium_current_m_gate)/sigma_m_fast_transient_potassium_current_m_gate));
  h_infinity_fast_transient_potassium_current_h_gate := 1/(1 + exp((V_fast_transient_potassium_current_h_gate + theta_h_fast_transient_potassium_current_h_gate)/sigma_h_fast_transient_potassium_current_h_gate));
  i_H := g_H*m_hyperpolarization_activated_current_m_gate*(V_membrane - E_H);
  tau_m_hyperpolarization_activated_current_m_gate := 1/(exp((V_hyperpolarization_activated_current_m_gate + theta_1_hyperpolarization_activated_current_m_gate)/sigma_1_hyperpolarization_activated_current_m_gate) + exp(-(V_hyperpolarization_activated_current_m_gate + theta_1_hyperpolarization_activated_current_m_gate)/sigma_1_hyperpolarization_activated_current_m_gate)) + 50;
  m_infinity_hyperpolarization_activated_current_m_gate := 1/(1 + exp((V_hyperpolarization_activated_current_m_gate + theta_m_hyperpolarization_activated_current_m_gate)/sigma_m_hyperpolarization_activated_current_m_gate));
  i_app := piecewise(i_stimAmplitude, (time >= i_stimStart) && (time <= i_stimEnd), 0);

  // Rate rules:
  V_membrane' = (-(i_Na + i_NaP + i_K + i_leak + i_T_LVA_calcium_current + i_N_N_HVA_calcium_current + i_P_P_HVA_calcium_current + i_SK + i_A + i_H) + i_app)/C;
  h_sodium_current_h_gate' = (h_infinity_sodium_current_h_gate - h_sodium_current_h_gate)/tau_h_sodium_current_h_gate;
  m_sodium_current_m_gate' = (m_infinity_sodium_current_m_gate - m_sodium_current_m_gate)/tau_m_sodium_current_m_gate;
  h_persistent_sodium_current_h_gate' = (h_infinity_persistent_sodium_current_h_gate - h_persistent_sodium_current_h_gate)/tau_h_persistent_sodium_current_h_gate;
  m_persistent_sodium_current_m_gate' = (m_infinity_persistent_sodium_current_m_gate - m_persistent_sodium_current_m_gate)/tau_m_persistent_sodium_current_m_gate;
  n' = (n_infinity - n)/tau_n;
  m_LVA_calcium_current_m_gate' = (m_infinity_LVA_calcium_current_m_gate - m_LVA_calcium_current_m_gate)/tau_m_LVA_calcium_current_m_gate;
  h_LVA_calcium_current_h_gate' = (h_infinity_LVA_calcium_current_h_gate - h_LVA_calcium_current_h_gate)/tau_h_LVA_calcium_current_h_gate;
  m_N_HVA_calcium_current_m_gate' = (m_infinity_N_HVA_calcium_current_m_gate - m_N_HVA_calcium_current_m_gate)/tau_m_N_HVA_calcium_current_m_gate;
  h_N_HVA_calcium_current_h_gate' = (h_infinity_N_HVA_calcium_current_h_gate - h_N_HVA_calcium_current_h_gate)/tau_h_N_HVA_calcium_current_h_gate;
  m_P_HVA_calcium_current_m_gate' = (m_infinity_P_HVA_calcium_current_m_gate - m_P_HVA_calcium_current_m_gate)/tau_m_P_HVA_calcium_current_m_gate;
  Ca_conc' = 1/1000*K1*(i_T_calcium_dependent_potassium_current_z_gate + i_N_calcium_dependent_potassium_current_z_gate + i_P_calcium_dependent_potassium_current_z_gate) - K2*Ca_conc;
  z' = (z_infinity - z)/tau_z;
  m_fast_transient_potassium_current_m_gate' = (m_infinity_fast_transient_potassium_current_m_gate - m_fast_transient_potassium_current_m_gate)/tau_m_fast_transient_potassium_current_m_gate;
  h_fast_transient_potassium_current_h_gate' = (h_infinity_fast_transient_potassium_current_h_gate - h_fast_transient_potassium_current_h_gate)/tau_h_fast_transient_potassium_current_h_gate;
  m_hyperpolarization_activated_current_m_gate' = (m_infinity_hyperpolarization_activated_current_m_gate - m_hyperpolarization_activated_current_m_gate)/tau_m_hyperpolarization_activated_current_m_gate;

  // Unit definitions:
  unit millisecond = 1e-3 second;
  unit millivolt = 1e-3 volt;
  unit nanoA = 1e-9 ampere;
  unit uS = 1e-6 siemens;
  unit uF = 1e-9 farad;
  unit uM = 1e-6 mole / litre;
  unit per_ms = 1 / (1e-3 second);
  unit uM_per_nanocoulomb = 1e-6 mole / (litre * 1e-9 coulomb);
  unit time = 1e-3 second;
end
