// SBML level 2 version 4

model model_0000001()
  // Nelson2000_HIV-1_intracellular_delay
  // described in: A model of HIV-1 pathogenesis that includes an intracellular delay.
  // Nelson PW, Murray JD, Perelson AS; Math Biosci. 2000 Feb;163(2):201-15. PMID: 10701304 ; doi: 10.1016/S0025-5564(99)00055-3
  // Abstract:
  // Mathematical modeling combined with experimental measurements have yielded important insights into HIV-1 pathogenesis. For example, data from experiments in which HIV-infected patients are given potent antiretroviral drugs that perturb the infection process have been used to estimate kinetic parameters underlying HIV infection. Many of the models used to analyze data have assumed drug treatments to be completely efficacious and that upon infection a cell instantly begins producing virus. We consider a model that allows for less then perfect drug effects and which includes a delay in the initiation of virus production. We present detailed analysis of this delay differential equation model and compare the results to a model without delay. Our analysis shows that when drug efficacy is less than 100%, as may be the case in vivo, the predicted rate of decline in plasma virus concentration depends on three factors: the death rate of virus producing cells, the efficacy of therapy, and the length of the delay. Thus, previous estimates of infected cell loss rates can be improved upon by considering more realistic models of viral infection.
  // Author Keywords: HIV; Delay; Viral life cycle; T-cells
  // As the initial conditions for the intergrations where not known, approximate inital conditions for the steady state at k=3.47*10 -8 where chosen ( T * =1675 ). The model does not reprodue the results given in the article quantitatively, but the time courses are quite similar. For running the model, the initial conditions for t < 0 should be the same as the steady state ones.
  // This model originates from BioModels Database: A Database of Annotated Published Models. It is copyright (c) 2005-2011 The BioModels.net Team.
  // To the extent possible under law, all copyright and related or neighbouring rights to this encoded model have been dedicated to the public domain worldwide. Please refer to CC0 Public Domain Dedication for more information.
  // In summary, you are entitled to use this encoded model in absolutely any manner you deem suitable, verbatim, or with modification, alone or embedded it in a larger context, redistribute it, commercially or not, in a restricted way or not..
  // To cite BioModels Database, please use: Li C, Donizelli M, Rodriguez N, Dharuri H, Endler L, Chelliah V, Li L, He E, Henry A, Stefan MI, Snoep JL, Hucka M, Le Novère N, Laibe C (2010) BioModels Database: An enhanced, curated and annotated resource for published quantitative kinetic models. BMC Syst Biol., 4:92.
  // biomodels.db:MODEL8102792069
  // isDescribedBy pubmed:10701304
  // biomodels.db:MODEL8102792069
  // isDescribedBy pubmed:10701304
  // biomodels.db:MODEL8102792069
  // biomodels.db:MODEL8102792069

  // Compartments:
  compartment plasma = 1;

  // Species:
  // uninfected T-cells
  species $T in plasma = 180000;
  // infected T-cells
  species T_i in plasma = 0; T_i is "T*";
  // infectious virius (V I )
  species V_I in plasma = 134000;
  // non-infectious virus (V NI )
  species V_NI in plasma = 0;

  // Parameters:
  // delay between T-cell infection and lysis
  tau = 1 time;
  k = 3.43e-8 ml_per_item_day;
  delta = 0.5 perday;
  // virions released per cell upon lysis
  N = 480 virions_per_cell;
  c = 3 perday;
  m = 0 perday;
  // proetease inhibitor efficacy
  np = 0.1 dimensionless;
  HIV has dimensionless;

  // Assignment rules:
  HIV := (V_I + V_NI)*1000;

  // Reactions:
  infection: => T_i; k*delay(V_I, tau)*T*plasma*exp(-m*tau); infection is "T-cell infection";  // modifiers: T, V_I
  T_lysis_infect: => V_I; (1 - np)*N*delta*T_i*plasma; T_lysis_infect is "release of infectious virions on lysis";  // modifiers: T_i
  T_lysis_noninf: => V_NI; np*N*delta*T_i*plasma; T_lysis_noninf is "release of non infectious virions on lysis";  // modifiers: T_i
  V_I_clearance: V_I -> ; c*V_I*plasma; V_I_clearance is "clearance of infectious virions";
  V_NI_clearance: V_NI => ; c*V_NI*plasma; V_NI_clearance is "non-infect. virion clearance";
  T_i_lysis: T_i => ; delta*T_i*plasma; T_i_lysis is "infected Tcell lysis";

  // Unit definitions:
  unit time = 86400 second; time is "day";
  unit substance = item; substance is "items";
  unit perday = 1 / (86400 second); perday is "per day";
  unit volume = 1e-3 litre; volume is "ml";
  unit items_per_ml = item / (1e-3 litre);
  unit ml_per_item_day = 1e-3 litre / (86400 second * item); ml_per_item_day is "ml per (item*day)";
  unit virions_per_cell = dimensionless;
end
