// SBML level 2 version 4

model Yang2008_AAnetwork_PMN()
  // This is the arachidonic acid metabolic network model for human polymorphonuclear leukocyte (PMN) described in the article:
  // Finding multiple target optimal intervention in disease-related molecular network.
  // Yang K, Bai H, Ouyang Q, Lai L, Tang C. Mol Syst Biol. 2008;4:228. Epub 2008 Nov 4.; PMID: 18985027 ,doi: 10.1038/msb.2008.60
  // Abstract:
  // Drugs against multiple targets may overcome the many limitations of single targets and achieve a more effective and safer control of the disease. Numerous high-throughput experiments have been performed in this emerging field. However, systematic identification of multiple drug targets and their best intervention requires knowledge of the underlying disease network and calls for innovative computational methods that exploit the network structure and dynamics. Here, we develop a robust computational algorithm for finding multiple target optimal intervention (MTOI) solutions in a disease network. MTOI identifies potential drug targets and suggests optimal combinations of the target intervention that best restore the network to a normal state, which can be customer designed. We applied MTOI to an inflammation-related network. The well-known side effects of the traditional non-steriodal anti-inflammatory drugs and the recently recalled Vioxx were correctly accounted for in our network model. A number of promising MTOI solutions were found to be both effective and safer.
  // In this version of the model the parameter names have been slightly changed from the ones in the supplementary material of the article ( Supplementary Information 1 ).
  // Originally created by libAntimony v1.3 (using libSBML 4.1.0-b1)
  // This model originates from BioModels Database: A Database of Annotated Published Models (http://www.ebi.ac.uk/biomodels/). It is copyright (c) 2005-2011 The BioModels.net Team.
  // To the extent possible under law, all copyright and related or neighbouring rights to this encoded model have been dedicated to the public domain worldwide. Please refer to CC0 Public Domain Dedication for more information.
  // In summary, you are entitled to use this encoded model in absolutely any manner you deem suitable, verbatim, or with modification, alone or embedded it in a larger context, redistribute it, commercially or not, in a restricted way or not..
  // To cite BioModels Database, please use: Li C, Donizelli M, Rodriguez N, Dharuri H, Endler L, Chelliah V, Li L, He E, Henry A, Stefan MI, Snoep JL, Hucka M, Le Novère N, Laibe C (2010) BioModels Database: An enhanced, curated and annotated resource for published quantitative kinetic models. BMC Syst Biol., 4:92.
  // biomodels.db:MODEL8236441887
  // isDescribedBy pubmed:18985027
  // biomodels.db:MODEL8236441887
  // isDescribedBy pubmed:18985027
  // biomodels.db:MODEL8236441887
  // biomodels.db:MODEL8236441887

  // Compartments:
  compartment compartment = 1;

  // Species:
  species x1 in compartment = 0.001;
  species x2 in compartment = 0.001;
  species x3 in compartment = 0.001;
  species x4 in compartment = 0.001;
  species x5 in compartment = 0.001;
  species x6 in compartment = 0.001;
  species x7 in compartment = 0.001;
  species x8 in compartment = 0.001;
  species x9 in compartment = 0.001;
  species x10 in compartment = 0.001;
  species x11 in compartment = 0.001;
  species x12 in compartment = 0.001;
  species x13 in compartment = 0.001;
  species x14 in compartment = 0.001;
  species x15 in compartment = 0.0063;
  species x16 in compartment = 2.5;
  species x17 in compartment = 0.083;
  species x18 in compartment = 1.1;
  species x19 in compartment = 0.83;

  // Parameters:
  linPMN = 4.4;
  conPLAm = 4.8;
  conCOXm = 0.63;
  conPGESm = 0.0052;
  conCYPm = 0.13;
  conPHGPxm = 0.069;
  exoAA = 0;
  KcatPLAm = 3600;
  KMPLAm = 2600;
  Kcat15LOXm = 5000;
  KM15LOXm = 13;
  Kcat12LOXm = 9500;
  KM12LOXm = 160;
  KcatCOXm = 1000;
  KMCOXm = 33;
  KcatPGESm = 3000;
  KMPGESm = 160;
  KcatTXASm = 1599;
  KMTXASm = 4;
  Kcat5LOXm = 6000;
  KM5LOXm = 1.4;
  KcatLTAHm = 150;
  KMLTAHm = 20;
  KcatCYPm = 150;
  KMCYPm = 3.9;
  KcatPHGPxm = 2000;
  KMPHGPxm = 58;
  kd15HPETEm = 0.36;
  kd15HETEm = 0.1;
  kdTXAm = 0.0001;
  kdTXBm = 0.0013;
  kd5HETEm = 0.00042;
  kdLTAm = 0.0017;
  kdLTBm = 0.00063;
  kd15LOXm = 0.00083;
  kdexoAA = 0.017;
  kdAA = 0.14;
  kiAApgesm = 0.3;
  ki15HETEpgesm = 0.53;
  kiPGEcoxm = 2.8;
  ki15HETEtxasm = 0.52;
  kiPGHtxasm = 0.029;
  ki15HPETE5loxm = 0.01;
  ki12HETE5loxm = 30;
  ki15HETE5loxm = 4;
  kiLTA5loxm = 0.175;
  ki5HPETE5loxm = 0.26;
  kiPGE5loxm = 72;
  ki5HETE5loxm = 6.3;
  kiLTAltahm = 129;
  ki12HETEcypm = 0.29;
  ki5HETEcypm = 0.8;
  ki15HETE12loxm = 1.5;
  ki15HPETE12loxm = 0.23;
  ki12HPETE12loxm = 1.6;
  KI12HPETEplam = 260;
  KI15HPETEplam = 430;
  KILTBplam = 180;
  KI5HETEplam = 240;
  KILTB5loxm = 0.022;
  KIPGE15loxm = 2.3e-5;
  aPGE15loxm = 0.15;
  ksPMN = 500;
  iPLA = 0;
  kiPLA = 1;
  iCOX2 = 0;
  kiCOX2 = 1;
  iPGES = 0;
  kiPGES = 1;
  i5LOX = 0;
  ki5LOX = 1;
  iLTAH = 0;
  kiLTAH = 1;

  // Reactions:
  R1: => x1; KcatPLAm*conPLAm*linPMN*(1 + x4/KI12HPETEplam + x2/KI15HPETEplam + x13/KILTBplam + x11/KI5HETEplam)/(linPMN + KMPLAm*(1 + x1/ksPMN + iPLA/kiPLA)) - Kcat15LOXm*x15*x1*(1 + 0)/(x1 + KM15LOXm*(1 + x2/ksPMN)) - Kcat12LOXm*x16*x1*(1 + 0)/(x1 + KM12LOXm*(1 + x4/ki12HPETE12loxm + x3/ki15HETE12loxm + x4/ksPMN)) - KcatCOXm*conCOXm*x1*(1 + 0)/(x1 + KMCOXm*(1 + x7/kiPGEcoxm + x6/ksPMN + iCOX2/kiCOX2)) - Kcat5LOXm*x18*x1*(1 + 0)/(x1 + KM5LOXm*(1 + x5/ki12HETE5loxm + x3/ki15HETE5loxm + x7/kiPGE5loxm + x11/ki5HETE5loxm + x10/ksPMN + i5LOX/ki5LOX)) + kdexoAA*exoAA - kdAA*x1;  // modifiers: x10, x11, x13, x15, x16, x18, x2, x3, x4, x5, x6, x7
  R2: => x2; Kcat15LOXm*x15*x1*(1 + 0)/(x1 + KM15LOXm*(1 + x2/ksPMN)) - KcatPHGPxm*conPHGPxm*x2*(1 + 0)/(x2 + KMPHGPxm*(1 + x3/ksPMN)) - kd15HPETEm*x2;  // modifiers: x1, x15, x3
  R3: => x3; KcatPHGPxm*conPHGPxm*x2*(1 + 0)/(x2 + KMPHGPxm*(1 + x3/ksPMN)) - kd15HETEm*x3;  // modifiers: x2
  R4: => x4; Kcat12LOXm*x16*x1*(1 + 0)/(x1 + KM12LOXm*(1 + x4/ki12HPETE12loxm + x3/ki15HETE12loxm + x4/ksPMN)) - KcatPHGPxm*conPHGPxm*x4*(1 + 0)/(x4 + KMPHGPxm*(1 + x5/ksPMN));  // modifiers: x1, x16, x3, x5
  R5: => x5; KcatPHGPxm*conPHGPxm*x4*(1 + 0)/(x4 + KMPHGPxm*(1 + x5/ksPMN));  // modifiers: x4
  R6: => x6; KcatCOXm*conCOXm*x1*(1 + 0)/(x1 + KMCOXm*(1 + x7/kiPGEcoxm + x6/ksPMN + iCOX2/kiCOX2)) - KcatPGESm*conPGESm*x6*(1 + 0)/(x6 + KMPGESm*(1 + x1/kiAApgesm + x3/ki15HETEpgesm + x7/ksPMN + iPGES/kiPGES)) - KcatTXASm*x17*x6*(1 + 0)/(x6 + KMTXASm*(1 + x8/ksPMN));  // modifiers: x1, x17, x3, x7, x8
  R7: => x7; KcatPGESm*conPGESm*x6*(1 + 0)/(x6 + KMPGESm*(1 + x1/kiAApgesm + x3/ki15HETEpgesm + x7/ksPMN + iPGES/kiPGES));  // modifiers: x1, x3, x6
  R8: => x8; KcatTXASm*x17*x6*(1 + 0)/(x6 + KMTXASm*(1 + x8/ksPMN)) - kdTXAm*x8;  // modifiers: x17, x6
  R9: => x9; kdTXAm*x8 - kdTXBm*x9;  // modifiers: x8
  R10: => x10; Kcat5LOXm*x18*x1*(1 + 0)/(x1 + KM5LOXm*(1 + x5/ki12HETE5loxm + x3/ki15HETE5loxm + x7/kiPGE5loxm + x11/ki5HETE5loxm + x10/ksPMN + i5LOX/ki5LOX)) - Kcat5LOXm*x18*x10*(1 + 0)/(x10 + KM5LOXm*(1 + x5/ki12HETE5loxm + x3/ki15HETE5loxm + x7/kiPGE5loxm + x11/ki5HETE5loxm + x12/ksPMN + i5LOX/ki5LOX)) - KcatPHGPxm*conPHGPxm*x10*(1 + 0)/(x10 + KMPHGPxm*(1 + x11/ksPMN));  // modifiers: x1, x11, x12, x18, x3, x5, x7
  R11: => x11; KcatPHGPxm*conPHGPxm*x10*(1 + 0)/(x10 + KMPHGPxm*(1 + x11/ksPMN)) - kd5HETEm*x11;  // modifiers: x10
  R12: => x12; Kcat5LOXm*x18*x10*(1 + 0)/(x10 + KM5LOXm*(1 + x5/ki12HETE5loxm + x3/ki15HETE5loxm + x7/kiPGE5loxm + x11/ki5HETE5loxm + x12/ksPMN + i5LOX/ki5LOX)) - KcatLTAHm*x19*x12*(1 + 0)/(x12 + KMLTAHm*(1 + x13/ksPMN + iLTAH/kiLTAH)) - kdLTAm*x12;  // modifiers: x10, x11, x13, x18, x19, x3, x5, x7
  R13: => x13; KcatLTAHm*x19*x12*(1 + 0)/(x12 + KMLTAHm*(1 + x13/ksPMN + iLTAH/kiLTAH)) - KcatCYPm*conCYPm*x13*(1 + 0)/(x13 + KMCYPm*(1 + x5/ki12HETEcypm + x11/ki5HETEcypm + x14/ksPMN)) - kdLTBm*x13;  // modifiers: x11, x12, x14, x19, x5
  R14: => x14; KcatCYPm*conCYPm*x13*(1 + 0)/(x13 + KMCYPm*(1 + x5/ki12HETEcypm + x11/ki5HETEcypm + x14/ksPMN));  // modifiers: x11, x13, x5
  R15: => x15; aPGE15loxm*x7*x7/(x7*x7 + KIPGE15loxm*KIPGE15loxm) - kd15LOXm*x15;  // modifiers: x7
  R16: => x16; -ki15HPETE12loxm*x2*x16;  // modifiers: x2
  R17: => x17; -(ki15HETEtxasm*x2 + kiPGHtxasm*x6)*x17;  // modifiers: x2, x6
  R18: => x18; (KILTB5loxm*x13 - kiLTA5loxm*x12 - ki5HPETE5loxm*x10 - ki15HPETE5loxm*x2)*x18;  // modifiers: x10, x12, x13, x2
  R19: => x19; -(KcatLTAHm*x19*x12*(1 + 0))/(x12 + KMLTAHm*(1 + 0))/kiLTAltahm;  // modifiers: x12

  // Unit definitions:
  unit substance = 1e-6 mole; substance is "micromole";
  unit time = 60 second; time is "minute";
end
