// SBML level 2 version 4

model Yang2008_AAnetwork_EC()
  // This is the arachidonic acid metabolic network model for human endothelial cells (EC) described in the article:
  // Finding multiple target optimal intervention in disease-related molecular network.
  // Yang K, Bai H, Ouyang Q, Lai L, Tang C. Mol Syst Biol. 2008;4:228. Epub 2008 Nov 4.; PMID: 18985027 ,doi: 10.1038/msb.2008.60
  // Abstract:
  // Drugs against multiple targets may overcome the many limitations of single targets and achieve a more effective and safer control of the disease. Numerous high-throughput experiments have been performed in this emerging field. However, systematic identification of multiple drug targets and their best intervention requires knowledge of the underlying disease network and calls for innovative computational methods that exploit the network structure and dynamics. Here, we develop a robust computational algorithm for finding multiple target optimal intervention (MTOI) solutions in a disease network. MTOI identifies potential drug targets and suggests optimal combinations of the target intervention that best restore the network to a normal state, which can be customer designed. We applied MTOI to an inflammation-related network. The well-known side effects of the traditional non-steriodal anti-inflammatory drugs and the recently recalled Vioxx were correctly accounted for in our network model. A number of promising MTOI solutions were found to be both effective and safer.
  // In this model the parameter models have been slightly changed the ones in the supplementary material of the article ( Supplementary Information 2 ).
  // Originally created by libAntimony v1.3 (using libSBML 4.1.0-b1)
  // This model originates from BioModels Database: A Database of Annotated Published Models (http://www.ebi.ac.uk/biomodels/). It is copyright (c) 2005-2011 The BioModels.net Team.
  // To the extent possible under law, all copyright and related or neighbouring rights to this encoded model have been dedicated to the public domain worldwide. Please refer to CC0 Public Domain Dedication for more information.
  // In summary, you are entitled to use this encoded model in absolutely any manner you deem suitable, verbatim, or with modification, alone or embedded it in a larger context, redistribute it, commercially or not, in a restricted way or not..
  // To cite BioModels Database, please use: Li C, Donizelli M, Rodriguez N, Dharuri H, Endler L, Chelliah V, Li L, He E, Henry A, Stefan MI, Snoep JL, Hucka M, Le Novère N, Laibe C (2010) BioModels Database: An enhanced, curated and annotated resource for published quantitative kinetic models. BMC Syst Biol., 4:92.
  // biomodels.db:MODEL8236480549
  // isDescribedBy pubmed:18985027
  // biomodels.db:MODEL8236480549
  // isDescribedBy pubmed:18985027
  // biomodels.db:MODEL8236480549
  // biomodels.db:MODEL8236480549

  // Compartments:
  compartment compartment = 1;

  // Species:
  species x1 in compartment = 0.001;
  species x2 in compartment = 0.001;
  species x3 in compartment = 0.001;
  species x4 in compartment = 0.001;
  species x5 in compartment = 0.001;
  species x6 in compartment = 0.001;
  species x7 in compartment = 0.001;
  species x8 in compartment = 0.001;
  species x9 in compartment = 0.001;
  species x10 in compartment = 0.001;
  species x11 in compartment = 0.001;
  species x12 in compartment = 0.001;
  species x13 in compartment = 0.001;
  species x14 in compartment = 0.001;
  species x15 in compartment = 0.001;
  species x16 in compartment = 0.001;
  species x17 in compartment = 0.08;
  species x18 in compartment = 0.0057;
  species x19 in compartment = 7.2;
  species x20 in compartment = 0.025;

  // Parameters:
  iPLA = 0;
  kiPLA = 1;
  iCOX2 = 0;
  kiCOX2 = 1;
  iPGES = 0;
  kiPGES = 1;
  linEC = 5;
  con12LOXe = 0.00032;
  conCOXe = 0.11;
  conPGISe = 0.35;
  conPGDSe = 0.064;
  conPGFSe = 0.0018;
  conCRe = 0.0003;
  conKPRe = 0.0005;
  conPGDHe = 0.00035;
  conPHGPxe = 0.57;
  KMPLAe = 2600;
  KcatPLAe = 3600;
  KM15LOXe = 91;
  Kcat15LOXe = 360;
  KM12LOXe = 8;
  Kcat12LOXe = 840;
  KMCOXe = 5;
  KcatCOXe = 250;
  KMTXASe = 4;
  KcatTXASe = 1599;
  KMPGISe = 9;
  KcatPGISe = 147;
  KMPGDSe = 4;
  KcatPGDSe = 6900;
  KMPGFSe = 3.4;
  KcatPGFSe = 6000;
  KMPGESe = 160;
  KcatPGESe = 3000;
  KMCRe = 100;
  KcatCRe = 110;
  KMKPRe = 90;
  KcatKPRe = 120;
  KMPGDHe = 400;
  KcatPGDHe = 1700;
  KMPHGPxe = 250;
  KcatPHGPxe = 160;
  kd15HPETEe = 0.0011;
  kd15HETEe = 0.55;
  kd12HETEe = 0.00021;
  kdPGHe = 1.2;
  kdTXAe = 3;
  kdTXBe = 3;
  kdPGIe = 3.8;
  kdPGF1e = 0.048;
  kdPGDe = 0.00095;
  kdPGJe = 0.00024;
  kd15LOXe = 1.7;
  kiPGEcoxe = 30;
  ki15HPETEtxase = 0.9;
  kiPGHtxase = 0.18;
  ki15HPETEpgise = 0.18;
  kiAApgese = 0.3;
  ki15HETEpgese = 0.91;
  kidPGJpgese = 0.018;
  kidPGJplae = 0.018;
  KI12HPETEplae = 140;
  KI15HPETEplae = 120;
  KIPGF2plae = 210;
  KIPGE15loxe = 2.3e-5;
  aPGE15loxe = 0.15;
  ksEC = 500;

  // Reactions:
  R1: => x1; KcatPLAe*x17*linEC*(1 + x4/KI12HPETEplae + x2/KI15HPETEplae + x15/KIPGF2plae)/(linEC + KMPLAe*(1 + x1/ksEC + iPLA/kiPLA)) - Kcat15LOXe*x18*x1*(1 + 0)/(x1 + KM15LOXe*(1 + x2/ksEC)) - Kcat12LOXe*con12LOXe*x1*(1 + 0)/(x1 + KM12LOXe*(1 + x4/ksEC)) - KcatCOXe*conCOXe*x1*(1 + 0)/(x1 + KMCOXe*(1 + x14/kiPGEcoxe + x6/ksEC + iCOX2/kiCOX2));  // modifiers: x14, x15, x17, x18, x2, x4, x6
  R2: => x2; Kcat15LOXe*x18*x1*(1 + 0)/(x1 + KM15LOXe*(1 + x2/ksEC)) - KcatPHGPxe*conPHGPxe*x2*(1 + 0)/(x2 + KMPHGPxe*(1 + x3/ksEC)) - kd15HPETEe*x2;  // modifiers: x1, x18, x3
  R3: => x3; KcatPHGPxe*conPHGPxe*x2*(1 + 0)/(x2 + KMPHGPxe*(1 + x3/ksEC)) - kd15HETEe*x3;  // modifiers: x2
  R4: => x4; Kcat12LOXe*con12LOXe*x1*(1 + 0)/(x1 + KM12LOXe*(1 + x4/ksEC)) - KcatPHGPxe*conPHGPxe*x4*(1 + 0)/(x4 + KMPHGPxe*(1 + x5/ksEC));  // modifiers: x1, x5
  R5: => x5; KcatPHGPxe*conPHGPxe*x4*(1 + 0)/(x4 + KMPHGPxe*(1 + x5/ksEC)) - kd12HETEe*x5;  // modifiers: x4
  R6: => x6; KcatCOXe*conCOXe*x1*(1 + 0)/(x1 + KMCOXe*(1 + x14/kiPGEcoxe + x6/ksEC + iCOX2/kiCOX2)) - KcatTXASe*x19*x6*(1 + 0)/(x6 + KMTXASe*(1 + x7/ksEC)) - KcatPGISe*conPGISe*x6*(1 + 0)/(x6 + KMPGISe*(1 + x2/ki15HPETEpgise + x9/ksEC)) - KcatPGDSe*conPGDSe*x6*(1 + 0)/(x6 + KMPGDSe*(1 + x11/ksEC)) - KcatPGESe*x20*x6*(1 + 0)/(x6 + KMPGESe*(1 + x1/kiAApgese + x3/ki15HETEpgese + x14/ksEC + iPGES/kiPGES)) - kdPGHe*x6;  // modifiers: x1, x11, x14, x19, x2, x20, x3, x7, x9
  R7: => x7; KcatTXASe*x19*x6*(1 + 0)/(x6 + KMTXASe*(1 + x7/ksEC)) - kdTXAe*x7;  // modifiers: x19, x6
  R8: => x8; kdTXAe*x7 - kdTXBe*x8;  // modifiers: x7
  R9: => x9; KcatPGISe*conPGISe*x6*(1 + 0)/(x6 + KMPGISe*(1 + x2/ki15HPETEpgise + x9/ksEC)) - kdPGIe*x9;  // modifiers: x2, x6
  R10: => x10; kdPGIe*x9 - kdPGF1e*x10;  // modifiers: x9
  R11: => x11; KcatPGDSe*conPGDSe*x6*(1 + 0)/(x6 + KMPGDSe*(1 + x11/ksEC)) - KcatPGFSe*conPGFSe*x11*(1 + 0)/(x11 + KMPGFSe*(1 + 0)) - kdPGDe*x11;  // modifiers: x6
  R12: => x12; kdPGDe*x11 - kdPGJe*x12;  // modifiers: x11
  R13: => x13; kdPGJe*x12;  // modifiers: x12
  R14: => x14; KcatPGESe*x20*x6*(1 + 0)/(x6 + KMPGESe*(1 + x1/kiAApgese + x3/ki15HETEpgese + x14/ksEC + iPGES/kiPGES)) - KcatCRe*conCRe*x14*(1 + 0)/(x14 + KMCRe*(1 + x15/ksEC)) - KcatKPRe*conKPRe*x14*(1 + 0)/(x14 + KMKPRe*(1 + x15/ksEC));  // modifiers: x1, x15, x20, x3, x6
  R15: => x15; KcatCRe*conCRe*x14*(1 + 0)/(x14 + KMCRe*(1 + x15/ksEC)) + KcatKPRe*conKPRe*x14*(1 + 0)/(x14 + KMKPRe*(1 + x15/ksEC)) + kdPGHe*x6 - KcatPGDHe*conPGDHe*x15*(1 + 0)/(x15 + KMPGDHe*(1 + x16/ksEC));  // modifiers: x14, x16, x6
  R16: => x16; KcatPGDHe*conPGDHe*x15*(1 + 0)/(x15 + KMPGDHe*(1 + x16/ksEC));  // modifiers: x15
  R17: => x17; -kidPGJplae*x13*x17;  // modifiers: x13
  R18: => x18; aPGE15loxe*x14*x14/(x14*x14 + KIPGE15loxe*KIPGE15loxe) - kd15LOXe*x18;  // modifiers: x14
  R19: => x19; -(ki15HPETEtxase*x2 + kiPGHtxase*x6)*x19;  // modifiers: x2, x6
  R20: => x20; -kidPGJpgese*x13*x20;  // modifiers: x13

  // Unit definitions:
  unit substance = 1e-6 mole; substance is "micromole";
  unit time = 60 second; time is "minute";
end
