// SBML level 2 version 4

model Yang2008_AAnetwork_PLT()
  // This is the arachidonic acid metabolic network model for human platelet cells (PLT) described in the article:
  // Finding multiple target optimal intervention in disease-related molecular network.
  // Yang K, Bai H, Ouyang Q, Lai L, Tang C. Mol Syst Biol. 2008;4:228. Epub 2008 Nov 4.; PMID: 18985027 ,doi: 10.1038/msb.2008.60
  // Abstract:
  // Drugs against multiple targets may overcome the many limitations of single targets and achieve a more effective and safer control of the disease. Numerous high-throughput experiments have been performed in this emerging field. However, systematic identification of multiple drug targets and their best intervention requires knowledge of the underlying disease network and calls for innovative computational methods that exploit the network structure and dynamics. Here, we develop a robust computational algorithm for finding multiple target optimal intervention (MTOI) solutions in a disease network. MTOI identifies potential drug targets and suggests optimal combinations of the target intervention that best restore the network to a normal state, which can be customer designed. We applied MTOI to an inflammation-related network. The well-known side effects of the traditional non-steriodal anti-inflammatory drugs and the recently recalled Vioxx were correctly accounted for in our network model. A number of promising MTOI solutions were found to be both effective and safer.
  // The model is an updated version of the supplementary material of the article ( Supplementary Information 3 ). The only difference are the parameter names.
  // Originally created by libAntimony v1.3 (using libSBML 4.1.0-b1)
  // This model originates from BioModels Database: A Database of Annotated Published Models. It is copyright (c) 2005-2011 The BioModels.net Team.
  // To the extent possible under law, all copyright and related or neighbouring rights to this encoded model have been dedicated to the public domain worldwide. Please refer to CC0 Public Domain Dedication for more information.
  // In summary, you are entitled to use this encoded model in absolutely any manner you deem suitable, verbatim, or with modification, alone or embedded it in a larger context, redistribute it, commercially or not, in a restricted way or not..
  // To cite BioModels Database, please use: Li C, Donizelli M, Rodriguez N, Dharuri H, Endler L, Chelliah V, Li L, He E, Henry A, Stefan MI, Snoep JL, Hucka M, Le Novère N, Laibe C (2010) BioModels Database: An enhanced, curated and annotated resource for published quantitative kinetic models. BMC Syst Biol., 4:92.
  // biomodels.db:MODEL8236520494
  // isDescribedBy pubmed:18985027
  // biomodels.db:MODEL8236520494
  // isDescribedBy pubmed:18985027
  // biomodels.db:MODEL8236520494
  // biomodels.db:MODEL8236520494

  // Compartments:
  compartment compartment = 1;

  // Species:
  species x1 in compartment = 670;
  species x2 in compartment = 0.001;
  species x3 in compartment = 0.001;
  species x4 in compartment = 0.001;
  species x5 in compartment = 0.001;
  species x6 in compartment = 0.001;
  species x7 in compartment = 0.51;

  // Parameters:
  iPLA = 0;
  kiPLA = 1;
  iCOX1 = 0;
  kiCOX1 = 1;
  linPLT = 1;
  conPLAl = 0.19;
  con12LOXl = 0.82;
  conPHGPxl = 0.0022;
  conCOXl = 0.19;
  KMPLAl = 2600;
  KcatPLAl = 3600;
  KM12LOXl = 8;
  Kcat12LOXl = 840;
  KMPHGPxl = 0.83;
  KcatPHGPxl = 550;
  KMCOXl = 4.5;
  KcatCOXl = 6000;
  KMTXASl = 4;
  KcatTXASl = 1599;
  kdTXAl = 2.5;
  kdTXBl = 6.9e-5;
  kiPGHtxasl = 0.025;
  KI12HPETEplal = 310;
  ksPLT = 500;

  // Reactions:
  R1: => x1; KcatPLAl*conPLAl*linPLT*(1 + x2/KI12HPETEplal)/(linPLT + KMPLAl*(1 + x1/ksPLT + iPLA/kiPLA)) - Kcat12LOXl*con12LOXl*x1*(1 + 0)/(x1 + KM12LOXl*(1 + x2/ksPLT)) - KcatCOXl*conCOXl*x1*(1 + 0)/(x1 + KMCOXl*(1 + x4/ksPLT + iCOX1/kiCOX1));  // modifiers: x2, x4
  R2: => x2; Kcat12LOXl*con12LOXl*x1*(1 + 0)/(x1 + KM12LOXl*(1 + x2/ksPLT)) - KcatPHGPxl*conPHGPxl*x2*(1 + 0)/(x2 + KMPHGPxl*(1 + x3/ksPLT)) - 0.1*x2;  // modifiers: x1, x3
  R3: => x3; KcatPHGPxl*conPHGPxl*x2*(1 + 0)/(x2 + KMPHGPxl*(1 + x3/ksPLT)) - 0.1*x3;  // modifiers: x2
  R4: => x4; KcatCOXl*conCOXl*x1*(1 + 0)/(x1 + KMCOXl*(1 + x4/ksPLT + iCOX1/kiCOX1)) - KcatTXASl*x7*x4*(1 + 0)/(x4 + KMTXASl*(1 + x5/ksPLT));  // modifiers: x1, x5, x7
  R5: => x5; KcatTXASl*x7*x4*(1 + 0)/(x4 + KMTXASl*(1 + x5/ksPLT)) - kdTXAl*x5;  // modifiers: x4, x7
  R6: => x6; kdTXAl*x5 - kdTXBl*x6;  // modifiers: x5
  R7: => x7; -kiPGHtxasl*x4*x7;  // modifiers: x4

  // Unit definitions:
  unit substance = 1e-6 mole; substance is "micromole";
  unit time = 60 second; time is "minute";
end
