// SBML level 2 version 1

model Li2006_QuorumSensing()
  // This model originates from BioModels Database: A Database of Annotated Published Models. It is copyright (c) 2005-2011 The BioModels.net Team.
  // To the extent possible under law, all copyright and related or neighbouring rights to this encoded model have been dedicated to the public domain worldwide. Please refer to CC0 Public Domain Dedication for more information.
  // In summary, you are entitled to use this encoded model in absolutely any manner you deem suitable, verbatim, or with modification, alone or embedded it in a larger context, redistribute it, commercially or not, in a restricted way or not..
  // To cite BioModels Database, please use: Li C, Donizelli M, Rodriguez N, Dharuri H, Endler L, Chelliah V, Li L, He E, Henry A, Stefan MI, Snoep JL, Hucka M, Le Novère N, Laibe C (2010) BioModels Database: An enhanced, curated and annotated resource for published quantitative kinetic models. BMC Syst Biol., 4:92.
  // biomodels.db:MODEL8262229752
  // isDescribedBy pubmed:17170762
  // biomodels.db:MODEL8262229752
  // isDescribedBy pubmed:17170762
  // biomodels.db:MODEL8262229752
  // biomodels.db:MODEL8262229752

  // Compartments:
  compartment compartment = 1;

  // Species:
  species Nutrients in compartment = 28350/compartment;
  species Met in compartment = 2248/compartment;
  species SAM in compartment = 10000/compartment;
  species SAH in compartment = 320/compartment;
  species Decarb_SAM in compartment = 220/compartment;
  species Putrescine in compartment = 4400/compartment;
  species Pfs_mRNA in compartment = 32/compartment;
  species pfs_gene in compartment = 1/compartment;
  species Pfs_prot in compartment = 800/compartment;
  species Adenine in compartment = 596/compartment;
  species SRH in compartment = 300/compartment;
  species LuxS_gene in compartment = 1/compartment;
  species LuxS_mRNA in compartment = 16/compartment;
  species LuxS_prot in compartment = 400/compartment;
  species DPD in compartment = 300/compartment;
  species Homocys in compartment = 300/compartment;
  species MTA in compartment = 296/compartment;
  species Spermidine in compartment = 940/compartment;
  species MTR in compartment = 180/compartment;
  species AI2_intra in compartment = 60/compartment;
  species AI2_extra in compartment = 60/compartment;

  // Parameters:
  AI2_trans_r = 0;
  AI2_phos_r = 0;
  AI2_excret_r = 0.25;
  AI2_syn_r = 0.00067;
  AdoMet_r = 0.962;
  DPD_deg_r = 0.005;
  LuxS_mRNA_d = 0.03;
  LuxS_prot_d = 0.012;
  LuxS_transc = 1.25;
  LuxS_transl = 0.74;
  MTR_e = 0.02;
  MTR_syn_r = 2.21e-5;
  Met_recov = 0.35;
  Methy_trans = 0.15;
  Pfs_prot_d = 0.003;
  Polyamine_uti = 0.15;
  SAH_Hydro_r = 0.00055;
  SAM_Dec = 0.055;
  SRH_cleav = 0.00224;
  SpeE_syn_r = 4.03e-6;
  Spermi_uti = 0.0208;
  b_reac_r = 0.01;
  pfs_mRNA_d = 0.022;
  pfs_transc = 2.1;
  pfs_transl = 0.54;

  // Reactions:
  bio_reac: Nutrients => Met; b_reac_r*Nutrients;
  AdoMet: Met => SAM; AdoMet_r*Met;
  MethyTrans: SAM => SAH; Methy_trans*SAM;
  SAM_Decarb: SAM => Decarb_SAM; SAM_Dec*SAM;
  SpeE_syn: Decarb_SAM + Putrescine => MTA + Spermidine; SpeE_syn_r*Decarb_SAM*Putrescine;
  Spermi_util: Spermidine => ; Spermi_uti*Spermidine;
  MTR_syn: MTA + Pfs_prot => MTR + Adenine + Pfs_prot; MTR_syn_r*Pfs_prot*MTA;
  MTR_excret: MTR => ; MTR_e*MTR;
  Polyamine_util: Adenine => ; Polyamine_uti*Adenine;
  Pfs_prot_deg: Pfs_prot => ; Pfs_prot_d*Pfs_prot;
  pfs_translation: Pfs_mRNA => Pfs_prot + Pfs_mRNA; pfs_transl*Pfs_mRNA;
  Pfs_mRNA_deg: Pfs_mRNA => ; pfs_mRNA_d*Pfs_mRNA;
  pfs_transcription: pfs_gene => Pfs_mRNA + pfs_gene; pfs_transc;
  SAH_Hydro: SAH + Pfs_prot => SRH + Adenine + Pfs_prot; SAH_Hydro_r*SAH*Pfs_prot;
  SRH_cleave: LuxS_prot + SRH => LuxS_prot + Homocys + DPD; SRH_cleav*LuxS_prot*SRH;
  Met_recover: Homocys => Met; Met_recov*Homocys;
  DPD_deg: DPD => ; DPD_deg_r*DPD;
  LuxS_prot_deg: LuxS_prot => ; LuxS_prot_d*LuxS_prot;
  LuxS_translation: LuxS_mRNA => LuxS_prot + LuxS_mRNA; LuxS_transl*LuxS_mRNA;
  LuxS_mRNA_deg: LuxS_mRNA => ; LuxS_mRNA_d*LuxS_mRNA;
  LuxS_transcription: LuxS_gene => LuxS_gene + LuxS_mRNA; LuxS_transc;
  AI2_syn: DPD => AI2_intra; AI2_syn_r*DPD;
  AI2_excret: AI2_intra => AI2_extra; AI2_excret_r*AI2_intra;
  AI2_trans: AI2_extra => AI2_intra; AI2_trans_r*AI2_extra;
  AI2_phos: AI2_intra => ; AI2_phos_r*AI2_intra;

  // Unit definitions:
  unit volume = litre;
  unit substance = item;
end
