// SBML level 2 version 4

model model()
  // You2010_General_Yeast_mRNA_Translation
  // This the model from the article:
  // A quantitative model for mRNA translation in Saccharomyces cerevisiae.
  // You T, Coghill GM, Brown AJ. Yeast. 2010 Mar 19. epub ahead of print, PMID: 20306461 , doi: 10.1002/yea.1770
  // Abstract:
  // Messenger RNA (mRNA) translation is an essential step in eukaryotic gene expression that contributes to the regulation of this process. We describe a deterministic model based on ordinary differential equations that describe mRNA translation in Saccharomyces cerevisiae. This model, which was parameterized using published data, was developed to examine the kinetic behaviour of translation initiation factors in response to amino acid availability. The model predicts that the abundance of the eIF1-eIF3-eIF5 complex increases under amino acid starvation conditions, suggesting a possible auxiliary role for these factors in modulating translation initiation in addition to the known mechanisms involving eIF2. Our analyses of the robustness of the mRNA translation model suggest that individual cells within a randomly generated population are sensitive to external perturbations (such as changes in amino acid availability) through Gcn2 signalling. However, the model predicts that individual cells exhibit robustness against internal perturbations (such as changes in the abundance of translation initiation factors and kinetic parameters). Gcn2 appears to enhance this robustness within the system. These findings suggest a trade-off between the robustness and performance of this biological network. The model also predicts that individual cells exhibit considerable heterogeneity with respect to their absolute translation rates, due to random internal perturbations. Therefore, averaging the kinetic behaviour of cell populations probably obscures the dynamic robustness of individual cells. This highlights the importance of single-cell measurements for evaluating network properties. Copyright (c) 2010 John Wiley and Sons, Ltd.
  // This model originates from BioModels Database: A Database of Annotated Published Models. It is copyright (c) 2005-2011 The BioModels.net Team.
  // To the extent possible under law, all copyright and related or neighbouring rights to this encoded model have been dedicated to the public domain worldwide. Please refer to CC0 Public Domain Dedication for more information.
  // In summary, you are entitled to use this encoded model in absolutely any manner you deem suitable, verbatim, or with modification, alone or embedded it in a larger context, redistribute it, commercially or not, in a restricted way or not..
  // To cite BioModels Database, please use: Li C, Donizelli M, Rodriguez N, Dharuri H, Endler L, Chelliah V, Li L, He E, Henry A, Stefan MI, Snoep JL, Hucka M, Le Novère N, Laibe C (2010) BioModels Database: An enhanced, curated and annotated resource for published quantitative kinetic models. BMC Syst Biol., 4:92.
  // biomodels.db:MODEL8459127548
  // isDescribedBy pubmed:20306461
  // biomodels.db:MODEL8459127548
  // isDescribedBy pubmed:20306461
  // biomodels.db:MODEL8459127548
  // biomodels.db:MODEL8459127548

  // Compartments:
  compartment vacuole = 1 volume;
  compartment cytosol = 29 volume;

  // Species:
  species His_vac in vacuole = 34400000/vacuole;
  species His_cyt in cytosol = 11100/cytosol;
  species Hts1 in cytosol = 13400/cytosol;
  species HisAMPHts1 in vacuole = 13400/vacuole; HisAMPHts1 is "His-AMP-Hts1";
  species tRNA_His in cytosol = 26800/cytosol;
  species HistRNA_His in cytosol = 241200/cytosol; HistRNA_His is "His-tRNA_His";
  species Gcn2 in cytosol = 279/cytosol;
  species Gcn2P in cytosol = 0; Gcn2P is "Gcn2(P)";
  species eIF2GDP in cytosol = 63000/cytosol; eIF2GDP is "eIF2-GDP";
  species eIF2PGDP in cytosol = 0; eIF2PGDP is "eIF2(P)-GDP";
  species eIF2B in cytosol = 5000/cytosol;
  species eIF2BeIF2GDP in cytosol = 0; eIF2BeIF2GDP is "eIF2B-eIF2-GDP";
  species eIF2BeIF2PGDP in cytosol = 0; eIF2BeIF2PGDP is "eIF2B-eIF2(P)-GDP";
  species eIF2GTP in cytosol = 0; eIF2GTP is "eIF2-GTP";
  species TC in cytosol = 0;
  species eIF1 in cytosol = 81000/cytosol;
  species eIF3 in cytosol = 33000/cytosol;
  species eIF5 in cytosol = 67000/cytosol;
  species TCeIF5 in cytosol = 0; TCeIF5 is "TC-eIF5";
  species eIF5eIF2GDP in cytosol = 0; eIF5eIF2GDP is "eIF5-eIF2-GDP";
  species eIF1eIF3 in cytosol = 0; eIF1eIF3 is "eIF1-eIF3";
  species eIF3eIF5 in cytosol = 0; eIF3eIF5 is "eIF3-eIF5";
  species eIF1eIF3eIF5 in cytosol = 0; eIF1eIF3eIF5 is "eIF1-eIF3-eIF5";
  species TCeIF5eIF3 in cytosol = 0; TCeIF5eIF3 is "TC-eIF5-eIF3";
  species MFC in cytosol = 0;
  species MFCeIF5 in cytosol = 0; MFCeIF5 is "MFC-eIF5";
  species _40S in cytosol = 200000/cytosol;
  species _43S in cytosol = 0;
  species _40SmRNA in cytosol = 0; _40SmRNA is "40S-mRNA";
  species RibosomemRNA in cytosol = 0; RibosomemRNA is "Ribosome-mRNA";

  // Parameters:
  v1_1 = 34740 molecules_per_second;
  k2 = 0.001 per_s;
  k_cat1_Hts1 = 40 per_molecule_per_s;
  K_M_His = 157000 substance;
  K_M_ATP = 8730000 molecules_per_cell;
  ATP = 36700000 molecules_per_cell;
  k_cat2_Hts1 = 2.83 per_molecule_per_s;
  K_M_tRNA_His = 2440 molecules_per_cell;
  k5 = 4.92 per_s;
  k6 = 6.08e-9 per_molecule_per_s;
  k7 = 0.01 per_s;
  k8 = 0.000997 per_molecule_per_s;
  k9 = 0.01 per_s;
  k10 = 0.0157 per_molecule_per_s;
  k11 = 1.41 per_s;
  k12 = 0.0157 per_molecule_per_s;
  k13 = 1.41 per_s;
  k14 = 0.423 per_s;
  k15 = 0.000504 per_molecule_per_s;
  k16 = 1 per_s;
  k17 = 0.000504 per_molecule_per_s;
  k18 = 1 per_s;
  k19 = 0.000229 per_molecule_per_s;
  k20 = 1 per_s;
  k21 = 5.38e-5 per_molecule_per_s;
  k22 = 0.0217 per_molecule_per_s;
  k23 = 1 per_s;
  k24 = 1.31e-6 per_molecule_per_s;
  k25 = 0.0482 per_molecule_per_s;
  k26 = 0.000107 per_molecule_per_s;
  k27 = 0.00688 per_molecule_per_s;
  k28 = 0.000571 per_molecule_per_s;
  k29 = 0.00967 per_molecule_per_s;
  k30 = 1.14 per_molecule_per_s;
  k31 = 0.000596 per_molecule_per_s;
  k32_0 = 1.77 per_s;
  k33 = 5.97 per_s;

  // Reactions:
  v1_2: => His_vac; v1_1;
  v2: His_vac => His_cyt; k2*His_vac;
  v3: Hts1 + His_cyt => HisAMPHts1; k_cat1_Hts1*Hts1/(1 + K_M_His/His_cyt + K_M_ATP/ATP);
  v4: tRNA_His + HisAMPHts1 => HistRNA_His + Hts1; k_cat2_Hts1*HisAMPHts1*tRNA_His/(K_M_tRNA_His + tRNA_His);
  v5: HistRNA_His => tRNA_His; k5*1/(765*(1 - 0.0193)/30 + 765*0.0193/30*241200/HistRNA_His)*RibosomemRNA;  // modifiers: RibosomemRNA
  v6: Gcn2 => Gcn2P; k6*tRNA_His*Gcn2;  // modifiers: tRNA_His
  v7: Gcn2P => Gcn2; k7*Gcn2P;
  v8: eIF2GDP => eIF2PGDP; k8*eIF2GDP*Gcn2P;  // modifiers: Gcn2P
  v9: eIF2PGDP => eIF2GDP; k9*eIF2PGDP;
  v10: eIF2PGDP + eIF2B => eIF2BeIF2PGDP; k10*eIF2B*eIF2PGDP;
  v11: eIF2BeIF2PGDP => eIF2PGDP + eIF2B; k11*eIF2BeIF2PGDP;
  v12: eIF2GDP + eIF2B => eIF2BeIF2GDP; k12*eIF2GDP*eIF2B;
  v13: eIF2BeIF2GDP => eIF2GTP + eIF2B; k13*eIF2BeIF2GDP;
  v14: eIF2GTP => TC; k14*eIF2GTP;
  v15: eIF2GDP + eIF5 => eIF5eIF2GDP; k15*eIF2GDP*eIF5;
  v16: eIF5eIF2GDP => eIF2GDP + eIF5; k16*eIF5eIF2GDP;
  v17: TC + eIF5 => TCeIF5; k17*TC*eIF5;
  v18: TCeIF5 => TC + eIF5; k18*TCeIF5;
  v19: eIF1 + eIF3 => eIF1eIF3; k19*eIF1*eIF3;
  v20: eIF1eIF3 => eIF1 + eIF3; k20*eIF1eIF3;
  v21: eIF1eIF3 + eIF5 => eIF1eIF3eIF5; k21*eIF1eIF3*eIF5;
  v22: eIF3 + eIF5 => eIF3eIF5; k22*eIF3*eIF5;
  v23: eIF3eIF5 => eIF3 + eIF5; k23*eIF3eIF5;
  v24: eIF1 + eIF3eIF5 => eIF1eIF3eIF5; k24*eIF1*eIF3eIF5;
  v25: TC + eIF1eIF3eIF5 => MFC; k25*TC*eIF1eIF3eIF5;
  v26: TCeIF5 + eIF1eIF3 => MFC; k26*TCeIF5*eIF1eIF3;
  v27: TCeIF5 + eIF3 => TCeIF5eIF3; k27*eIF3*TCeIF5;
  v28: TCeIF5eIF3 + eIF1 => MFC; k28*eIF1*TCeIF5eIF3;
  v29: TCeIF5 + eIF1eIF3eIF5 => MFCeIF5; k29*TCeIF5*eIF1eIF3eIF5;
  v30: MFCeIF5 => MFC + eIF5; k30*MFCeIF5;
  v31: MFC + _40S => _43S; k31*MFC*_40S;
  v32: _43S => _40SmRNA + eIF1 + eIF2GDP + eIF3 + eIF5; k32_0*_43S*37566*(765 - RibosomemRNA/37566*100)/(765 + RibosomemRNA/37566*100)/((765 - 180000/37566*100)/(765 + 180000/37566*100));  // modifiers: RibosomemRNA
  v33: _40SmRNA => RibosomemRNA; k33*_40SmRNA;
  v34: RibosomemRNA => _40S; 1/(765*(1 - 0.0193)/30 + 765*0.0193/30*241200/HistRNA_His)*RibosomemRNA;  // modifiers: HistRNA_His

  // Unit definitions:
  unit substance = item; substance is "molecules";
  unit volume = dimensionless; volume is "cell";
  unit molecules_per_cell = item / dimensionless;
  unit molecules_per_second = item / second;
  unit per_s = 1 / second; per_s is "per second";
  unit per_molecule_per_s = dimensionless / (item * second); per_molecule_per_s is "per(molecule/cell) per second";
end
