// SBML level 2 version 1

model mw5DF4BED6_54E0_401A_9449_98B93AD602C6()
  // Basak_Cell_2007
  // This SBML file is a translation of a MatLab model utilized in the following paper. It describes the interplay of IkB and P100 negative feedback to control the cellular localization of the NFkB transcription factor in response to activation of IkB Kinase 1 (IKK1) and IkB Kinase 2 (IKK2).
  // Soumen Basak, Ha Na Kim, Jeffrey D. Kearns, Vinay Tergaonkar, Ellen O'Dea, Shannon L. Werner, Chris A. Benedict, Carl F. Ware, Gourishankar Ghosh, Inder M. Verma, Alexander Hoffmann. "A Fourth IkB Protein in the NFkB Signaling Module." Cell (2007)
  // Questions concerning the paper should be addressed to the corresponding author. Alexander Hoffmann (ahoffmann@ucsd.edu)
  // Technical questions concerning the implementation of the model within SBML should be addressed to Jeff Kearns (jkearns@ucsd.edu)
  // - Introduction:
  // The original model was written and simulated within MathWorks MatLab 2006a using the ode15s (stiff/NDF) solver. It is highly recommended that those wanting to model this system use the MatLab version which we will freely provide upon request. As always, simulation results vary according to the numerical solver used. In addition, there are also shortcomings in the Stimulation Phase of the model (listed below) that maybe resolved with future versions of SBML.
  // - SBML Generation :
  // Translation to SBML Level 2.1 was performed via reconstruction of the model within MathWorks SimBiology Desktop (version 2.1) followed by an Export to SBML.
  // - Running the model :
  // Simulations require two sequential runs of the model. It is recommended that you generate a script to pass the final component concentrations from the first run into the initial concentrations of the second.
  // 1. Equilibrium Phase.
  // - In both phases, total NFkB (0.125 micromole), IKK1 (0.1 micromole), and IKK2 (0.1 micromole) protein remains constant. These exist in free and bound forms.
  // - Synthesis and degradation reactions are included for IkBa, IkBb, IkBe, and P100 mRNA and protein.
  // - Equilibrium state nuclear NFkB (NFkBn) levels for combinations of IkB and P100 protein knockouts are included in the Cell paper. Use these to validate whether your simulation time is long enough and whether your solver is behaving properly.
  // 2. Stimulation Phase.
  // - The simulations of this phase have known shortcomings due to insufficient support by the SBML framework. These include not being able to utilize an interpolation function and lack of delay functions (resolved in SBML 2.2, but not yet in the MathWorks SimBiology tool). Resolution of these should enable recapitulation of the Stimulation Phase results shown in the Cell paper.
  // - The model input signal is defined as activity profiles for IKK1 and IKK2 (measured via biochemical assays). Profiles are included below for Lympotoxin-Beta (LTB) activation of IKK1 and for Tumor Necrosis Factor (TNF) and Lipopolysaccharide (LPS) activation of IKK2.
  // - Combinations of IKK1 and IKK2 inputs are possible. In the paper, a pulse stimulation with TNF (IKK2) followed later by LTB (IKK1) stimulation was used.
  // - The activity profile encodes what fraction of the IKK is able to mediate IkB and P100 protein degradation by acting as a rate constant multiplier.
  // Specifically....
  // ikk1_multiplier = IKK1(t) = IKK1 active at time 't', where 1= 100%
  // pd_c_2pq = pd_c_2pq * ikk1_multiplier;
  // pd_c_3pqn = pd_c_3pqn * ikk1_multiplier;
  // ikk2_multiplier = IKK2(t) = IKK2 active at time 't', where 1 = 100%
  // pd_c_2ai = pd_c_2ai * ikk2_multiplier;
  // pd_c_2bi = pd_c_2bi * ikk2_multiplier;
  // pd_c_2ei = pd_c_2ei * ikk2_multiplier;
  // pd_c_3ain = pd_c_3ain * ikk2_multiplier;
  // pd_c_3bin = pd_c_3bin * ikk2_multiplier;
  // pd_c_3ein = pd_c_3ein * ikk2_multiplier;
  // In the equilibrium phase, the ikk1_multiplier is 0.01 and ikk2_multiplier is 0.001.
  // - IKK1 activation also regulates the translation rate of P100 and the nuclear IkB/NFkB association rates by unknown mechanisms. We include this in the Stimulation Phase via a fold IKK1 activation multiplier.
  // ikk1_multipler_tsl_asn = IKK1(t) / IKK1(t=0)
  // ps_c_p = ps_c_p * ikk1_multiplier_tsl_asn
  // a_n_an = a_n_an * ikk1_multiplier_tsl_asn
  // a_n_bn = a_n_bn * ikk1_multiplier_tsl_asn
  // a_n_en = a_n_en * ikk1_multiplier_tsl_asn
  // - The IKK profile interpolation does NOT work in the SBML version. Any ideas on how to make it work are appreciated (contact Jeff Kearns).
  // - In brief, the MatLab version takes in two arrays-- IKK profile versus time -- to create a time-dependent IKK input function via piecewise cubic interpolation. As this creates N-1 polynomials for arrays with N datapoints, it is difficult to incorporate this into SBML via Rules or Events. It might be possible to construct the interpolation function using the tools present in MathML. The MatLab code is included below to help anyone attempt this.
  // %==========================================================
  // % GENERATE_IKK_INPUTS
  // %==========================================================
  // function ikk1_curve = interpolate_ikk1 (stimulus)
  // global SIM_TIME;
  // if (strcmp(stimulus, 'LTB'))
  // values = [1 1.2 1.4 1.9 2.4 2.6 2.6 2.6] / 100;
  // time = [0 180 300 480 600 900 1200 2400]; %minutes
  // elseif (strcmp(stimulus, 'LTB_20hr'))
  // values = [1 1 1.2 1.4 1.9 2.4 2.6 2.6] / 100;
  // time = [0 1200 1380 1500 1680 1800 2100 2400];
  // elseif (strcmp(stimulus, 'basal_1'))
  // values = [1 1 1 1 1] / 100;
  // time = [0 360 600 1200 2400];
  // else
  // error('Incorrect IKK1 input');
  // end
  // ikk1_curve = interp1(time, values, 0:SIM_TIME);
  // -------------
  // function ikk2_curve = interpolate_ikk2(stimulus)
  // global SIM_TIME;
  // if (strcmp(stimulus, 'TNF_p15'))
  // values = [0.1 60 100 65 50 36 21 16 10 .1 .1 .1 .1] / 100;
  // time = [0 5 10 15 20 25 30 45 59 60 360 1200 2400];
  // elseif (strcmp(stimulus, 'LPS_p45'))
  // values = [0.1 3 8 24 25 15 8 5 0.1 0.1] / 100;
  // time = [0 15 30 45 60 120 240 360 600 2400];
  // elseif (strcmp(stimulus, 'basal_1'))
  // values = [.1 .1 .1 .1 .1] / 100;
  // time = [0 360 600 1200 2400];
  // else
  // error('Incorrect IKK2 input name');
  // end
  // ikk2_curve = interp1(time, values, 0:SIM_TIME);
  // - mRNA synthesis (transcription) is comprised of a constitutive process and an inducible process. This inducible process is dependent upon the concentration of nuclear NFkB (NFkBn). We know from biochemical assays that the inducible transcription of three of the components (IkBbt, IkBet, and P100t) are delayed and we included this delay strictly within the Stimulation Phase of the MatLab mocel (not in the equilibrium phase). This requires the value of NFkBn at a previous time point. As SimBiology only supports SBML 2.1 (as of January 2007), the delay functions are NOT included in the SBML model. As tools include support SBML 2.2, you can add these reactions.
  // IkBet = 45 minute delay
  // IkBbt = 45 minute delay
  // P100t = 90 minute delay
  // This model originates from BioModels Database: A Database of Annotated Published Models (http://www.ebi.ac.uk/biomodels/). It is copyright (c) 2005-2011 The BioModels.net Team.
  // To the extent possible under law, all copyright and related or neighbouring rights to this encoded model have been dedicated to the public domain worldwide. Please refer to CC0 Public Domain Dedication for more information.
  // In summary, you are entitled to use this encoded model in absolutely any manner you deem suitable, verbatim, or with modification, alone or embedded it in a larger context, redistribute it, commercially or not, in a restricted way or not..
  // To cite BioModels Database, please use: Li C, Donizelli M, Rodriguez N, Dharuri H, Endler L, Chelliah V, Li L, He E, Henry A, Stefan MI, Snoep JL, Hucka M, Le Novère N, Laibe C (2010) BioModels Database: An enhanced, curated and annotated resource for published quantitative kinetic models. BMC Syst Biol., 4:92.
  // biomodels.db:MODEL8478881246
  // isDescribedBy pubmed:17254973
  // biomodels.db:MODEL8478881246
  // isDescribedBy pubmed:17254973
  // biomodels.db:MODEL8478881246
  // biomodels.db:MODEL8478881246

  // Compartments:
  compartment mw59C37890_452A_43C7_AFB8_194AEAEE6E25 = 1;  // 2-D

  // Species:
  substanceOnly species IkBat in mw59C37890_452A_43C7_AFB8_194AEAEE6E25 = 0;  // substance in MWPREFIXUNIT_micromole
  substanceOnly species IkBa in mw59C37890_452A_43C7_AFB8_194AEAEE6E25 = 0;  // substance in MWPREFIXUNIT_micromole
  substanceOnly species IkBan in mw59C37890_452A_43C7_AFB8_194AEAEE6E25 = 0;  // substance in MWPREFIXUNIT_micromole
  substanceOnly species IkBaIKK in mw59C37890_452A_43C7_AFB8_194AEAEE6E25 = 0;  // substance in MWPREFIXUNIT_micromole
  substanceOnly species IkBaNFkB in mw59C37890_452A_43C7_AFB8_194AEAEE6E25 = 0.05;  // substance in MWPREFIXUNIT_micromole
  substanceOnly species IkBaNFkBn in mw59C37890_452A_43C7_AFB8_194AEAEE6E25 = 0;  // substance in MWPREFIXUNIT_micromole
  substanceOnly species IkBaIKKNFkB in mw59C37890_452A_43C7_AFB8_194AEAEE6E25 = 0;  // substance in MWPREFIXUNIT_micromole
  substanceOnly species NFkB in mw59C37890_452A_43C7_AFB8_194AEAEE6E25 = 0;  // substance in MWPREFIXUNIT_micromole
  substanceOnly species IKK2 in mw59C37890_452A_43C7_AFB8_194AEAEE6E25 = 0.1;  // substance in MWPREFIXUNIT_micromole
  substanceOnly species NFkBn in mw59C37890_452A_43C7_AFB8_194AEAEE6E25 = 0;  // substance in MWPREFIXUNIT_micromole
  substanceOnly species IKK1 in mw59C37890_452A_43C7_AFB8_194AEAEE6E25 = 0.1;  // substance in MWPREFIXUNIT_micromole
  substanceOnly species IkBbIKK in mw59C37890_452A_43C7_AFB8_194AEAEE6E25 = 0;  // substance in MWPREFIXUNIT_micromole
  substanceOnly species IkBbIKKNFkB in mw59C37890_452A_43C7_AFB8_194AEAEE6E25 = 0;  // substance in MWPREFIXUNIT_micromole
  substanceOnly species IkBbNFkBn in mw59C37890_452A_43C7_AFB8_194AEAEE6E25 = 0;  // substance in MWPREFIXUNIT_micromole
  substanceOnly species IkBbNFkB in mw59C37890_452A_43C7_AFB8_194AEAEE6E25 = 0.02;  // substance in MWPREFIXUNIT_micromole
  substanceOnly species IkBbn in mw59C37890_452A_43C7_AFB8_194AEAEE6E25 = 0;  // substance in MWPREFIXUNIT_micromole
  substanceOnly species IkBb in mw59C37890_452A_43C7_AFB8_194AEAEE6E25 = 0;  // substance in MWPREFIXUNIT_micromole
  substanceOnly species IkBbt in mw59C37890_452A_43C7_AFB8_194AEAEE6E25 = 0;  // substance in MWPREFIXUNIT_micromole
  substanceOnly species IkBet in mw59C37890_452A_43C7_AFB8_194AEAEE6E25 = 0;  // substance in MWPREFIXUNIT_micromole
  substanceOnly species IkBe in mw59C37890_452A_43C7_AFB8_194AEAEE6E25 = 0;  // substance in MWPREFIXUNIT_micromole
  substanceOnly species IkBen in mw59C37890_452A_43C7_AFB8_194AEAEE6E25 = 0;  // substance in MWPREFIXUNIT_micromole
  substanceOnly species IkBeNFkB in mw59C37890_452A_43C7_AFB8_194AEAEE6E25 = 0.02;  // substance in MWPREFIXUNIT_micromole
  substanceOnly species IkBeNFkBn in mw59C37890_452A_43C7_AFB8_194AEAEE6E25 = 0;  // substance in MWPREFIXUNIT_micromole
  substanceOnly species IkBeIKKNFkB in mw59C37890_452A_43C7_AFB8_194AEAEE6E25 = 0;  // substance in MWPREFIXUNIT_micromole
  substanceOnly species IkBeIKK in mw59C37890_452A_43C7_AFB8_194AEAEE6E25 = 0;  // substance in MWPREFIXUNIT_micromole
  substanceOnly species P100IKK1 in mw59C37890_452A_43C7_AFB8_194AEAEE6E25 = 0;  // substance in MWPREFIXUNIT_micromole
  substanceOnly species P100IKK1NFkB in mw59C37890_452A_43C7_AFB8_194AEAEE6E25 = 0;  // substance in MWPREFIXUNIT_micromole
  substanceOnly species P100NFkBn in mw59C37890_452A_43C7_AFB8_194AEAEE6E25 = 0;  // substance in MWPREFIXUNIT_micromole
  substanceOnly species P100NFkB in mw59C37890_452A_43C7_AFB8_194AEAEE6E25 = 0.01;  // substance in MWPREFIXUNIT_micromole
  substanceOnly species P100n in mw59C37890_452A_43C7_AFB8_194AEAEE6E25 = 0;  // substance in MWPREFIXUNIT_micromole
  substanceOnly species P100 in mw59C37890_452A_43C7_AFB8_194AEAEE6E25 = 0;  // substance in MWPREFIXUNIT_micromole
  substanceOnly species P100t in mw59C37890_452A_43C7_AFB8_194AEAEE6E25 = 0;  // substance in MWPREFIXUNIT_micromole

  // Parameters:
  ikk1_multiplier = 0.01;
  ikk2_multiplier = 0.001;
  ikk1_multiplier_tsl_asn = 1;

  // Reactions:
  txn_a: => IkBat; rsu_a;
    rsu_a = 0.00011848 uM_per_min;
  mdeg_a: IkBat => ; rd_a*IkBat;
    rd_a = 0.0252 per_min;
  tsl_a: IkBat => IkBat + IkBa; ps_c_a*IkBat;
    ps_c_a = 0.02448 per_min;
  int_ai: IkBa + IKK2 -> IkBaIKK; a_c_ai*IkBa*IKK2 - d_c_ai*IkBaIKK;
    a_c_ai = 1.35 per_uM_per_min; d_c_ai = 0.075 per_min;
  int_an: IkBa + NFkB -> IkBaNFkB; a_c_an*IkBa*NFkB - d_c_an*IkBaNFkB;
    a_c_an = 30 per_uM_per_min; d_c_an = 6e-5 per_min;
  int_an_n: IkBan + NFkBn -> IkBaNFkBn; a_n_an/ikk1_multiplier_tsl_asn*IkBan*NFkBn - d_n_an*IkBaNFkBn;
    a_n_an = 30 per_uM_per_min; d_n_an = 6e-5 per_min;
  int_2ani: IkBaNFkB + IKK2 -> IkBaIKKNFkB; a_c_2ani*IkBaNFkB*IKK2 - d_c_2ani*IkBaIKKNFkB;
    a_c_2ani = 11.1 per_uM_per_min; d_c_2ani = 0.075 per_min;
  int_2ain: IkBaIKK + NFkB -> IkBaIKKNFkB; a_c_2ain*IkBaIKK*NFkB - d_c_2ain*IkBaIKKNFkB;
    a_c_2ain = 30 per_uM_per_min; d_c_2ain = 6e-5 per_min;
  deg_a: IkBa => ; pd_c_a*IkBa;
    pd_c_a = 0.12 per_min;
  deg_a_n: IkBan => ; pd_n_a*IkBan;
    pd_n_a = 0.12 per_min;
  deg_an_n: IkBaNFkBn => NFkBn; pd_n_2an*IkBaNFkBn;
    pd_n_2an = 6e-5 per_min;
  deg_an: IkBaNFkB => NFkB; pd_c_2an*IkBaNFkB;
    pd_c_2an = 6e-5 per_min;
  deg_ai: IkBaIKK => IKK2; pd_c_2ai*IkBaIKK*ikk2_multiplier;
    pd_c_2ai = 0.0018 per_min;
  deg_ain: IkBaIKKNFkB => IKK2 + NFkB; pd_c_3ain*IkBaIKKNFkB*ikk2_multiplier;
    pd_c_3ain = 0.36 per_min;
  loc_a: IkBa -> IkBan; in_a*IkBa - ex_a*IkBan;
    in_a = 0.09 per_min; ex_a = 0.012 per_min;
  loc_an: IkBaNFkB -> IkBaNFkBn; in_2an*IkBaNFkB - ex_2an*IkBaNFkBn;
    in_2an = 0.276 per_min; ex_2an = 0.828 per_min;
  loc_n: NFkB -> NFkBn; in_n*NFkB - ex_n*NFkBn;
    in_n = 5.4 per_min; ex_n = 0.0048 per_min;
  itxn_a: => IkBat; rsr_an*NFkBn^3;  // modifiers: NFkBn
    rsr_an = 9.504 per_uMsquared_per_min;
  itxn_b: => IkBbt; rsr_bn*NFkBn^3;  // modifiers: NFkBn
    rsr_bn = 0.02 per_uMsquared_per_min;
  loc_bn: IkBbNFkB -> IkBbNFkBn; in_2bn*IkBbNFkB - ex_2bn*IkBbNFkBn;
    in_2bn = 0.0276 per_min; ex_2bn = 0.414 per_min;
  loc_b: IkBb -> IkBbn; in_b*IkBb - ex_b*IkBbn;
    in_b = 0.009 per_min; ex_b = 0.012 per_min;
  deg_bin: IkBbIKKNFkB => IKK2 + NFkB; pd_c_3bin*IkBbIKKNFkB*ikk2_multiplier;
    pd_c_3bin = 0.12 per_min;
  deg_bi: IkBbIKK => IKK2; pd_c_2bi*IkBbIKK*ikk2_multiplier;
    pd_c_2bi = 0.0006 per_min;
  deg_bn: IkBbNFkB => NFkB; pd_c_2bn*IkBbNFkB;
    pd_c_2bn = 6e-5 per_min;
  deg_bn_n: IkBbNFkBn => NFkBn; pd_n_2bn*IkBbNFkBn;
    pd_n_2bn = 6e-5 per_min;
  deg_b_n: IkBbn => ; pd_n_b*IkBbn;
    pd_n_b = 0.18 per_min;
  deg_b: IkBb => ; pd_c_b*IkBb;
    pd_c_b = 0.18 per_min;
  int_2bin: IkBbIKK + NFkB -> IkBbIKKNFkB; a_c_2bin*IkBbIKK*NFkB - d_c_2bin*IkBbIKKNFkB;
    a_c_2bin = 30 per_uM_per_min; d_c_2bin = 6e-5 per_min;
  int_2bni: IkBbNFkB + IKK2 -> IkBbIKKNFkB; a_c_2bni*IkBbNFkB*IKK2 - d_c_2bni*IkBbIKKNFkB;
    a_c_2bni = 2.88 per_uM_per_min; d_c_2bni = 0.105 per_min;
  int_bn_n: IkBbn + NFkBn -> IkBbNFkBn; a_n_bn/ikk1_multiplier_tsl_asn*IkBbn*NFkBn - d_n_bn*IkBbNFkBn;
    a_n_bn = 30 per_uM_per_min; d_n_bn = 6e-5 per_min;
  int_bn: IkBb + NFkB -> IkBbNFkB; a_c_bn*IkBb*NFkB - d_c_bn*IkBbNFkB;
    a_c_bn = 30 per_uM_per_min; d_c_bn = 6e-5 per_min;
  int_bi: IkBb + IKK2 -> IkBbIKK; a_c_bi*IkBb*IKK2 - d_c_bi*IkBbIKK;
    a_c_bi = 0.36 per_uM_per_min; d_c_bi = 0.105 per_min;
  tsl_b: IkBbt => IkBbt + IkBb; ps_c_b*IkBbt;
    ps_c_b = 0.02448 per_min;
  mdeg_b: IkBbt => ; rd_b*IkBbt;
    rd_b = 0.00336 per_min;
  txn_b: => IkBbt; rsu_b;
    rsu_b = 4.272e-5 uM_per_min;
  txn_e: => IkBet; rsu_e;
    rsu_e = 6.1e-6 uM_per_min;
  mdeg_e: IkBet => ; rd_e*IkBet;
    rd_e = 0.00672 per_min;
  tsl_e: IkBet => IkBet + IkBe; ps_c_e*IkBet;
    ps_c_e = 0.02448 per_min;
  int_ei: IkBe + IKK2 -> IkBeIKK; a_c_ei*IkBe*IKK2 - d_c_ei*IkBeIKK;
    a_c_ei = 0.54 per_uM_per_min; d_c_ei = 0.105 per_min;
  int_en: IkBe + NFkB -> IkBeNFkB; a_c_en*IkBe*NFkB - d_c_en*IkBeNFkB;
    a_c_en = 30 per_uM_per_min; d_c_en = 6e-5 per_min;
  int_en_n: IkBen + NFkBn -> IkBeNFkBn; a_n_en/ikk1_multiplier_tsl_asn*IkBen*NFkBn - d_n_en*IkBeNFkBn;
    a_n_en = 30 per_uM_per_min; d_n_en = 6e-5 per_min;
  int_2eni: IkBeNFkB + IKK2 -> IkBeIKKNFkB; a_c_2eni*IkBeNFkB*IKK2 - d_c_2eni*IkBeIKKNFkB;
    a_c_2eni = 4.2 per_uM_per_min; d_c_2eni = 0.105 per_min;
  int_2ein: IkBeIKK + NFkB -> IkBeIKKNFkB; a_c_2ein*IkBeIKK*NFkB - d_c_2ein*IkBeIKKNFkB;
    a_c_2ein = 30 per_uM_per_min; d_c_2ein = 6e-5 per_min;
  deg_e: IkBe => ; pd_c_e*IkBe;
    pd_c_e = 0.18 per_min;
  deg_e_n: IkBen => ; pd_n_e*IkBen;
    pd_n_e = 0.18 per_min;
  deg_en_n: IkBeNFkBn => NFkBn; pd_n_2en*IkBeNFkBn;
    pd_n_2en = 6e-5 per_min;
  deg_en: IkBeNFkB => NFkB; pd_c_2en*IkBeNFkB;
    pd_c_2en = 6e-5 per_min;
  deg_ei: IkBeIKK => IKK2; pd_c_2ei*IkBeIKK*ikk2_multiplier;
    pd_c_2ei = 0.0018 per_min;
  deg_ein: IkBeIKKNFkB => NFkB + IKK2; pd_c_3ein*IkBeIKKNFkB*ikk2_multiplier;
    pd_c_3ein = 0.18 per_min;
  loc_e: IkBe -> IkBen; in_e*IkBe - ex_e*IkBen;
    in_e = 0.045 per_min; ex_e = 0.012 per_min;
  loc_en: IkBeNFkB -> IkBeNFkBn; in_2en*IkBeNFkB - ex_2en*IkBeNFkBn;
    in_2en = 0.138 per_min; ex_2en = 0.414 per_min;
  itxn_e: => IkBet; rsr_en*NFkBn^3;  // modifiers: NFkBn
    rsr_en = 1.28 per_uMsquared_per_min;
  itxn_p: => P100t; rsr_pn*NFkBn^3;  // modifiers: NFkBn
    rsr_pn = 1.6 per_uMsquared_per_min;
  loc_pn: P100NFkB -> P100NFkBn; in_2pn*P100NFkB - ex_2pn*P100NFkBn;
    in_2pn = 0.276 per_min; ex_2pn = 0.414 per_min;
  loc_p: P100 -> P100n; in_p*P100 - ex_p*P100n;
    in_p = 0.045 per_min; ex_p = 0.012 per_min;
  deg_pqn: P100IKK1NFkB => NFkB + IKK1; pd_c_3pqn*P100IKK1NFkB*ikk1_multiplier;
    pd_c_3pqn = 0.18 per_min;
  deg_pqi: P100IKK1 => IKK1; pd_c_2pq*P100IKK1*ikk1_multiplier;
    pd_c_2pq = 0.0012 per_min;
  deg_pn: P100NFkB => NFkB; pd_c_2pn*P100NFkB;
    pd_c_2pn = 6e-5 per_min;
  deg_pn_n: P100NFkBn => NFkBn; pd_n_2pn*P100NFkBn;
    pd_n_2pn = 6e-5 per_min;
  deg_p_n: P100n => ; pd_n_p*P100n;
    pd_n_p = 0.18 per_min;
  deg_p: P100 => ; pd_c_p*P100;
    pd_c_p = 0.12 per_min;
  int_2pqn: P100IKK1 + NFkB -> P100IKK1NFkB; a_c_2pqn*P100IKK1*NFkB - d_c_2pqn*P100IKK1NFkB;
    a_c_2pqn = 30 per_uM_per_min; d_c_2pqn = 6e-5 per_min;
  int_2pnq: P100NFkB + IKK1 -> P100IKK1NFkB; a_c_2pnq*P100NFkB*IKK1 - d_c_2pnq*P100IKK1NFkB;
    a_c_2pnq = 4.2 per_uM_per_min; d_c_2pnq = 6e-5 per_min;
  int_pn_n: P100n + NFkBn -> P100NFkBn; a_n_pn*P100n*NFkBn - d_n_pn*P100NFkBn;
    a_n_pn = 30 per_uM_per_min; d_n_pn = 6e-5 per_min;
  int_pn: P100 + NFkB -> P100NFkB; a_c_pn*P100*NFkB - d_c_pn*P100NFkB;
    a_c_pn = 30 per_uM_per_min; d_c_pn = 6e-5 per_min;
  int_pq: P100 + IKK1 -> P100IKK1; a_c_pq*P100*IKK1 - d_c_pq*P100IKK1;
    a_c_pq = 0.54 per_uM_per_min; d_c_pq = 0.105 per_min;
  tsl_p: P100t => P100t + P100; ps_c_p/ikk1_multiplier_tsl_asn*P100t;
    ps_c_p = 0.02448 per_min;
  mdeg_p: P100t => ; rd_p*P100t;
    rd_p = 0.00168 per_min;
  txn_p: => P100t; rsu_p;
    rsu_p = 6.1e-6 uM_per_min;

  // Unit definitions:
  unit MWPREFIXUNIT_micromole = 1e-6 mole;
  unit uM_per_min = 1.666667e-8 mole / second;
  unit per_min = 1 / (0.01666667 second);
  unit per_uM_per_min = 1 / (16666.67 mole * second);
  unit per_uMsquared_per_min = 1 / ((1.666667e8 mole)^2 * second);
end
