// SBML level 2 version 3

model Priebe1998_VentricularArrhythmias()
  // This a model from the article:
  // Simulation study of cellular electric properties in heart failure
  // Priebe L, Beuckelmann DJ. Circ Res. 1998; 82(11):1206-23 9633920 ,
  // Abstract:
  // Patients with severe heart failure are at high risk of sudden cardiac death. In the majority of these patients, sudden cardiac death is thought to be due to ventricular tachyarrhythmias. Alterations of the electric properties of single myocytes in heart failure may favor the occurrence of ventricular arrhythmias in these patients by inducing early or delayed afterdepolarizations. Mathematical models of the cellular action potential and its underlying ionic currents could help to elucidate possible arrhythmogenic mechanisms on a cellular level. In the present study, selected ionic currents based on human data are incorporated into a model of the ventricular action potential for the purpose of studying the cellular electrophysiological consequences of heart failure. Ionic currents that are not yet sufficiently characterized in human ventricular myocytes are adopted from the action potential model developed by Luo and Rudy (LR model). The main results obtained from this model are as follows: The action potential in ventricular myocytes from failing hearts is longer than in nonfailing control hearts. The major underlying mechanisms for this prolongation are the enhanced activity of the Na+-Ca2+ exchanger, the slowed diastolic decay of the [Ca2+]i transient, and the reduction of the inwardly rectifying K+ current and the Na+-K+ pump current in myocytes of failing hearts. Furthermore, the fast and slow components of the delayed rectifier K+ current (I(Kr) and I(Ks), respectively) are of utmost importance in determining repolarization of the human ventricular action potential. In contrast, the influence of the transient outward K+ current on APD is only small in both cell groups. Inhibition of I(Kr) promotes the development of early afterdepolarizations in failing, but not nonfailing, myocytes. Furthermore, spontaneous Ca2+ release from the sarcoplasmic reticulum triggers a premature action potential only in failing myocytes. This model of the ventricular action potential and its alterations in heart failure is intended to serve as a tool for investigating the effects of therapeutic interventions on the electric excitability of the human ventricular myocardium.
  // This model was taken from the CellML repository and automatically converted to SBML.
  // The original model was: Priebe, Beuckelmann. (1998) - version02
  // The original CellML model was created by:
  // Lloyd, Catherine, May
  // c.lloyd@auckland.ac.nz
  // The University of Auckland
  // Auckland Bioengineering Institute
  // This model originates from BioModels Database: A Database of Annotated Published Models (http://www.ebi.ac.uk/biomodels/). It is copyright (c) 2005-2011 The BioModels.net Team.
  // To the extent possible under law, all copyright and related or neighbouring rights to this encoded model have been dedicated to the public domain worldwide. Please refer to CC0 Public Domain Dedication for more information.
  // In summary, you are entitled to use this encoded model in absolutely any manner you deem suitable, verbatim, or with modification, alone or embedded it in a larger context, redistribute it, commercially or not, in a restricted way or not..
  // To cite BioModels Database, please use: Li C, Donizelli M, Rodriguez N, Dharuri H, Endler L, Chelliah V, Li L, He E, Henry A, Stefan MI, Snoep JL, Hucka M, Le Novère N, Laibe C (2010) BioModels Database: An enhanced, curated and annotated resource for published quantitative kinetic models. BMC Syst Biol., 4:92.
  // biomodels.db:MODEL8683876463
  // isDescribedBy pubmed:9633920
  // biomodels.db:MODEL8683876463
  // isDescribedBy pubmed:9633920
  // biomodels.db:MODEL8683876463
  // biomodels.db:MODEL8683876463

  // Compartments:
  compartment Compartment = 1 litre;

  // Parameters:
  V_cell = -90.77964 mV;
  R = 8.3143 joule_per_mole_kelvin;
  T = 310.15 kelvin;
  F = 96.4867 coulomb_per_millimole;
  FonRT has per_mV;
  Cm = 153.4 pF;
  failing = 0 dimensionless;
  dVdt has mV_per_ms;
  I_tot has uA_per_uF;
  i_Stim has uA_per_uF;
  stim_offset = 0 ms;
  stim_period = 1000 ms;
  stim_duration = 3 ms;
  stim_amplitude = -15 uA_per_uF;
  past has ms;
  V_clamp = 0 dimensionless;
  V_hold = -60 mV;
  V_step = 0 mV;
  i_Na has uA_per_uF;
  E_Na has mV;
  g_Na = 16 mS_per_uF;
  m = 0.0005855256 dimensionless;
  alpha_m has per_ms;
  beta_m has per_ms;
  V_INa_m_gate has mV;
  time_INa_m_gate has ms;
  h = 0.9958655 dimensionless;
  alpha_h has per_ms;
  beta_h has per_ms;
  V_INa_h_gate has mV;
  time_INa_h_gate has ms;
  j = 0.9970112 dimensionless;
  alpha_j has per_ms;
  beta_j has per_ms;
  V_INa_j_gate has mV;
  time_INa_j_gate has ms;
  i_Ca has uA_per_uF;
  E_Ca has mV;
  g_Ca_max = 0.064 mS_per_uF;
  d = 2.506532e-10 dimensionless;
  alpha_d has per_ms;
  beta_d has per_ms;
  V_ICa_d_gate has mV;
  time_ICa_d_gate has ms;
  f = 0.9213038 dimensionless;
  alpha_f has per_ms;
  beta_f has per_ms;
  V_ICa_f_gate has mV;
  time_ICa_f_gate has ms;
  f_Ca has dimensionless;
  Km_Ca = 0.0006 mM;
  V_ICa_f_Ca_gate has mV;
  time_ICa_f_Ca_gate has ms;
  Cai_ICa_f_Ca_gate has mM;
  i_to has uA_per_uF;
  g_to_max has mS_per_uF;
  E_to has mV;
  r = 1.750325e-5 dimensionless;
  alpha_r has per_ms;
  beta_r has per_ms;
  V_Ito_r_gate has mV;
  time_Ito_r_gate has ms;
  t = 0.9998973 dimensionless;
  alpha_t has per_ms;
  beta_t has per_ms;
  V_Ito_t_gate has mV;
  time_Ito_t_gate has ms;
  i_Ks has uA_per_uF;
  g_Ks_max = 0.02 mS_per_uF;
  E_Ks has mV;
  Xs = 0.008856581 dimensionless;
  alpha_Xs has per_ms;
  beta_Xs has per_ms;
  V_IKs_Xs_gate has mV;
  time_IKs_Xs_gate has ms;
  i_Kr has uA_per_uF;
  g_Kr_max = 0.015 mS_per_uF;
  rik has dimensionless;
  E_K has mV;
  Xr = 0.000215523 dimensionless;
  alpha_Xr has per_ms;
  beta_Xr has per_ms;
  V_IKr_Xr_gate has mV;
  time_IKr_Xr_gate has ms;
  i_K1 has uA_per_uF;
  E_K1 has mV;
  g_K1_max has mS_per_uF;
  K1_infinity has dimensionless;
  alpha_K1 has per_ms;
  beta_K1 has per_ms;
  V_IK1_K1_gate has mV;
  time_IK1_K1_gate has ms;
  i_b_Ca has uA_per_uF;
  g_b_Ca_max has mS_per_uF;
  i_b_Na has uA_per_uF;
  g_b_Na_max has mS_per_uF;
  i_NaK has uA_per_uF;
  I_NaK_max has uA_per_uF;
  f_NaK has dimensionless;
  K_mNai = 10 mM;
  K_mKo = 1.5 mM;
  sigma has dimensionless;
  i_NaCa has uA_per_uF;
  K_NaCa has uA_per_uF;
  K_mNa = 87.5 mM;
  K_mCa = 1.38 mM;
  K_sat = 0.1 dimensionless;
  eta = 0.35 dimensionless;
  i_rel has mM_per_ms;
  G_rel has per_ms;
  G_rel_max = 22 per_ms;
  G_rel_overload = 3 per_ms;
  K_mrel = 0.0008 mM;
  delta_Ca_ith = 5e-6 mM;
  APtrack = -1.372159e-136 dimensionless;
  APtrack2 = -7.585179e-136 dimensionless;
  APtrack3 = 4.820354e-5 dimensionless;
  Cainfluxtrack = -7.711202e-138 mM;
  OVRLDtrack = 1e-6 dimensionless;
  OVRLDtrack2 = 1e-6 dimensionless;
  OVRLDtrack3 = 1e-6 dimensionless;
  CSQNthresh = 0.7 mM;
  Logicthresh = 0.98 dimensionless;
  i_up has mM_per_ms;
  I_up_max has mM_per_ms;
  K_mup = 0.00092 mM;
  i_leak has mM_per_ms;
  K_leak has per_ms;
  i_tr has mM_per_ms;
  tau_tr = 180 ms;
  K_mTn = 0.0005 mM;
  K_mCMDN = 0.00238 mM;
  Tn_max = 0.07 mM;
  CMDN_max = 0.05 mM;
  buffon = 1 dimensionless;
  Cai_bufc has dimensionless;
  CSQN_max = 10 mM;
  K_mCSQN = 0.8 mM;
  Ca_JSR_bufc has dimensionless;
  Nai = 10 mM;
  Nao = 138 mM;
  Cai_Ionic_concentrations = 0.0002 mM;
  Cao = 2 mM;
  Ki = 140 mM;
  Ko = 4 mM;
  Ca_JSR = 2.5 mM;
  Ca_NSR = 2.5 mM;
  preplength = 100 um;
  radius = 11 um;
  volume has fL;
  V_myo has fL;
  V_JSR has fL;
  V_NSR has fL;

  // Assignment rules:
  FonRT := F/(R*T);
  past := floor(time/stim_period)*stim_period;
  i_Stim := piecewise(stim_amplitude, (time - past >= stim_offset) && (time - past <= stim_offset + stim_duration), 0);
  I_tot := i_Na + i_Ca + i_to + i_Kr + i_Ks + i_K1 + i_NaCa + i_NaK + i_b_Na + i_b_Ca + i_Stim;
  dVdt := piecewise((V_hold - V_cell)/1, (V_clamp == 1) && ((time <= 500) || (time > 800)), (V_step - V_cell)/1, (V_clamp == 1) && (time > 500) && (time <= 800), -1*I_tot);
  i_Na := g_Na*m^3*h*j*(V_cell - E_Na);
  E_Na := ln(Nao/Nai)/FonRT;
  alpha_m := piecewise(0.32*(V_INa_m_gate + 47.13)/(1 - exp(-0.1*(V_INa_m_gate + 47.13))), abs(V_INa_m_gate + 47.13) > 0.001, 3.2);
  beta_m := 0.08*exp(-V_INa_m_gate/11);
  alpha_h := piecewise(0.135*exp((80 + V_INa_h_gate)/(-6.8)), V_INa_h_gate + 40 < 0, 0);
  beta_h := piecewise(3.56*exp(0.079*V_INa_h_gate) + 310000*exp(0.35*V_INa_h_gate), 40 + V_INa_h_gate < 0, 1/(0.13*(1 + exp(-(V_INa_h_gate + 10.66)/11.1))));
  alpha_j := piecewise((-127140*exp(0.244*V_INa_j_gate) - 3.474e-5*exp(-0.04391*V_INa_j_gate))*(V_INa_j_gate + 37.78)/(1 + exp(0.311*(V_INa_j_gate + 79.23))), 40 + V_INa_j_gate < 0, 0);
  beta_j := piecewise(0.1212*exp(-0.01052*V_INa_j_gate)/(1 + exp(-0.1378*(V_INa_j_gate + 40.14))), 40 + V_INa_j_gate < 0, 0.3*exp(-2.535e-7*V_INa_j_gate)/(1 + exp(-0.1*(V_INa_j_gate + 32))));
  i_Ca := g_Ca_max*d*f*f_Ca*(V_cell - E_Ca);
  E_Ca := ln(Cao/Cai_Ionic_concentrations)/(2*FonRT);
  alpha_d := 14.9859/(16.6813*sqrt(2*pi))*exp(-((V_ICa_d_gate - 22.36)/16.6813)^2/2);
  beta_d := 0.1471 - 5.3/(14.93*sqrt(2*pi))*exp(-((V_ICa_d_gate - 6.2744)/14.93)^2/2);
  alpha_f := 0.006872/(1 + exp((V_ICa_f_gate - 6.1546)/6.1223));
  beta_f := (0.0687*exp(-0.1081*(V_ICa_f_gate + 9.8255)) + 0.0112)/(1 + exp(-0.2779*(V_ICa_f_gate + 9.8255))) + 0.0005474;
  f_Ca := Km_Ca/(Km_Ca + Cai_ICa_f_Ca_gate);
  g_to_max := piecewise(0.3, failing == 0, 0.191);
  i_to := g_to_max*r*t*(V_cell - E_to);
  E_to := ln((0.043*Nao + Ko)/(0.043*Nai + Ki))/FonRT;
  alpha_r := 0.5266*exp(-0.0166*(V_Ito_r_gate - 42.2912))/(1 + exp(-0.0943*(V_Ito_r_gate - 42.2912)));
  beta_r := (5.186e-5*V_Ito_r_gate + 0.5149*exp(-0.1344*(V_Ito_r_gate - 5.0027)))/(1 + exp(-0.1348*(V_Ito_r_gate - 5.186e-5)));
  alpha_t := (5.612e-5*V_Ito_t_gate + 0.0721*exp(-0.173*(V_Ito_t_gate + 34.2531)))/(1 + exp(-0.1732*(V_Ito_t_gate + 34.2531)));
  beta_t := (0.0001215*V_Ito_t_gate + 0.0767*exp(-1.66e-9*(V_Ito_t_gate + 34.0235)))/(1 + exp(-0.1604*(V_Ito_t_gate + 34.0235)));
  i_Ks := g_Ks_max*Xs^2*(V_cell - E_Ks);
  E_Ks := ln((0.01833*Nao + Ko)/(0.01833*Nai + Ki))/FonRT;
  alpha_Xs := 0.003013/(1 + exp((7.4454 - (V_IKs_Xs_gate + 10))/14.3171));
  beta_Xs := 0.00587/(1 + exp((5.95 + V_IKs_Xs_gate + 10)/15.82));
  i_Kr := g_Kr_max*Xr*rik*(V_cell - E_K);
  E_K := ln(Ko/Ki)/FonRT;
  rik := 1/(1 + exp((V_cell + 26)/23));
  alpha_Xr := 0.005*exp(0.0005266*(V_IKr_Xr_gate + 4.067))/(1 + exp(-0.1262*(V_IKr_Xr_gate + 4.067)));
  beta_Xr := 0.016*exp(0.0016*(V_IKr_Xr_gate + 65.66))/(1 + exp(0.0783*(V_IKr_Xr_gate + 65.66)));
  g_K1_max := piecewise(2.5, failing == 0, 2);
  i_K1 := g_K1_max*K1_infinity*(V_cell - E_K1);
  E_K1 := ln(Ko/Ki)/FonRT;
  K1_infinity := alpha_K1/(alpha_K1 + beta_K1);
  alpha_K1 := 0.1/(1 + exp(0.06*(V_IK1_K1_gate - (E_K1 + 200))));
  beta_K1 := (3*exp(0.0002*(V_IK1_K1_gate + 100 + (-E_K1))) + 1*exp(0.1*(V_IK1_K1_gate - (10 + E_K1))))/(1 + exp(-0.5*(V_IK1_K1_gate - E_K1)));
  g_b_Ca_max := piecewise(0.00085, failing == 0, 0.0013);
  i_b_Ca := g_b_Ca_max*(V_cell - E_Ca);
  g_b_Na_max := piecewise(0.001, failing == 0, 0);
  i_b_Na := g_b_Na_max*(V_cell - E_Na);
  I_NaK_max := piecewise(1.3, failing == 0, 0.75);
  f_NaK := 1/(1 + 0.1245*exp(-0.1*V_cell*FonRT) + 0.0365*sigma*exp(-V_cell*FonRT));
  sigma := 1/7*(exp(Nao/67.3) - 1);
  i_NaK := I_NaK_max*f_NaK*1/(1 + (K_mNai/Nai)^1.5)*Ko/(Ko + K_mKo);
  K_NaCa := piecewise(1000, failing == 0, 1650);
  i_NaCa := K_NaCa*1/(K_mNa^3 + Nao^3)*1/(K_mCa + Cao)*1/(1 + K_sat*exp((eta - 1)*V_cell*FonRT))*(exp(eta*V_cell*FonRT)*Nai^3*Cao - exp((eta - 1)*V_cell*FonRT)*Nao^3*Cai_Ionic_concentrations);
  G_rel := piecewise(1*G_rel_max*(Cainfluxtrack - delta_Ca_ith)/(K_mrel + Cainfluxtrack - delta_Ca_ith)*(1 - APtrack2)*APtrack2, Cainfluxtrack > delta_Ca_ith, 0*G_rel_overload*(1 - OVRLDtrack2)*OVRLDtrack2, (Cainfluxtrack <= delta_Ca_ith) && (OVRLDtrack2 > 0), 0);
  i_rel := G_rel*(Ca_JSR - Cai_Ionic_concentrations);
  I_up_max := piecewise(0.0045, failing == 0, 0.0015);
  i_up := I_up_max*Cai_Ionic_concentrations/(Cai_Ionic_concentrations + K_mup);
  K_leak := piecewise(0.00026, failing == 0, 0.00017);
  i_leak := K_leak*Ca_NSR;
  i_tr := 1*(Ca_NSR - Ca_JSR)/tau_tr;
  Cai_bufc := 1/(1 + buffon*(CMDN_max*K_mCMDN/(K_mCMDN + Cai_Ionic_concentrations)^2 + Tn_max*K_mTn/(K_mTn + Cai_Ionic_concentrations)^2));
  Ca_JSR_bufc := 1/(1 + CSQN_max*K_mCSQN/(K_mCSQN + Ca_JSR)^2);
  volume := pi*preplength*radius^2;
  V_myo := 0.68*volume;
  V_NSR := 0.0552*volume;
  V_JSR := 0.0048*volume;

  // Rate rules:
  V_cell' = dVdt;
  m' = alpha_m*(1 - m) - beta_m*m;
  h' = alpha_h*(1 - h) - beta_h*h;
  j' = alpha_j*(1 - j) - beta_j*j;
  d' = alpha_d*(1 - d) - beta_d*d;
  f' = alpha_f*(1 - f) - beta_f*f;
  r' = alpha_r*(1 - r) - beta_r*r;
  t' = alpha_t*(1 - t) - beta_t*t;
  Xs' = alpha_Xs*(1 - Xs) - beta_Xs*Xs;
  Xr' = alpha_Xr*(1 - Xr) - beta_Xr*Xr;
  APtrack' = piecewise(100*(1 - APtrack) - 0.5*APtrack, dVdt > 150, -0.5*APtrack);
  APtrack2' = piecewise(100*(1 - APtrack2) - 0.5*APtrack2, (APtrack < 0.2) && (APtrack > 0.18), -0.5*APtrack2);
  APtrack3' = piecewise(100*(1 - APtrack3) - 0.5*APtrack3, (APtrack < 0.2) && (APtrack > 0.18), -0.01*APtrack3);
  Cainfluxtrack' = piecewise(-Cm*(i_Ca - i_NaCa + i_b_Ca)/(2*V_myo*F), APtrack > 0.2, 0, (APtrack2 > 0.01) && (APtrack <= 0.2), -0.5*Cainfluxtrack);
  OVRLDtrack' = piecewise(0*50*(1 - OVRLDtrack), (1/(1 + K_mCSQN/Ca_JSR) > CSQNthresh) && (OVRLDtrack3 < 0.37) && (APtrack3 < 0.37), -0*0.5*OVRLDtrack);
  OVRLDtrack2' = piecewise(0*50*(1 - OVRLDtrack2), (OVRLDtrack > Logicthresh) && (OVRLDtrack2 < Logicthresh), -0*0.5*OVRLDtrack2);
  OVRLDtrack3' = piecewise(0*50*(1 - OVRLDtrack3), (OVRLDtrack > Logicthresh) && (OVRLDtrack3 < Logicthresh), -0*0.01*OVRLDtrack3);
  Nai' = -1*Cm*(i_Na + i_b_Na + i_NaCa*3 + i_NaK*3)/(V_myo*F);
  Ki' = -1*Cm*(i_to + i_Kr + i_K1 + i_Stim + i_Ks - 2*i_NaK)/(V_myo*F);
  Cai_Ionic_concentrations' = Cai_bufc*(-Cm*(i_Ca - 2*i_NaCa + i_b_Ca)/(2*V_myo*F) + i_rel*V_JSR/V_myo + (i_leak - i_up)*V_NSR/V_myo);
  Ca_JSR' = Ca_JSR_bufc*(i_tr - i_rel);
  Ca_NSR' = -1*(i_leak + V_JSR/V_NSR*i_tr - i_up);

  // Unit definitions:
  unit ms = 1e-3 second;
  unit per_ms = 1 / (1e-3 second);
  unit mV = 1e-3 volt;
  unit per_mV = 1 / (1e-3 volt);
  unit per_mV_ms = 1 / (1e-3 volt * 1e-3 second);
  unit mV_per_ms = 1e-3 volt / (1e-3 second);
  unit mS_per_uF = 1e-3 siemens / (1e-6 farad);
  unit pF = 1e-12 farad;
  unit uA_per_uF = 1e-6 ampere / (1e-6 farad);
  unit mM = 1e-3 mole / litre;
  unit mM_per_ms = 1e-3 mole / (litre * 1e-3 second);
  unit joule_per_mole_kelvin = joule / (mole * kelvin);
  unit coulomb_per_millimole = coulomb / (1e-3 mole);
  unit um = 1e-6 metre;
  unit cm2 = (0.01 metre)^2;
  unit fL = 1e-15 litre;
  unit time = 1e-3 second;
end
