// SBML level 2 version 3

model Potter2006_AndrogenicRegulation()
  // This a model from the article:
  // Mathematical model for the androgenic regulation of the prostate in intact and castrated adult male rats.
  // Potter LK, Zager MG, Barton HA. Am J Physiol Endocrinol Metab. 2006:91(5):E952-64. 16757547 ,
  // Abstract:
  // The testicular-hypothalamic-pituitary axis regulates male reproductive system functions. Understanding these regulatory mechanisms is important for assessing the reproductive effects of environmental and pharmaceutical androgenic and antiandrogenic compounds. A mathematical model for the dynamics of androgenic synthesis, transport, metabolism, and regulation of the adult rodent ventral prostate was developed on the basis of a model by Barton and Anderson (1997). The model describes the systemic and local kinetics of testosterone (T), 5alpha-dihydrotestosterone (DHT), and luteinizing hormone (LH), with metabolism of T to DHT by 5alpha-reductase in liver and prostate. Also included are feedback loops for the positive regulation of T synthesis by LH and negative regulation of LH by T and DHT. The model simulates maintenance of the prostate as a function of hormone concentrations and androgen receptor (AR)-mediated signal transduction. The regulatory processes involved in prostate size and function include cell proliferation, apoptosis, fluid production, and 5alpha-reductase activity. Each process is controlled through the occupancy of a representative gene by androgen-AR dimers. The model simulates prostate dynamics for intact, castrated, and intravenous T-injected rats. After calibration, the model accurately captures the castration-induced regression of the prostate compared with experimental data that show that the prostate regresses to approximately 17 and 5% of its intact weight at 14 and 30 days postcastration, respectively. The model also accurately predicts serum T and AR levels following castration compared with data. This model provides a framework for quantifying the kinetics and effects of environmental and pharmaceutical endocrine active compounds on the prostate.
  // This model was taken from the CellML repository and automatically converted to SBML.
  // The original model was: Potter, Zager, Barton (2006) - version03
  // The original CellML model was created by:
  // Lloyd, Catherine, May
  // c.lloyd@auckland.ac.nz
  // The University of Auckland
  // Auckland Bioengineering Institute
  // This model originates from BioModels Database: A Database of Annotated Published Models (http://www.ebi.ac.uk/biomodels/). It is copyright (c) 2005-2011 The BioModels.net Team.
  // To the extent possible under law, all copyright and related or neighbouring rights to this encoded model have been dedicated to the public domain worldwide. Please refer to CC0 Public Domain Dedication for more information.
  // In summary, you are entitled to use this encoded model in absolutely any manner you deem suitable, verbatim, or with modification, alone or embedded it in a larger context, redistribute it, commercially or not, in a restricted way or not..
  // To cite BioModels Database, please use: Li C, Donizelli M, Rodriguez N, Dharuri H, Endler L, Chelliah V, Li L, He E, Henry A, Stefan MI, Snoep JL, Hucka M, Le Novère N, Laibe C (2010) BioModels Database: An enhanced, curated and annotated resource for published quantitative kinetic models. BMC Syst Biol., 4:92.
  // biomodels.db:MODEL8684444027
  // isDescribedBy pubmed:16757547
  // biomodels.db:MODEL8684444027
  // isDescribedBy pubmed:16757547
  // biomodels.db:MODEL8684444027
  // biomodels.db:MODEL8684444027

  // Compartments:
  compartment Compartment = 1 litre;

  // Parameters:
  ATbl = 0 nanomole;
  k2T = 0.17 nmol_hr;
  ADbl = 0 nanomole;
  CT_A = 0 nM;
  kTA_on = 0.18 second_order_rate_constant;
  kTA_off = 8131 first_order_rate_constant;
  CD_A = 0 nM;
  kDA_on = 0.15 second_order_rate_constant;
  kDA_off = 5407 first_order_rate_constant;
  CTblf has nM;
  CDblf has nM;
  CAf has nM;
  ATl = 0 nanomole;
  ADl = 0 nanomole;
  CTlf has nM;
  CDlf has nM;
  ATif = 0 nanomole;
  ATst = 0 nanomole;
  CTtv has nM;
  ATp = 0 nanomole;
  ADp = 0 nanomole;
  CT_R = 0 nM;
  kTR_on = 0.14 second_order_rate_constant;
  kTR_off = 0.069 first_order_rate_constant;
  CD_R = 0 nM;
  kDR_on = 0.053 second_order_rate_constant;
  kDR_off = 0.018 first_order_rate_constant;
  CDT = 0 nM;
  kDT_on = 0.14 second_order_rate_constant;
  kDT_off = 3.13 first_order_rate_constant;
  CDD = 0 nM;
  kDD_on = 0.14 second_order_rate_constant;
  kDD_off = 3.13 first_order_rate_constant;
  CTT = 0 nM;
  kTT_on = 0.14 second_order_rate_constant;
  kTT_off = 3.13 first_order_rate_constant;
  CDD5a = 0 nM;
  kDNA_onDD5a = 0.14 second_order_rate_constant;
  kDNA_offDD5a = 0.07 first_order_rate_constant;
  CDDcd = 0 nM;
  kDNA_onDDcd = 0.14 second_order_rate_constant;
  kDNA_offDDcd = 0.1 first_order_rate_constant;
  CDDsec = 0 nM;
  kDNA_onDDsec = 0.14 second_order_rate_constant;
  kDNA_offDDsec = 0.2 first_order_rate_constant;
  CDDcp = 0 nM;
  kDNA_onDDcp = 0.14 second_order_rate_constant;
  kDNA_offDDcp = 0.7 first_order_rate_constant;
  CDT5a = 0 nM;
  kDNA_onDT5a = 0.14 second_order_rate_constant;
  kDNA_offDT5a = 0.56 first_order_rate_constant;
  CDTcd = 0 nM;
  kDNA_onDTcd = 0.14 second_order_rate_constant;
  kDNA_offDTcd = 0.8 first_order_rate_constant;
  CDTsec = 0 nM;
  kDNA_onDTsec = 0.14 second_order_rate_constant;
  kDNA_offDTsec = 1.6 first_order_rate_constant;
  CDTcp = 0 nM;
  kDNA_onDTcp = 0.14 second_order_rate_constant;
  kDNA_offDTcp = 5.6 first_order_rate_constant;
  CTT5a = 0 nM;
  kDNA_onTT5a = 0.14 second_order_rate_constant;
  kDNA_offTT5a = 0.84 first_order_rate_constant;
  CTTcd = 0 nM;
  kDNA_onTTcd = 0.14 second_order_rate_constant;
  kDNA_offTTcd = 1.2 first_order_rate_constant;
  CTTsec = 0 nM;
  kDNA_onTTsec = 0.14 second_order_rate_constant;
  kDNA_offTTsec = 2.4 first_order_rate_constant;
  CTTcp = 0 nM;
  kDNA_onTTcp = 0.14 second_order_rate_constant;
  kDNA_offTTcp = 8.4 first_order_rate_constant;
  CTpf has nM;
  T has nM;
  NTp = 0.79 dimensionless;
  CDpf has nM;
  D has nM;
  NDp = 1 dimensionless;
  CRf has nM;
  CDNAcdf has nM;
  CDNAsecf has nM;
  CDNA5af has nM;
  CDNAcpf has nM;
  DNAocp has dimensionless;
  DNAosec has dimensionless;
  DNAocd has dimensionless;
  DNAo5a has dimensionless;
  ATb = 0 nanomole;
  ADb = 0 nanomole;
  ALH = 0 nanomole;
  kLH1 = 0.13 l_hr;
  kLH2 = 0.026 nmol_hr;
  kLH3 = 0.000168 nmol_hr;
  kLH4 = 0.8 first_order_rate_constant;
  alpha_T = 0.25 dimensionless;
  alpha_D = 0.75 dimensionless;
  A has nmol_hr;
  B has nmol_hr;
  AR = 0 nanomole;
  k1R = 68.15 nmol_hr;
  keR = 71.9 l_hr;
  CR has nM;
  Qp has l_hr;
  kQp = 73.84 first_order_rate_constant;
  Vpc has litre;
  Vmax has nmol_hr;
  k5a = 3.02 nmol_hr;
  VPC1 = 0 litre;
  kcpl = 1.17e-7 kg_hr;
  kcd1 = 0.014 first_order_rate_constant;
  VPL1 = 0 litre;
  ksec = 8.44e-6 kg_hr;
  kflo = 0.043 first_order_rate_constant;
  Vp has litre;
  Qb has l_hr;
  Ql = 1.06 l_hr;
  Qt = 0.061 l_hr;
  Qbt has l_hr;
  Qc = 6.08 l_hr;
  k1T = 87.93 first_order_rate_constant;
  k1D = 77.2 first_order_rate_constant;
  km5alpha = 40 nM;
  ts = 0.56 dimensionless;
  mu = 1000 l_hr;
  Vmax1 = 3.65;
  Vmax0 = 2.89;
  PTif = 1.96 dimensionless;
  PTst = 1 dimensionless;
  PTl = 2.75;
  PDl = 2;
  PTb = 1 dimensionless;
  PDb = 0.62 dimensionless;
  CTbf has nM;
  CTbl = 7.6 nM;
  CDbf has nM;
  CDbl = 0.59 nM;
  CA = 500000 nM;
  CTl = 9.92 nM;
  CDl = 0.92 nM;
  CTst = 307.29 nM;
  CLH = 0.104 nanomole;
  CTif = 307.29 nM;
  CDNAcd = 0.075 nM;
  CDNAsec = 0.075 nM;
  CDNAcp = 0.075 nM;
  CDNA5a = 0.075 nM;
  CTb = 0.6275 nM;
  CDb = 0.019884 nM;
  VPC1b = 0.0001 kg;
  VPC2 = 5.08e-5 litre;
  VPL2 = 3.08e-6 litre;
  CTp = 11.38 nM;
  CDp = 52.46 nM;

  // Assignment rules:
  CTblf := CTbl - CT_A;
  CDblf := CDbl - CD_A;
  CAf := CA - (CT_A + CD_A);
  CTlf := CTl/PTl;
  CDlf := CDl/PDl;
  CTtv := CTif/PTif;
  CTpf := (CTp - (CT_R + 2*CTT + CDT + T))/(1 + NTp);
  T := CTTsec + CDTsec + CTT5a + CDT5a + CTTcd + CDTcd + CTTcp + CDTcp;
  CDpf := (CDp - (CD_R + 2*CDD + CDT + D))/(1 + NDp);
  D := CDDsec + CDTsec + CDD5a + CDT5a + CDDcd + CDTcd + CDDcp + CDTcp;
  CRf := CR - (CT_R + CD_R + 2*(CTT + CDD + CDT) + 2*(CDNAcdf + CDNAsecf + CDNAcpf + CDNA5af));
  CDNAcdf := CDNAcd - (CTTcd + CDDcd + CDTcd);
  CDNAsecf := CDNAsec - (CTTsec + CDDsec + CDTsec);
  CDNA5af := CDNA5a - (CTT5a + CDD5a + CDT5a);
  CDNAcpf := CDNAcp - (CTTcp + CDDcp + CDTcp);
  DNAocp := (CTTcp + CDDcp + CDTcp)/CDNAcp;
  DNAosec := (CTTsec + CDDsec + CDTsec)/CDNAsec;
  DNAocd := (CTTcd + CDDcd + CDTcd)/CDNAcd;
  DNAo5a := (CTT5a + CDD5a + CDT5a)/CDNA5a;
  A := -kLH1*(alpha_T*CTblf + alpha_D*CDblf) + kLH2;
  B := kLH3;
  CR := AR/Vp;
  Qp := kQp*Vpc;
  Vpc := VPC1 + VPC2;
  Vmax := k5a*DNAo5a;
  Vp := VPC1 + VPC2 + VPL1 + VPL2;
  Qb := Qc - (Qp + Qt + Ql);
  Qbt := Qc - (Qp + Ql);
  CTbf := CTb/PTb;
  CDbf := CDb/PDb;

  // Rate rules:
  ATbl' = Qb*(CTbf - CTblf) + Qp*(CTpf - CTbl) + Ql*(CTlf - CTbl) + Qt*(1 - ts)*(CTtv - CTblf) + k2T;
  ADbl' = Qbt*(CDbf - CDblf) + Qp*(CDpf - CDblf) + Ql*(CDlf - CDbl);
  CT_A' = kTA_on*CTblf*CAf - kTA_off*CT_A;
  CD_A' = kDA_on*CDblf*CAf - kDA_off*CD_A;
  ATl' = Ql*(CTbl - CTlf) - (Vmax1*(CTlf/(km5alpha + CTlf)) + k1T*ATl/PTl);
  ADl' = Ql*(CDbl - CDlf) - (Vmax1*CTlf/(km5alpha + CTlf) + k1D*(ADl/PDl));
  ATif' = Qt*(1 - ts)*(CTblf - CTif/PTif) + mu*(CTst/PTst - CTif) + k1T*CLH;
  ATst' = mu*(CTif - CTst/PTst);
  ATp' = Qp*(CTbl - CTpf) - Vmax0*(CTpf/(km5alpha + CTpf));
  ADp' = Qp*(CDbl - CDpf) - Vmax0*(CTpf/(km5alpha + CTpf));
  CT_R' = kTR_on*CTpf*CRf - kTR_off*CT_R;
  CD_R' = kDR_on*CDpf*CRf - kDR_off*CD_R;
  CDT' = CT_R*kDT_on*CD_R - kDT_off*CDT;
  CDD' = CD_R*kDD_on*CD_R - kDD_off*CDD;
  CTT' = CT_R*kTT_on*CT_R - kTT_off*CTT;
  CDD5a' = kDNA_onDD5a*CDD*CDNA5af - kDNA_offDD5a*CDD5a;
  CDDcd' = kDNA_onDDcd*CDD*CDNAcdf - kDNA_offDDcd*CDDcd;
  CDDsec' = kDNA_onDDsec*CDD*CDNAsecf - kDNA_offDDsec*CDDsec;
  CDDcp' = kDNA_onDDcp*CDD*CDNAcpf - kDNA_offDDcp*CDDcp;
  CDT5a' = kDNA_onDT5a*CDT*CDNA5af - kDNA_offDT5a*CDT5a;
  CDTcd' = kDNA_onDTcd*CDT*CDNAcdf - kDNA_offDTcd*CDTcd;
  CDTsec' = kDNA_onDTsec*CDT*CDNAsecf - kDNA_offDTsec*CDTsec;
  CDTcp' = kDNA_onDTcp*CDT*CDNAcpf - kDNA_offDTcp*CDTcp;
  CTT5a' = kDNA_onTT5a*CTT*CDNA5af - kDNA_offTT5a*CTT5a;
  CTTcd' = kDNA_onTTcd*CTT*CDNAcdf - kDNA_offTTcd*CTTcd;
  CTTsec' = kDNA_onTTsec*CTT*CDNAsecf - kDNA_offTTsec*CTTsec;
  CTTcp' = kDNA_onTTcp*CTT*CDNAcpf - kDNA_offTTcp*CTTcp;
  ATb' = Qb*(CTblf - CTb/PTb);
  ADb' = Qbt*(CDblf - CDb/PDb);
  ALH' = piecewise(A - kLH4*ALH, A > B, B - kLH4*ALH);
  AR' = k1R - keR*CRf;
  VPC1' = VPC1/VPC1b*kcpl*DNAocp - kcd1*(1 - DNAocd)*VPC1;
  VPL1' = VPC1/VPC1b*ksec*DNAosec - kflo*VPL1;

  // Unit definitions:
  unit nM = 1e-9 mole / litre;
  unit nanomole = 1e-9 mole;
  unit ng_ml = 1e-9 gram / (1e-3 litre);
  unit hour = 3600 second;
  unit l_hr = litre / (3600 second);
  unit nmol_hr = 1e-9 mole / (3600 second);
  unit kg = kilogram;
  unit kg_hr = kilogram / (3600 second);
  unit first_order_rate_constant = 1 / (3600 second);
  unit second_order_rate_constant = litre / (1e-9 mole * 3600 second);
  unit time = 3600 second;
end
