// SBML level 2 version 3

model Niederer2006_CardiacMyocyteRelaxation()
  // This a model from the article:
  // A quantitative analysis of cardiac myocyte relaxation: a simulation study.
  // Niederer SA, Hunter PJ, Smith NP. Biophys J. 2006:90(5):1697-722. 16339881 ,
  // Abstract:
  // The determinants of relaxation in cardiac muscle are poorly understood, yet compromised relaxation accompanies various pathologies and impaired pump function. In this study, we develop a model of active contraction to elucidate the relative importance of the [Ca2+]i transient magnitude, the unbinding of Ca2+ from troponin C (TnC), and the length-dependence of tension and Ca2+ sensitivity on relaxation. Using the framework proposed by one of our researchers, we extensively reviewed experimental literature, to quantitatively characterize the binding of Ca2+ to TnC, the kinetics of tropomyosin, the availability of binding sites, and the kinetics of crossbridge binding after perturbations in sarcomere length. Model parameters were determined from multiple experimental results and modalities (skinned and intact preparations) and model results were validated against data from length step, caged Ca2+, isometric twitches, and the half-time to relaxation with increasing sarcomere length experiments. A factorial analysis found that the [Ca2+]i transient and the unbinding of Ca2+ from TnC were the primary determinants of relaxation, with a fivefold greater effect than that of length-dependent maximum tension and twice the effect of tension-dependent binding of Ca2+ to TnC and length-dependent Ca2+ sensitivity. The affects of the [Ca2+]i transient and the unbinding rate of Ca2+ from TnC were tightly coupled with the effect of increasing either factor, depending on the reference [Ca2+]i transient and unbinding rate.
  // This model was taken from the CellML repository and automatically converted to SBML.
  // The original model was: Niederer, Hunter, Smith. (2006) - version02
  // The original CellML model was created by:
  // Terkildsen, Jonna,
  // j.terkildsen@auckland.ac.nz
  // The University of Auckland
  // Auckland Bioengineering Institute
  // This model originates from BioModels Database: A Database of Annotated Published Models (http://www.ebi.ac.uk/biomodels/). It is copyright (c) 2005-2011 The BioModels.net Team.
  // To the extent possible under law, all copyright and related or neighbouring rights to this encoded model have been dedicated to the public domain worldwide. Please refer to CC0 Public Domain Dedication for more information.
  // In summary, you are entitled to use this encoded model in absolutely any manner you deem suitable, verbatim, or with modification, alone or embedded it in a larger context, redistribute it, commercially or not, in a restricted way or not..
  // To cite BioModels Database, please use: Li C, Donizelli M, Rodriguez N, Dharuri H, Endler L, Chelliah V, Li L, He E, Henry A, Stefan MI, Snoep JL, Hucka M, Le Novère N, Laibe C (2010) BioModels Database: An enhanced, curated and annotated resource for published quantitative kinetic models. BMC Syst Biol., 4:92.
  // biomodels.db:MODEL8687196544
  // isDescribedBy pubmed:16339881
  // biomodels.db:MODEL8687196544
  // isDescribedBy pubmed:16339881
  // biomodels.db:MODEL8687196544
  // biomodels.db:MODEL8687196544

  // Compartments:
  compartment Compartment = 1 litre;

  // Parameters:
  Ca_i has mM;
  Ca_b has mM;
  TRPN = 0.06759314 mM;
  z = 0.01441794 dimensionless;
  z_max has dimensionless;
  alpha_0 = 0.008 per_ms;
  alpha_r1 = 0.002 per_ms;
  alpha_r2 = 0.00175 per_ms;
  n_Rel = 3 dimensionless;
  K_z = 0.15 dimensionless;
  n_Hill = 3 dimensionless;
  Ca_50ref = 0.00105 mM;
  z_p = 0.85 dimensionless;
  beta_1 = -4 dimensionless;
  Ca_50 has mM;
  Ca_TRPN_50 has mM;
  K_2 has per_ms;
  K_1 has per_ms;
  alpha_Tm has per_ms;
  beta_Tm has per_ms;
  J_TRPN has mM_per_ms;
  Ca_TRPN_Max = 0.07 mM;
  k_off has per_ms;
  k_on = 100 per_mM_per_ms;
  k_Ref_off = 0.2 per_ms;
  gamma_trpn = 2 dimensionless;
  lambda has dimensionless;
  ExtensionRatio has dimensionless;
  dExtensionRatiodt has per_ms;
  lambda_prev has dimensionless;
  overlap has dimensionless;
  beta_0 = 4.9 dimensionless;
  T_ref = 56.2 N_per_mm2;
  T_Base has N_per_mm2;
  T_0 has N_per_mm2;
  Q has dimensionless;
  a = 0.35 dimensionless;
  Q_1 = 0 dimensionless;
  Q_2 = 0 dimensionless;
  Q_3 = 0 dimensionless;
  A_1 = -29 dimensionless;
  A_2 = 138 dimensionless;
  A_3 = 129 dimensionless;
  alpha_1 = 0.03 per_ms;
  alpha_2 = 0.13 per_ms;
  alpha_3 = 0.625 per_ms;
  Tension has N_per_mm2;

  // Assignment rules:
  Ca_b := Ca_TRPN_Max - TRPN;
  Ca_i := piecewise(1000*1.8433e-7, time < 1, 1000*(1.055*(time/1000)^3 - 0.03507*(time/1000)^2 + 0.0003992*time/1000 - 1.356e-6), (time >= 10) && (time < 15), 1000*(0.014*(time/1000)^3 - 0.002555*(time/1000)^2 + 0.0001494*time/1000 - 1.428e-6), (time >= 15) && (time < 55), 1000*(1.739e-5*(time/1000)^3 - 3.209e-6*(time/1000)^2 - 5.689e-6*time/1000 + 1.719e-6), (time >= 55) && (time < 250), 1000*(0.0001321*(time/1000)^4 - 0.0002197*(time/1000)^3 + 0.0001374*(time/1000)^2 - 3.895e-5*time/1000 + 4.441e-6), (time >= 250) && (time < 490), 1000*1.2148e-7);
  K_2 := alpha_r2*z_p^n_Rel/(z_p^n_Rel + K_z^n_Rel)*(1 - n_Rel*K_z^n_Rel/(z_p^n_Rel + K_z^n_Rel));
  K_1 := alpha_r2*z_p^(n_Rel - 1)*n_Rel*K_z^n_Rel/(z_p^n_Rel + K_z^n_Rel)^2;
  z_max := (alpha_0/(Ca_TRPN_50/Ca_TRPN_Max)^n_Hill - K_2)/(alpha_r1 + K_1 + alpha_0/(Ca_TRPN_50/Ca_TRPN_Max)^n_Hill);
  Ca_50 := Ca_50ref*(1 + beta_1*(lambda - 1));
  Ca_TRPN_50 := Ca_50*Ca_TRPN_Max/(Ca_50 + k_Ref_off/k_on*(1 - (1 + beta_0*(lambda - 1))*0.5/gamma_trpn));
  alpha_Tm := alpha_0*(Ca_b/Ca_TRPN_50)^n_Hill;
  beta_Tm := alpha_r1 + alpha_r2*z^(n_Rel - 1)/(z^n_Rel + K_z^n_Rel);
  k_off := piecewise(k_Ref_off*(1 - Tension/(gamma_trpn*T_ref)), 1 - Tension/(gamma_trpn*T_ref) > 0.1, k_Ref_off*0.1);
  J_TRPN := (Ca_TRPN_Max - TRPN)*k_off - Ca_i*TRPN*k_on;
  ExtensionRatio := piecewise(1, time > 1000, 1);
  lambda_prev := ExtensionRatio;
  dExtensionRatiodt := 0;
  lambda := piecewise(ExtensionRatio, (ExtensionRatio > 0.8) && (ExtensionRatio <= 1.15), 1.15, ExtensionRatio > 1.15, 0.8);
  overlap := 1 + beta_0*(lambda - 1);
  T_Base := T_ref*z/z_max;
  T_0 := T_Base*overlap;
  Q := Q_1 + Q_2 + Q_3;
  Tension := piecewise(T_0*(a*Q + 1)/(1 - Q), Q < 0, T_0*(1 + (a + 2)*Q)/(1 + Q));

  // Rate rules:
  TRPN' = J_TRPN;
  z' = alpha_Tm*(1 - z) - beta_Tm*z;
  Q_1' = A_1*dExtensionRatiodt - alpha_1*Q_1;
  Q_2' = A_2*dExtensionRatiodt - alpha_2*Q_2;
  Q_3' = A_3*dExtensionRatiodt - alpha_3*Q_3;

  // Unit definitions:
  unit per_ms = 1 / (1e-3 second);
  unit ms = 1e-3 second;
  unit mM = 1e-3 mole / litre;
  unit N_per_mm2 = newton / (1e-3 metre)^2;
  unit per_mM_per_ms = litre / (1e-3 mole * 1e-3 second);
  unit mM_per_ms = 1e-3 mole / (litre * 1e-3 second);
  unit time = 1e-3 second;
end
