// SBML level 2 version 3

model Muller2008_MAPKactivation_Dynamics()
  // This a model from the article:
  // Network topology determines dynamics of the mammalian MAPK1,2 signaling network: bifan motif regulation of C-Raf and B-Raf isoforms by FGFR and MC1R.
  // Muller M, Obeyesekere M, Mills GB, Ram PT. FASEB J. 2008;22(5):1393-403. 18171696 ,
  // Abstract:
  // Activation of the fibroblast growth factor (FGFR) and melanocyte stimulating hormone (MC1R) receptors stimulates B-Raf and C-Raf isoforms that regulate the dynamics of MAPK1,2 signaling. Network topology motifs in mammalian cells include feed-forward and feedback loops and bifans where signals from two upstream molecules integrate to modulate the activity of two downstream molecules. We computationally modeled and experimentally tested signal processing in the FGFR/MC1R/B-Raf/C-Raf/MAPK1,2 network in human melanoma cells; identifying 7 regulatory loops and a bifan motif. Signaling from FGFR leads to sustained activation of MAPK1,2, whereas signaling from MC1R results in transient activation of MAPK1,2. The dynamics of MAPK activation depends critically on the expression level and connectivity to C-Raf, which is critical for a sustained MAPK1,2 response. A partially incoherent bifan motif with a feedback loop acts as a logic gate to integrate signals and regulate duration of activation of the MAPK signaling cascade. Further reducing a 106-node ordinary differential equations network encompassing the complete network to a 6-node network encompassing rate-limiting processes sustains the feedback loops and the bifan, providing sufficient information to predict biological responses.
  // This model was taken from the CellML repository and automatically converted to SBML.
  // The original model was: Muller, Obeyesekere, Mills, Ram. (2008) - version01
  // The original CellML model was created by:
  // Lloyd, Catherine, May
  // c.lloyd@auckland.ac.nz
  // The University of Auckland
  // Auckland Bioengineering Institute
  // This model originates from BioModels Database: A Database of Annotated Published Models (http://www.ebi.ac.uk/biomodels/). It is copyright (c) 2005-2011 The BioModels.net Team.
  // To the extent possible under law, all copyright and related or neighbouring rights to this encoded model have been dedicated to the public domain worldwide. Please refer to CC0 Public Domain Dedication for more information.
  // In summary, you are entitled to use this encoded model in absolutely any manner you deem suitable, verbatim, or with modification, alone or embedded it in a larger context, redistribute it, commercially or not, in a restricted way or not..
  // To cite BioModels Database, please use: Li C, Donizelli M, Rodriguez N, Dharuri H, Endler L, Chelliah V, Li L, He E, Henry A, Stefan MI, Snoep JL, Hucka M, Le Novère N, Laibe C (2010) BioModels Database: An enhanced, curated and annotated resource for published quantitative kinetic models. BMC Syst Biol., 4:92.
  // biomodels.db:MODEL8687732743
  // isDescribedBy pubmed:18171696
  // biomodels.db:MODEL8687732743
  // isDescribedBy pubmed:18171696
  // biomodels.db:MODEL8687732743
  // biomodels.db:MODEL8687732743

  // Compartments:
  compartment Compartment = 1 litre;

  // Parameters:
  y1 = 0 micromolar;
  a1 = 10 flux;
  g1 has micromolar;
  b1 = 10 micromolar;
  d1 = 0.2 first_order_rate_constant;
  y2 = 0 micromolar;
  a2 = 10 flux;
  g2 has micromolar;
  b2 = 10 micromolar;
  d2 = 0.1 first_order_rate_constant;
  y3 = 0 micromolar;
  f53 = 1.5 second_order_rate_constant;
  f13 = 0.6 second_order_rate_constant;
  h36_y3 = 0.1 second_order_rate_constant;
  d3 = 1 first_order_rate_constant;
  E = 10 micromolar;
  y4 = 0 micromolar;
  f14 = 0.1 first_order_rate_constant;
  f24 = 0.8 first_order_rate_constant;
  d4 = 1.1 first_order_rate_constant;
  y5 = 0 micromolar;
  f35 = 0.3 first_order_rate_constant;
  f45 = 0.1 first_order_rate_constant;
  d5 = 1 first_order_rate_constant;
  y6 = 0 micromolar;
  h36_y6 = 0.1 second_order_rate_constant;
  d6 = 0.001 first_order_rate_constant;

  // Assignment rules:
  g1 := piecewise(0, (time >= 0) && (time < 5), 1, (time >= 5) && (time <= 10), 0);
  g2 := piecewise(1, (time >= 0) && (time <= 5), 0);

  // Rate rules:
  y1' = a1*(g1/(b1 + g1)) - d1*y1;
  y2' = a2*(g2/(b2 + g2)) - d2*y2;
  y3' = f13*(E - (y3 + y6))*y1 + f53*(E - (y3 + y6))*y5 - (h36_y3*y2*y3 + d3*y3);
  y4' = f14*y1 + f24*y2 - d4*y4;
  y5' = f35*y3 + f45*y4 - d5*y5;
  y6' = h36_y6*y2*y3 - d6*y6;

  // Unit definitions:
  unit micromolar = 1e-6 mole / litre;
  unit flux = 1e-6 mole / (litre * 60 second);
  unit first_order_rate_constant = 1 / (60 second);
  unit second_order_rate_constant = litre / (1e-6 mole * 60 second);
  unit minute = 60 second;
  unit time = 60 second;
end
