// SBML level 2 version 1

model model_0000001()
  // dAlcantara2003_SynapticPlasticity
  // This model originates from BioModels Database: A Database of Annotated Published Models (http://www.ebi.ac.uk/biomodels/). It is copyright (c) 2005-2011 The BioModels.net Team.
  // To the extent possible under law, all copyright and related or neighbouring rights to this encoded model have been dedicated to the public domain worldwide. Please refer to CC0 Public Domain Dedication for more information.
  // In summary, you are entitled to use this encoded model in absolutely any manner you deem suitable, verbatim, or with modification, alone or embedded it in a larger context, redistribute it, commercially or not, in a restricted way or not..
  // To cite BioModels Database, please use: Li C, Donizelli M, Rodriguez N, Dharuri H, Endler L, Chelliah V, Li L, He E, Henry A, Stefan MI, Snoep JL, Hucka M, Le Novère N, Laibe C (2010) BioModels Database: An enhanced, curated and annotated resource for published quantitative kinetic models. BMC Syst Biol., 4:92.
  // biomodels.db:MODEL8938094216
  // isDescribedBy pubmed:12823459
  // biomodels.db:MODEL8938094216
  // isDescribedBy pubmed:12823459
  // biomodels.db:MODEL8938094216
  // biomodels.db:MODEL8938094216

  // Compartments:
  compartment spine = 1 volume;

  // Species:
  species $Sstar in spine; Sstar is "S*";
  species K in spine = 0.5;
  species Kprime in spine = 0; Kprime is "K'";
  species Kstar in spine = 0; Kstar is "K*";
  species N in spine = 1;
  species Nstar in spine = 0; Nstar is "N*";
  species D in spine = 3;
  species Dstar in spine = 0; Dstar is "D*";
  species R in spine = 1;
  species Rprime in spine = 0; Rprime is "R'";
  species Rstar in spine = 0; Rstar is "R*";
  species Pstar in spine = 2; Pstar is "P*";
  species DstarP in spine = 0; DstarP is "D*P";
  species $Stotal in spine = 30; Stotal is "S total";
  species Ca2plus in spine;

  // Parameters:
  Kd = 7;
  nH = 4; nH is "Hill coefficient";
  k1 = 150;
  k2 = 2.17;
  k3 = 0.5;
  k4 = 0.03;
  n1 = 1666;
  n2 = 10;
  d1 = 2000;
  d2PKAstar = 0.002; d2PKAstar is "d2 times PKA*";
  r1PKAstar = 0.1; r1PKAstar is "r1 times PKA*";
  r2 = 1;
  r3 = 10;
  r4 = 0.1;
  p1 = 0.03;
  p2 = 3e-5;

  // Assignment rules:
  Ca2plus := piecewise(0.1, time < 60, 0.1, time > 66.0115, 1);
  Sstar := (Stotal - (Kprime + Kstar + Nstar))/(1 + (Kd/Ca2plus)^nH);

  // Reactions:
  CaMKII_binding_to_CaM: K + $Sstar => Kprime; k1*Sstar*K*spine;
  CaMKII_autophosphorylation: Kprime => Kstar; k3*Kprime*spine;
  Calcineurin_or_PP2B_activation: N + $Sstar => Nstar; n1*Sstar*N*spine;
  DARPP_32_activation: D => Dstar; d2PKAstar*D*spine; DARPP_32_activation is "DARPP-32 activation";
  AMPAR_intermediate_activation: R => Rprime; r1PKAstar*R*spine;
  reaction_0000009: Rprime => Rstar; r3*Rprime*Kprime*spine; reaction_0000009 is "full AMPAR activation by active CaMKII";  // modifiers: Kprime
  PP1_inactivation: Dstar + Pstar => DstarP; p2*Dstar*Pstar*spine;
  CaM_unbinding_from_CaMKII: Kprime => K + $Sstar; k2*Kprime*spine;
  CaMKII_dephosphorylation: Kstar => Kprime; Kstar*k4*Pstar*spine;  // modifiers: Pstar
  Calcineurin_or_PP2B_inactivation: Nstar => $Sstar + N; Nstar*n2*spine;
  DARPP_32_deactivation: Dstar => D; Dstar*Nstar*d1*spine; DARPP_32_deactivation is "DARPP-32 deactivation";  // modifiers: Nstar
  reaction_0000016: Rprime => R; Rprime*r2*Nstar*spine; reaction_0000016 is "AMPAR complete deactivation by calcineurin";  // modifiers: Nstar
  reaction_0000017: Rprime => R; Rprime*r2*Pstar*spine; reaction_0000017 is "AMPAR complete deactivation by PP1";  // modifiers: Pstar
  reaction_0000019: Rprime => Rstar; Rprime*r3*Kstar*spine; reaction_0000019 is "full AMPAR activation by autophosphorylated CaMKII";  // modifiers: Kstar
  intermediate_AMPAR_deactivation: Rstar => Rprime; Rstar*r4*Pstar*spine;  // modifiers: Pstar
  PP1_activation: DstarP => Dstar + Pstar; DstarP*p1*spine;

  // Unit definitions:
  unit substance = 1e-6 mole;
end
