// SBML level 2 version 1

model testid()
  // Bhalla2001_MAPK_MKP1_oscillation
  // This model relates to figure 5 in <a href = "http://www.ncbi.nlm.nih.gov/entrez/query.fcgi?cmd=Retrieve&db=pubmed&dopt=Abstract&list_uids=12779455">Bhalla US, Iyengar R. Chaos (2001) 11(1):221-226</a>. It includes the model used for figures 2-4 and also has MKP-1 induction by MAPK activity in the synapse. PP2A is set to 0.16 uM and MKP synthesis is varied from 5x to 40 x basal to get a range of interesting behaviours.
  // This model originates from BioModels Database: A Database of Annotated Published Models (http://www.ebi.ac.uk/biomodels/). It is copyright (c) 2005-2011 The BioModels.net Team.
  // To the extent possible under law, all copyright and related or neighbouring rights to this encoded model have been dedicated to the public domain worldwide. Please refer to CC0 Public Domain Dedication for more information.
  // In summary, you are entitled to use this encoded model in absolutely any manner you deem suitable, verbatim, or with modification, alone or embedded it in a larger context, redistribute it, commercially or not, in a restricted way or not..
  // To cite BioModels Database, please use: Li C, Donizelli M, Rodriguez N, Dharuri H, Endler L, Chelliah V, Li L, He E, Henry A, Stefan MI, Snoep JL, Hucka M, Le Novère N, Laibe C (2010) BioModels Database: An enhanced, curated and annotated resource for published quantitative kinetic models. BMC Syst Biol., 4:92.
  // biomodels.db:MODEL9071773985
  // isDescribedBy pubmed:12779455
  // biomodels.db:MODEL9071773985
  // isDescribedBy pubmed:12779455
  // biomodels.db:MODEL9071773985
  // biomodels.db:MODEL9071773985

  // Compartments:
  compartment default_compartment = 1e-18;
  compartment geometry = 1e-12;

  // Species:
  species PKC_slash_PKC_minus_Ca in geometry = 3.720833e-17;
  species PKC_slash_PKC_minus_DAG_minus_AA_star_ in geometry = 4.913667e-18;
  species PKC_slash_PKC_minus_Ca_minus_AA_star_ in geometry = 1.75e-16;
  species PKC_slash_PKC_minus_Ca_minus_memb_star_ in geometry = 1.3896e-17;
  species PKC_slash_PKC_minus_DAG_minus_memb_star_ in geometry = 9.435167e-21;
  species PKC_slash_PKC_minus_basal_star_ in geometry = 0.02;
  species PKC_slash_PKC_minus_AA_star_ in geometry = 1.813333e-17;
  species PKC_slash_PKC_minus_Ca_minus_DAG in geometry = 8.463167e-23;
  species PKC_slash_PKC_minus_DAG in geometry = 1.161017e-16;
  species PKC_slash_PKC_minus_DAG_minus_AA in geometry = 2.518833e-19;
  species PKC_slash_PKC_minus_cytosolic in geometry = 1;
  species AA in geometry = 6.12;
  species PKC_minus_active_slash_PKC_minus_act_minus_raf_slash_PKC_minus_act_minus_raf_cplx in geometry = 0;
  species PKC_minus_active_slash_PKC_minus_inact_minus_GAP_slash_PKC_minus_inact_minus_GAP_cplx in geometry = 0;
  species PKC_minus_active_slash_PKC_minus_act_minus_GEF_slash_PKC_minus_act_minus_GEF_cplx in geometry = 0;
  species MAPK_slash_craf_minus_1 in geometry = 0.2;
  species MAPK_slash_craf_minus_1_star_ in geometry = 0;
  species MAPK_slash_MAPKK in geometry = 0.18;
  species MAPK_slash_MAPK in geometry = 0.36;
  species MAPK_slash_craf_minus_1_star__star_ in geometry = 0;
  species MAPK_slash_MAPK_minus_tyr in geometry = 0;
  species MAPK_slash_MAPKK_star_ in geometry = 0;
  species MAPK_slash_MAPKK_star__slash_MAPKKtyr_slash_MAPKKtyr_cplx in geometry = 0;
  species MAPK_slash_MAPKK_star__slash_MAPKKthr_slash_MAPKKthr_cplx in geometry = 0;
  species MAPK_slash_MAPKK_minus_ser in geometry = 0;
  species MAPK_slash_Raf_minus_GTP_minus_Ras_star_ in geometry = 0;
  species MAPK_slash_Raf_minus_GTP_minus_Ras_star__slash_Raf_minus_GTP_minus_Ras_star__dot_1_slash_Raf_minus_GTP_minus_Ras_star__dot_1_cplx in geometry = 0;
  species MAPK_slash_Raf_minus_GTP_minus_Ras_star__slash_Raf_minus_GTP_minus_Ras_star__dot_2_slash_Raf_minus_GTP_minus_Ras_star__dot_2_cplx in geometry = 0;
  species MAPK_slash_RGR in geometry = 0;
  species MAPK_slash_RGR_slash_RGR_dot_1_slash_RGR_dot_1_cplx in geometry = 0;
  species MAPK_slash_RGR_slash_RGR_dot_2_slash_RGR_dot_2_cplx in geometry = 0;
  species MAPK_slash_MKP_minus_1_minus_ser359_star_ in geometry = 0;
  species MAPK_slash_MKP_minus_1_star__star_ in geometry = 0;
  species MAPK_slash_nuc_MAPK_star_ in geometry = 0;
  species MAPK_slash_nuc_MAPK_star__slash_MKP_minus_1_minus_synthesis_slash_MKP_minus_1_minus_synthesis_cplx in geometry = 0;
  species MAPK_star_ in geometry = 0;
  species MAPK_star__slash_MAPK_star__minus_feedback_slash_MAPK_star__minus_feedback_cplx in geometry = 0;
  species MAPK_star__slash_MAPK_star__slash_MAPK_star__cplx in geometry = 0;
  species MAPK_star__slash_MKP_minus_1_minus_phosph_slash_MKP_minus_1_minus_phosph_cplx in geometry = 0;
  species MAPK_star__slash_MKP_minus_1_minus_phosph2_slash_MKP_minus_1_minus_phosph2_cplx in geometry = 0;
  species MKP_minus_1 in geometry = 0.0027;
  species PPhosphatase2A in geometry = 0.224;
  species PPhosphatase2A_slash_craf_minus_deph_slash_craf_minus_deph_cplx in geometry = 0;
  species PPhosphatase2A_slash_MAPKK_minus_deph_slash_MAPKK_minus_deph_cplx in geometry = 0;
  species PPhosphatase2A_slash_MAPKK_minus_deph_minus_ser_slash_MAPKK_minus_deph_minus_ser_cplx in geometry = 0;
  species PPhosphatase2A_slash_craf_star__star__minus_deph_slash_craf_star__star__minus_deph_cplx in geometry = 0;
  species PLA2_slash_PLA2_minus_cytosolic in geometry = 0.4;
  species PLA2_slash_PLA2_minus_Ca_star_ in geometry = 0;
  species PLA2_slash_PLA2_minus_Ca_star__slash_kenz_slash_kenz_cplx in geometry = 0;
  species PLA2_slash_PIP2_minus_PLA2_star_ in geometry = 0;
  species PLA2_slash_PIP2_minus_PLA2_star__slash_kenz_slash_kenz_cplx in geometry = 0;
  species PLA2_slash_PIP2_minus_Ca_minus_PLA2_star_ in geometry = 0;
  species PLA2_slash_PIP2_minus_Ca_minus_PLA2_star__slash_kenz_slash_kenz_cplx in geometry = 0;
  species PLA2_slash_DAG_minus_Ca_minus_PLA2_star_ in geometry = 0;
  species PLA2_slash_DAG_minus_Ca_minus_PLA2_star__slash_kenz_slash_kenz_cplx in geometry = 0;
  species PLA2_slash_PLA2_star__minus_Ca in geometry = 0;
  species PLA2_slash_PLA2_star__minus_Ca_slash_kenz_slash_kenz_cplx in geometry = 0;
  species PLA2_slash_PLA2_star_ in geometry = 0;
  species Ras_slash_inact_minus_GEF in geometry = 0.1;
  species Ras_slash_GEF_star_ in geometry = 0;
  species Ras_slash_GEF_star__slash_GEF_star__minus_act_minus_ras_slash_GEF_star__minus_act_minus_ras_cplx in geometry = 0;
  species Ras_slash_GTP_minus_Ras in geometry = 0;
  species Ras_slash_GDP_minus_Ras in geometry = 0.2;
  species Ras_slash_GAP_star_ in geometry = 0;
  species Ras_slash_GAP in geometry = 0.002;
  species Ras_slash_GAP_slash_GAP_minus_inact_minus_ras_slash_GAP_minus_inact_minus_ras_cplx in geometry = 0;
  // Baseline is 11.661 from running combined model to steady state. See ALL/NOTES for 23 Apr 1998.
  species $DAG in geometry = 11.661;
  species $Ca in geometry = 0.08;
  // 3 Feb 2000. This represents the formation of MKP-1 when MAPK is stimulated. Concentration is pretty irrelevant here, set to 1 uM for convenience.
  species $MAPK_slash_MKP_minus_1_minus_gene in geometry = 1;
  species $MAPK_slash_Ubiquitination in geometry = 0;
  // arachodonylphosphatidylcholine is the favoured substrate from Wijkander and Sundler, JBC 202 pp 873-880, 1991. Their assay used 30 uM substrate, which is what the kinetics in this model are based on. For the later model we should locate a more realistic value for APC.
  species $PLA2_slash_APC in geometry = 30;
  // This isn\'t explicitly present in the M&L model, but is obviously needed. I assume its conc is fixed at 1uM for now, which is a bit high. PLA2 is stim 7x by PIP2 @ 0.5 uM (Leslie and Channon BBA 1045:261(1990) Leslie and Channon say PIP2 is present at 0.1 - 0.2mol% range in membs, which comes to 50 nM. Ref is Majerus et al Cell 37 pp 701-703 1984 Lets use a lower level of 30 nM, same ref....
  species $temp_minus_PIP2 in geometry = 2.5;
  species $PKC_minus_active in geometry;

  // Assignment rules:
  PKC_minus_active := PKC_slash_PKC_minus_DAG_minus_AA_star_ + PKC_slash_PKC_minus_Ca_minus_memb_star_ + PKC_slash_PKC_minus_Ca_minus_AA_star_ + PKC_slash_PKC_minus_DAG_minus_memb_star_ + PKC_slash_PKC_minus_basal_star_ + PKC_slash_PKC_minus_AA_star_ - (PKC_minus_active_slash_PKC_minus_act_minus_raf_slash_PKC_minus_act_minus_raf_cplx + PKC_minus_active_slash_PKC_minus_inact_minus_GAP_slash_PKC_minus_inact_minus_GAP_cplx + PKC_minus_active_slash_PKC_minus_act_minus_GEF_slash_PKC_minus_act_minus_GEF_cplx);

  // Reactions:
  // kf*PKC_slash_PKC_minus_cytosolic*Ca-kb*PKC_slash_PKC_minus_Ca
  // Need est of rate of assoc of Ca and PKC. Assume it is fast The original parameter-searched kf of 439.4 has been scaled by 1/6e8 to account for change of units to n. Kf now 8.16e-7, kb=.6085 Raised kf to 1e-6 to match Ca curve, kb to .5
  PKC_slash_PKC_minus_act_minus_by_minus_Ca: PKC_slash_PKC_minus_cytosolic + $Ca -> PKC_slash_PKC_minus_Ca; PKC_slash_PKC_minus_act_minus_by_minus_Ca_kf*PKC_slash_PKC_minus_cytosolic*Ca - PKC_slash_PKC_minus_act_minus_by_minus_Ca_kb*PKC_slash_PKC_minus_Ca;
    PKC_slash_PKC_minus_act_minus_by_minus_Ca_kf = 6e-13 vol_uMINVsecINV; PKC_slash_PKC_minus_act_minus_by_minus_Ca_kb = 5e-13 vol_secINV;
  // kf*DAG*PKC_slash_PKC_minus_Ca-kb*PKC_slash_PKC_minus_Ca_minus_DAG
  // Need est of rate. Assume it is fast Obtained from param search kf raised 10 X : see Shinomura et al PNAS 88 5149-5153 1991. kf changed from 3.865e-7 to 2.0e-7 in line with closer analysis of Shinomura data. 26 June 1996: Corrected DAG data: reduce kf 15x from 2e-7 to 1.333e-8
  PKC_slash_PKC_minus_act_minus_by_minus_DAG: $DAG + PKC_slash_PKC_minus_Ca -> PKC_slash_PKC_minus_Ca_minus_DAG; PKC_slash_PKC_minus_act_minus_by_minus_DAG_kf*DAG*PKC_slash_PKC_minus_Ca - PKC_slash_PKC_minus_act_minus_by_minus_DAG_kb*PKC_slash_PKC_minus_Ca_minus_DAG;
    PKC_slash_PKC_minus_act_minus_by_minus_DAG_kf = 7.9998e-15 vol_uMINVsecINV; PKC_slash_PKC_minus_act_minus_by_minus_DAG_kb = 8.6348e-12 vol_secINV;
  // kf*PKC_slash_PKC_minus_Ca-kb*PKC_slash_PKC_minus_Ca_minus_memb_star_
  PKC_slash_PKC_minus_Ca_minus_to_minus_memb: PKC_slash_PKC_minus_Ca -> PKC_slash_PKC_minus_Ca_minus_memb_star_; PKC_slash_PKC_minus_Ca_minus_to_minus_memb_kf*PKC_slash_PKC_minus_Ca - PKC_slash_PKC_minus_Ca_minus_to_minus_memb_kb*PKC_slash_PKC_minus_Ca_minus_memb_star_;
    PKC_slash_PKC_minus_Ca_minus_to_minus_memb_kf = 1.2705e-12 vol_secINV; PKC_slash_PKC_minus_Ca_minus_to_minus_memb_kb = 3.5026e-12 vol_secINV;
  // kf*PKC_slash_PKC_minus_Ca_minus_DAG-kb*PKC_slash_PKC_minus_DAG_minus_memb_star_
  // Raise kb from .087 to 0.1 to match data from Shinomura et al. Lower kf from 1.155 to 1.0 to match data from Shinomura et al.
  PKC_slash_PKC_minus_DAG_minus_to_minus_memb: PKC_slash_PKC_minus_Ca_minus_DAG -> PKC_slash_PKC_minus_DAG_minus_memb_star_; PKC_slash_PKC_minus_DAG_minus_to_minus_memb_kf*PKC_slash_PKC_minus_Ca_minus_DAG - PKC_slash_PKC_minus_DAG_minus_to_minus_memb_kb*PKC_slash_PKC_minus_DAG_minus_memb_star_;
    PKC_slash_PKC_minus_DAG_minus_to_minus_memb_kf = 1e-12 vol_secINV; PKC_slash_PKC_minus_DAG_minus_to_minus_memb_kb = 1e-13 vol_secINV;
  // kf*PKC_slash_PKC_minus_Ca*AA-kb*PKC_slash_PKC_minus_Ca_minus_AA_star_
  // Schaechter and Benowitz We have to increase Kf for conc scaling Changed kf to 2e-9 on Sept 19, 94. This gives better match.
  PKC_slash_PKC_minus_act_minus_by_minus_Ca_minus_AA: PKC_slash_PKC_minus_Ca + AA -> PKC_slash_PKC_minus_Ca_minus_AA_star_; PKC_slash_PKC_minus_act_minus_by_minus_Ca_minus_AA_kf*PKC_slash_PKC_minus_Ca*AA - PKC_slash_PKC_minus_act_minus_by_minus_Ca_minus_AA_kb*PKC_slash_PKC_minus_Ca_minus_AA_star_;
    PKC_slash_PKC_minus_act_minus_by_minus_Ca_minus_AA_kf = 1.2e-15 vol_uMINVsecINV; PKC_slash_PKC_minus_act_minus_by_minus_Ca_minus_AA_kb = 1e-13 vol_secINV;
  // kf*PKC_slash_PKC_minus_DAG_minus_AA-kb*PKC_slash_PKC_minus_DAG_minus_AA_star_
  // Assume slowish too. Schaechter and Benowitz
  PKC_slash_PKC_minus_act_minus_by_minus_DAG_minus_AA: PKC_slash_PKC_minus_DAG_minus_AA -> PKC_slash_PKC_minus_DAG_minus_AA_star_; PKC_slash_PKC_minus_act_minus_by_minus_DAG_minus_AA_kf*PKC_slash_PKC_minus_DAG_minus_AA - PKC_slash_PKC_minus_act_minus_by_minus_DAG_minus_AA_kb*PKC_slash_PKC_minus_DAG_minus_AA_star_;
    PKC_slash_PKC_minus_act_minus_by_minus_DAG_minus_AA_kf = 2e-12 vol_secINV; PKC_slash_PKC_minus_act_minus_by_minus_DAG_minus_AA_kb = 2e-13 vol_secINV;
  // kf*PKC_slash_PKC_minus_cytosolic-kb*PKC_slash_PKC_minus_basal_star_
  // Initial basal levels were set by kf = 1, kb = 20. In model, though, the basal levels of PKC activity are higher.
  PKC_slash_PKC_minus_basal_minus_act: PKC_slash_PKC_minus_cytosolic -> PKC_slash_PKC_minus_basal_star_; PKC_slash_PKC_minus_basal_minus_act_kf*PKC_slash_PKC_minus_cytosolic - PKC_slash_PKC_minus_basal_minus_act_kb*PKC_slash_PKC_minus_basal_star_;
    PKC_slash_PKC_minus_basal_minus_act_kf = 1e-12 vol_secINV; PKC_slash_PKC_minus_basal_minus_act_kb = 5e-11 vol_secINV;
  // kf*AA*PKC_slash_PKC_minus_cytosolic-kb*PKC_slash_PKC_minus_AA_star_
  // Raise kf from 1.667e-10 to 2e-10 to get better match to data.
  PKC_slash_PKC_minus_act_minus_by_minus_AA: AA + PKC_slash_PKC_minus_cytosolic -> PKC_slash_PKC_minus_AA_star_; PKC_slash_PKC_minus_act_minus_by_minus_AA_kf*AA*PKC_slash_PKC_minus_cytosolic - PKC_slash_PKC_minus_act_minus_by_minus_AA_kb*PKC_slash_PKC_minus_AA_star_;
    PKC_slash_PKC_minus_act_minus_by_minus_AA_kf = 1.2e-16 vol_uMINVsecINV; PKC_slash_PKC_minus_act_minus_by_minus_AA_kb = 1e-13 vol_secINV;
  // kf*PKC_slash_PKC_minus_cytosolic*DAG-kb*PKC_slash_PKC_minus_DAG
  // kf raised 10 X based on Shinomura et al PNAS 88 5149-5153 1991 closer analysis of Shinomura et al: kf now 1e-8 (was 1.66e-8). Further tweak. To get sufficient AA synergy, increase kf to 1.5e-8 26 June 1996: Corrected DAG levels: reduce kf by 15x from 1.5e-8 to 1e-9
  PKC_slash_PKC_minus_n_minus_DAG: PKC_slash_PKC_minus_cytosolic + $DAG -> PKC_slash_PKC_minus_DAG; PKC_slash_PKC_minus_n_minus_DAG_kf*PKC_slash_PKC_minus_cytosolic*DAG - PKC_slash_PKC_minus_n_minus_DAG_kb*PKC_slash_PKC_minus_DAG;
    PKC_slash_PKC_minus_n_minus_DAG_kf = 6e-16 vol_uMINVsecINV; PKC_slash_PKC_minus_n_minus_DAG_kb = 1e-13 vol_secINV;
  // kf*PKC_slash_PKC_minus_DAG*AA-kb*PKC_slash_PKC_minus_DAG_minus_AA
  // Reduced kf to 0.66X to match Shinomura et al data. Initial: kf = 3.3333e-9 New: 2e-9 Newer: 2e-8 kb was 0.2 now 2.
  PKC_slash_PKC_minus_n_minus_DAG_minus_AA: PKC_slash_PKC_minus_DAG + AA -> PKC_slash_PKC_minus_DAG_minus_AA; PKC_slash_PKC_minus_n_minus_DAG_minus_AA_kf*PKC_slash_PKC_minus_DAG*AA - PKC_slash_PKC_minus_n_minus_DAG_minus_AA_kb*PKC_slash_PKC_minus_DAG_minus_AA;
    PKC_slash_PKC_minus_n_minus_DAG_minus_AA_kf = 1.8e-14 vol_uMINVsecINV; PKC_slash_PKC_minus_n_minus_DAG_minus_AA_kb = 2e-12 vol_secINV;
  // kf*MKP_minus_1-kb*MAPK_slash_Ubiquitination
  // 3 Feb 2000. Rate of turnover of non-phosph form of MKP1 is from Brondello et al Science 286:2514 1999. Tau is about 45 min.
  MAPK_slash_turnover_MKP1: MKP_minus_1 -> $MAPK_slash_Ubiquitination; MAPK_slash_turnover_MKP1_kf*MKP_minus_1 - MAPK_slash_turnover_MKP1_kb*MAPK_slash_Ubiquitination;
    MAPK_slash_turnover_MKP1_kf = 3.7e-16 vol_secINV; MAPK_slash_turnover_MKP1_kb = 0 vol_secINV;
  // kf*MAPK_slash_MKP_minus_1_minus_gene-kb*MKP_minus_1
  // 3 Feb 2000. The levels of basal MAPK are so low that we need to have a basal mechanism for making MKP-1. This is easy, as the degradation tau is 45 min and basal MKP-1 levels are 2.4 nM in our model. x * 1 uM = 2.4e-3 * 0.37e-3 = 8.9e-7 May 30 2k. Basal levels shifted up a bit. kf now 1.0e-6 Jun 3 2k: kf now 8e-7 Jun 4 2k: kf = 7e-7
  MAPK_slash_MKP_minus_1_minus_basal_minus_synth: $MAPK_slash_MKP_minus_1_minus_gene -> MKP_minus_1; MAPK_slash_MKP_minus_1_minus_basal_minus_synth_kf*MAPK_slash_MKP_minus_1_minus_gene - MAPK_slash_MKP_minus_1_minus_basal_minus_synth_kb*MKP_minus_1;
    MAPK_slash_MKP_minus_1_minus_basal_minus_synth_kf = 7e-19 vol_secINV; MAPK_slash_MKP_minus_1_minus_basal_minus_synth_kb = 0 vol_secINV;
  // kf*MAPK_slash_MKP_minus_1_star__star_-kb*MAPK_slash_Ubiquitination
  // 3 Feb 2000. Rate of turnover of phosph form of MKP1 is from Brondello et al Science 286:2514 1999. Tau is about 150 min though it is not a clean exp falloff.
  MAPK_slash_turnover_MKP1_star__star_: MAPK_slash_MKP_minus_1_star__star_ -> $MAPK_slash_Ubiquitination; MAPK_slash_turnover_MKP1_star__star__kf*MAPK_slash_MKP_minus_1_star__star_ - MAPK_slash_turnover_MKP1_star__star__kb*MAPK_slash_Ubiquitination;
    MAPK_slash_turnover_MKP1_star__star__kf = 1e-16 vol_secINV; MAPK_slash_turnover_MKP1_star__star__kb = 0 vol_secINV;
  // kf*MAPK_slash_MKP_minus_1_minus_ser359_star_-kb*MAPK_slash_Ubiquitination
  // 3 Feb 2000. Rate of turnover of phosph form of MKP1 is from Brondello et al Science 286:2514 1999. Tau is about 150 min though it is not a clean exp falloff.
  MAPK_slash_turnover_MKP1_star_: MAPK_slash_MKP_minus_1_minus_ser359_star_ -> $MAPK_slash_Ubiquitination; MAPK_slash_turnover_MKP1_star__kf*MAPK_slash_MKP_minus_1_minus_ser359_star_ - MAPK_slash_turnover_MKP1_star__kb*MAPK_slash_Ubiquitination;
    MAPK_slash_turnover_MKP1_star__kf = 1e-16 vol_secINV; MAPK_slash_turnover_MKP1_star__kb = 0 vol_secINV;
  // kf*MAPK_slash_MKP_minus_1_minus_ser359_star_-kb*MKP_minus_1
  // 24 Apr 2K: Based on 12 Feb 2K: Scaled up 10x so kf=0.01, kb=0
  MAPK_slash_MKP_minus_1_star_dephosph: MAPK_slash_MKP_minus_1_minus_ser359_star_ -> MKP_minus_1; MAPK_slash_MKP_minus_1_star_dephosph_kf*MAPK_slash_MKP_minus_1_minus_ser359_star_ - MAPK_slash_MKP_minus_1_star_dephosph_kb*MKP_minus_1;
    MAPK_slash_MKP_minus_1_star_dephosph_kf = 1e-14 vol_secINV; MAPK_slash_MKP_minus_1_star_dephosph_kb = 0 vol_secINV;
  // kf*MAPK_slash_MKP_minus_1_star__star_-kb*MAPK_slash_MKP_minus_1_minus_ser359_star_
  // 24 Apr 2K, based on 12 Feb 2K: Scaled up 10x to kf=0.01, kb=0
  MAPK_slash_MKP_minus_1_star__star_dephosph: MAPK_slash_MKP_minus_1_star__star_ -> MAPK_slash_MKP_minus_1_minus_ser359_star_; MAPK_slash_MKP_minus_1_star__star_dephosph_kf*MAPK_slash_MKP_minus_1_star__star_ - MAPK_slash_MKP_minus_1_star__star_dephosph_kb*MAPK_slash_MKP_minus_1_minus_ser359_star_;
    MAPK_slash_MKP_minus_1_star__star_dephosph_kf = 1e-14 vol_secINV; MAPK_slash_MKP_minus_1_star__star_dephosph_kb = 0 vol_secINV;
  // kf*MAPK_star_-kb*MAPK_slash_nuc_MAPK_star_
  // 5 Feb 2000. A nuclear translocation step. The rates are set up so that not too much MAPK gets siphoned off. 24 Apr 2000. Based on 12 Feb model. Rates slowed down x 0.02 to kf=2e-5 kb=1e-4
  MAPK_slash_translocation: MAPK_star_ -> MAPK_slash_nuc_MAPK_star_; MAPK_slash_translocation_kf*MAPK_star_ - MAPK_slash_translocation_kb*MAPK_slash_nuc_MAPK_star_;
    MAPK_slash_translocation_kf = 2e-17 vol_secINV; MAPK_slash_translocation_kb = 1e-16 vol_secINV;
  // kf*MAPK_slash_craf_minus_1_star_*Ras_slash_GTP_minus_Ras-kb*MAPK_slash_Raf_minus_GTP_minus_Ras_star_
  // Assume binding is fast and limited only by available Ras*. So kf = kb/[craf-1] If kb is 1/sec, then kf = 1/0.2 uM = 1/(0.2 * 6e5) = 8.3e-6 Later: Raise it by 10 X to 4e-5 From Hallberg et al JBC 269:6 3913-3916 1994, 3% of cellular Raf is complexed with Ras. So raise kb 4x to 4e-5 This step needed to memb-anchor and activate Raf: Leevers et al Nature 369 411-414.
  Ras_minus_act_minus_craf: MAPK_slash_craf_minus_1_star_ + Ras_slash_GTP_minus_Ras -> MAPK_slash_Raf_minus_GTP_minus_Ras_star_; Ras_minus_act_minus_craf_kf*MAPK_slash_craf_minus_1_star_*Ras_slash_GTP_minus_Ras - Ras_minus_act_minus_craf_kb*MAPK_slash_Raf_minus_GTP_minus_Ras_star_;
    Ras_minus_act_minus_craf_kf = 2.4e-11 vol_uMINVsecINV; Ras_minus_act_minus_craf_kb = 5e-13 vol_secINV;
  // kf*PLA2_slash_PLA2_minus_cytosolic*Ca-kb*PLA2_slash_PLA2_minus_Ca_star_
  // Leslie and Channon BBA 1045 (1990) 261-270 fig6 pp267.
  PLA2_slash_PLA2_minus_Ca_minus_act: PLA2_slash_PLA2_minus_cytosolic + $Ca -> PLA2_slash_PLA2_minus_Ca_star_; PLA2_slash_PLA2_minus_Ca_minus_act_kf*PLA2_slash_PLA2_minus_cytosolic*Ca - PLA2_slash_PLA2_minus_Ca_minus_act_kb*PLA2_slash_PLA2_minus_Ca_star_;
    PLA2_slash_PLA2_minus_Ca_minus_act_kf = 1.00002e-12 vol_uMINVsecINV; PLA2_slash_PLA2_minus_Ca_minus_act_kb = 1e-13 vol_secINV;
  // kf*temp_minus_PIP2*PLA2_slash_PLA2_minus_cytosolic-kb*PLA2_slash_PIP2_minus_PLA2_star_
  PLA2_slash_PIP2_minus_PLA2_minus_act: $temp_minus_PIP2 + PLA2_slash_PLA2_minus_cytosolic -> PLA2_slash_PIP2_minus_PLA2_star_; PLA2_slash_PIP2_minus_PLA2_minus_act_kf*temp_minus_PIP2*PLA2_slash_PLA2_minus_cytosolic - PLA2_slash_PIP2_minus_PLA2_minus_act_kb*PLA2_slash_PIP2_minus_PLA2_star_;
    PLA2_slash_PIP2_minus_PLA2_minus_act_kf = 1.2e-15 vol_uMINVsecINV; PLA2_slash_PIP2_minus_PLA2_minus_act_kb = 5e-13 vol_secINV;
  // kf*temp_minus_PIP2*PLA2_slash_PLA2_minus_Ca_star_-kb*PLA2_slash_PIP2_minus_Ca_minus_PLA2_star_
  PLA2_slash_PIP2_minus_Ca_minus_PLA2_minus_act: $temp_minus_PIP2 + PLA2_slash_PLA2_minus_Ca_star_ -> PLA2_slash_PIP2_minus_Ca_minus_PLA2_star_; PLA2_slash_PIP2_minus_Ca_minus_PLA2_minus_act_kf*temp_minus_PIP2*PLA2_slash_PLA2_minus_Ca_star_ - PLA2_slash_PIP2_minus_Ca_minus_PLA2_minus_act_kb*PLA2_slash_PIP2_minus_Ca_minus_PLA2_star_;
    PLA2_slash_PIP2_minus_Ca_minus_PLA2_minus_act_kf = 1.2e-14 vol_uMINVsecINV; PLA2_slash_PIP2_minus_Ca_minus_PLA2_minus_act_kb = 1e-13 vol_secINV;
  // kf*DAG*PLA2_slash_PLA2_minus_Ca_star_-kb*PLA2_slash_DAG_minus_Ca_minus_PLA2_star_
  // 27 June 1996 Scaled kf down by 0.015 from 3.33e-7 to 5e-9 to fit with revised DAG estimates and use of mole-fraction to calculate eff on PLA2.
  PLA2_slash_DAG_minus_Ca_minus_PLA2_minus_act: $DAG + PLA2_slash_PLA2_minus_Ca_star_ -> PLA2_slash_DAG_minus_Ca_minus_PLA2_star_; PLA2_slash_DAG_minus_Ca_minus_PLA2_minus_act_kf*DAG*PLA2_slash_PLA2_minus_Ca_star_ - PLA2_slash_DAG_minus_Ca_minus_PLA2_minus_act_kb*PLA2_slash_DAG_minus_Ca_minus_PLA2_star_;
    PLA2_slash_DAG_minus_Ca_minus_PLA2_minus_act_kf = 3e-15 vol_uMINVsecINV; PLA2_slash_DAG_minus_Ca_minus_PLA2_minus_act_kb = 4e-12 vol_secINV;
  // kf*AA-kb*PLA2_slash_APC
  // I need to check if the AA degradation pathway really leads back to APC. Anyway, it is a convenient buffered pool to dump it back into. For the purposes of the full model we use a rate of degradation of 0.2/sec Raised decay to 0.4 : see PLA35.g notes for Feb17
  PLA2_slash_Degrade_minus_AA: AA -> $PLA2_slash_APC; PLA2_slash_Degrade_minus_AA_kf*AA - PLA2_slash_Degrade_minus_AA_kb*PLA2_slash_APC;
    PLA2_slash_Degrade_minus_AA_kf = 4e-13 vol_secINV; PLA2_slash_Degrade_minus_AA_kb = 0 vol_secINV;
  // kf*PLA2_slash_PLA2_star_*Ca-kb*PLA2_slash_PLA2_star__minus_Ca
  // To start off, same kinetics as the PLA2-Ca-act direct pathway. Oops ! Missed out the Ca input to this pathway first time round. Let\'s raise the forward rate about 3x to 5e-6. This will let us reduce the rather high rates we have used for the kenz on PLA2*-Ca. In fact, it may be that the rates are not that different, just that this pathway for getting the PLA2 to the memb is more efficien....
  PLA2_slash_PLA2_star__minus_Ca_minus_act: PLA2_slash_PLA2_star_ + $Ca -> PLA2_slash_PLA2_star__minus_Ca; PLA2_slash_PLA2_star__minus_Ca_minus_act_kf*PLA2_slash_PLA2_star_*Ca - PLA2_slash_PLA2_star__minus_Ca_minus_act_kb*PLA2_slash_PLA2_star__minus_Ca;
    PLA2_slash_PLA2_star__minus_Ca_minus_act_kf = 6e-12 vol_uMINVsecINV; PLA2_slash_PLA2_star__minus_Ca_minus_act_kb = 1e-13 vol_secINV;
  // kf*PLA2_slash_PLA2_star_-kb*PLA2_slash_PLA2_minus_cytosolic
  PLA2_slash_dephosphorylate_minus_PLA2_star_: PLA2_slash_PLA2_star_ -> PLA2_slash_PLA2_minus_cytosolic; PLA2_slash_dephosphorylate_minus_PLA2_star__kf*PLA2_slash_PLA2_star_ - PLA2_slash_dephosphorylate_minus_PLA2_star__kb*PLA2_slash_PLA2_minus_cytosolic;
    PLA2_slash_dephosphorylate_minus_PLA2_star__kf = 1.7e-13 vol_secINV; PLA2_slash_dephosphorylate_minus_PLA2_star__kb = 0 vol_secINV;
  // kf*Ras_slash_GEF_star_-kb*Ras_slash_inact_minus_GEF
  Ras_slash_dephosph_minus_GEF: Ras_slash_GEF_star_ -> Ras_slash_inact_minus_GEF; Ras_slash_dephosph_minus_GEF_kf*Ras_slash_GEF_star_ - Ras_slash_dephosph_minus_GEF_kb*Ras_slash_inact_minus_GEF;
    Ras_slash_dephosph_minus_GEF_kf = 1e-12 vol_secINV; Ras_slash_dephosph_minus_GEF_kb = 0 vol_secINV;
  // kf*Ras_slash_GTP_minus_Ras-kb*Ras_slash_GDP_minus_Ras
  // This is extremely slow (1e-4), but it is significant as so little GAP actually gets complexed with it that the total GTP turnover rises only by 2-3 X (see Gibbs et al, JBC 265(33) 20437-20422) and Eccleston et al JBC 268(36) 27012-27019 kf = 1e-4
  Ras_slash_Ras_minus_intrinsic_minus_GTPase: Ras_slash_GTP_minus_Ras -> Ras_slash_GDP_minus_Ras; Ras_slash_Ras_minus_intrinsic_minus_GTPase_kf*Ras_slash_GTP_minus_Ras - Ras_slash_Ras_minus_intrinsic_minus_GTPase_kb*Ras_slash_GDP_minus_Ras;
    Ras_slash_Ras_minus_intrinsic_minus_GTPase_kf = 1e-16 vol_secINV; Ras_slash_Ras_minus_intrinsic_minus_GTPase_kb = 0 vol_secINV;
  // kf*Ras_slash_GAP_star_-kb*Ras_slash_GAP
  // Assume a reasonably good rate for dephosphorylating it, 1/sec
  Ras_slash_dephosph_minus_GAP: Ras_slash_GAP_star_ -> Ras_slash_GAP; Ras_slash_dephosph_minus_GAP_kf*Ras_slash_GAP_star_ - Ras_slash_dephosph_minus_GAP_kb*Ras_slash_GAP;
    Ras_slash_dephosph_minus_GAP_kf = 1e-13 vol_secINV; Ras_slash_dephosph_minus_GAP_kb = 0 vol_secINV;
  // k1*MAPK_slash_craf_minus_1*PKC_minus_active-k2*PKC_minus_active_slash_PKC_minus_act_minus_raf_slash_PKC_minus_act_minus_raf_cplx
  // Rate consts from Chen et al Biochem 32, 1032 (1993) k3 = k2 = 4 k1 = 9e-5 Lower k1 to 1e-6 to balance 10X DAG sensitivity of PKC 11 May2K: Double Vmax. rates=1e-6, 32,8 29 May 2k: Vmax * 0.6. Rates=6e-7, 19.2, 4.8 30 May 2k: vmax=5. Rates=6.25e-7,20,5 3 Jun 2k: vmax=4. Rates=5e-7,16,4
  PKC_minus_active_slash_PKC_minus_act_minus_raf_1: MAPK_slash_craf_minus_1 + $PKC_minus_active -> PKC_minus_active_slash_PKC_minus_act_minus_raf_slash_PKC_minus_act_minus_raf_cplx; PKC_minus_active_slash_PKC_minus_act_minus_raf_1_k1*MAPK_slash_craf_minus_1*PKC_minus_active - PKC_minus_active_slash_PKC_minus_act_minus_raf_1_k2*PKC_minus_active_slash_PKC_minus_act_minus_raf_slash_PKC_minus_act_minus_raf_cplx;
    PKC_minus_active_slash_PKC_minus_act_minus_raf_1_k1 = 3e-13 vol_uMINVsecINV; PKC_minus_active_slash_PKC_minus_act_minus_raf_1_k2 = 1.6e-11 vol_secINV;
  // k3*PKC_minus_active_slash_PKC_minus_act_minus_raf_slash_PKC_minus_act_minus_raf_cplx
  PKC_minus_active_slash_PKC_minus_act_minus_raf_2: PKC_minus_active_slash_PKC_minus_act_minus_raf_slash_PKC_minus_act_minus_raf_cplx => MAPK_slash_craf_minus_1_star_ + $PKC_minus_active; PKC_minus_active_slash_PKC_minus_act_minus_raf_2_k3*PKC_minus_active_slash_PKC_minus_act_minus_raf_slash_PKC_minus_act_minus_raf_cplx;
    PKC_minus_active_slash_PKC_minus_act_minus_raf_2_k3 = 4e-12 vol_secINV;
  // k1*Ras_slash_GAP*PKC_minus_active-k2*PKC_minus_active_slash_PKC_minus_inact_minus_GAP_slash_PKC_minus_inact_minus_GAP_cplx
  // Rate consts copied from PCK-act-raf This reaction inactivates GAP. The idea is from the Boguski and McCormick review.
  PKC_minus_active_slash_PKC_minus_inact_minus_GAP_1: Ras_slash_GAP + $PKC_minus_active -> PKC_minus_active_slash_PKC_minus_inact_minus_GAP_slash_PKC_minus_inact_minus_GAP_cplx; PKC_minus_active_slash_PKC_minus_inact_minus_GAP_1_k1*Ras_slash_GAP*PKC_minus_active - PKC_minus_active_slash_PKC_minus_inact_minus_GAP_1_k2*PKC_minus_active_slash_PKC_minus_inact_minus_GAP_slash_PKC_minus_inact_minus_GAP_cplx;
    PKC_minus_active_slash_PKC_minus_inact_minus_GAP_1_k1 = 6e-12 vol_uMINVsecINV; PKC_minus_active_slash_PKC_minus_inact_minus_GAP_1_k2 = 1.6e-11 vol_secINV;
  // k3*PKC_minus_active_slash_PKC_minus_inact_minus_GAP_slash_PKC_minus_inact_minus_GAP_cplx
  PKC_minus_active_slash_PKC_minus_inact_minus_GAP_2: PKC_minus_active_slash_PKC_minus_inact_minus_GAP_slash_PKC_minus_inact_minus_GAP_cplx => Ras_slash_GAP_star_ + $PKC_minus_active; PKC_minus_active_slash_PKC_minus_inact_minus_GAP_2_k3*PKC_minus_active_slash_PKC_minus_inact_minus_GAP_slash_PKC_minus_inact_minus_GAP_cplx;
    PKC_minus_active_slash_PKC_minus_inact_minus_GAP_2_k3 = 4e-12 vol_secINV;
  // k1*Ras_slash_inact_minus_GEF*PKC_minus_active-k2*PKC_minus_active_slash_PKC_minus_act_minus_GEF_slash_PKC_minus_act_minus_GEF_cplx
  // Rate consts from PKC-act-raf. This reaction activates GEF. Gives >= 2X stim of ras, and a 2X stim of MAPK over amount from direct phosph of c-raf. Note that it is a push-pull reaction, and also get eff through phosph and inact of GAPs.
  PKC_minus_active_slash_PKC_minus_act_minus_GEF_1: Ras_slash_inact_minus_GEF + $PKC_minus_active -> PKC_minus_active_slash_PKC_minus_act_minus_GEF_slash_PKC_minus_act_minus_GEF_cplx; PKC_minus_active_slash_PKC_minus_act_minus_GEF_1_k1*Ras_slash_inact_minus_GEF*PKC_minus_active - PKC_minus_active_slash_PKC_minus_act_minus_GEF_1_k2*PKC_minus_active_slash_PKC_minus_act_minus_GEF_slash_PKC_minus_act_minus_GEF_cplx;
    PKC_minus_active_slash_PKC_minus_act_minus_GEF_1_k1 = 6e-12 vol_uMINVsecINV; PKC_minus_active_slash_PKC_minus_act_minus_GEF_1_k2 = 1.6e-11 vol_secINV;
  // k3*PKC_minus_active_slash_PKC_minus_act_minus_GEF_slash_PKC_minus_act_minus_GEF_cplx
  PKC_minus_active_slash_PKC_minus_act_minus_GEF_2: PKC_minus_active_slash_PKC_minus_act_minus_GEF_slash_PKC_minus_act_minus_GEF_cplx => Ras_slash_GEF_star_ + $PKC_minus_active; PKC_minus_active_slash_PKC_minus_act_minus_GEF_2_k3*PKC_minus_active_slash_PKC_minus_act_minus_GEF_slash_PKC_minus_act_minus_GEF_cplx;
    PKC_minus_active_slash_PKC_minus_act_minus_GEF_2_k3 = 4e-12 vol_secINV;
  // k1*MAPK_slash_MAPK*MAPK_slash_MAPKK_star_-k2*MAPK_slash_MAPKK_star__slash_MAPKKtyr_slash_MAPKKtyr_cplx
  // The actual MAPKK is 2 forms from Seger et al JBC 267:20 14373(1992) Vmax = 150nmol/min/mg From Haystead et al FEBS 306(1):17-22 we get Km=46.6nM for at least one of the phosphs. Putting these together: k3=0.15/sec, scale to get k2=0.6. k1=0.75/46.6nM=2.7e-5
  MAPK_slash_MAPKK_star__slash_MAPKKtyr_1: MAPK_slash_MAPK + MAPK_slash_MAPKK_star_ -> MAPK_slash_MAPKK_star__slash_MAPKKtyr_slash_MAPKKtyr_cplx; MAPK_slash_MAPKK_star__slash_MAPKKtyr_1_k1*MAPK_slash_MAPK*MAPK_slash_MAPKK_star_ - MAPK_slash_MAPKK_star__slash_MAPKKtyr_1_k2*MAPK_slash_MAPKK_star__slash_MAPKKtyr_slash_MAPKKtyr_cplx;
    MAPK_slash_MAPKK_star__slash_MAPKKtyr_1_k1 = 1.62e-11 vol_uMINVsecINV; MAPK_slash_MAPKK_star__slash_MAPKKtyr_1_k2 = 6e-13 vol_secINV;
  // k3*MAPK_slash_MAPKK_star__slash_MAPKKtyr_slash_MAPKKtyr_cplx
  MAPK_slash_MAPKK_star__slash_MAPKKtyr_2: MAPK_slash_MAPKK_star__slash_MAPKKtyr_slash_MAPKKtyr_cplx => MAPK_slash_MAPK_minus_tyr + MAPK_slash_MAPKK_star_; MAPK_slash_MAPKK_star__slash_MAPKKtyr_2_k3*MAPK_slash_MAPKK_star__slash_MAPKKtyr_slash_MAPKKtyr_cplx;
    MAPK_slash_MAPKK_star__slash_MAPKKtyr_2_k3 = 1.5e-13 vol_secINV;
  // k1*MAPK_slash_MAPK_minus_tyr*MAPK_slash_MAPKK_star_-k2*MAPK_slash_MAPKK_star__slash_MAPKKthr_slash_MAPKKthr_cplx
  // Rate consts same as for MAPKKtyr.
  MAPK_slash_MAPKK_star__slash_MAPKKthr_1: MAPK_slash_MAPK_minus_tyr + MAPK_slash_MAPKK_star_ -> MAPK_slash_MAPKK_star__slash_MAPKKthr_slash_MAPKKthr_cplx; MAPK_slash_MAPKK_star__slash_MAPKKthr_1_k1*MAPK_slash_MAPK_minus_tyr*MAPK_slash_MAPKK_star_ - MAPK_slash_MAPKK_star__slash_MAPKKthr_1_k2*MAPK_slash_MAPKK_star__slash_MAPKKthr_slash_MAPKKthr_cplx;
    MAPK_slash_MAPKK_star__slash_MAPKKthr_1_k1 = 1.62e-11 vol_uMINVsecINV; MAPK_slash_MAPKK_star__slash_MAPKKthr_1_k2 = 6e-13 vol_secINV;
  // k3*MAPK_slash_MAPKK_star__slash_MAPKKthr_slash_MAPKKthr_cplx
  MAPK_slash_MAPKK_star__slash_MAPKKthr_2: MAPK_slash_MAPKK_star__slash_MAPKKthr_slash_MAPKKthr_cplx => MAPK_star_ + MAPK_slash_MAPKK_star_; MAPK_slash_MAPKK_star__slash_MAPKKthr_2_k3*MAPK_slash_MAPKK_star__slash_MAPKKthr_slash_MAPKKthr_cplx;
    MAPK_slash_MAPKK_star__slash_MAPKKthr_2_k3 = 1.5e-13 vol_secINV;
  // k1*MAPK_slash_MAPKK*MAPK_slash_Raf_minus_GTP_minus_Ras_star_-k2*MAPK_slash_Raf_minus_GTP_minus_Ras_star__slash_Raf_minus_GTP_minus_Ras_star__dot_1_slash_Raf_minus_GTP_minus_Ras_star__dot_1_cplx
  // Kinetics are the same as for the craf-1* activity, ie., k1=1.1e-6, k2=.42, k3 =0.105 These are based on Force et al PNAS USA 91 1270-1274 1994. These parms cannot reach the observed 4X stim of MAPK. So lets increase the affinity, ie, raise k1 10X to 1.1e-5 Lets take it back down to where it was. Back up to 5X: 5.5e-6
  MAPK_slash_Raf_minus_GTP_minus_Ras_star__slash_Raf_minus_GTP_minus_Ras_star__dot_1_1: MAPK_slash_MAPKK + MAPK_slash_Raf_minus_GTP_minus_Ras_star_ -> MAPK_slash_Raf_minus_GTP_minus_Ras_star__slash_Raf_minus_GTP_minus_Ras_star__dot_1_slash_Raf_minus_GTP_minus_Ras_star__dot_1_cplx; MAPK_slash_Raf_minus_GTP_minus_Ras_star__slash_Raf_minus_GTP_minus_Ras_star__dot_1_1_k1*MAPK_slash_MAPKK*MAPK_slash_Raf_minus_GTP_minus_Ras_star_ - MAPK_slash_Raf_minus_GTP_minus_Ras_star__slash_Raf_minus_GTP_minus_Ras_star__dot_1_1_k2*MAPK_slash_Raf_minus_GTP_minus_Ras_star__slash_Raf_minus_GTP_minus_Ras_star__dot_1_slash_Raf_minus_GTP_minus_Ras_star__dot_1_cplx;
    MAPK_slash_Raf_minus_GTP_minus_Ras_star__slash_Raf_minus_GTP_minus_Ras_star__dot_1_1_k1 = 3.3e-12 vol_uMINVsecINV; MAPK_slash_Raf_minus_GTP_minus_Ras_star__slash_Raf_minus_GTP_minus_Ras_star__dot_1_1_k2 = 4.2e-13 vol_secINV;
  // k3*MAPK_slash_Raf_minus_GTP_minus_Ras_star__slash_Raf_minus_GTP_minus_Ras_star__dot_1_slash_Raf_minus_GTP_minus_Ras_star__dot_1_cplx
  MAPK_slash_Raf_minus_GTP_minus_Ras_star__slash_Raf_minus_GTP_minus_Ras_star__dot_1_2: MAPK_slash_Raf_minus_GTP_minus_Ras_star__slash_Raf_minus_GTP_minus_Ras_star__dot_1_slash_Raf_minus_GTP_minus_Ras_star__dot_1_cplx => MAPK_slash_MAPKK_minus_ser + MAPK_slash_Raf_minus_GTP_minus_Ras_star_; MAPK_slash_Raf_minus_GTP_minus_Ras_star__slash_Raf_minus_GTP_minus_Ras_star__dot_1_2_k3*MAPK_slash_Raf_minus_GTP_minus_Ras_star__slash_Raf_minus_GTP_minus_Ras_star__dot_1_slash_Raf_minus_GTP_minus_Ras_star__dot_1_cplx;
    MAPK_slash_Raf_minus_GTP_minus_Ras_star__slash_Raf_minus_GTP_minus_Ras_star__dot_1_2_k3 = 1.05e-13 vol_secINV;
  // k1*MAPK_slash_MAPKK_minus_ser*MAPK_slash_Raf_minus_GTP_minus_Ras_star_-k2*MAPK_slash_Raf_minus_GTP_minus_Ras_star__slash_Raf_minus_GTP_minus_Ras_star__dot_2_slash_Raf_minus_GTP_minus_Ras_star__dot_2_cplx
  // Same kinetics as other c-raf activated forms. See Force et al PNAS 91 1270-1274 1994. k1 = 1.1e-6, k2 = .42, k3 = 1.05 raise k1 to 5.5e-6
  MAPK_slash_Raf_minus_GTP_minus_Ras_star__slash_Raf_minus_GTP_minus_Ras_star__dot_2_1: MAPK_slash_MAPKK_minus_ser + MAPK_slash_Raf_minus_GTP_minus_Ras_star_ -> MAPK_slash_Raf_minus_GTP_minus_Ras_star__slash_Raf_minus_GTP_minus_Ras_star__dot_2_slash_Raf_minus_GTP_minus_Ras_star__dot_2_cplx; MAPK_slash_Raf_minus_GTP_minus_Ras_star__slash_Raf_minus_GTP_minus_Ras_star__dot_2_1_k1*MAPK_slash_MAPKK_minus_ser*MAPK_slash_Raf_minus_GTP_minus_Ras_star_ - MAPK_slash_Raf_minus_GTP_minus_Ras_star__slash_Raf_minus_GTP_minus_Ras_star__dot_2_1_k2*MAPK_slash_Raf_minus_GTP_minus_Ras_star__slash_Raf_minus_GTP_minus_Ras_star__dot_2_slash_Raf_minus_GTP_minus_Ras_star__dot_2_cplx;
    MAPK_slash_Raf_minus_GTP_minus_Ras_star__slash_Raf_minus_GTP_minus_Ras_star__dot_2_1_k1 = 3.3e-12 vol_uMINVsecINV; MAPK_slash_Raf_minus_GTP_minus_Ras_star__slash_Raf_minus_GTP_minus_Ras_star__dot_2_1_k2 = 4.2e-13 vol_secINV;
  // k3*MAPK_slash_Raf_minus_GTP_minus_Ras_star__slash_Raf_minus_GTP_minus_Ras_star__dot_2_slash_Raf_minus_GTP_minus_Ras_star__dot_2_cplx
  MAPK_slash_Raf_minus_GTP_minus_Ras_star__slash_Raf_minus_GTP_minus_Ras_star__dot_2_2: MAPK_slash_Raf_minus_GTP_minus_Ras_star__slash_Raf_minus_GTP_minus_Ras_star__dot_2_slash_Raf_minus_GTP_minus_Ras_star__dot_2_cplx => MAPK_slash_MAPKK_star_ + MAPK_slash_Raf_minus_GTP_minus_Ras_star_; MAPK_slash_Raf_minus_GTP_minus_Ras_star__slash_Raf_minus_GTP_minus_Ras_star__dot_2_2_k3*MAPK_slash_Raf_minus_GTP_minus_Ras_star__slash_Raf_minus_GTP_minus_Ras_star__dot_2_slash_Raf_minus_GTP_minus_Ras_star__dot_2_cplx;
    MAPK_slash_Raf_minus_GTP_minus_Ras_star__slash_Raf_minus_GTP_minus_Ras_star__dot_2_2_k3 = 1.05e-13 vol_secINV;
  // k1*MAPK_slash_MAPKK*MAPK_slash_RGR-k2*MAPK_slash_RGR_slash_RGR_dot_1_slash_RGR_dot_1_cplx
  // Kinetics are the same as for the craf-1* activity, ie., k1=1.1e-6, k2=.42, k3 =0.105 These are based on Force et al PNAS USA 91 1270-1274 1994. These parms cannot reach the observed 4X stim of MAPK. So lets increase the affinity, ie, raise k1 10X to 1.1e-5 Lets take it back down to where it was. Back up to 5X: 5.5e-6
  MAPK_slash_RGR_slash_RGR_dot_1_1: MAPK_slash_MAPKK + MAPK_slash_RGR -> MAPK_slash_RGR_slash_RGR_dot_1_slash_RGR_dot_1_cplx; MAPK_slash_RGR_slash_RGR_dot_1_1_k1*MAPK_slash_MAPKK*MAPK_slash_RGR - MAPK_slash_RGR_slash_RGR_dot_1_1_k2*MAPK_slash_RGR_slash_RGR_dot_1_slash_RGR_dot_1_cplx;
    MAPK_slash_RGR_slash_RGR_dot_1_1_k1 = 3.3e-12 vol_uMINVsecINV; MAPK_slash_RGR_slash_RGR_dot_1_1_k2 = 4.2e-13 vol_secINV;
  // k3*MAPK_slash_RGR_slash_RGR_dot_1_slash_RGR_dot_1_cplx
  MAPK_slash_RGR_slash_RGR_dot_1_2: MAPK_slash_RGR_slash_RGR_dot_1_slash_RGR_dot_1_cplx => MAPK_slash_MAPKK_minus_ser + MAPK_slash_RGR; MAPK_slash_RGR_slash_RGR_dot_1_2_k3*MAPK_slash_RGR_slash_RGR_dot_1_slash_RGR_dot_1_cplx;
    MAPK_slash_RGR_slash_RGR_dot_1_2_k3 = 1.05e-13 vol_secINV;
  // k1*MAPK_slash_MAPKK_minus_ser*MAPK_slash_RGR-k2*MAPK_slash_RGR_slash_RGR_dot_2_slash_RGR_dot_2_cplx
  // Same kinetics as other c-raf activated forms. See Force et al PNAS 91 1270-1274 1994. k1 = 1.1e-6, k2 = .42, k3 = 1.05 raise k1 to 5.5e-6
  MAPK_slash_RGR_slash_RGR_dot_2_1: MAPK_slash_MAPKK_minus_ser + MAPK_slash_RGR -> MAPK_slash_RGR_slash_RGR_dot_2_slash_RGR_dot_2_cplx; MAPK_slash_RGR_slash_RGR_dot_2_1_k1*MAPK_slash_MAPKK_minus_ser*MAPK_slash_RGR - MAPK_slash_RGR_slash_RGR_dot_2_1_k2*MAPK_slash_RGR_slash_RGR_dot_2_slash_RGR_dot_2_cplx;
    MAPK_slash_RGR_slash_RGR_dot_2_1_k1 = 3.3e-12 vol_uMINVsecINV; MAPK_slash_RGR_slash_RGR_dot_2_1_k2 = 4.2e-13 vol_secINV;
  // k3*MAPK_slash_RGR_slash_RGR_dot_2_slash_RGR_dot_2_cplx
  MAPK_slash_RGR_slash_RGR_dot_2_2: MAPK_slash_RGR_slash_RGR_dot_2_slash_RGR_dot_2_cplx => MAPK_slash_MAPKK_star_ + MAPK_slash_RGR; MAPK_slash_RGR_slash_RGR_dot_2_2_k3*MAPK_slash_RGR_slash_RGR_dot_2_slash_RGR_dot_2_cplx;
    MAPK_slash_RGR_slash_RGR_dot_2_2_k3 = 1.05e-13 vol_secINV;
  // kcat*MAPK_slash_MKP_minus_1_star__star_*MAPK_slash_MAPK_minus_tyr/(Km+MAPK_slash_MAPK_minus_tyr)
  // 3 Feb 2000. Same rates as MKP-1.
  MAPK_slash_MKP_minus_1_star__star__slash_MKP1_star__minus_tyr_minus_deph: MAPK_slash_MAPK_minus_tyr => MAPK_slash_MAPK; MAPK_slash_MKP_minus_1_star__star__slash_MKP1_star__minus_tyr_minus_deph_kcat*MAPK_slash_MKP_minus_1_star__star_*MAPK_slash_MAPK_minus_tyr/(MAPK_slash_MKP_minus_1_star__star__slash_MKP1_star__minus_tyr_minus_deph_Km + MAPK_slash_MAPK_minus_tyr);  // modifiers: MAPK_slash_MKP_minus_1_star__star_
    MAPK_slash_MKP_minus_1_star__star__slash_MKP1_star__minus_tyr_minus_deph_kcat = 1e-12 vol_secINV; MAPK_slash_MKP_minus_1_star__star__slash_MKP1_star__minus_tyr_minus_deph_Km = 0.06666667 uM1;
  // kcat*MAPK_slash_MKP_minus_1_star__star_*MAPK_star_/(Km+MAPK_star_)
  // 3 Feb 2000. Same rates as MKP1
  MAPK_slash_MKP_minus_1_star__star__slash_MKP1_star__minus_thr_minus_deph: MAPK_star_ => MAPK_slash_MAPK_minus_tyr; MAPK_slash_MKP_minus_1_star__star__slash_MKP1_star__minus_thr_minus_deph_kcat*MAPK_slash_MKP_minus_1_star__star_*MAPK_star_/(MAPK_slash_MKP_minus_1_star__star__slash_MKP1_star__minus_thr_minus_deph_Km + MAPK_star_);  // modifiers: MAPK_slash_MKP_minus_1_star__star_
    MAPK_slash_MKP_minus_1_star__star__slash_MKP1_star__minus_thr_minus_deph_kcat = 1e-12 vol_secINV; MAPK_slash_MKP_minus_1_star__star__slash_MKP1_star__minus_thr_minus_deph_Km = 0.06666667 uM1;
  // k1*MAPK_slash_MKP_minus_1_minus_gene*MAPK_slash_nuc_MAPK_star_-k2*MAPK_slash_nuc_MAPK_star__slash_MKP_minus_1_minus_synthesis_slash_MKP_minus_1_minus_synthesis_cplx
  // 5 Feb 2000 This is a crude model of activation of MKP1 production by MAPK. Time-course poorly constrained: 10 min to > 100 min. Rates are further constrained by the known degradation rates of MKP-1, also in this model. Peak MKP-1 is about 10 times basal (from Brondello et al Science 286:2514 1999). Max MAPK ~.25 uM, degradation 45 min. So this enz has to provide 22nM MKP every 45 min.
  MAPK_slash_nuc_MAPK_star__slash_MKP_minus_1_minus_synthesis_1: $MAPK_slash_MKP_minus_1_minus_gene + MAPK_slash_nuc_MAPK_star_ -> MAPK_slash_nuc_MAPK_star__slash_MKP_minus_1_minus_synthesis_slash_MKP_minus_1_minus_synthesis_cplx; MAPK_slash_nuc_MAPK_star__slash_MKP_minus_1_minus_synthesis_1_k1*MAPK_slash_MKP_minus_1_minus_gene*MAPK_slash_nuc_MAPK_star_ - MAPK_slash_nuc_MAPK_star__slash_MKP_minus_1_minus_synthesis_1_k2*MAPK_slash_nuc_MAPK_star__slash_MKP_minus_1_minus_synthesis_slash_MKP_minus_1_minus_synthesis_cplx;
    MAPK_slash_nuc_MAPK_star__slash_MKP_minus_1_minus_synthesis_1_k1 = 4.02e-17 vol_uMINVsecINV; MAPK_slash_nuc_MAPK_star__slash_MKP_minus_1_minus_synthesis_1_k2 = 1e-15 vol_secINV;
  // k3*MAPK_slash_nuc_MAPK_star__slash_MKP_minus_1_minus_synthesis_slash_MKP_minus_1_minus_synthesis_cplx
  MAPK_slash_nuc_MAPK_star__slash_MKP_minus_1_minus_synthesis_2: MAPK_slash_nuc_MAPK_star__slash_MKP_minus_1_minus_synthesis_slash_MKP_minus_1_minus_synthesis_cplx => MKP_minus_1 + MAPK_slash_nuc_MAPK_star_; MAPK_slash_nuc_MAPK_star__slash_MKP_minus_1_minus_synthesis_2_k3*MAPK_slash_nuc_MAPK_star__slash_MKP_minus_1_minus_synthesis_slash_MKP_minus_1_minus_synthesis_cplx;
    MAPK_slash_nuc_MAPK_star__slash_MKP_minus_1_minus_synthesis_2_k3 = 1e-16 vol_secINV;
  // k1*MAPK_slash_craf_minus_1_star_*MAPK_star_-k2*MAPK_star__slash_MAPK_star__minus_feedback_slash_MAPK_star__minus_feedback_cplx
  // Ueki et al JBC 269(22):15756-15761 show the presence of this step, but not the rate consts, which are derived from Sanghera et al JBC 265(1):52-57, 1990, see the deriv in the MAPK* notes.
  MAPK_star__slash_MAPK_star__minus_feedback_1: MAPK_slash_craf_minus_1_star_ + MAPK_star_ -> MAPK_star__slash_MAPK_star__minus_feedback_slash_MAPK_star__minus_feedback_cplx; MAPK_star__slash_MAPK_star__minus_feedback_1_k1*MAPK_slash_craf_minus_1_star_*MAPK_star_ - MAPK_star__slash_MAPK_star__minus_feedback_1_k2*MAPK_star__slash_MAPK_star__minus_feedback_slash_MAPK_star__minus_feedback_cplx;
    MAPK_star__slash_MAPK_star__minus_feedback_1_k1 = 1.95e-12 vol_uMINVsecINV; MAPK_star__slash_MAPK_star__minus_feedback_1_k2 = 4e-11 vol_secINV;
  // k3*MAPK_star__slash_MAPK_star__minus_feedback_slash_MAPK_star__minus_feedback_cplx
  MAPK_star__slash_MAPK_star__minus_feedback_2: MAPK_star__slash_MAPK_star__minus_feedback_slash_MAPK_star__minus_feedback_cplx => MAPK_slash_craf_minus_1_star__star_ + MAPK_star_; MAPK_star__slash_MAPK_star__minus_feedback_2_k3*MAPK_star__slash_MAPK_star__minus_feedback_slash_MAPK_star__minus_feedback_cplx;
    MAPK_star__slash_MAPK_star__minus_feedback_2_k3 = 1e-11 vol_secINV;
  // k1*PLA2_slash_PLA2_minus_cytosolic*MAPK_star_-k2*MAPK_star__slash_MAPK_star__slash_MAPK_star__cplx
  // Km = 25uM @ 50 uM ATP and 1mg/ml MBP (huge XS of substrate) Vmax = 4124 pmol/min/ml at a conc of 125 pmol/ml of enz, so: k3 = .5/sec (rate limiting) k1 = (k2 + k3)/Km = (.5 + 0)/(25*6e5) = 2e-8 (#/cell)^-1 #s from Sanghera et al JBC 265 pp 52 , 1990. From Nemenoff et al JBC 268(3):1960-1964 - using Sanghera\'s 1e-4 ratio of MAPK to protein, we get k3 = 7/sec from 1000 pmol/min/mg fig 5
  MAPK_star__slash_MAPK_star__1: PLA2_slash_PLA2_minus_cytosolic + MAPK_star_ -> MAPK_star__slash_MAPK_star__slash_MAPK_star__cplx; MAPK_star__slash_MAPK_star__1_k1*PLA2_slash_PLA2_minus_cytosolic*MAPK_star_ - MAPK_star__slash_MAPK_star__1_k2*MAPK_star__slash_MAPK_star__slash_MAPK_star__cplx;
    MAPK_star__slash_MAPK_star__1_k1 = 3.9e-12 vol_uMINVsecINV; MAPK_star__slash_MAPK_star__1_k2 = 8e-11 vol_secINV;
  // k3*MAPK_star__slash_MAPK_star__slash_MAPK_star__cplx
  MAPK_star__slash_MAPK_star__2: MAPK_star__slash_MAPK_star__slash_MAPK_star__cplx => PLA2_slash_PLA2_star_ + MAPK_star_; MAPK_star__slash_MAPK_star__2_k3*MAPK_star__slash_MAPK_star__slash_MAPK_star__cplx;
    MAPK_star__slash_MAPK_star__2_k3 = 2e-11 vol_secINV;
  // k1*MKP_minus_1*MAPK_star_-k2*MAPK_star__slash_MKP_minus_1_minus_phosph_slash_MKP_minus_1_minus_phosph_cplx
  // 3 Feb 2000. See Brondello et al Science 286:2514 1999. Rates assumed standard MAPK rates based on Sanghera et al JBC 265(1):53-57 1990. 24 Apr 2K, based on 12 Feb 2K: scaled by 0.1 to 3.25e-7,4,1
  MAPK_star__slash_MKP_minus_1_minus_phosph_1: MKP_minus_1 + MAPK_star_ -> MAPK_star__slash_MKP_minus_1_minus_phosph_slash_MKP_minus_1_minus_phosph_cplx; MAPK_star__slash_MKP_minus_1_minus_phosph_1_k1*MKP_minus_1*MAPK_star_ - MAPK_star__slash_MKP_minus_1_minus_phosph_1_k2*MAPK_star__slash_MKP_minus_1_minus_phosph_slash_MKP_minus_1_minus_phosph_cplx;
    MAPK_star__slash_MKP_minus_1_minus_phosph_1_k1 = 1.95e-13 vol_uMINVsecINV; MAPK_star__slash_MKP_minus_1_minus_phosph_1_k2 = 4e-12 vol_secINV;
  // k3*MAPK_star__slash_MKP_minus_1_minus_phosph_slash_MKP_minus_1_minus_phosph_cplx
  MAPK_star__slash_MKP_minus_1_minus_phosph_2: MAPK_star__slash_MKP_minus_1_minus_phosph_slash_MKP_minus_1_minus_phosph_cplx => MAPK_slash_MKP_minus_1_minus_ser359_star_ + MAPK_star_; MAPK_star__slash_MKP_minus_1_minus_phosph_2_k3*MAPK_star__slash_MKP_minus_1_minus_phosph_slash_MKP_minus_1_minus_phosph_cplx;
    MAPK_star__slash_MKP_minus_1_minus_phosph_2_k3 = 1e-12 vol_secINV;
  // k1*MAPK_slash_MKP_minus_1_minus_ser359_star_*MAPK_star_-k2*MAPK_star__slash_MKP_minus_1_minus_phosph2_slash_MKP_minus_1_minus_phosph2_cplx
  // 3 Feb 2000. See Brondello et al Science 286:2514 1999. Rates assumed standard MAPK rates based on Sanghera et al JBC 265(1):53-57 1990. 24 Apr 2K, based on 12 Feb 2K: Scaled x0.1 to 3.25e-7,4,1
  MAPK_star__slash_MKP_minus_1_minus_phosph2_1: MAPK_slash_MKP_minus_1_minus_ser359_star_ + MAPK_star_ -> MAPK_star__slash_MKP_minus_1_minus_phosph2_slash_MKP_minus_1_minus_phosph2_cplx; MAPK_star__slash_MKP_minus_1_minus_phosph2_1_k1*MAPK_slash_MKP_minus_1_minus_ser359_star_*MAPK_star_ - MAPK_star__slash_MKP_minus_1_minus_phosph2_1_k2*MAPK_star__slash_MKP_minus_1_minus_phosph2_slash_MKP_minus_1_minus_phosph2_cplx;
    MAPK_star__slash_MKP_minus_1_minus_phosph2_1_k1 = 1.95e-13 vol_uMINVsecINV; MAPK_star__slash_MKP_minus_1_minus_phosph2_1_k2 = 4e-12 vol_secINV;
  // k3*MAPK_star__slash_MKP_minus_1_minus_phosph2_slash_MKP_minus_1_minus_phosph2_cplx
  MAPK_star__slash_MKP_minus_1_minus_phosph2_2: MAPK_star__slash_MKP_minus_1_minus_phosph2_slash_MKP_minus_1_minus_phosph2_cplx => MAPK_slash_MKP_minus_1_star__star_ + MAPK_star_; MAPK_star__slash_MKP_minus_1_minus_phosph2_2_k3*MAPK_star__slash_MKP_minus_1_minus_phosph2_slash_MKP_minus_1_minus_phosph2_cplx;
    MAPK_star__slash_MKP_minus_1_minus_phosph2_2_k3 = 1e-12 vol_secINV;
  // kcat*MKP_minus_1*MAPK_slash_MAPK_minus_tyr/(Km+MAPK_slash_MAPK_minus_tyr)
  // The original kinetics have been modified to obey the k2 = 4 * k3 rule, while keeping kcat and Km fixed. As noted in the NOTES, the only constraining data point is the time course of MAPK dephosphorylation, which this model satisfies. It would be nice to have more accurate estimates of rate consts and MKP-1 levels from the literature. Effective Km : 67 nM kcat = 1.43 umol/min/mg
  MKP_minus_1_slash_MKP1_minus_tyr_minus_deph: MAPK_slash_MAPK_minus_tyr => MAPK_slash_MAPK; MKP_minus_1_slash_MKP1_minus_tyr_minus_deph_kcat*MKP_minus_1*MAPK_slash_MAPK_minus_tyr/(MKP_minus_1_slash_MKP1_minus_tyr_minus_deph_Km + MAPK_slash_MAPK_minus_tyr);  // modifiers: MKP_minus_1
    MKP_minus_1_slash_MKP1_minus_tyr_minus_deph_kcat = 1e-12 vol_secINV; MKP_minus_1_slash_MKP1_minus_tyr_minus_deph_Km = 0.06666667 uM1;
  // kcat*MKP_minus_1*MAPK_star_/(Km+MAPK_star_)
  // See MKP1-tyr-deph
  MKP_minus_1_slash_MKP1_minus_thr_minus_deph: MAPK_star_ => MAPK_slash_MAPK_minus_tyr; MKP_minus_1_slash_MKP1_minus_thr_minus_deph_kcat*MKP_minus_1*MAPK_star_/(MKP_minus_1_slash_MKP1_minus_thr_minus_deph_Km + MAPK_star_);  // modifiers: MKP_minus_1
    MKP_minus_1_slash_MKP1_minus_thr_minus_deph_kcat = 1e-12 vol_secINV; MKP_minus_1_slash_MKP1_minus_thr_minus_deph_Km = 0.06666667 uM1;
  // k1*MAPK_slash_craf_minus_1_star_*PPhosphatase2A-k2*PPhosphatase2A_slash_craf_minus_deph_slash_craf_minus_deph_cplx
  // See parent PPhosphatase2A for parms
  PPhosphatase2A_slash_craf_minus_deph_1: MAPK_slash_craf_minus_1_star_ + PPhosphatase2A -> PPhosphatase2A_slash_craf_minus_deph_slash_craf_minus_deph_cplx; PPhosphatase2A_slash_craf_minus_deph_1_k1*MAPK_slash_craf_minus_1_star_*PPhosphatase2A - PPhosphatase2A_slash_craf_minus_deph_1_k2*PPhosphatase2A_slash_craf_minus_deph_slash_craf_minus_deph_cplx;
    PPhosphatase2A_slash_craf_minus_deph_1_k1 = 1.98e-12 vol_uMINVsecINV; PPhosphatase2A_slash_craf_minus_deph_1_k2 = 2.5e-11 vol_secINV;
  // k3*PPhosphatase2A_slash_craf_minus_deph_slash_craf_minus_deph_cplx
  PPhosphatase2A_slash_craf_minus_deph_2: PPhosphatase2A_slash_craf_minus_deph_slash_craf_minus_deph_cplx => MAPK_slash_craf_minus_1 + PPhosphatase2A; PPhosphatase2A_slash_craf_minus_deph_2_k3*PPhosphatase2A_slash_craf_minus_deph_slash_craf_minus_deph_cplx;
    PPhosphatase2A_slash_craf_minus_deph_2_k3 = 6e-12 vol_secINV;
  // k1*MAPK_slash_MAPKK_star_*PPhosphatase2A-k2*PPhosphatase2A_slash_MAPKK_minus_deph_slash_MAPKK_minus_deph_cplx
  // See: Kyriakis et al Nature 358 pp 417-421 1992 Ahn et al Curr Op Cell Biol 4:992-999 1992 for this pathway. See parent PPhosphatase2A for parms.
  PPhosphatase2A_slash_MAPKK_minus_deph_1: MAPK_slash_MAPKK_star_ + PPhosphatase2A -> PPhosphatase2A_slash_MAPKK_minus_deph_slash_MAPKK_minus_deph_cplx; PPhosphatase2A_slash_MAPKK_minus_deph_1_k1*MAPK_slash_MAPKK_star_*PPhosphatase2A - PPhosphatase2A_slash_MAPKK_minus_deph_1_k2*PPhosphatase2A_slash_MAPKK_minus_deph_slash_MAPKK_minus_deph_cplx;
    PPhosphatase2A_slash_MAPKK_minus_deph_1_k1 = 1.98e-12 vol_uMINVsecINV; PPhosphatase2A_slash_MAPKK_minus_deph_1_k2 = 2.5e-11 vol_secINV;
  // k3*PPhosphatase2A_slash_MAPKK_minus_deph_slash_MAPKK_minus_deph_cplx
  PPhosphatase2A_slash_MAPKK_minus_deph_2: PPhosphatase2A_slash_MAPKK_minus_deph_slash_MAPKK_minus_deph_cplx => MAPK_slash_MAPKK_minus_ser + PPhosphatase2A; PPhosphatase2A_slash_MAPKK_minus_deph_2_k3*PPhosphatase2A_slash_MAPKK_minus_deph_slash_MAPKK_minus_deph_cplx;
    PPhosphatase2A_slash_MAPKK_minus_deph_2_k3 = 6e-12 vol_secINV;
  // k1*MAPK_slash_MAPKK_minus_ser*PPhosphatase2A-k2*PPhosphatase2A_slash_MAPKK_minus_deph_minus_ser_slash_MAPKK_minus_deph_minus_ser_cplx
  PPhosphatase2A_slash_MAPKK_minus_deph_minus_ser_1: MAPK_slash_MAPKK_minus_ser + PPhosphatase2A -> PPhosphatase2A_slash_MAPKK_minus_deph_minus_ser_slash_MAPKK_minus_deph_minus_ser_cplx; PPhosphatase2A_slash_MAPKK_minus_deph_minus_ser_1_k1*MAPK_slash_MAPKK_minus_ser*PPhosphatase2A - PPhosphatase2A_slash_MAPKK_minus_deph_minus_ser_1_k2*PPhosphatase2A_slash_MAPKK_minus_deph_minus_ser_slash_MAPKK_minus_deph_minus_ser_cplx;
    PPhosphatase2A_slash_MAPKK_minus_deph_minus_ser_1_k1 = 1.98e-12 vol_uMINVsecINV; PPhosphatase2A_slash_MAPKK_minus_deph_minus_ser_1_k2 = 2.5e-11 vol_secINV;
  // k3*PPhosphatase2A_slash_MAPKK_minus_deph_minus_ser_slash_MAPKK_minus_deph_minus_ser_cplx
  PPhosphatase2A_slash_MAPKK_minus_deph_minus_ser_2: PPhosphatase2A_slash_MAPKK_minus_deph_minus_ser_slash_MAPKK_minus_deph_minus_ser_cplx => MAPK_slash_MAPKK + PPhosphatase2A; PPhosphatase2A_slash_MAPKK_minus_deph_minus_ser_2_k3*PPhosphatase2A_slash_MAPKK_minus_deph_minus_ser_slash_MAPKK_minus_deph_minus_ser_cplx;
    PPhosphatase2A_slash_MAPKK_minus_deph_minus_ser_2_k3 = 6e-12 vol_secINV;
  // k1*MAPK_slash_craf_minus_1_star__star_*PPhosphatase2A-k2*PPhosphatase2A_slash_craf_star__star__minus_deph_slash_craf_star__star__minus_deph_cplx
  // Ueki et al JBC 269(22) pp 15756-15761 1994 show hyperphosphorylation of craf, so this is there to dephosphorylate it. Identity of phosphatase is not known to me, but it may be PP2A like the rest, so I have made it so.
  PPhosphatase2A_slash_craf_star__star__minus_deph_1: MAPK_slash_craf_minus_1_star__star_ + PPhosphatase2A -> PPhosphatase2A_slash_craf_star__star__minus_deph_slash_craf_star__star__minus_deph_cplx; PPhosphatase2A_slash_craf_star__star__minus_deph_1_k1*MAPK_slash_craf_minus_1_star__star_*PPhosphatase2A - PPhosphatase2A_slash_craf_star__star__minus_deph_1_k2*PPhosphatase2A_slash_craf_star__star__minus_deph_slash_craf_star__star__minus_deph_cplx;
    PPhosphatase2A_slash_craf_star__star__minus_deph_1_k1 = 1.98e-12 vol_uMINVsecINV; PPhosphatase2A_slash_craf_star__star__minus_deph_1_k2 = 2.5e-11 vol_secINV;
  // k3*PPhosphatase2A_slash_craf_star__star__minus_deph_slash_craf_star__star__minus_deph_cplx
  PPhosphatase2A_slash_craf_star__star__minus_deph_2: PPhosphatase2A_slash_craf_star__star__minus_deph_slash_craf_star__star__minus_deph_cplx => MAPK_slash_craf_minus_1_star_ + PPhosphatase2A; PPhosphatase2A_slash_craf_star__star__minus_deph_2_k3*PPhosphatase2A_slash_craf_star__star__minus_deph_slash_craf_star__star__minus_deph_cplx;
    PPhosphatase2A_slash_craf_star__star__minus_deph_2_k3 = 6e-12 vol_secINV;
  // k1*PLA2_slash_APC*PLA2_slash_PLA2_minus_Ca_star_-k2*PLA2_slash_PLA2_minus_Ca_star__slash_kenz_slash_kenz_cplx
  // 10 x raise oct22 12 x oct 24, set k2 = 4 * k3
  PLA2_slash_PLA2_minus_Ca_star__slash_kenz_1: $PLA2_slash_APC + PLA2_slash_PLA2_minus_Ca_star_ -> PLA2_slash_PLA2_minus_Ca_star__slash_kenz_slash_kenz_cplx; PLA2_slash_PLA2_minus_Ca_star__slash_kenz_1_k1*PLA2_slash_APC*PLA2_slash_PLA2_minus_Ca_star_ - PLA2_slash_PLA2_minus_Ca_star__slash_kenz_1_k2*PLA2_slash_PLA2_minus_Ca_star__slash_kenz_slash_kenz_cplx;
    PLA2_slash_PLA2_minus_Ca_star__slash_kenz_1_k1 = 1.35e-12 vol_uMINVsecINV; PLA2_slash_PLA2_minus_Ca_star__slash_kenz_1_k2 = 2.16e-11 vol_secINV;
  // k3*PLA2_slash_PLA2_minus_Ca_star__slash_kenz_slash_kenz_cplx
  PLA2_slash_PLA2_minus_Ca_star__slash_kenz_2: PLA2_slash_PLA2_minus_Ca_star__slash_kenz_slash_kenz_cplx => AA + PLA2_slash_PLA2_minus_Ca_star_; PLA2_slash_PLA2_minus_Ca_star__slash_kenz_2_k3*PLA2_slash_PLA2_minus_Ca_star__slash_kenz_slash_kenz_cplx;
    PLA2_slash_PLA2_minus_Ca_star__slash_kenz_2_k3 = 5.4e-12 vol_secINV;
  // k1*PLA2_slash_APC*PLA2_slash_PIP2_minus_PLA2_star_-k2*PLA2_slash_PIP2_minus_PLA2_star__slash_kenz_slash_kenz_cplx
  // 10 X raise oct 22 12 X further raise oct 24 to allow for correct conc of enzyme
  PLA2_slash_PIP2_minus_PLA2_star__slash_kenz_1: $PLA2_slash_APC + PLA2_slash_PIP2_minus_PLA2_star_ -> PLA2_slash_PIP2_minus_PLA2_star__slash_kenz_slash_kenz_cplx; PLA2_slash_PIP2_minus_PLA2_star__slash_kenz_1_k1*PLA2_slash_APC*PLA2_slash_PIP2_minus_PLA2_star_ - PLA2_slash_PIP2_minus_PLA2_star__slash_kenz_1_k2*PLA2_slash_PIP2_minus_PLA2_star__slash_kenz_slash_kenz_cplx;
    PLA2_slash_PIP2_minus_PLA2_star__slash_kenz_1_k1 = 2.76e-12 vol_uMINVsecINV; PLA2_slash_PIP2_minus_PLA2_star__slash_kenz_1_k2 = 4.416e-11 vol_secINV;
  // k3*PLA2_slash_PIP2_minus_PLA2_star__slash_kenz_slash_kenz_cplx
  PLA2_slash_PIP2_minus_PLA2_star__slash_kenz_2: PLA2_slash_PIP2_minus_PLA2_star__slash_kenz_slash_kenz_cplx => AA + PLA2_slash_PIP2_minus_PLA2_star_; PLA2_slash_PIP2_minus_PLA2_star__slash_kenz_2_k3*PLA2_slash_PIP2_minus_PLA2_star__slash_kenz_slash_kenz_cplx;
    PLA2_slash_PIP2_minus_PLA2_star__slash_kenz_2_k3 = 1.104e-11 vol_secINV;
  // k1*PLA2_slash_APC*PLA2_slash_PIP2_minus_Ca_minus_PLA2_star_-k2*PLA2_slash_PIP2_minus_Ca_minus_PLA2_star__slash_kenz_slash_kenz_cplx
  // 10 x raise oct 22 12 x and rescale for k2 = 4 * k3 convention oct 24 Increase further to get the match to expt, which was spoilt due to large accumulation of PLA2 in the enzyme complexed forms. Lets raise k3, leaving the others at k1 = 1.5e-5 and k2 = 144 since they are large already.
  PLA2_slash_PIP2_minus_Ca_minus_PLA2_star__slash_kenz_1: $PLA2_slash_APC + PLA2_slash_PIP2_minus_Ca_minus_PLA2_star_ -> PLA2_slash_PIP2_minus_Ca_minus_PLA2_star__slash_kenz_slash_kenz_cplx; PLA2_slash_PIP2_minus_Ca_minus_PLA2_star__slash_kenz_1_k1*PLA2_slash_APC*PLA2_slash_PIP2_minus_Ca_minus_PLA2_star_ - PLA2_slash_PIP2_minus_Ca_minus_PLA2_star__slash_kenz_1_k2*PLA2_slash_PIP2_minus_Ca_minus_PLA2_star__slash_kenz_slash_kenz_cplx;
    PLA2_slash_PIP2_minus_Ca_minus_PLA2_star__slash_kenz_1_k1 = 9e-12 vol_uMINVsecINV; PLA2_slash_PIP2_minus_Ca_minus_PLA2_star__slash_kenz_1_k2 = 1.44e-10 vol_secINV;
  // k3*PLA2_slash_PIP2_minus_Ca_minus_PLA2_star__slash_kenz_slash_kenz_cplx
  PLA2_slash_PIP2_minus_Ca_minus_PLA2_star__slash_kenz_2: PLA2_slash_PIP2_minus_Ca_minus_PLA2_star__slash_kenz_slash_kenz_cplx => AA + PLA2_slash_PIP2_minus_Ca_minus_PLA2_star_; PLA2_slash_PIP2_minus_Ca_minus_PLA2_star__slash_kenz_2_k3*PLA2_slash_PIP2_minus_Ca_minus_PLA2_star__slash_kenz_slash_kenz_cplx;
    PLA2_slash_PIP2_minus_Ca_minus_PLA2_star__slash_kenz_2_k3 = 3.6e-11 vol_secINV;
  // k1*PLA2_slash_APC*PLA2_slash_DAG_minus_Ca_minus_PLA2_star_-k2*PLA2_slash_DAG_minus_Ca_minus_PLA2_star__slash_kenz_slash_kenz_cplx
  // 10 X raise oct 22 12 X raise oct 24 + conversion to k2 =4 * k3
  PLA2_slash_DAG_minus_Ca_minus_PLA2_star__slash_kenz_1: $PLA2_slash_APC + PLA2_slash_DAG_minus_Ca_minus_PLA2_star_ -> PLA2_slash_DAG_minus_Ca_minus_PLA2_star__slash_kenz_slash_kenz_cplx; PLA2_slash_DAG_minus_Ca_minus_PLA2_star__slash_kenz_1_k1*PLA2_slash_APC*PLA2_slash_DAG_minus_Ca_minus_PLA2_star_ - PLA2_slash_DAG_minus_Ca_minus_PLA2_star__slash_kenz_1_k2*PLA2_slash_DAG_minus_Ca_minus_PLA2_star__slash_kenz_slash_kenz_cplx;
    PLA2_slash_DAG_minus_Ca_minus_PLA2_star__slash_kenz_1_k1 = 1.5e-11 vol_uMINVsecINV; PLA2_slash_DAG_minus_Ca_minus_PLA2_star__slash_kenz_1_k2 = 2.4e-10 vol_secINV;
  // k3*PLA2_slash_DAG_minus_Ca_minus_PLA2_star__slash_kenz_slash_kenz_cplx
  PLA2_slash_DAG_minus_Ca_minus_PLA2_star__slash_kenz_2: PLA2_slash_DAG_minus_Ca_minus_PLA2_star__slash_kenz_slash_kenz_cplx => AA + PLA2_slash_DAG_minus_Ca_minus_PLA2_star_; PLA2_slash_DAG_minus_Ca_minus_PLA2_star__slash_kenz_2_k3*PLA2_slash_DAG_minus_Ca_minus_PLA2_star__slash_kenz_slash_kenz_cplx;
    PLA2_slash_DAG_minus_Ca_minus_PLA2_star__slash_kenz_2_k3 = 6e-11 vol_secINV;
  // k1*PLA2_slash_APC*PLA2_slash_PLA2_star__minus_Ca-k2*PLA2_slash_PLA2_star__minus_Ca_slash_kenz_slash_kenz_cplx
  // This form should be 3 to 6 times as fast as the Ca-only form. I have scaled by 4x which seems to give a 5x rise. 10x raise Oct 22 12 x oct 24, changed k2 = 4 * k3
  PLA2_slash_PLA2_star__minus_Ca_slash_kenz_1: $PLA2_slash_APC + PLA2_slash_PLA2_star__minus_Ca -> PLA2_slash_PLA2_star__minus_Ca_slash_kenz_slash_kenz_cplx; PLA2_slash_PLA2_star__minus_Ca_slash_kenz_1_k1*PLA2_slash_APC*PLA2_slash_PLA2_star__minus_Ca - PLA2_slash_PLA2_star__minus_Ca_slash_kenz_1_k2*PLA2_slash_PLA2_star__minus_Ca_slash_kenz_slash_kenz_cplx;
    PLA2_slash_PLA2_star__minus_Ca_slash_kenz_1_k1 = 3e-11 vol_uMINVsecINV; PLA2_slash_PLA2_star__minus_Ca_slash_kenz_1_k2 = 4.8e-10 vol_secINV;
  // k3*PLA2_slash_PLA2_star__minus_Ca_slash_kenz_slash_kenz_cplx
  PLA2_slash_PLA2_star__minus_Ca_slash_kenz_2: PLA2_slash_PLA2_star__minus_Ca_slash_kenz_slash_kenz_cplx => AA + PLA2_slash_PLA2_star__minus_Ca; PLA2_slash_PLA2_star__minus_Ca_slash_kenz_2_k3*PLA2_slash_PLA2_star__minus_Ca_slash_kenz_slash_kenz_cplx;
    PLA2_slash_PLA2_star__minus_Ca_slash_kenz_2_k3 = 1.2e-10 vol_secINV;
  // k1*Ras_slash_GDP_minus_Ras*Ras_slash_GEF_star_-k2*Ras_slash_GEF_star__slash_GEF_star__minus_act_minus_ras_slash_GEF_star__minus_act_minus_ras_cplx
  // Kinetics same as GEF-bg-act-ras
  Ras_slash_GEF_star__slash_GEF_star__minus_act_minus_ras_1: Ras_slash_GDP_minus_Ras + Ras_slash_GEF_star_ -> Ras_slash_GEF_star__slash_GEF_star__minus_act_minus_ras_slash_GEF_star__minus_act_minus_ras_cplx; Ras_slash_GEF_star__slash_GEF_star__minus_act_minus_ras_1_k1*Ras_slash_GDP_minus_Ras*Ras_slash_GEF_star_ - Ras_slash_GEF_star__slash_GEF_star__minus_act_minus_ras_1_k2*Ras_slash_GEF_star__slash_GEF_star__minus_act_minus_ras_slash_GEF_star__minus_act_minus_ras_cplx;
    Ras_slash_GEF_star__slash_GEF_star__minus_act_minus_ras_1_k1 = 1.98e-13 vol_uMINVsecINV; Ras_slash_GEF_star__slash_GEF_star__minus_act_minus_ras_1_k2 = 8e-14 vol_secINV;
  // k3*Ras_slash_GEF_star__slash_GEF_star__minus_act_minus_ras_slash_GEF_star__minus_act_minus_ras_cplx
  Ras_slash_GEF_star__slash_GEF_star__minus_act_minus_ras_2: Ras_slash_GEF_star__slash_GEF_star__minus_act_minus_ras_slash_GEF_star__minus_act_minus_ras_cplx => Ras_slash_GTP_minus_Ras + Ras_slash_GEF_star_; Ras_slash_GEF_star__slash_GEF_star__minus_act_minus_ras_2_k3*Ras_slash_GEF_star__slash_GEF_star__minus_act_minus_ras_slash_GEF_star__minus_act_minus_ras_cplx;
    Ras_slash_GEF_star__slash_GEF_star__minus_act_minus_ras_2_k3 = 2e-14 vol_secINV;
  // k1*Ras_slash_GTP_minus_Ras*Ras_slash_GAP-k2*Ras_slash_GAP_slash_GAP_minus_inact_minus_ras_slash_GAP_minus_inact_minus_ras_cplx
  // From Eccleston et al JBC 268(36)pp27012-19 get Kd < 2uM, kcat - 10/sec From Martin et al Cell 63 843-849 1990 get Kd ~ 250 nM, kcat = 20/min I will go with the Eccleston figures as there are good error bars (10%). In general the values are reasonably close. k1 = 1.666e-3/sec, k2 = 1000/sec, k3 = 10/sec (note k3 is rate-limiting)
  Ras_slash_GAP_slash_GAP_minus_inact_minus_ras_1: Ras_slash_GTP_minus_Ras + Ras_slash_GAP -> Ras_slash_GAP_slash_GAP_minus_inact_minus_ras_slash_GAP_minus_inact_minus_ras_cplx; Ras_slash_GAP_slash_GAP_minus_inact_minus_ras_1_k1*Ras_slash_GTP_minus_Ras*Ras_slash_GAP - Ras_slash_GAP_slash_GAP_minus_inact_minus_ras_1_k2*Ras_slash_GAP_slash_GAP_minus_inact_minus_ras_slash_GAP_minus_inact_minus_ras_cplx;
    Ras_slash_GAP_slash_GAP_minus_inact_minus_ras_1_k1 = 9.996e-10 vol_uMINVsecINV; Ras_slash_GAP_slash_GAP_minus_inact_minus_ras_1_k2 = 1e-9 vol_secINV;
  // k3*Ras_slash_GAP_slash_GAP_minus_inact_minus_ras_slash_GAP_minus_inact_minus_ras_cplx
  Ras_slash_GAP_slash_GAP_minus_inact_minus_ras_2: Ras_slash_GAP_slash_GAP_minus_inact_minus_ras_slash_GAP_minus_inact_minus_ras_cplx => Ras_slash_GDP_minus_Ras + Ras_slash_GAP; Ras_slash_GAP_slash_GAP_minus_inact_minus_ras_2_k3*Ras_slash_GAP_slash_GAP_minus_inact_minus_ras_slash_GAP_minus_inact_minus_ras_cplx;
    Ras_slash_GAP_slash_GAP_minus_inact_minus_ras_2_k3 = 1e-11 vol_secINV;

  // Unit definitions:
  unit uM1 = 1e-6 mole / litre;
  unit vol_secINV = litre / second;
  unit vol_uMINVsecINV = litre^2 / (1e-6 mole * second);
  unit substance = 1e-6 mole;
end
