// SBML level 2 version 1

model testid()
  // Bhalla2004_PKC_2003
  // This model consists of receptor-ligand interaction, G-protein activation, Adenylyl cyclase mediated formation of cAMP and activation of PKA in the neuron. Demonstration programs using this model described in <a href = "http://www.ncbi.nlm.nih.gov/entrez/query.fcgi?cmd=Retrieve&db=pubmed&dopt=Abstract&list_uids=15298882 ">Bhalla US. (2004) Biophys J. 87(2):733-44</a> to generate a dose-response curve using stochastic calculations are available href=http://www.ncbs.res.in/~bhalla/stochpath/demos.html>here</a>.
  // This model originates from BioModels Database: A Database of Annotated Published Models (http://www.ebi.ac.uk/biomodels/). It is copyright (c) 2005-2011 The BioModels.net Team.
  // To the extent possible under law, all copyright and related or neighbouring rights to this encoded model have been dedicated to the public domain worldwide. Please refer to CC0 Public Domain Dedication for more information.
  // In summary, you are entitled to use this encoded model in absolutely any manner you deem suitable, verbatim, or with modification, alone or embedded it in a larger context, redistribute it, commercially or not, in a restricted way or not..
  // To cite BioModels Database, please use: Li C, Donizelli M, Rodriguez N, Dharuri H, Endler L, Chelliah V, Li L, He E, Henry A, Stefan MI, Snoep JL, Hucka M, Le Novère N, Laibe C (2010) BioModels Database: An enhanced, curated and annotated resource for published quantitative kinetic models. BMC Syst Biol., 4:92.
  // biomodels.db:MODEL9080388197
  // isDescribedBy pubmed:15298882
  // biomodels.db:MODEL9080388197
  // isDescribedBy pubmed:15298882
  // biomodels.db:MODEL9080388197
  // biomodels.db:MODEL9080388197

  // Compartments:
  compartment default_compartment = 1e-18;
  compartment geometry = 1e-12;

  // Species:
  species PKC_slash_PKC_minus_Ca in geometry = 3.720833e-17;
  species PKC_slash_PKC_minus_DAG_minus_AA_star_ in geometry = 4.913667e-18;
  species PKC_slash_PKC_minus_Ca_minus_AA_star_ in geometry = 1.75e-16;
  species PKC_slash_PKC_minus_Ca_minus_memb_star_ in geometry = 1.3896e-17;
  species PKC_slash_PKC_minus_DAG_minus_memb_star_ in geometry = 9.435167e-21;
  species PKC_slash_PKC_minus_basal_star_ in geometry = 0.02;
  species PKC_slash_PKC_minus_AA_star_ in geometry = 1.813333e-17;
  species PKC_slash_PKC_minus_Ca_minus_DAG in geometry = 8.463167e-23;
  species PKC_slash_PKC_minus_DAG in geometry = 1.161017e-16;
  species PKC_slash_PKC_minus_DAG_minus_AA in geometry = 2.518833e-19;
  species PKC_slash_PKC_minus_cytosolic in geometry = 1;
  // The conc of this has been a problem. Schaecter and Benowitz use 50 uM, but Shinomura et al have < 5. So I have altered the DAG-dependent rates in the PKC model to this.
  species $DAG in geometry = 11;
  species $Ca in geometry = 0.08;
  species $AA in geometry = 5;
  species PKC_minus_active in geometry;

  // Assignment rules:
  PKC_minus_active := PKC_slash_PKC_minus_DAG_minus_AA_star_ + PKC_slash_PKC_minus_Ca_minus_memb_star_ + PKC_slash_PKC_minus_Ca_minus_AA_star_ + PKC_slash_PKC_minus_DAG_minus_memb_star_ + PKC_slash_PKC_minus_basal_star_ + PKC_slash_PKC_minus_AA_star_;

  // Reactions:
  // kf*PKC_slash_PKC_minus_cytosolic*Ca-kb*PKC_slash_PKC_minus_Ca
  // Need est of rate of assoc of Ca and PKC. Assume it is fast The original parameter-searched kf of 439.4 has been scaled by 1/6e8 to account for change of units to n. Kf now 8.16e-7, kb=.6085 Raised kf to 1e-6 to match Ca curve, kb to .5
  PKC_slash_PKC_minus_act_minus_by_minus_Ca: PKC_slash_PKC_minus_cytosolic + $Ca -> PKC_slash_PKC_minus_Ca; PKC_slash_PKC_minus_act_minus_by_minus_Ca_kf*PKC_slash_PKC_minus_cytosolic*Ca - PKC_slash_PKC_minus_act_minus_by_minus_Ca_kb*PKC_slash_PKC_minus_Ca;
    PKC_slash_PKC_minus_act_minus_by_minus_Ca_kf = 6e-13 vol_uMINVsecINV; PKC_slash_PKC_minus_act_minus_by_minus_Ca_kb = 5e-13 vol_secINV;
  // kf*DAG*PKC_slash_PKC_minus_Ca-kb*PKC_slash_PKC_minus_Ca_minus_DAG
  // Need est of rate. Assume it is fast Obtained from param search kf raised 10 X : see Shinomura et al PNAS 88 5149-5153 1991. kf changed from 3.865e-7 to 2.0e-7 in line with closer analysis of Shinomura data. 26 June 1996: Corrected DAG data: reduce kf 15x from 2e-7 1.333e-8
  PKC_slash_PKC_minus_act_minus_by_minus_DAG: $DAG + PKC_slash_PKC_minus_Ca -> PKC_slash_PKC_minus_Ca_minus_DAG; PKC_slash_PKC_minus_act_minus_by_minus_DAG_kf*DAG*PKC_slash_PKC_minus_Ca - PKC_slash_PKC_minus_act_minus_by_minus_DAG_kb*PKC_slash_PKC_minus_Ca_minus_DAG;
    PKC_slash_PKC_minus_act_minus_by_minus_DAG_kf = 7.9998e-15 vol_uMINVsecINV; PKC_slash_PKC_minus_act_minus_by_minus_DAG_kb = 8.6348e-12 vol_secINV;
  // kf*PKC_slash_PKC_minus_Ca-kb*PKC_slash_PKC_minus_Ca_minus_memb_star_
  PKC_slash_PKC_minus_Ca_minus_to_minus_memb: PKC_slash_PKC_minus_Ca -> PKC_slash_PKC_minus_Ca_minus_memb_star_; PKC_slash_PKC_minus_Ca_minus_to_minus_memb_kf*PKC_slash_PKC_minus_Ca - PKC_slash_PKC_minus_Ca_minus_to_minus_memb_kb*PKC_slash_PKC_minus_Ca_minus_memb_star_;
    PKC_slash_PKC_minus_Ca_minus_to_minus_memb_kf = 1.2705e-12 vol_secINV; PKC_slash_PKC_minus_Ca_minus_to_minus_memb_kb = 3.5026e-12 vol_secINV;
  // kf*PKC_slash_PKC_minus_Ca_minus_DAG-kb*PKC_slash_PKC_minus_DAG_minus_memb_star_
  // Raise kb from .087 to 0.1 to match data from Shinomura et al. Lower kf from 1.155 to 1.0 to match data from Shinomura al.
  PKC_slash_PKC_minus_DAG_minus_to_minus_memb: PKC_slash_PKC_minus_Ca_minus_DAG -> PKC_slash_PKC_minus_DAG_minus_memb_star_; PKC_slash_PKC_minus_DAG_minus_to_minus_memb_kf*PKC_slash_PKC_minus_Ca_minus_DAG - PKC_slash_PKC_minus_DAG_minus_to_minus_memb_kb*PKC_slash_PKC_minus_DAG_minus_memb_star_;
    PKC_slash_PKC_minus_DAG_minus_to_minus_memb_kf = 1e-12 vol_secINV; PKC_slash_PKC_minus_DAG_minus_to_minus_memb_kb = 1e-13 vol_secINV;
  // kf*PKC_slash_PKC_minus_Ca*AA-kb*PKC_slash_PKC_minus_Ca_minus_AA_star_
  // Schaechter and Benowitz We have to increase Kf for conc scaling Changed kf to 2e-9 on Sept 19, 94. This gives better match.
  PKC_slash_PKC_minus_act_minus_by_minus_Ca_minus_AA: PKC_slash_PKC_minus_Ca + $AA -> PKC_slash_PKC_minus_Ca_minus_AA_star_; PKC_slash_PKC_minus_act_minus_by_minus_Ca_minus_AA_kf*PKC_slash_PKC_minus_Ca*AA - PKC_slash_PKC_minus_act_minus_by_minus_Ca_minus_AA_kb*PKC_slash_PKC_minus_Ca_minus_AA_star_;
    PKC_slash_PKC_minus_act_minus_by_minus_Ca_minus_AA_kf = 1.2e-15 vol_uMINVsecINV; PKC_slash_PKC_minus_act_minus_by_minus_Ca_minus_AA_kb = 1e-13 vol_secINV;
  // kf*PKC_slash_PKC_minus_DAG_minus_AA-kb*PKC_slash_PKC_minus_DAG_minus_AA_star_
  // Assume slowish too. Schaechter Benowitz
  PKC_slash_PKC_minus_act_minus_by_minus_DAG_minus_AA: PKC_slash_PKC_minus_DAG_minus_AA -> PKC_slash_PKC_minus_DAG_minus_AA_star_; PKC_slash_PKC_minus_act_minus_by_minus_DAG_minus_AA_kf*PKC_slash_PKC_minus_DAG_minus_AA - PKC_slash_PKC_minus_act_minus_by_minus_DAG_minus_AA_kb*PKC_slash_PKC_minus_DAG_minus_AA_star_;
    PKC_slash_PKC_minus_act_minus_by_minus_DAG_minus_AA_kf = 2e-12 vol_secINV; PKC_slash_PKC_minus_act_minus_by_minus_DAG_minus_AA_kb = 2e-13 vol_secINV;
  // kf*PKC_slash_PKC_minus_cytosolic-kb*PKC_slash_PKC_minus_basal_star_
  // Initial basal levels were set by kf = 1, kb = 20. In model, though, the basal levels of PKC activity higher.
  PKC_slash_PKC_minus_basal_minus_act: PKC_slash_PKC_minus_cytosolic -> PKC_slash_PKC_minus_basal_star_; PKC_slash_PKC_minus_basal_minus_act_kf*PKC_slash_PKC_minus_cytosolic - PKC_slash_PKC_minus_basal_minus_act_kb*PKC_slash_PKC_minus_basal_star_;
    PKC_slash_PKC_minus_basal_minus_act_kf = 1e-12 vol_secINV; PKC_slash_PKC_minus_basal_minus_act_kb = 5e-11 vol_secINV;
  // kf*AA*PKC_slash_PKC_minus_cytosolic-kb*PKC_slash_PKC_minus_AA_star_
  // Raise kf from 1.667e-10 to 2e-10 to get better match data.
  PKC_slash_PKC_minus_act_minus_by_minus_AA: $AA + PKC_slash_PKC_minus_cytosolic -> PKC_slash_PKC_minus_AA_star_; PKC_slash_PKC_minus_act_minus_by_minus_AA_kf*AA*PKC_slash_PKC_minus_cytosolic - PKC_slash_PKC_minus_act_minus_by_minus_AA_kb*PKC_slash_PKC_minus_AA_star_;
    PKC_slash_PKC_minus_act_minus_by_minus_AA_kf = 1.2e-16 vol_uMINVsecINV; PKC_slash_PKC_minus_act_minus_by_minus_AA_kb = 1e-13 vol_secINV;
  // kf*PKC_slash_PKC_minus_cytosolic*DAG-kb*PKC_slash_PKC_minus_DAG
  // kf raised 10 X based on Shinomura et al PNAS 88 5149-5153 1991 closer analysis of Shinomura et al: kf now 1e-8 (was 1.66e-8). Further tweak. To get sufficient AA synergy, increase kf to 1.5e-8 26 June 1996: Corrected DAG levels: reduce kf by 15x from 1.5e-8 1e-9
  PKC_slash_PKC_minus_n_minus_DAG: PKC_slash_PKC_minus_cytosolic + $DAG -> PKC_slash_PKC_minus_DAG; PKC_slash_PKC_minus_n_minus_DAG_kf*PKC_slash_PKC_minus_cytosolic*DAG - PKC_slash_PKC_minus_n_minus_DAG_kb*PKC_slash_PKC_minus_DAG;
    PKC_slash_PKC_minus_n_minus_DAG_kf = 6e-16 vol_uMINVsecINV; PKC_slash_PKC_minus_n_minus_DAG_kb = 1e-13 vol_secINV;
  // kf*PKC_slash_PKC_minus_DAG*AA-kb*PKC_slash_PKC_minus_DAG_minus_AA
  // Reduced kf to 0.66X to match Shinomura et al data. Initial: kf = 3.3333e-9 New: 2e-9 Newer: 2e-8 kb was 0.2 2.
  PKC_slash_PKC_minus_n_minus_DAG_minus_AA: PKC_slash_PKC_minus_DAG + $AA -> PKC_slash_PKC_minus_DAG_minus_AA; PKC_slash_PKC_minus_n_minus_DAG_minus_AA_kf*PKC_slash_PKC_minus_DAG*AA - PKC_slash_PKC_minus_n_minus_DAG_minus_AA_kb*PKC_slash_PKC_minus_DAG_minus_AA;
    PKC_slash_PKC_minus_n_minus_DAG_minus_AA_kf = 1.8e-14 vol_uMINVsecINV; PKC_slash_PKC_minus_n_minus_DAG_minus_AA_kb = 2e-12 vol_secINV;

  // Unit definitions:
  unit vol_secINV = litre / second;
  unit vol_uMINVsecINV = litre^2 / (1e-6 mole * second);
  unit substance = 1e-6 mole;
end
