// SBML level 2 version 1

model testid()
  // Bhalla2004_CaMKII_2003
  // Model of regulation of CaMKII by Calcium, including parallel excitatory input from CaM and inhibitory input from PP1 as regulated by Calcineurin and PKA. Cell type: neuronal. <br"><a href = "http://www.ncbi.nlm.nih.gov/entrez/query.fcgi?cmd=Retrieve&db=pubmed&dopt=Abstract&list_uids=15298882&query_hl=11>Bhalla US. Biophys J. 2004 Aug;87(2):733-44.</a>
  // This model originates from BioModels Database: A Database of Annotated Published Models (http://www.ebi.ac.uk/biomodels/). It is copyright (c) 2005-2011 The BioModels.net Team.
  // To the extent possible under law, all copyright and related or neighbouring rights to this encoded model have been dedicated to the public domain worldwide. Please refer to CC0 Public Domain Dedication for more information.
  // In summary, you are entitled to use this encoded model in absolutely any manner you deem suitable, verbatim, or with modification, alone or embedded it in a larger context, redistribute it, commercially or not, in a restricted way or not..
  // To cite BioModels Database, please use: Li C, Donizelli M, Rodriguez N, Dharuri H, Endler L, Chelliah V, Li L, He E, Henry A, Stefan MI, Snoep JL, Hucka M, Le Novère N, Laibe C (2010) BioModels Database: An enhanced, curated and annotated resource for published quantitative kinetic models. BMC Syst Biol., 4:92.
  // biomodels.db:MODEL9080747936
  // isDescribedBy pubmed:15298882
  // biomodels.db:MODEL9080747936
  // isDescribedBy pubmed:15298882
  // biomodels.db:MODEL9080747936
  // biomodels.db:MODEL9080747936

  // Compartments:
  compartment default_compartment = 1e-18;
  compartment geometry = 1e-12;

  // Species:
  species PKC_minus_active_slash_PKC_minus_phosph_minus_neurogranin_slash_PKC_minus_phosph_minus_neurogranin_cplx in geometry = 0;
  species PKC_minus_active_slash_PKC_minus_phosph_minus_ng_minus_CaM_slash_PKC_minus_phosph_minus_ng_minus_CaM_cplx in geometry = 0;
  species PKA_minus_active_slash_PKA_minus_phosph_minus_I1_slash_PKA_minus_phosph_minus_I1_cplx in geometry = 0;
  species PKA_minus_active_slash_phosph_minus_PDE_slash_phosph_minus_PDE_cplx in geometry = 0;
  species CaM_minus_Ca4 in geometry = 0;
  species CaMKII_slash_CaMKII in geometry = 70;
  species CaMKII_slash_CaMKII_minus_CaM in geometry = 0;
  species CaMKII_slash_CaMKII_minus_thr286_star__minus_CaM in geometry = 0;
  species CaMKII_slash_CaMKII_star__star__star_ in geometry = 0;
  species CaMKII_slash_CaMKII_minus_thr286 in geometry = 0;
  species CaMKII_slash_CaMK_minus_thr306 in geometry = 0;
  species CaMKII_slash_tot_CaM_CaMKII_slash_CaM_act_305_slash_CaM_act_305_cplx in geometry = 0;
  species CaMKII_slash_tot_CaM_CaMKII_slash_CaM_act_286_slash_CaM_act_286_cplx in geometry = 0;
  species CaMKII_slash_tot_autonomous_CaMKII_slash_auton_305_slash_auton_305_cplx in geometry = 0;
  species CaMKII_slash_tot_autonomous_CaMKII_slash_auton_286_slash_auton_286_cplx in geometry = 0;
  species PP1_minus_active in geometry = 1.8;
  species PP1_minus_active_slash_Deph_minus_thr286_slash_Deph_minus_thr286_cplx in geometry = 0;
  species PP1_minus_active_slash_Deph_minus_thr305_slash_Deph_minus_thr305_cplx in geometry = 0;
  species PP1_minus_active_slash_Deph_minus_thr306_slash_Deph_minus_thr306_cplx in geometry = 0;
  species PP1_minus_active_slash_Deph_minus_thr286c_slash_Deph_minus_thr286c_cplx in geometry = 0;
  species PP1_minus_active_slash_Deph_thr286b_slash_Deph_thr286b_cplx in geometry = 0;
  species CaM_slash_CaM in geometry = 20;
  species CaM_slash_neurogranin_minus_CaM in geometry = 0;
  species CaM_slash_neurogranin_star_ in geometry = 0;
  species CaM_slash_neurogranin in geometry = 10;
  species CaM_minus_Ca3 in geometry = 0;
  species CaM_minus_TR2_minus_Ca2 in geometry = 0;
  species CaM_po_Ca_pc_n_minus_CaNAB_slash_dephosph_neurogranin_slash_dephosph_neurogranin_cplx in geometry = 0;
  species CaM_po_Ca_pc_n_minus_CaNAB_slash_dephosph_inhib1_slash_dephosph_inhib1_cplx in geometry = 0;
  species CaM_po_Ca_pc_n_minus_CaNAB_slash_dephosph_minus_PP1_minus_I_star__slash_dephosph_minus_PP1_minus_I_star__cplx in geometry = 0;
  species PP1_slash_I1 in geometry = 1.8;
  species PP1_slash_I1_star_ in geometry = 0.001;
  species PP1_slash_PP1_minus_I1_star_ in geometry = 0;
  species PP1_slash_PP1_minus_I1 in geometry = 0;
  species PP2A in geometry = 0.12;
  species PP2A_slash_PP2A_minus_dephosph_minus_I1_slash_PP2A_minus_dephosph_minus_I1_cplx in geometry = 0;
  species PP2A_slash_PP2A_minus_dephosph_minus_PP1_minus_I_star__slash_PP2A_minus_dephosph_minus_PP1_minus_I_star__cplx in geometry = 0;
  species CaNAB_minus_Ca4 in geometry = 0;
  species CaNAB_minus_Ca4_slash_dephosph_inhib1_noCaM_slash_dephosph_inhib1_noCaM_cplx in geometry = 0;
  species PP2B_slash_CaNAB in geometry = 1;
  species PP2B_slash_CaNAB_minus_Ca2 in geometry = 0;
  species PP2B_slash_CaMCa3_minus_CaNAB in geometry = 0;
  species PP2B_slash_CaMCa2_minus_CANAB in geometry = 0;
  species PP2B_slash_CaMCa4_minus_CaNAB in geometry = 0;
  species $PKC_minus_active in geometry = 0.09;
  species $PKA_minus_active in geometry = 0.015;
  species $Ca in geometry = 0.08;
  species $CaMKII_slash_tot_CaM_CaMKII in geometry;
  species $CaMKII_slash_tot_autonomous_CaMKII in geometry;
  species $CaM_po_Ca_pc_n_minus_CaNAB in geometry;

  // Assignment rules:
  CaMKII_slash_tot_CaM_CaMKII := CaMKII_slash_CaMKII_minus_CaM + CaMKII_slash_CaMKII_minus_thr286_star__minus_CaM;
  CaMKII_slash_tot_autonomous_CaMKII := CaMKII_slash_CaMKII_minus_thr286 + CaMKII_slash_CaMKII_star__star__star_;
  CaM_po_Ca_pc_n_minus_CaNAB := PP2B_slash_CaMCa4_minus_CaNAB + PP2B_slash_CaMCa3_minus_CaNAB + PP2B_slash_CaMCa2_minus_CANAB;

  // Reactions:
  // kf*CaM_minus_Ca4*CaMKII_slash_CaMKII-kb*CaMKII_slash_CaMKII_minus_CaM
  // This is tricky. There is some cooperativity here arising from interactions between the subunits of the CAMKII holoenzyme. However, the stoichiometry is 1. Kb/Kf = 6e4 #/cell. Rate is fast (see Hanson et al Neuron 12 943-956 1994) so lets say kb = 10. This gives kf = 1.6667e-4 H&S AnnRev Biochem 92 give tau for dissoc as 0.2 sec at low Ca, 0.4 at high. Low Ca = 100 nM = physiol.
  CaMKII_slash_CaMKII_minus_bind_minus_CaM: CaM_minus_Ca4 + CaMKII_slash_CaMKII -> CaMKII_slash_CaMKII_minus_CaM; CaMKII_slash_CaMKII_minus_bind_minus_CaM_kf*CaM_minus_Ca4*CaMKII_slash_CaMKII - CaMKII_slash_CaMKII_minus_bind_minus_CaM_kb*CaMKII_slash_CaMKII_minus_CaM;
    CaMKII_slash_CaMKII_minus_bind_minus_CaM_kf = 4.99998e-11 vol_uMINVsecINV; CaMKII_slash_CaMKII_minus_bind_minus_CaM_kb = 5e-12 vol_secINV;
  // kf*CaMKII_slash_CaMKII_minus_thr286*CaM_minus_Ca4-kb*CaMKII_slash_CaMKII_minus_thr286_star__minus_CaM
  // Affinity is up 1000X. Time to release is about 20 sec, so the kb is OK at 0.1 This makes Kf around 1.6666e-3
  CaMKII_slash_CaMK_minus_thr286_minus_bind_minus_CaM: CaMKII_slash_CaMKII_minus_thr286 + CaM_minus_Ca4 -> CaMKII_slash_CaMKII_minus_thr286_star__minus_CaM; CaMKII_slash_CaMK_minus_thr286_minus_bind_minus_CaM_kf*CaMKII_slash_CaMKII_minus_thr286*CaM_minus_Ca4 - CaMKII_slash_CaMK_minus_thr286_minus_bind_minus_CaM_kb*CaMKII_slash_CaMKII_minus_thr286_star__minus_CaM;
    CaMKII_slash_CaMK_minus_thr286_minus_bind_minus_CaM_kf = 1.0002e-9 vol_uMINVsecINV; CaMKII_slash_CaMK_minus_thr286_minus_bind_minus_CaM_kb = 1e-13 vol_secINV;
  // kf*CaMKII_slash_CaMKII-kb*CaMKII_slash_CaMKII_minus_thr286
  // This reaction represents one of the big unknowns in CaMK-II biochemistry: what maintains the basal level of phosphorylation on thr 286 ? See Hanson and Schulman Ann Rev Biochem 1992 61:559-601, specially pg 580, for review. I have not been able to find any compelling mechanism in the literature, but fortunately the level of basal activity is well documented.
  CaMKII_slash_basal_minus_activity: CaMKII_slash_CaMKII -> CaMKII_slash_CaMKII_minus_thr286; CaMKII_slash_basal_minus_activity_kf*CaMKII_slash_CaMKII - CaMKII_slash_basal_minus_activity_kb*CaMKII_slash_CaMKII_minus_thr286;
    CaMKII_slash_basal_minus_activity_kf = 3e-15 vol_secINV; CaMKII_slash_basal_minus_activity_kb = 0 vol_secINV;
  // kf*CaM_slash_CaM*Ca^2-kb*CaM_minus_TR2_minus_Ca2
  // Lets use the fast rate consts here. Since the rates are so different, I am not sure whether the order is relevant. These correspond to the TR2C fragment. We use the Martin et al rates here, plus the Drabicowski binding consts. All are scaled by 3X to cell temp. kf = 2e-10 kb = 72 Stemmer & Klee: K1=.9, K2=1.1. Assume 1.0uM for both. kb/kf=3.6e11. If kb=72, kf = 2e-10 (Exactly the same !)....
  CaM_slash_CaM_minus_TR2_minus_bind_minus_Ca: CaM_slash_CaM + 2 $Ca -> CaM_minus_TR2_minus_Ca2; CaM_slash_CaM_minus_TR2_minus_bind_minus_Ca_kf*CaM_slash_CaM*Ca^2 - CaM_slash_CaM_minus_TR2_minus_bind_minus_Ca_kb*CaM_minus_TR2_minus_Ca2;
    CaM_slash_CaM_minus_TR2_minus_bind_minus_Ca_kf = 7.2e-11 vol_uMINV2secINV; CaM_slash_CaM_minus_TR2_minus_bind_minus_Ca_kb = 7.2e-11 vol_secINV;
  // kf*CaM_minus_TR2_minus_Ca2*Ca-kb*CaM_minus_Ca3
  // K3 = 21.5, K4 = 2.8. Assuming that the K4 step happens first, we get kb/kf = 2.8 uM = 1.68e6 so kf =6e-6 assuming kb = 10
  CaM_slash_CaM_minus_TR2_minus_Ca2_minus_bind_minus_Ca: CaM_minus_TR2_minus_Ca2 + $Ca -> CaM_minus_Ca3; CaM_slash_CaM_minus_TR2_minus_Ca2_minus_bind_minus_Ca_kf*CaM_minus_TR2_minus_Ca2*Ca - CaM_slash_CaM_minus_TR2_minus_Ca2_minus_bind_minus_Ca_kb*CaM_minus_Ca3;
    CaM_slash_CaM_minus_TR2_minus_Ca2_minus_bind_minus_Ca_kf = 3.6e-12 vol_uMINVsecINV; CaM_slash_CaM_minus_TR2_minus_Ca2_minus_bind_minus_Ca_kb = 1e-11 vol_secINV;
  // kf*CaM_minus_Ca3*Ca-kb*CaM_minus_Ca4
  // Use K3 = 21.5 uM here from Stemmer and Klee table 3. kb/kf =21.5 * 6e5 so kf = 7.75e-7, kb = 10
  CaM_slash_CaM_minus_Ca3_minus_bind_minus_Ca: CaM_minus_Ca3 + $Ca -> CaM_minus_Ca4; CaM_slash_CaM_minus_Ca3_minus_bind_minus_Ca_kf*CaM_minus_Ca3*Ca - CaM_slash_CaM_minus_Ca3_minus_bind_minus_Ca_kb*CaM_minus_Ca4;
    CaM_slash_CaM_minus_Ca3_minus_bind_minus_Ca_kf = 4.65e-13 vol_uMINVsecINV; CaM_slash_CaM_minus_Ca3_minus_bind_minus_Ca_kb = 1e-11 vol_secINV;
  // kf*CaM_slash_neurogranin*CaM_slash_CaM-kb*CaM_slash_neurogranin_minus_CaM
  // Surprisingly, no direct info on rates from neurogranin at this time. These rates are based on GAP-43 binding studies. As GAP-43 and neurogranin share near identity in the CaM/PKC binding regions, and also similarity in phosph and dephosph rates, I am borrowing GAP-43 kinetic info. See Alexander et al JBC 262:13 6108-6113 1987
  CaM_slash_neurogranin_minus_bind_minus_CaM: CaM_slash_neurogranin + CaM_slash_CaM -> CaM_slash_neurogranin_minus_CaM; CaM_slash_neurogranin_minus_bind_minus_CaM_kf*CaM_slash_neurogranin*CaM_slash_CaM - CaM_slash_neurogranin_minus_bind_minus_CaM_kb*CaM_slash_neurogranin_minus_CaM;
    CaM_slash_neurogranin_minus_bind_minus_CaM_kf = 3e-13 vol_uMINVsecINV; CaM_slash_neurogranin_minus_bind_minus_CaM_kb = 1e-12 vol_secINV;
  // kf*CaM_slash_neurogranin_star_-kb*CaM_slash_neurogranin
  // This is put in to keep the basal levels of neurogranin* experimentally reasonable. From various papers, specially Ramakers et al JBC 270:23 1995 13892-13898, it looks like the basal level of phosph is between 20 and 40%. I est around 25 % The kf of 0.005 gives around this level at basal PKC activity levels of 0.1 uM active PKC.
  CaM_slash_dephosph_minus_neurogranin: CaM_slash_neurogranin_star_ -> CaM_slash_neurogranin; CaM_slash_dephosph_minus_neurogranin_kf*CaM_slash_neurogranin_star_ - CaM_slash_dephosph_minus_neurogranin_kb*CaM_slash_neurogranin;
    CaM_slash_dephosph_minus_neurogranin_kf = 5e-15 vol_secINV; CaM_slash_dephosph_minus_neurogranin_kb = 0 vol_secINV;
  // kf*PP1_slash_I1_star_*PP1_minus_active-kb*PP1_slash_PP1_minus_I1_star_
  // K inhib = 1nM from Cohen Ann Rev Bioch 1989, 4 nM from Foukes et al Assume 2 nM. kf /kb = 8.333e-4
  PP1_slash_Inact_minus_PP1: PP1_slash_I1_star_ + PP1_minus_active -> PP1_slash_PP1_minus_I1_star_; PP1_slash_Inact_minus_PP1_kf*PP1_slash_I1_star_*PP1_minus_active - PP1_slash_Inact_minus_PP1_kb*PP1_slash_PP1_minus_I1_star_;
    PP1_slash_Inact_minus_PP1_kf = 4.9998e-10 vol_uMINVsecINV; PP1_slash_Inact_minus_PP1_kb = 1e-13 vol_secINV;
  // kf*PP1_slash_PP1_minus_I1-kb*PP1_minus_active*PP1_slash_I1
  // Let us assume that the equil in this case is very far over to the right. This is probably safe.
  PP1_slash_dissoc_minus_PP1_minus_I1: PP1_slash_PP1_minus_I1 -> PP1_minus_active + PP1_slash_I1; PP1_slash_dissoc_minus_PP1_minus_I1_kf*PP1_slash_PP1_minus_I1 - PP1_slash_dissoc_minus_PP1_minus_I1_kb*PP1_minus_active*PP1_slash_I1;
    PP1_slash_dissoc_minus_PP1_minus_I1_kf = 1e-12 vol_secINV; PP1_slash_dissoc_minus_PP1_minus_I1_kb = 0 vol_uMINVsecINV;
  // kf*Ca^2*PP2B_slash_CaNAB_minus_Ca2-kb*CaNAB_minus_Ca4
  // This process is probably much more complicated and involves CaM. However, as I can\'t find detailed info I am bundling this into a single step. Based on Steemer and Klee pg 6863, the Kact is 0.5 uM. kf/kb = 1/(0.5 * 6e5)^2 = 1.11e-11
  PP2B_slash_Ca_minus_bind_minus_CaNAB_minus_Ca2: 2 $Ca + PP2B_slash_CaNAB_minus_Ca2 -> CaNAB_minus_Ca4; PP2B_slash_Ca_minus_bind_minus_CaNAB_minus_Ca2_kf*Ca^2*PP2B_slash_CaNAB_minus_Ca2 - PP2B_slash_Ca_minus_bind_minus_CaNAB_minus_Ca2_kb*CaNAB_minus_Ca4;
    PP2B_slash_Ca_minus_bind_minus_CaNAB_minus_Ca2_kf = 3.6e-12 vol_uMINV2secINV; PP2B_slash_Ca_minus_bind_minus_CaNAB_minus_Ca2_kb = 1e-12 vol_secINV;
  // kf*PP2B_slash_CaNAB*Ca^2-kb*PP2B_slash_CaNAB_minus_Ca2
  // going on the experience with CaM, we put the fast (high affinity) sites first. We only know (Stemmer and Klee) that the affinity is < 70 nM. Assuming 10 nM at first, we get kf = 2.78e-8, kb = 1. Try 20 nM. kf = 7e-9, kb = 1
  PP2B_slash_Ca_minus_bind_minus_CaNAB: PP2B_slash_CaNAB + 2 $Ca -> PP2B_slash_CaNAB_minus_Ca2; PP2B_slash_Ca_minus_bind_minus_CaNAB_kf*PP2B_slash_CaNAB*Ca^2 - PP2B_slash_Ca_minus_bind_minus_CaNAB_kb*PP2B_slash_CaNAB_minus_Ca2;
    PP2B_slash_Ca_minus_bind_minus_CaNAB_kf = 1.0008e-8 vol_uMINV2secINV; PP2B_slash_Ca_minus_bind_minus_CaNAB_kb = 1e-12 vol_secINV;
  // kf*CaNAB_minus_Ca4*CaM_minus_TR2_minus_Ca2-kb*PP2B_slash_CaMCa2_minus_CANAB
  // Disabled. See notes for PP2B7.g
  PP2B_slash_CaM_minus_Ca2_minus_bind_minus_CaNAB: CaNAB_minus_Ca4 + CaM_minus_TR2_minus_Ca2 -> PP2B_slash_CaMCa2_minus_CANAB; PP2B_slash_CaM_minus_Ca2_minus_bind_minus_CaNAB_kf*CaNAB_minus_Ca4*CaM_minus_TR2_minus_Ca2 - PP2B_slash_CaM_minus_Ca2_minus_bind_minus_CaNAB_kb*PP2B_slash_CaMCa2_minus_CANAB;
    PP2B_slash_CaM_minus_Ca2_minus_bind_minus_CaNAB_kf = 2.4e-13 vol_uMINVsecINV; PP2B_slash_CaM_minus_Ca2_minus_bind_minus_CaNAB_kb = 1e-12 vol_secINV;
  // kf*CaM_minus_Ca3*CaNAB_minus_Ca4-kb*PP2B_slash_CaMCa3_minus_CaNAB
  PP2B_slash_CaMCa3_minus_bind_minus_CaNAB: CaM_minus_Ca3 + CaNAB_minus_Ca4 -> PP2B_slash_CaMCa3_minus_CaNAB; PP2B_slash_CaMCa3_minus_bind_minus_CaNAB_kf*CaM_minus_Ca3*CaNAB_minus_Ca4 - PP2B_slash_CaMCa3_minus_bind_minus_CaNAB_kb*PP2B_slash_CaMCa3_minus_CaNAB;
    PP2B_slash_CaMCa3_minus_bind_minus_CaNAB_kf = 2.238e-12 vol_uMINVsecINV; PP2B_slash_CaMCa3_minus_bind_minus_CaNAB_kb = 1e-12 vol_secINV;
  // kf*CaM_minus_Ca4*CaNAB_minus_Ca4-kb*PP2B_slash_CaMCa4_minus_CaNAB
  PP2B_slash_CaMCa4_minus_bind_minus_CaNAB: CaM_minus_Ca4 + CaNAB_minus_Ca4 -> PP2B_slash_CaMCa4_minus_CaNAB; PP2B_slash_CaMCa4_minus_bind_minus_CaNAB_kf*CaM_minus_Ca4*CaNAB_minus_Ca4 - PP2B_slash_CaMCa4_minus_bind_minus_CaNAB_kb*PP2B_slash_CaMCa4_minus_CaNAB;
    PP2B_slash_CaMCa4_minus_bind_minus_CaNAB_kf = 6e-10 vol_uMINVsecINV; PP2B_slash_CaMCa4_minus_bind_minus_CaNAB_kb = 1e-12 vol_secINV;
  // k1*CaM_slash_neurogranin*PKC_minus_active-k2*PKC_minus_active_slash_PKC_minus_phosph_minus_neurogranin_slash_PKC_minus_phosph_minus_neurogranin_cplx
  // Rates from Huang et al ABB 305:2 570-580 1993
  PKC_minus_active_slash_PKC_minus_phosph_minus_neurogranin_1: CaM_slash_neurogranin + $PKC_minus_active -> PKC_minus_active_slash_PKC_minus_phosph_minus_neurogranin_slash_PKC_minus_phosph_minus_neurogranin_cplx; PKC_minus_active_slash_PKC_minus_phosph_minus_neurogranin_1_k1*CaM_slash_neurogranin*PKC_minus_active - PKC_minus_active_slash_PKC_minus_phosph_minus_neurogranin_1_k2*PKC_minus_active_slash_PKC_minus_phosph_minus_neurogranin_slash_PKC_minus_phosph_minus_neurogranin_cplx;
    PKC_minus_active_slash_PKC_minus_phosph_minus_neurogranin_1_k1 = 1.02e-13 vol_uMINVsecINV; PKC_minus_active_slash_PKC_minus_phosph_minus_neurogranin_1_k2 = 2.34e-12 vol_secINV;
  // k3*PKC_minus_active_slash_PKC_minus_phosph_minus_neurogranin_slash_PKC_minus_phosph_minus_neurogranin_cplx
  PKC_minus_active_slash_PKC_minus_phosph_minus_neurogranin_2: PKC_minus_active_slash_PKC_minus_phosph_minus_neurogranin_slash_PKC_minus_phosph_minus_neurogranin_cplx => CaM_slash_neurogranin_star_ + $PKC_minus_active; PKC_minus_active_slash_PKC_minus_phosph_minus_neurogranin_2_k3*PKC_minus_active_slash_PKC_minus_phosph_minus_neurogranin_slash_PKC_minus_phosph_minus_neurogranin_cplx;
    PKC_minus_active_slash_PKC_minus_phosph_minus_neurogranin_2_k3 = 5.8e-13 vol_secINV;
  // k1*CaM_slash_neurogranin_minus_CaM*PKC_minus_active-k2*PKC_minus_active_slash_PKC_minus_phosph_minus_ng_minus_CaM_slash_PKC_minus_phosph_minus_ng_minus_CaM_cplx
  // Rates are 60% those of PKC-phosph-neurogranin. See Huang et al ABB 305:2 570-580 1993
  PKC_minus_active_slash_PKC_minus_phosph_minus_ng_minus_CaM_1: CaM_slash_neurogranin_minus_CaM + $PKC_minus_active -> PKC_minus_active_slash_PKC_minus_phosph_minus_ng_minus_CaM_slash_PKC_minus_phosph_minus_ng_minus_CaM_cplx; PKC_minus_active_slash_PKC_minus_phosph_minus_ng_minus_CaM_1_k1*CaM_slash_neurogranin_minus_CaM*PKC_minus_active - PKC_minus_active_slash_PKC_minus_phosph_minus_ng_minus_CaM_1_k2*PKC_minus_active_slash_PKC_minus_phosph_minus_ng_minus_CaM_slash_PKC_minus_phosph_minus_ng_minus_CaM_cplx;
    PKC_minus_active_slash_PKC_minus_phosph_minus_ng_minus_CaM_1_k1 = 6.12e-14 vol_uMINVsecINV; PKC_minus_active_slash_PKC_minus_phosph_minus_ng_minus_CaM_1_k2 = 1.4e-12 vol_secINV;
  // k3*PKC_minus_active_slash_PKC_minus_phosph_minus_ng_minus_CaM_slash_PKC_minus_phosph_minus_ng_minus_CaM_cplx
  PKC_minus_active_slash_PKC_minus_phosph_minus_ng_minus_CaM_2: PKC_minus_active_slash_PKC_minus_phosph_minus_ng_minus_CaM_slash_PKC_minus_phosph_minus_ng_minus_CaM_cplx => CaM_slash_CaM + CaM_slash_neurogranin_star_ + $PKC_minus_active; PKC_minus_active_slash_PKC_minus_phosph_minus_ng_minus_CaM_2_k3*PKC_minus_active_slash_PKC_minus_phosph_minus_ng_minus_CaM_slash_PKC_minus_phosph_minus_ng_minus_CaM_cplx;
    PKC_minus_active_slash_PKC_minus_phosph_minus_ng_minus_CaM_2_k3 = 3.5e-13 vol_secINV;
  // k1*PP1_slash_I1*PKA_minus_active-k2*PKA_minus_active_slash_PKA_minus_phosph_minus_I1_slash_PKA_minus_phosph_minus_I1_cplx
  // #s from Bramson et al CRC crit rev Biochem 15:2 93-124. They have a huge list of peptide substrates and I have chosen high-ish rates. These consts give too much PKA activity, so lower Vmax 1/3. Now, k1 = 3e-5, k2 = 36, k3 = 9 (still pretty fast). Also lower Km 1/3 so k1 = 1e-5 Cohen et al FEBS Lett 76:182-86 1977 say rate =30% PKA act on phosphokinase beta.
  PKA_minus_active_slash_PKA_minus_phosph_minus_I1_1: PP1_slash_I1 + $PKA_minus_active -> PKA_minus_active_slash_PKA_minus_phosph_minus_I1_slash_PKA_minus_phosph_minus_I1_cplx; PKA_minus_active_slash_PKA_minus_phosph_minus_I1_1_k1*PP1_slash_I1*PKA_minus_active - PKA_minus_active_slash_PKA_minus_phosph_minus_I1_1_k2*PKA_minus_active_slash_PKA_minus_phosph_minus_I1_slash_PKA_minus_phosph_minus_I1_cplx;
    PKA_minus_active_slash_PKA_minus_phosph_minus_I1_1_k1 = 6e-12 vol_uMINVsecINV; PKA_minus_active_slash_PKA_minus_phosph_minus_I1_1_k2 = 3.6e-11 vol_secINV;
  // k3*PKA_minus_active_slash_PKA_minus_phosph_minus_I1_slash_PKA_minus_phosph_minus_I1_cplx
  PKA_minus_active_slash_PKA_minus_phosph_minus_I1_2: PKA_minus_active_slash_PKA_minus_phosph_minus_I1_slash_PKA_minus_phosph_minus_I1_cplx => PP1_slash_I1_star_ + $PKA_minus_active; PKA_minus_active_slash_PKA_minus_phosph_minus_I1_2_k3*PKA_minus_active_slash_PKA_minus_phosph_minus_I1_slash_PKA_minus_phosph_minus_I1_cplx;
    PKA_minus_active_slash_PKA_minus_phosph_minus_I1_2_k3 = 9e-12 vol_secINV;
  // k1*CaMKII_slash_CaMKII_minus_thr286*CaMKII_slash_tot_CaM_CaMKII-k2*CaMKII_slash_tot_CaM_CaMKII_slash_CaM_act_305_slash_CaM_act_305_cplx
  // Rates from autocamtide phosphorylation, from Hanson and Schulman JBC 267:24 17216-17224 1992. Jan 1 1998: Speed up 12x to match fig 5.
  CaMKII_slash_tot_CaM_CaMKII_slash_CaM_act_305_1: CaMKII_slash_CaMKII_minus_thr286 + $CaMKII_slash_tot_CaM_CaMKII -> CaMKII_slash_tot_CaM_CaMKII_slash_CaM_act_305_slash_CaM_act_305_cplx; CaMKII_slash_tot_CaM_CaMKII_slash_CaM_act_305_1_k1*CaMKII_slash_CaMKII_minus_thr286*CaMKII_slash_tot_CaM_CaMKII - CaMKII_slash_tot_CaM_CaMKII_slash_CaM_act_305_1_k2*CaMKII_slash_tot_CaM_CaMKII_slash_CaM_act_305_slash_CaM_act_305_cplx;
    CaMKII_slash_tot_CaM_CaMKII_slash_CaM_act_305_1_k1 = 2.64084e-13 vol_uMINVsecINV; CaMKII_slash_tot_CaM_CaMKII_slash_CaM_act_305_1_k2 = 2.4e-11 vol_secINV;
  // k3*CaMKII_slash_tot_CaM_CaMKII_slash_CaM_act_305_slash_CaM_act_305_cplx
  CaMKII_slash_tot_CaM_CaMKII_slash_CaM_act_305_2: CaMKII_slash_tot_CaM_CaMKII_slash_CaM_act_305_slash_CaM_act_305_cplx => CaMKII_slash_CaMKII_star__star__star_ + $CaMKII_slash_tot_CaM_CaMKII; CaMKII_slash_tot_CaM_CaMKII_slash_CaM_act_305_2_k3*CaMKII_slash_tot_CaM_CaMKII_slash_CaM_act_305_slash_CaM_act_305_cplx;
    CaMKII_slash_tot_CaM_CaMKII_slash_CaM_act_305_2_k3 = 6e-12 vol_secINV;
  // k1*CaMKII_slash_CaMKII_minus_CaM*CaMKII_slash_tot_CaM_CaMKII-k2*CaMKII_slash_tot_CaM_CaMKII_slash_CaM_act_286_slash_CaM_act_286_cplx
  CaMKII_slash_tot_CaM_CaMKII_slash_CaM_act_286_1: CaMKII_slash_CaMKII_minus_CaM + $CaMKII_slash_tot_CaM_CaMKII -> CaMKII_slash_tot_CaM_CaMKII_slash_CaM_act_286_slash_CaM_act_286_cplx; CaMKII_slash_tot_CaM_CaMKII_slash_CaM_act_286_1_k1*CaMKII_slash_CaMKII_minus_CaM*CaMKII_slash_tot_CaM_CaMKII - CaMKII_slash_tot_CaM_CaMKII_slash_CaM_act_286_1_k2*CaMKII_slash_tot_CaM_CaMKII_slash_CaM_act_286_slash_CaM_act_286_cplx;
    CaMKII_slash_tot_CaM_CaMKII_slash_CaM_act_286_1_k1 = 2.20068e-14 vol_uMINVsecINV; CaMKII_slash_tot_CaM_CaMKII_slash_CaM_act_286_1_k2 = 2e-12 vol_secINV;
  // k3*CaMKII_slash_tot_CaM_CaMKII_slash_CaM_act_286_slash_CaM_act_286_cplx
  CaMKII_slash_tot_CaM_CaMKII_slash_CaM_act_286_2: CaMKII_slash_tot_CaM_CaMKII_slash_CaM_act_286_slash_CaM_act_286_cplx => CaMKII_slash_CaMKII_minus_thr286_star__minus_CaM + $CaMKII_slash_tot_CaM_CaMKII; CaMKII_slash_tot_CaM_CaMKII_slash_CaM_act_286_2_k3*CaMKII_slash_tot_CaM_CaMKII_slash_CaM_act_286_slash_CaM_act_286_cplx;
    CaMKII_slash_tot_CaM_CaMKII_slash_CaM_act_286_2_k3 = 5e-13 vol_secINV;
  // k1*CaMKII_slash_CaMKII_minus_thr286*CaMKII_slash_tot_autonomous_CaMKII-k2*CaMKII_slash_tot_autonomous_CaMKII_slash_auton_305_slash_auton_305_cplx
  // See Hanson and Schulman again, for afterburst rates of phosph.
  CaMKII_slash_tot_autonomous_CaMKII_slash_auton_305_1: CaMKII_slash_CaMKII_minus_thr286 + $CaMKII_slash_tot_autonomous_CaMKII -> CaMKII_slash_tot_autonomous_CaMKII_slash_auton_305_slash_auton_305_cplx; CaMKII_slash_tot_autonomous_CaMKII_slash_auton_305_1_k1*CaMKII_slash_CaMKII_minus_thr286*CaMKII_slash_tot_autonomous_CaMKII - CaMKII_slash_tot_autonomous_CaMKII_slash_auton_305_1_k2*CaMKII_slash_tot_autonomous_CaMKII_slash_auton_305_slash_auton_305_cplx;
    CaMKII_slash_tot_autonomous_CaMKII_slash_auton_305_1_k1 = 1.71426e-13 vol_uMINVsecINV; CaMKII_slash_tot_autonomous_CaMKII_slash_auton_305_1_k2 = 2.4e-11 vol_secINV;
  // k3*CaMKII_slash_tot_autonomous_CaMKII_slash_auton_305_slash_auton_305_cplx
  CaMKII_slash_tot_autonomous_CaMKII_slash_auton_305_2: CaMKII_slash_tot_autonomous_CaMKII_slash_auton_305_slash_auton_305_cplx => CaMKII_slash_CaMKII_star__star__star_ + $CaMKII_slash_tot_autonomous_CaMKII; CaMKII_slash_tot_autonomous_CaMKII_slash_auton_305_2_k3*CaMKII_slash_tot_autonomous_CaMKII_slash_auton_305_slash_auton_305_cplx;
    CaMKII_slash_tot_autonomous_CaMKII_slash_auton_305_2_k3 = 6e-12 vol_secINV;
  // k1*CaMKII_slash_CaMKII_minus_CaM*CaMKII_slash_tot_autonomous_CaMKII-k2*CaMKII_slash_tot_autonomous_CaMKII_slash_auton_286_slash_auton_286_cplx
  CaMKII_slash_tot_autonomous_CaMKII_slash_auton_286_1: CaMKII_slash_CaMKII_minus_CaM + $CaMKII_slash_tot_autonomous_CaMKII -> CaMKII_slash_tot_autonomous_CaMKII_slash_auton_286_slash_auton_286_cplx; CaMKII_slash_tot_autonomous_CaMKII_slash_auton_286_1_k1*CaMKII_slash_CaMKII_minus_CaM*CaMKII_slash_tot_autonomous_CaMKII - CaMKII_slash_tot_autonomous_CaMKII_slash_auton_286_1_k2*CaMKII_slash_tot_autonomous_CaMKII_slash_auton_286_slash_auton_286_cplx;
    CaMKII_slash_tot_autonomous_CaMKII_slash_auton_286_1_k1 = 1.4286e-14 vol_uMINVsecINV; CaMKII_slash_tot_autonomous_CaMKII_slash_auton_286_1_k2 = 2e-12 vol_secINV;
  // k3*CaMKII_slash_tot_autonomous_CaMKII_slash_auton_286_slash_auton_286_cplx
  CaMKII_slash_tot_autonomous_CaMKII_slash_auton_286_2: CaMKII_slash_tot_autonomous_CaMKII_slash_auton_286_slash_auton_286_cplx => CaMKII_slash_CaMKII_minus_thr286_star__minus_CaM + $CaMKII_slash_tot_autonomous_CaMKII; CaMKII_slash_tot_autonomous_CaMKII_slash_auton_286_2_k3*CaMKII_slash_tot_autonomous_CaMKII_slash_auton_286_slash_auton_286_cplx;
    CaMKII_slash_tot_autonomous_CaMKII_slash_auton_286_2_k3 = 5e-13 vol_secINV;
  // k1*CaMKII_slash_CaMKII_minus_thr286_star__minus_CaM*PP1_minus_active-k2*PP1_minus_active_slash_Deph_minus_thr286_slash_Deph_minus_thr286_cplx
  // The rates are from Stralfors et al Eur J Biochem 149 295-303 giving Vmax = 5.7 umol/min giving k3 = 3.5/sec and k2 = 14. Foulkes et al Eur J Biochem 132 309-313 1983 give Km = 5.1 uM so k1 becomes 5.72e-6 Simonelli 1984 (Grad Thesis, CUNY) showed that other substrates are about 1/10 rate of phosphorylase a, so we reduce k1,k2,k3 by 10 to 5.72e-7, 1.4, 0.35
  PP1_minus_active_slash_Deph_minus_thr286_1: CaMKII_slash_CaMKII_minus_thr286_star__minus_CaM + PP1_minus_active -> PP1_minus_active_slash_Deph_minus_thr286_slash_Deph_minus_thr286_cplx; PP1_minus_active_slash_Deph_minus_thr286_1_k1*CaMKII_slash_CaMKII_minus_thr286_star__minus_CaM*PP1_minus_active - PP1_minus_active_slash_Deph_minus_thr286_1_k2*PP1_minus_active_slash_Deph_minus_thr286_slash_Deph_minus_thr286_cplx;
    PP1_minus_active_slash_Deph_minus_thr286_1_k1 = 3.432e-13 vol_uMINVsecINV; PP1_minus_active_slash_Deph_minus_thr286_1_k2 = 1.4e-12 vol_secINV;
  // k3*PP1_minus_active_slash_Deph_minus_thr286_slash_Deph_minus_thr286_cplx
  PP1_minus_active_slash_Deph_minus_thr286_2: PP1_minus_active_slash_Deph_minus_thr286_slash_Deph_minus_thr286_cplx => CaMKII_slash_CaMKII_minus_CaM + PP1_minus_active; PP1_minus_active_slash_Deph_minus_thr286_2_k3*PP1_minus_active_slash_Deph_minus_thr286_slash_Deph_minus_thr286_cplx;
    PP1_minus_active_slash_Deph_minus_thr286_2_k3 = 3.5e-13 vol_secINV;
  // k1*CaMKII_slash_CaMKII_star__star__star_*PP1_minus_active-k2*PP1_minus_active_slash_Deph_minus_thr305_slash_Deph_minus_thr305_cplx
  PP1_minus_active_slash_Deph_minus_thr305_1: CaMKII_slash_CaMKII_star__star__star_ + PP1_minus_active -> PP1_minus_active_slash_Deph_minus_thr305_slash_Deph_minus_thr305_cplx; PP1_minus_active_slash_Deph_minus_thr305_1_k1*CaMKII_slash_CaMKII_star__star__star_*PP1_minus_active - PP1_minus_active_slash_Deph_minus_thr305_1_k2*PP1_minus_active_slash_Deph_minus_thr305_slash_Deph_minus_thr305_cplx;
    PP1_minus_active_slash_Deph_minus_thr305_1_k1 = 3.432e-13 vol_uMINVsecINV; PP1_minus_active_slash_Deph_minus_thr305_1_k2 = 1.4e-12 vol_secINV;
  // k3*PP1_minus_active_slash_Deph_minus_thr305_slash_Deph_minus_thr305_cplx
  PP1_minus_active_slash_Deph_minus_thr305_2: PP1_minus_active_slash_Deph_minus_thr305_slash_Deph_minus_thr305_cplx => CaMKII_slash_CaMKII_minus_thr286 + PP1_minus_active; PP1_minus_active_slash_Deph_minus_thr305_2_k3*PP1_minus_active_slash_Deph_minus_thr305_slash_Deph_minus_thr305_cplx;
    PP1_minus_active_slash_Deph_minus_thr305_2_k3 = 3.5e-13 vol_secINV;
  // k1*CaMKII_slash_CaMK_minus_thr306*PP1_minus_active-k2*PP1_minus_active_slash_Deph_minus_thr306_slash_Deph_minus_thr306_cplx
  // See Cohen et al
  PP1_minus_active_slash_Deph_minus_thr306_1: CaMKII_slash_CaMK_minus_thr306 + PP1_minus_active -> PP1_minus_active_slash_Deph_minus_thr306_slash_Deph_minus_thr306_cplx; PP1_minus_active_slash_Deph_minus_thr306_1_k1*CaMKII_slash_CaMK_minus_thr306*PP1_minus_active - PP1_minus_active_slash_Deph_minus_thr306_1_k2*PP1_minus_active_slash_Deph_minus_thr306_slash_Deph_minus_thr306_cplx;
    PP1_minus_active_slash_Deph_minus_thr306_1_k1 = 3.432e-13 vol_uMINVsecINV; PP1_minus_active_slash_Deph_minus_thr306_1_k2 = 1.4e-12 vol_secINV;
  // k3*PP1_minus_active_slash_Deph_minus_thr306_slash_Deph_minus_thr306_cplx
  PP1_minus_active_slash_Deph_minus_thr306_2: PP1_minus_active_slash_Deph_minus_thr306_slash_Deph_minus_thr306_cplx => CaMKII_slash_CaMKII + PP1_minus_active; PP1_minus_active_slash_Deph_minus_thr306_2_k3*PP1_minus_active_slash_Deph_minus_thr306_slash_Deph_minus_thr306_cplx;
    PP1_minus_active_slash_Deph_minus_thr306_2_k3 = 3.5e-13 vol_secINV;
  // k1*CaMKII_slash_CaMKII_star__star__star_*PP1_minus_active-k2*PP1_minus_active_slash_Deph_minus_thr286c_slash_Deph_minus_thr286c_cplx
  PP1_minus_active_slash_Deph_minus_thr286c_1: CaMKII_slash_CaMKII_star__star__star_ + PP1_minus_active -> PP1_minus_active_slash_Deph_minus_thr286c_slash_Deph_minus_thr286c_cplx; PP1_minus_active_slash_Deph_minus_thr286c_1_k1*CaMKII_slash_CaMKII_star__star__star_*PP1_minus_active - PP1_minus_active_slash_Deph_minus_thr286c_1_k2*PP1_minus_active_slash_Deph_minus_thr286c_slash_Deph_minus_thr286c_cplx;
    PP1_minus_active_slash_Deph_minus_thr286c_1_k1 = 3.432e-13 vol_uMINVsecINV; PP1_minus_active_slash_Deph_minus_thr286c_1_k2 = 1.4e-12 vol_secINV;
  // k3*PP1_minus_active_slash_Deph_minus_thr286c_slash_Deph_minus_thr286c_cplx
  PP1_minus_active_slash_Deph_minus_thr286c_2: PP1_minus_active_slash_Deph_minus_thr286c_slash_Deph_minus_thr286c_cplx => CaMKII_slash_CaMK_minus_thr306 + PP1_minus_active; PP1_minus_active_slash_Deph_minus_thr286c_2_k3*PP1_minus_active_slash_Deph_minus_thr286c_slash_Deph_minus_thr286c_cplx;
    PP1_minus_active_slash_Deph_minus_thr286c_2_k3 = 3.5e-13 vol_secINV;
  // k1*CaMKII_slash_CaMKII_minus_thr286*PP1_minus_active-k2*PP1_minus_active_slash_Deph_thr286b_slash_Deph_thr286b_cplx
  PP1_minus_active_slash_Deph_thr286b_1: CaMKII_slash_CaMKII_minus_thr286 + PP1_minus_active -> PP1_minus_active_slash_Deph_thr286b_slash_Deph_thr286b_cplx; PP1_minus_active_slash_Deph_thr286b_1_k1*CaMKII_slash_CaMKII_minus_thr286*PP1_minus_active - PP1_minus_active_slash_Deph_thr286b_1_k2*PP1_minus_active_slash_Deph_thr286b_slash_Deph_thr286b_cplx;
    PP1_minus_active_slash_Deph_thr286b_1_k1 = 3.432e-13 vol_uMINVsecINV; PP1_minus_active_slash_Deph_thr286b_1_k2 = 1.4e-12 vol_secINV;
  // k3*PP1_minus_active_slash_Deph_thr286b_slash_Deph_thr286b_cplx
  PP1_minus_active_slash_Deph_thr286b_2: PP1_minus_active_slash_Deph_thr286b_slash_Deph_thr286b_cplx => CaMKII_slash_CaMKII + PP1_minus_active; PP1_minus_active_slash_Deph_thr286b_2_k3*PP1_minus_active_slash_Deph_thr286b_slash_Deph_thr286b_cplx;
    PP1_minus_active_slash_Deph_thr286b_2_k3 = 3.5e-13 vol_secINV;
  // k1*CaM_slash_neurogranin_star_*CaM_po_Ca_pc_n_minus_CaNAB-k2*CaM_po_Ca_pc_n_minus_CaNAB_slash_dephosph_neurogranin_slash_dephosph_neurogranin_cplx
  // From Seki et al ABB 316(2):673-679
  CaM_po_Ca_pc_n_minus_CaNAB_slash_dephosph_neurogranin_1: CaM_slash_neurogranin_star_ + $CaM_po_Ca_pc_n_minus_CaNAB -> CaM_po_Ca_pc_n_minus_CaNAB_slash_dephosph_neurogranin_slash_dephosph_neurogranin_cplx; CaM_po_Ca_pc_n_minus_CaNAB_slash_dephosph_neurogranin_1_k1*CaM_slash_neurogranin_star_*CaM_po_Ca_pc_n_minus_CaNAB - CaM_po_Ca_pc_n_minus_CaNAB_slash_dephosph_neurogranin_1_k2*CaM_po_Ca_pc_n_minus_CaNAB_slash_dephosph_neurogranin_slash_dephosph_neurogranin_cplx;
    CaM_po_Ca_pc_n_minus_CaNAB_slash_dephosph_neurogranin_1_k1 = 3.336e-13 vol_uMINVsecINV; CaM_po_Ca_pc_n_minus_CaNAB_slash_dephosph_neurogranin_1_k2 = 2.67e-12 vol_secINV;
  // k3*CaM_po_Ca_pc_n_minus_CaNAB_slash_dephosph_neurogranin_slash_dephosph_neurogranin_cplx
  CaM_po_Ca_pc_n_minus_CaNAB_slash_dephosph_neurogranin_2: CaM_po_Ca_pc_n_minus_CaNAB_slash_dephosph_neurogranin_slash_dephosph_neurogranin_cplx => CaM_slash_neurogranin + $CaM_po_Ca_pc_n_minus_CaNAB; CaM_po_Ca_pc_n_minus_CaNAB_slash_dephosph_neurogranin_2_k3*CaM_po_Ca_pc_n_minus_CaNAB_slash_dephosph_neurogranin_slash_dephosph_neurogranin_cplx;
    CaM_po_Ca_pc_n_minus_CaNAB_slash_dephosph_neurogranin_2_k3 = 6.7e-13 vol_secINV;
  // k1*PP1_slash_I1_star_*CaM_po_Ca_pc_n_minus_CaNAB-k2*CaM_po_Ca_pc_n_minus_CaNAB_slash_dephosph_inhib1_slash_dephosph_inhib1_cplx
  CaM_po_Ca_pc_n_minus_CaNAB_slash_dephosph_inhib1_1: PP1_slash_I1_star_ + $CaM_po_Ca_pc_n_minus_CaNAB -> CaM_po_Ca_pc_n_minus_CaNAB_slash_dephosph_inhib1_slash_dephosph_inhib1_cplx; CaM_po_Ca_pc_n_minus_CaNAB_slash_dephosph_inhib1_1_k1*PP1_slash_I1_star_*CaM_po_Ca_pc_n_minus_CaNAB - CaM_po_Ca_pc_n_minus_CaNAB_slash_dephosph_inhib1_1_k2*CaM_po_Ca_pc_n_minus_CaNAB_slash_dephosph_inhib1_slash_dephosph_inhib1_cplx;
    CaM_po_Ca_pc_n_minus_CaNAB_slash_dephosph_inhib1_1_k1 = 3.42e-13 vol_uMINVsecINV; CaM_po_Ca_pc_n_minus_CaNAB_slash_dephosph_inhib1_1_k2 = 1.36e-12 vol_secINV;
  // k3*CaM_po_Ca_pc_n_minus_CaNAB_slash_dephosph_inhib1_slash_dephosph_inhib1_cplx
  CaM_po_Ca_pc_n_minus_CaNAB_slash_dephosph_inhib1_2: CaM_po_Ca_pc_n_minus_CaNAB_slash_dephosph_inhib1_slash_dephosph_inhib1_cplx => PP1_slash_I1 + $CaM_po_Ca_pc_n_minus_CaNAB; CaM_po_Ca_pc_n_minus_CaNAB_slash_dephosph_inhib1_2_k3*CaM_po_Ca_pc_n_minus_CaNAB_slash_dephosph_inhib1_slash_dephosph_inhib1_cplx;
    CaM_po_Ca_pc_n_minus_CaNAB_slash_dephosph_inhib1_2_k3 = 3.4e-13 vol_secINV;
  // k1*PP1_slash_PP1_minus_I1_star_*CaM_po_Ca_pc_n_minus_CaNAB-k2*CaM_po_Ca_pc_n_minus_CaNAB_slash_dephosph_minus_PP1_minus_I_star__slash_dephosph_minus_PP1_minus_I_star__cplx
  CaM_po_Ca_pc_n_minus_CaNAB_slash_dephosph_minus_PP1_minus_I_star__1: PP1_slash_PP1_minus_I1_star_ + $CaM_po_Ca_pc_n_minus_CaNAB -> CaM_po_Ca_pc_n_minus_CaNAB_slash_dephosph_minus_PP1_minus_I_star__slash_dephosph_minus_PP1_minus_I_star__cplx; CaM_po_Ca_pc_n_minus_CaNAB_slash_dephosph_minus_PP1_minus_I_star__1_k1*PP1_slash_PP1_minus_I1_star_*CaM_po_Ca_pc_n_minus_CaNAB - CaM_po_Ca_pc_n_minus_CaNAB_slash_dephosph_minus_PP1_minus_I_star__1_k2*CaM_po_Ca_pc_n_minus_CaNAB_slash_dephosph_minus_PP1_minus_I_star__slash_dephosph_minus_PP1_minus_I_star__cplx;
    CaM_po_Ca_pc_n_minus_CaNAB_slash_dephosph_minus_PP1_minus_I_star__1_k1 = 3.42e-13 vol_uMINVsecINV; CaM_po_Ca_pc_n_minus_CaNAB_slash_dephosph_minus_PP1_minus_I_star__1_k2 = 1.36e-12 vol_secINV;
  // k3*CaM_po_Ca_pc_n_minus_CaNAB_slash_dephosph_minus_PP1_minus_I_star__slash_dephosph_minus_PP1_minus_I_star__cplx
  CaM_po_Ca_pc_n_minus_CaNAB_slash_dephosph_minus_PP1_minus_I_star__2: CaM_po_Ca_pc_n_minus_CaNAB_slash_dephosph_minus_PP1_minus_I_star__slash_dephosph_minus_PP1_minus_I_star__cplx => PP1_slash_PP1_minus_I1 + $CaM_po_Ca_pc_n_minus_CaNAB; CaM_po_Ca_pc_n_minus_CaNAB_slash_dephosph_minus_PP1_minus_I_star__2_k3*CaM_po_Ca_pc_n_minus_CaNAB_slash_dephosph_minus_PP1_minus_I_star__slash_dephosph_minus_PP1_minus_I_star__cplx;
    CaM_po_Ca_pc_n_minus_CaNAB_slash_dephosph_minus_PP1_minus_I_star__2_k3 = 3.4e-13 vol_secINV;
  // k1*PP1_slash_I1_star_*PP2A-k2*PP2A_slash_PP2A_minus_dephosph_minus_I1_slash_PP2A_minus_dephosph_minus_I1_cplx
  // PP2A does most of the dephosph of I1 at basal Ca levels. See the review by Cohen in Ann Rev Biochem 1989. For now, lets halve Km. k1 was 3.3e-6, now 6.6e-6
  PP2A_slash_PP2A_minus_dephosph_minus_I1_1: PP1_slash_I1_star_ + PP2A -> PP2A_slash_PP2A_minus_dephosph_minus_I1_slash_PP2A_minus_dephosph_minus_I1_cplx; PP2A_slash_PP2A_minus_dephosph_minus_I1_1_k1*PP1_slash_I1_star_*PP2A - PP2A_slash_PP2A_minus_dephosph_minus_I1_1_k2*PP2A_slash_PP2A_minus_dephosph_minus_I1_slash_PP2A_minus_dephosph_minus_I1_cplx;
    PP2A_slash_PP2A_minus_dephosph_minus_I1_1_k1 = 3.96e-12 vol_uMINVsecINV; PP2A_slash_PP2A_minus_dephosph_minus_I1_1_k2 = 2.5e-11 vol_secINV;
  // k3*PP2A_slash_PP2A_minus_dephosph_minus_I1_slash_PP2A_minus_dephosph_minus_I1_cplx
  PP2A_slash_PP2A_minus_dephosph_minus_I1_2: PP2A_slash_PP2A_minus_dephosph_minus_I1_slash_PP2A_minus_dephosph_minus_I1_cplx => PP1_slash_I1 + PP2A; PP2A_slash_PP2A_minus_dephosph_minus_I1_2_k3*PP2A_slash_PP2A_minus_dephosph_minus_I1_slash_PP2A_minus_dephosph_minus_I1_cplx;
    PP2A_slash_PP2A_minus_dephosph_minus_I1_2_k3 = 6e-12 vol_secINV;
  // k1*PP1_slash_PP1_minus_I1_star_*PP2A-k2*PP2A_slash_PP2A_minus_dephosph_minus_PP1_minus_I_star__slash_PP2A_minus_dephosph_minus_PP1_minus_I_star__cplx
  // k1 changed from 3.3e-6 to 6.6e-6
  PP2A_slash_PP2A_minus_dephosph_minus_PP1_minus_I_star__1: PP1_slash_PP1_minus_I1_star_ + PP2A -> PP2A_slash_PP2A_minus_dephosph_minus_PP1_minus_I_star__slash_PP2A_minus_dephosph_minus_PP1_minus_I_star__cplx; PP2A_slash_PP2A_minus_dephosph_minus_PP1_minus_I_star__1_k1*PP1_slash_PP1_minus_I1_star_*PP2A - PP2A_slash_PP2A_minus_dephosph_minus_PP1_minus_I_star__1_k2*PP2A_slash_PP2A_minus_dephosph_minus_PP1_minus_I_star__slash_PP2A_minus_dephosph_minus_PP1_minus_I_star__cplx;
    PP2A_slash_PP2A_minus_dephosph_minus_PP1_minus_I_star__1_k1 = 3.96e-12 vol_uMINVsecINV; PP2A_slash_PP2A_minus_dephosph_minus_PP1_minus_I_star__1_k2 = 2.5e-11 vol_secINV;
  // k3*PP2A_slash_PP2A_minus_dephosph_minus_PP1_minus_I_star__slash_PP2A_minus_dephosph_minus_PP1_minus_I_star__cplx
  PP2A_slash_PP2A_minus_dephosph_minus_PP1_minus_I_star__2: PP2A_slash_PP2A_minus_dephosph_minus_PP1_minus_I_star__slash_PP2A_minus_dephosph_minus_PP1_minus_I_star__cplx => PP1_slash_PP1_minus_I1 + PP2A; PP2A_slash_PP2A_minus_dephosph_minus_PP1_minus_I_star__2_k3*PP2A_slash_PP2A_minus_dephosph_minus_PP1_minus_I_star__slash_PP2A_minus_dephosph_minus_PP1_minus_I_star__cplx;
    PP2A_slash_PP2A_minus_dephosph_minus_PP1_minus_I_star__2_k3 = 6e-12 vol_secINV;
  // k1*PP1_slash_I1_star_*CaNAB_minus_Ca4-k2*CaNAB_minus_Ca4_slash_dephosph_inhib1_noCaM_slash_dephosph_inhib1_noCaM_cplx
  // The rates here are so slow I do not know if we should even bother with this enz reacn. These numbers are from Liu and Storm. Other refs suggest that the Km stays the same but the Vmax goes to 10% of the CaM stim levels. Prev: k1=2.2e-9, k2 = 0.0052, k3 = 0.0013 New : k1=5.7e-8, k2=.136, k3=.034
  CaNAB_minus_Ca4_slash_dephosph_inhib1_noCaM_1: PP1_slash_I1_star_ + CaNAB_minus_Ca4 -> CaNAB_minus_Ca4_slash_dephosph_inhib1_noCaM_slash_dephosph_inhib1_noCaM_cplx; CaNAB_minus_Ca4_slash_dephosph_inhib1_noCaM_1_k1*PP1_slash_I1_star_*CaNAB_minus_Ca4 - CaNAB_minus_Ca4_slash_dephosph_inhib1_noCaM_1_k2*CaNAB_minus_Ca4_slash_dephosph_inhib1_noCaM_slash_dephosph_inhib1_noCaM_cplx;
    CaNAB_minus_Ca4_slash_dephosph_inhib1_noCaM_1_k1 = 3.42e-14 vol_uMINVsecINV; CaNAB_minus_Ca4_slash_dephosph_inhib1_noCaM_1_k2 = 1.36e-13 vol_secINV;
  // k3*CaNAB_minus_Ca4_slash_dephosph_inhib1_noCaM_slash_dephosph_inhib1_noCaM_cplx
  CaNAB_minus_Ca4_slash_dephosph_inhib1_noCaM_2: CaNAB_minus_Ca4_slash_dephosph_inhib1_noCaM_slash_dephosph_inhib1_noCaM_cplx => PP1_slash_I1 + CaNAB_minus_Ca4; CaNAB_minus_Ca4_slash_dephosph_inhib1_noCaM_2_k3*CaNAB_minus_Ca4_slash_dephosph_inhib1_noCaM_slash_dephosph_inhib1_noCaM_cplx;
    CaNAB_minus_Ca4_slash_dephosph_inhib1_noCaM_2_k3 = 3.4e-14 vol_secINV;

  // Unit definitions:
  unit uM1 = 1e-6 mole / litre;
  unit uM2 = (1e-6 mole)^2 / litre^2;
  unit uM3 = (1e-6 mole)^3 / litre^3;
  unit uM4 = (1e-6 mole)^4 / litre^4;
  unit uM5 = (1e-6 mole)^5 / litre^5;
  unit uM6 = (1e-6 mole)^6 / litre^6;
  unit uM7 = (1e-6 mole)^7 / litre^7;
  unit uM8 = (1e-6 mole)^8 / litre^8;
  unit uM9 = (1e-6 mole)^9 / litre^9;
  unit vol_secINV = litre / second;
  unit vol_uMINVsecINV = litre^2 / (1e-6 mole * second);
  unit vol_uMINV2secINV = litre^3 / ((1e-6 mole)^2 * second);
  unit vol_uMINV3secINV = litre^4 / ((1e-6 mole)^3 * second);
  unit vol_uMINV4secINV = litre^5 / ((1e-6 mole)^4 * second);
  unit vol_uMINV5secINV = litre^6 / ((1e-6 mole)^5 * second);
  unit vol_uMINV6secINV = litre^7 / ((1e-6 mole)^6 * second);
  unit vol_uMINV7secINV = litre^8 / ((1e-6 mole)^7 * second);
  unit vol_uMINV8secINV = litre^9 / ((1e-6 mole)^8 * second);
  unit substance = 1e-6 mole;
end
