// SBML level 2 version 1

model testid()
  // Bhalla2004_EGFR_MAPK
  // Model of MAPK activation by EGFR in the synapse. Demonstration programs using this model are available <a href = "http://www.ncbs.res.in/~bhalla/stochnet/demos.html""> here</a>.<br>Primary citation:<a href = "http://www.ncbi.nlm.nih.gov/entrez/query.fcgi?cmd=Retrieve&db=pubmed&dopt=Abstract&list_uids=15298883>Bhalla US. Biophys J. (2004) 87(2):745-53</a>.
  // This model originates from BioModels Database: A Database of Annotated Published Models (http://www.ebi.ac.uk/biomodels/). It is copyright (c) 2005-2011 The BioModels.net Team.
  // To the extent possible under law, all copyright and related or neighbouring rights to this encoded model have been dedicated to the public domain worldwide. Please refer to CC0 Public Domain Dedication for more information.
  // In summary, you are entitled to use this encoded model in absolutely any manner you deem suitable, verbatim, or with modification, alone or embedded it in a larger context, redistribute it, commercially or not, in a restricted way or not..
  // To cite BioModels Database, please use: Li C, Donizelli M, Rodriguez N, Dharuri H, Endler L, Chelliah V, Li L, He E, Henry A, Stefan MI, Snoep JL, Hucka M, Le Novère N, Laibe C (2010) BioModels Database: An enhanced, curated and annotated resource for published quantitative kinetic models. BMC Syst Biol., 4:92.
  // biomodels.db:MODEL9085850385
  // isDescribedBy pubmed:15298883
  // biomodels.db:MODEL9085850385
  // isDescribedBy pubmed:15298883
  // biomodels.db:MODEL9085850385
  // biomodels.db:MODEL9085850385

  // Compartments:
  compartment default_compartment = 1e-18;
  compartment geometry = 1e-12;

  // Species:
  species PKC_minus_active_slash_PKC_minus_act_minus_raf_slash_PKC_minus_act_minus_raf_cplx in geometry = 0;
  species PKC_minus_active_slash_PKC_minus_inact_minus_GAP_slash_PKC_minus_inact_minus_GAP_cplx in geometry = 0;
  species PKC_minus_active_slash_PKC_minus_act_minus_GEF_slash_PKC_minus_act_minus_GEF_cplx in geometry = 0;
  species MAPK_star_ in geometry = 0;
  species MAPK_star__slash_MAPK_star__minus_feedback_slash_MAPK_star__minus_feedback_cplx in geometry = 0;
  species MAPK_star__slash_phosph_Sos_slash_phosph_Sos_cplx in geometry = 0;
  species MAPK_slash_craf_minus_1 in geometry = 0.2;
  species MAPK_slash_craf_minus_1_star_ in geometry = 0;
  species MAPK_slash_MAPKK in geometry = 0.18;
  species MAPK_slash_MAPK in geometry = 0.36;
  species MAPK_slash_craf_minus_1_star__star_ in geometry = 0;
  species MAPK_slash_MAPK_minus_tyr in geometry = 0;
  species MAPK_slash_MAPKK_star_ in geometry = 0;
  species MAPK_slash_MAPKK_star__slash_MAPKKtyr_slash_MAPKKtyr_cplx in geometry = 0;
  species MAPK_slash_MAPKK_star__slash_MAPKKthr_slash_MAPKKthr_cplx in geometry = 0;
  species MAPK_slash_MAPKK_minus_ser in geometry = 0;
  species MAPK_slash_Raf_minus_GTP_minus_Ras_star_ in geometry = 0;
  species MAPK_slash_Raf_minus_GTP_minus_Ras_star__slash_Raf_minus_GTP_minus_Ras_star__dot_1_slash_Raf_minus_GTP_minus_Ras_star__dot_1_cplx in geometry = 0;
  species MAPK_slash_Raf_minus_GTP_minus_Ras_star__slash_Raf_minus_GTP_minus_Ras_star__dot_2_slash_Raf_minus_GTP_minus_Ras_star__dot_2_cplx in geometry = 0;
  species MKP_minus_1 in geometry = 0.0024;
  species MKP_minus_1_slash_MKP1_minus_tyr_minus_deph_slash_MKP1_minus_tyr_minus_deph_cplx in geometry = 0;
  species MKP_minus_1_slash_MKP1_minus_thr_minus_deph_slash_MKP1_minus_thr_minus_deph_cplx in geometry = 0;
  species PPhosphatase2A in geometry = 0.224;
  species PPhosphatase2A_slash_craf_minus_deph_slash_craf_minus_deph_cplx in geometry = 0;
  species PPhosphatase2A_slash_MAPKK_minus_deph_slash_MAPKK_minus_deph_cplx in geometry = 0;
  species PPhosphatase2A_slash_MAPKK_minus_deph_minus_ser_slash_MAPKK_minus_deph_minus_ser_cplx in geometry = 0;
  species PPhosphatase2A_slash_craf_star__star__minus_deph_slash_craf_star__star__minus_deph_cplx in geometry = 0;
  species Ras_slash_GEF_minus_Gprot_minus_bg in geometry = 0;
  species Ras_slash_GEF_minus_Gprot_minus_bg_slash_GEF_minus_bg_act_minus_ras_slash_GEF_minus_bg_act_minus_ras_cplx in geometry = 0;
  species Ras_slash_inact_minus_GEF in geometry = 0.1;
  species Ras_slash_GEF_star_ in geometry = 0;
  species Ras_slash_GEF_star__slash_GEF_star__minus_act_minus_ras_slash_GEF_star__minus_act_minus_ras_cplx in geometry = 0;
  species Ras_slash_GTP_minus_Ras in geometry = 0;
  species Ras_slash_GDP_minus_Ras in geometry = 0.2;
  species Ras_slash_GAP_star_ in geometry = 0;
  species Ras_slash_GAP in geometry = 0.002;
  species Ras_slash_GAP_slash_GAP_minus_inact_minus_ras_slash_GAP_minus_inact_minus_ras_cplx in geometry = 0;
  species Ras_slash_inact_minus_GEF_star_ in geometry = 0;
  species Ras_slash_CaM_minus_GEF in geometry = 0;
  species Ras_slash_CaM_minus_GEF_slash_CaM_minus_GEF_minus_act_minus_ras_slash_CaM_minus_GEF_minus_act_minus_ras_cplx in geometry = 0;
  species PKA_minus_active_slash_PKA_minus_phosph_minus_GEF_slash_PKA_minus_phosph_minus_GEF_cplx in geometry = 0;
  species Shc_star__dot_Sos_dot_Grb2 in geometry = 0;
  species Shc_star__dot_Sos_dot_Grb2_slash_Sos_dot_Ras_GEF_slash_Sos_dot_Ras_GEF_cplx in geometry = 0;
  species EGFR_slash_EGFR in geometry = 0.1666667;
  species EGFR_slash_L_dot_EGFR in geometry = 0;
  species EGFR_slash_L_dot_EGFR_slash_phosph_Shc_slash_phosph_Shc_cplx in geometry = 0;
  species EGFR_slash_SHC in geometry = 0.5;
  species EGFR_slash_SHC_star_ in geometry = 0;
  species EGFR_slash_Internal_L_dot_EGFR in geometry = 0;
  species Sos_slash_Sos_star__dot_Grb2 in geometry = 0;
  species Sos_slash_Grb2 in geometry = 1;
  species Sos_slash_Sos_dot_Grb2 in geometry = 0;
  species Sos_slash_Sos_star_ in geometry = 0;
  species Sos_slash_Sos in geometry = 0.1;
  species $PKC_minus_active in geometry = 0.09;
  // These exist in a nebulous sense in this model, basically only to balance the conservation equations. The details of their reassociation with G-GDP are not modeled Resting level =0.0094, stim level =.0236 from all42.g ish.
  species $BetaGamma in geometry = 0.0094;
  species $PKA_minus_active in geometry = 0.015;
  // Resting level is ~1e-5 uM, small enough to ignore.
  species $CaM_minus_Ca4 in geometry = 0;
  species $EGFR_slash_EGF in geometry = 0;

  // Reactions:
  // kf*MAPK_slash_craf_minus_1_star_*Ras_slash_GTP_minus_Ras-kb*MAPK_slash_Raf_minus_GTP_minus_Ras_star_
  // Assume the binding is fast and limited only by the amount of Ras* available. So kf=kb/[craf-1] If kb is 1/sec, then kf = 1/0.2 uM = 1/(0.2 * 6e5) = 8.3e-6 Later: Raise it by 10 X to 4e-5 From Hallberg et al JBC 269:6 3913-3916 1994, 3% of cellular Raf is complexed with Ras. So we raise kb 4x to 4 This step needed to memb-anchor and activate Raf: Leevers et al Nature 369 411-414 (I don\'t....
  Ras_minus_act_minus_craf: MAPK_slash_craf_minus_1_star_ + Ras_slash_GTP_minus_Ras -> MAPK_slash_Raf_minus_GTP_minus_Ras_star_; Ras_minus_act_minus_craf_kf*MAPK_slash_craf_minus_1_star_*Ras_slash_GTP_minus_Ras - Ras_minus_act_minus_craf_kb*MAPK_slash_Raf_minus_GTP_minus_Ras_star_;
    Ras_minus_act_minus_craf_kf = 2.4e-11 vol_uMINVsecINV; Ras_minus_act_minus_craf_kb = 5e-13 vol_secINV;
  // kf*BetaGamma*Ras_slash_inact_minus_GEF-kb*Ras_slash_GEF_minus_Gprot_minus_bg
  // SoS/GEF is present at 50 nM ie 3e4/cell. BetaGamma maxes out at 9e4. Assume we have 1/3 of the GEF active when the BetaGamma is 1.5e4. so 1e4 * kb = 2e4 * 1.5e4 * kf, so kf/kb = 3e-5. The rate of this equil should be reasonably fast, say 1/sec
  Ras_slash_bg_minus_act_minus_GEF: $BetaGamma + Ras_slash_inact_minus_GEF -> Ras_slash_GEF_minus_Gprot_minus_bg; Ras_slash_bg_minus_act_minus_GEF_kf*BetaGamma*Ras_slash_inact_minus_GEF - Ras_slash_bg_minus_act_minus_GEF_kb*Ras_slash_GEF_minus_Gprot_minus_bg;
    Ras_slash_bg_minus_act_minus_GEF_kf = 6e-12 vol_uMINVsecINV; Ras_slash_bg_minus_act_minus_GEF_kb = 1e-12 vol_secINV;
  // kf*Ras_slash_GEF_star_-kb*Ras_slash_inact_minus_GEF
  Ras_slash_dephosph_minus_GEF: Ras_slash_GEF_star_ -> Ras_slash_inact_minus_GEF; Ras_slash_dephosph_minus_GEF_kf*Ras_slash_GEF_star_ - Ras_slash_dephosph_minus_GEF_kb*Ras_slash_inact_minus_GEF;
    Ras_slash_dephosph_minus_GEF_kf = 1e-12 vol_secINV; Ras_slash_dephosph_minus_GEF_kb = 0 vol_secINV;
  // kf*Ras_slash_GTP_minus_Ras-kb*Ras_slash_GDP_minus_Ras
  // This is extremely slow (1e-4), but it is significant as so little GAP actually gets complexed with it that the total GTP turnover rises only by 2-3 X (see Gibbs et al, JBC 265(33) 20437-20422) and Eccleston et al JBC 268(36) 27012-27019 kf = 1e-4
  Ras_slash_Ras_minus_intrinsic_minus_GTPase: Ras_slash_GTP_minus_Ras -> Ras_slash_GDP_minus_Ras; Ras_slash_Ras_minus_intrinsic_minus_GTPase_kf*Ras_slash_GTP_minus_Ras - Ras_slash_Ras_minus_intrinsic_minus_GTPase_kb*Ras_slash_GDP_minus_Ras;
    Ras_slash_Ras_minus_intrinsic_minus_GTPase_kf = 1e-16 vol_secINV; Ras_slash_Ras_minus_intrinsic_minus_GTPase_kb = 0 vol_secINV;
  // kf*Ras_slash_GAP_star_-kb*Ras_slash_GAP
  // Assume a reasonably good rate for dephosphorylating it, 1/sec
  Ras_slash_dephosph_minus_GAP: Ras_slash_GAP_star_ -> Ras_slash_GAP; Ras_slash_dephosph_minus_GAP_kf*Ras_slash_GAP_star_ - Ras_slash_dephosph_minus_GAP_kb*Ras_slash_GAP;
    Ras_slash_dephosph_minus_GAP_kf = 1e-13 vol_secINV; Ras_slash_dephosph_minus_GAP_kb = 0 vol_secINV;
  // kf*Ras_slash_inact_minus_GEF*CaM_minus_Ca4-kb*Ras_slash_CaM_minus_GEF
  // We have no numbers for this. It is probably between the two extremes represented by the CaMKII phosph states, and I have used guesses based on this. kf=1e-4 kb=1 The reaction is based on Farnsworth et al Nature 376 524-527 1995
  Ras_slash_CaM_minus_bind_minus_GEF: Ras_slash_inact_minus_GEF + $CaM_minus_Ca4 -> Ras_slash_CaM_minus_GEF; Ras_slash_CaM_minus_bind_minus_GEF_kf*Ras_slash_inact_minus_GEF*CaM_minus_Ca4 - Ras_slash_CaM_minus_bind_minus_GEF_kb*Ras_slash_CaM_minus_GEF;
    Ras_slash_CaM_minus_bind_minus_GEF_kf = 6e-11 vol_uMINVsecINV; Ras_slash_CaM_minus_bind_minus_GEF_kb = 1e-12 vol_secINV;
  // kf*Ras_slash_inact_minus_GEF_star_-kb*Ras_slash_inact_minus_GEF
  Ras_slash_dephosph_minus_inact_minus_GEF_star_: Ras_slash_inact_minus_GEF_star_ -> Ras_slash_inact_minus_GEF; Ras_slash_dephosph_minus_inact_minus_GEF_star__kf*Ras_slash_inact_minus_GEF_star_ - Ras_slash_dephosph_minus_inact_minus_GEF_star__kb*Ras_slash_inact_minus_GEF;
    Ras_slash_dephosph_minus_inact_minus_GEF_star__kf = 1e-12 vol_secINV; Ras_slash_dephosph_minus_inact_minus_GEF_star__kb = 0 vol_secINV;
  // kf*EGFR_slash_EGFR*EGFR_slash_EGF-kb*EGFR_slash_L_dot_EGFR
  // Affinity of EGFR for EGF is complex: depends on [EGFR]. We\'ll assume fixed [EGFR] and use exptal affinity ~20 nM (see Sherrill and Kyte Biochem 1996 35 5705-5718, Berkers et al JBC 266:2 922-927 1991, Sorokin et al JBC 269:13 9752-9759 1994). Tau =~2 min (Davis et al JBC 263:11 5373-5379 1988) or Berkers Kass = 6.2e5/M/sec, Kdiss=3.5e-4/sec. Sherrill and Kyte have Hill Coeff=1.7
  EGFR_slash_act_EGFR: EGFR_slash_EGFR + $EGFR_slash_EGF -> EGFR_slash_L_dot_EGFR; EGFR_slash_act_EGFR_kf*EGFR_slash_EGFR*EGFR_slash_EGF - EGFR_slash_act_EGFR_kb*EGFR_slash_L_dot_EGFR;
    EGFR_slash_act_EGFR_kf = 4.2e-12 vol_uMINVsecINV; EGFR_slash_act_EGFR_kb = 2.5e-13 vol_secINV;
  // kf*EGFR_slash_SHC_star_-kb*EGFR_slash_SHC
  // Time course of decline of phosph is 20 min. Part of this is the turnoff time of the EGFR itself. Lets assume a tau of 10 min for this dephosph. It may be wildly off.
  EGFR_slash_dephosph_Shc: EGFR_slash_SHC_star_ -> EGFR_slash_SHC; EGFR_slash_dephosph_Shc_kf*EGFR_slash_SHC_star_ - EGFR_slash_dephosph_Shc_kb*EGFR_slash_SHC;
    EGFR_slash_dephosph_Shc_kf = 1.6667e-15 vol_secINV; EGFR_slash_dephosph_Shc_kb = 0 vol_secINV;
  // kf*EGFR_slash_L_dot_EGFR-kb*EGFR_slash_Internal_L_dot_EGFR
  // See Helin and Beguinot JBC 266:13 1991 pg 8363-8368. In Fig 3 they have internalization tau about 10 min, equil at about 20% EGF available. So kf = 4x kb, and 1/(kf + kb) = 600 sec so kb = 1/3K = 3.3e-4, and kf = 1.33e-3. This doesn\'t take into account the unbound receptor, so we need to push the kf up a bit, to 0.002
  EGFR_slash_Internalize: EGFR_slash_L_dot_EGFR -> EGFR_slash_Internal_L_dot_EGFR; EGFR_slash_Internalize_kf*EGFR_slash_L_dot_EGFR - EGFR_slash_Internalize_kb*EGFR_slash_Internal_L_dot_EGFR;
    EGFR_slash_Internalize_kf = 2e-15 vol_secINV; EGFR_slash_Internalize_kb = 3.3e-16 vol_secINV;
  // kf*Sos_slash_Sos_dot_Grb2*EGFR_slash_SHC_star_-kb*Shc_star__dot_Sos_dot_Grb2
  // Sasaoka et al JBC 269:51 pp 32621 1994, table on pg 32623 indicates that this pathway accounts for about 50% of the GEF activation. (88% - 39%). Error is large, about 20%. Fig 1 is most useful in constraining rates. Chook et al JBC 271:48 pp 30472, 1996 say that the Kd is 0.2 uM for Shc binding to EGFR. The Kd for Grb direct binding is 0.7, so we\'ll ignore it.
  Sos_slash_Shc_bind_Sos_dot_Grb2: Sos_slash_Sos_dot_Grb2 + EGFR_slash_SHC_star_ -> Shc_star__dot_Sos_dot_Grb2; Sos_slash_Shc_bind_Sos_dot_Grb2_kf*Sos_slash_Sos_dot_Grb2*EGFR_slash_SHC_star_ - Sos_slash_Shc_bind_Sos_dot_Grb2_kb*Shc_star__dot_Sos_dot_Grb2;
    Sos_slash_Shc_bind_Sos_dot_Grb2_kf = 4.9998e-13 vol_uMINVsecINV; Sos_slash_Shc_bind_Sos_dot_Grb2_kb = 1e-13 vol_secINV;
  // kf*Sos_slash_Sos_star_*Sos_slash_Grb2-kb*Sos_slash_Sos_star__dot_Grb2
  // Same rates as Grb2_bind_Sos: Porfiri and McCormick JBC 271:10 pp 5871 1996 show that the binding is not affected by the phosph.
  Sos_slash_Grb2_bind_Sos_star_: Sos_slash_Sos_star_ + Sos_slash_Grb2 -> Sos_slash_Sos_star__dot_Grb2; Sos_slash_Grb2_bind_Sos_star__kf*Sos_slash_Sos_star_*Sos_slash_Grb2 - Sos_slash_Grb2_bind_Sos_star__kb*Sos_slash_Sos_star__dot_Grb2;
    Sos_slash_Grb2_bind_Sos_star__kf = 2.50002e-14 vol_uMINVsecINV; Sos_slash_Grb2_bind_Sos_star__kb = 1.68e-14 vol_secINV;
  // kf*Sos_slash_Sos_star_-kb*Sos_slash_Sos
  // The only clue I have to these rates is from the time courses of the EGF activation, which is around 1 to 5 min. The dephosph would be expected to be of the same order, perhaps a bit longer. Lets use 0.002 which is about 8 min. Sep 17: The transient activation curve matches better with kf = 0.001
  Sos_slash_dephosph_Sos: Sos_slash_Sos_star_ -> Sos_slash_Sos; Sos_slash_dephosph_Sos_kf*Sos_slash_Sos_star_ - Sos_slash_dephosph_Sos_kb*Sos_slash_Sos;
    Sos_slash_dephosph_Sos_kf = 1e-15 vol_secINV; Sos_slash_dephosph_Sos_kb = 0 vol_secINV;
  // kf*Sos_slash_Grb2*Sos_slash_Sos-kb*Sos_slash_Sos_dot_Grb2
  // As there are 2 SH3 domains, this reaction could be 2nd order. I have a Kd of 22 uM from peptide binding (Lemmon et al JBC 269:50 pg 31653). However, Chook et al JBC 271:48 pg30472 say it is 0.4uM with purified proteins, so we believe them. They say it is 1:1 binding.
  Sos_slash_Grb2_bind_Sos: Sos_slash_Grb2 + Sos_slash_Sos -> Sos_slash_Sos_dot_Grb2; Sos_slash_Grb2_bind_Sos_kf*Sos_slash_Grb2*Sos_slash_Sos - Sos_slash_Grb2_bind_Sos_kb*Sos_slash_Sos_dot_Grb2;
    Sos_slash_Grb2_bind_Sos_kf = 2.50002e-14 vol_uMINVsecINV; Sos_slash_Grb2_bind_Sos_kb = 1.68e-14 vol_secINV;
  // k1*MAPK_slash_craf_minus_1*PKC_minus_active-k2*PKC_minus_active_slash_PKC_minus_act_minus_raf_slash_PKC_minus_act_minus_raf_cplx
  // Rate consts from Chen et al Biochem 32, 1032 (1993) k3 = k2 = 4 k1 = 9e-5 recalculated gives 1.666e-5, which is not very different. Looks like k3 is rate-limiting in this case: there is a huge amount of craf locked up in the enz complex. Let us assume a 10x higher Km, ie, lower affinity. k1 drops by 10x. Also changed k2 to 4x k3. Lowerd k1 to 1e-6 to balance 10X DAG sensitivity of PKC
  PKC_minus_active_slash_PKC_minus_act_minus_raf_1: MAPK_slash_craf_minus_1 + $PKC_minus_active -> PKC_minus_active_slash_PKC_minus_act_minus_raf_slash_PKC_minus_act_minus_raf_cplx; PKC_minus_active_slash_PKC_minus_act_minus_raf_1_k1*MAPK_slash_craf_minus_1*PKC_minus_active - PKC_minus_active_slash_PKC_minus_act_minus_raf_1_k2*PKC_minus_active_slash_PKC_minus_act_minus_raf_slash_PKC_minus_act_minus_raf_cplx;
    PKC_minus_active_slash_PKC_minus_act_minus_raf_1_k1 = 3e-13 vol_uMINVsecINV; PKC_minus_active_slash_PKC_minus_act_minus_raf_1_k2 = 1.6e-11 vol_secINV;
  // k3*PKC_minus_active_slash_PKC_minus_act_minus_raf_slash_PKC_minus_act_minus_raf_cplx
  PKC_minus_active_slash_PKC_minus_act_minus_raf_2: PKC_minus_active_slash_PKC_minus_act_minus_raf_slash_PKC_minus_act_minus_raf_cplx => MAPK_slash_craf_minus_1_star_ + $PKC_minus_active; PKC_minus_active_slash_PKC_minus_act_minus_raf_2_k3*PKC_minus_active_slash_PKC_minus_act_minus_raf_slash_PKC_minus_act_minus_raf_cplx;
    PKC_minus_active_slash_PKC_minus_act_minus_raf_2_k3 = 4e-12 vol_secINV;
  // k1*Ras_slash_GAP*PKC_minus_active-k2*PKC_minus_active_slash_PKC_minus_inact_minus_GAP_slash_PKC_minus_inact_minus_GAP_cplx
  // Rate consts copied from PCK-act-raf This reaction inactivates GAP. The idea is from the Boguski and McCormick review.
  PKC_minus_active_slash_PKC_minus_inact_minus_GAP_1: Ras_slash_GAP + $PKC_minus_active -> PKC_minus_active_slash_PKC_minus_inact_minus_GAP_slash_PKC_minus_inact_minus_GAP_cplx; PKC_minus_active_slash_PKC_minus_inact_minus_GAP_1_k1*Ras_slash_GAP*PKC_minus_active - PKC_minus_active_slash_PKC_minus_inact_minus_GAP_1_k2*PKC_minus_active_slash_PKC_minus_inact_minus_GAP_slash_PKC_minus_inact_minus_GAP_cplx;
    PKC_minus_active_slash_PKC_minus_inact_minus_GAP_1_k1 = 6e-12 vol_uMINVsecINV; PKC_minus_active_slash_PKC_minus_inact_minus_GAP_1_k2 = 1.6e-11 vol_secINV;
  // k3*PKC_minus_active_slash_PKC_minus_inact_minus_GAP_slash_PKC_minus_inact_minus_GAP_cplx
  PKC_minus_active_slash_PKC_minus_inact_minus_GAP_2: PKC_minus_active_slash_PKC_minus_inact_minus_GAP_slash_PKC_minus_inact_minus_GAP_cplx => Ras_slash_GAP_star_ + $PKC_minus_active; PKC_minus_active_slash_PKC_minus_inact_minus_GAP_2_k3*PKC_minus_active_slash_PKC_minus_inact_minus_GAP_slash_PKC_minus_inact_minus_GAP_cplx;
    PKC_minus_active_slash_PKC_minus_inact_minus_GAP_2_k3 = 4e-12 vol_secINV;
  // k1*Ras_slash_inact_minus_GEF*PKC_minus_active-k2*PKC_minus_active_slash_PKC_minus_act_minus_GEF_slash_PKC_minus_act_minus_GEF_cplx
  // Rate consts from PKC-act-raf. This reaction activates GEF. It can lead to at least 2X stim of ras, and a 2X stim of MAPK over and above that obtained via direct phosph of c-raf. Note that it is a push-pull reaction, and there is also a contribution through the phosphorylation and inactivation of GAPs. The original PKC-act-raf rate consts are too fast. We lower K1 by 10 X
  PKC_minus_active_slash_PKC_minus_act_minus_GEF_1: Ras_slash_inact_minus_GEF + $PKC_minus_active -> PKC_minus_active_slash_PKC_minus_act_minus_GEF_slash_PKC_minus_act_minus_GEF_cplx; PKC_minus_active_slash_PKC_minus_act_minus_GEF_1_k1*Ras_slash_inact_minus_GEF*PKC_minus_active - PKC_minus_active_slash_PKC_minus_act_minus_GEF_1_k2*PKC_minus_active_slash_PKC_minus_act_minus_GEF_slash_PKC_minus_act_minus_GEF_cplx;
    PKC_minus_active_slash_PKC_minus_act_minus_GEF_1_k1 = 6e-12 vol_uMINVsecINV; PKC_minus_active_slash_PKC_minus_act_minus_GEF_1_k2 = 1.6e-11 vol_secINV;
  // k3*PKC_minus_active_slash_PKC_minus_act_minus_GEF_slash_PKC_minus_act_minus_GEF_cplx
  PKC_minus_active_slash_PKC_minus_act_minus_GEF_2: PKC_minus_active_slash_PKC_minus_act_minus_GEF_slash_PKC_minus_act_minus_GEF_cplx => Ras_slash_GEF_star_ + $PKC_minus_active; PKC_minus_active_slash_PKC_minus_act_minus_GEF_2_k3*PKC_minus_active_slash_PKC_minus_act_minus_GEF_slash_PKC_minus_act_minus_GEF_cplx;
    PKC_minus_active_slash_PKC_minus_act_minus_GEF_2_k3 = 4e-12 vol_secINV;
  // k1*MAPK_slash_craf_minus_1_star_*MAPK_star_-k2*MAPK_star__slash_MAPK_star__minus_feedback_slash_MAPK_star__minus_feedback_cplx
  // Ueki et al JBC 269(22):15756-15761 show the presence of this step, but not the rate consts, which are derived from Sanghera et al JBC 265(1):52-57, 1990, see the deriv in the MAPK* notes.
  MAPK_star__slash_MAPK_star__minus_feedback_1: MAPK_slash_craf_minus_1_star_ + MAPK_star_ -> MAPK_star__slash_MAPK_star__minus_feedback_slash_MAPK_star__minus_feedback_cplx; MAPK_star__slash_MAPK_star__minus_feedback_1_k1*MAPK_slash_craf_minus_1_star_*MAPK_star_ - MAPK_star__slash_MAPK_star__minus_feedback_1_k2*MAPK_star__slash_MAPK_star__minus_feedback_slash_MAPK_star__minus_feedback_cplx;
    MAPK_star__slash_MAPK_star__minus_feedback_1_k1 = 1.95e-12 vol_uMINVsecINV; MAPK_star__slash_MAPK_star__minus_feedback_1_k2 = 4e-11 vol_secINV;
  // k3*MAPK_star__slash_MAPK_star__minus_feedback_slash_MAPK_star__minus_feedback_cplx
  MAPK_star__slash_MAPK_star__minus_feedback_2: MAPK_star__slash_MAPK_star__minus_feedback_slash_MAPK_star__minus_feedback_cplx => MAPK_slash_craf_minus_1_star__star_ + MAPK_star_; MAPK_star__slash_MAPK_star__minus_feedback_2_k3*MAPK_star__slash_MAPK_star__minus_feedback_slash_MAPK_star__minus_feedback_cplx;
    MAPK_star__slash_MAPK_star__minus_feedback_2_k3 = 1e-11 vol_secINV;
  // k1*Sos_slash_Sos*MAPK_star_-k2*MAPK_star__slash_phosph_Sos_slash_phosph_Sos_cplx
  // See Porfiri and McCormick JBC 271:10 pp5871 1996 for the existence of this step. We\'ll take the rates from the ones used for the phosph of Raf by MAPK. Sep 17 1997: The transient activation curve matches better with k1 up by 10 x.
  MAPK_star__slash_phosph_Sos_1: Sos_slash_Sos + MAPK_star_ -> MAPK_star__slash_phosph_Sos_slash_phosph_Sos_cplx; MAPK_star__slash_phosph_Sos_1_k1*Sos_slash_Sos*MAPK_star_ - MAPK_star__slash_phosph_Sos_1_k2*MAPK_star__slash_phosph_Sos_slash_phosph_Sos_cplx;
    MAPK_star__slash_phosph_Sos_1_k1 = 1.95e-11 vol_uMINVsecINV; MAPK_star__slash_phosph_Sos_1_k2 = 4e-11 vol_secINV;
  // k3*MAPK_star__slash_phosph_Sos_slash_phosph_Sos_cplx
  MAPK_star__slash_phosph_Sos_2: MAPK_star__slash_phosph_Sos_slash_phosph_Sos_cplx => Sos_slash_Sos_star_ + MAPK_star_; MAPK_star__slash_phosph_Sos_2_k3*MAPK_star__slash_phosph_Sos_slash_phosph_Sos_cplx;
    MAPK_star__slash_phosph_Sos_2_k3 = 1e-11 vol_secINV;
  // k1*MAPK_slash_MAPK*MAPK_slash_MAPKK_star_-k2*MAPK_slash_MAPKK_star__slash_MAPKKtyr_slash_MAPKKtyr_cplx
  // The actual MAPKK is 2 forms from Seger et al JBC 267:20 14373(1992) Vmax = 150nmol/min/mg From Haystead et al FEBS 306(1):17-22 we get Km=46.6nM for at least one of the phosphs. Putting these together: k3=0.15/sec, scale to get k2=0.6. k1=0.75/46.6nM=2.7e-5
  MAPK_slash_MAPKK_star__slash_MAPKKtyr_1: MAPK_slash_MAPK + MAPK_slash_MAPKK_star_ -> MAPK_slash_MAPKK_star__slash_MAPKKtyr_slash_MAPKKtyr_cplx; MAPK_slash_MAPKK_star__slash_MAPKKtyr_1_k1*MAPK_slash_MAPK*MAPK_slash_MAPKK_star_ - MAPK_slash_MAPKK_star__slash_MAPKKtyr_1_k2*MAPK_slash_MAPKK_star__slash_MAPKKtyr_slash_MAPKKtyr_cplx;
    MAPK_slash_MAPKK_star__slash_MAPKKtyr_1_k1 = 1.62e-11 vol_uMINVsecINV; MAPK_slash_MAPKK_star__slash_MAPKKtyr_1_k2 = 6e-13 vol_secINV;
  // k3*MAPK_slash_MAPKK_star__slash_MAPKKtyr_slash_MAPKKtyr_cplx
  MAPK_slash_MAPKK_star__slash_MAPKKtyr_2: MAPK_slash_MAPKK_star__slash_MAPKKtyr_slash_MAPKKtyr_cplx => MAPK_slash_MAPK_minus_tyr + MAPK_slash_MAPKK_star_; MAPK_slash_MAPKK_star__slash_MAPKKtyr_2_k3*MAPK_slash_MAPKK_star__slash_MAPKKtyr_slash_MAPKKtyr_cplx;
    MAPK_slash_MAPKK_star__slash_MAPKKtyr_2_k3 = 1.5e-13 vol_secINV;
  // k1*MAPK_slash_MAPK_minus_tyr*MAPK_slash_MAPKK_star_-k2*MAPK_slash_MAPKK_star__slash_MAPKKthr_slash_MAPKKthr_cplx
  // Rate consts same as for MAPKKtyr.
  MAPK_slash_MAPKK_star__slash_MAPKKthr_1: MAPK_slash_MAPK_minus_tyr + MAPK_slash_MAPKK_star_ -> MAPK_slash_MAPKK_star__slash_MAPKKthr_slash_MAPKKthr_cplx; MAPK_slash_MAPKK_star__slash_MAPKKthr_1_k1*MAPK_slash_MAPK_minus_tyr*MAPK_slash_MAPKK_star_ - MAPK_slash_MAPKK_star__slash_MAPKKthr_1_k2*MAPK_slash_MAPKK_star__slash_MAPKKthr_slash_MAPKKthr_cplx;
    MAPK_slash_MAPKK_star__slash_MAPKKthr_1_k1 = 1.62e-11 vol_uMINVsecINV; MAPK_slash_MAPKK_star__slash_MAPKKthr_1_k2 = 6e-13 vol_secINV;
  // k3*MAPK_slash_MAPKK_star__slash_MAPKKthr_slash_MAPKKthr_cplx
  MAPK_slash_MAPKK_star__slash_MAPKKthr_2: MAPK_slash_MAPKK_star__slash_MAPKKthr_slash_MAPKKthr_cplx => MAPK_star_ + MAPK_slash_MAPKK_star_; MAPK_slash_MAPKK_star__slash_MAPKKthr_2_k3*MAPK_slash_MAPKK_star__slash_MAPKKthr_slash_MAPKKthr_cplx;
    MAPK_slash_MAPKK_star__slash_MAPKKthr_2_k3 = 1.5e-13 vol_secINV;
  // k1*MAPK_slash_MAPKK*MAPK_slash_Raf_minus_GTP_minus_Ras_star_-k2*MAPK_slash_Raf_minus_GTP_minus_Ras_star__slash_Raf_minus_GTP_minus_Ras_star__dot_1_slash_Raf_minus_GTP_minus_Ras_star__dot_1_cplx
  // Kinetics are the same as for the craf-1* activity, ie., k1=1.1e-6, k2=.42, k3 =0.105 These are based on Force et al PNAS USA 91 1270-1274 1994. These parms cannot reach the observed 4X stim of MAPK. So lets increase the affinity, ie, raise k1 10X to 1.1e-5 Lets take it back down to where it was. Back up to 5X: 5.5e-6
  MAPK_slash_Raf_minus_GTP_minus_Ras_star__slash_Raf_minus_GTP_minus_Ras_star__dot_1_1: MAPK_slash_MAPKK + MAPK_slash_Raf_minus_GTP_minus_Ras_star_ -> MAPK_slash_Raf_minus_GTP_minus_Ras_star__slash_Raf_minus_GTP_minus_Ras_star__dot_1_slash_Raf_minus_GTP_minus_Ras_star__dot_1_cplx; MAPK_slash_Raf_minus_GTP_minus_Ras_star__slash_Raf_minus_GTP_minus_Ras_star__dot_1_1_k1*MAPK_slash_MAPKK*MAPK_slash_Raf_minus_GTP_minus_Ras_star_ - MAPK_slash_Raf_minus_GTP_minus_Ras_star__slash_Raf_minus_GTP_minus_Ras_star__dot_1_1_k2*MAPK_slash_Raf_minus_GTP_minus_Ras_star__slash_Raf_minus_GTP_minus_Ras_star__dot_1_slash_Raf_minus_GTP_minus_Ras_star__dot_1_cplx;
    MAPK_slash_Raf_minus_GTP_minus_Ras_star__slash_Raf_minus_GTP_minus_Ras_star__dot_1_1_k1 = 3.3e-12 vol_uMINVsecINV; MAPK_slash_Raf_minus_GTP_minus_Ras_star__slash_Raf_minus_GTP_minus_Ras_star__dot_1_1_k2 = 4.2e-13 vol_secINV;
  // k3*MAPK_slash_Raf_minus_GTP_minus_Ras_star__slash_Raf_minus_GTP_minus_Ras_star__dot_1_slash_Raf_minus_GTP_minus_Ras_star__dot_1_cplx
  MAPK_slash_Raf_minus_GTP_minus_Ras_star__slash_Raf_minus_GTP_minus_Ras_star__dot_1_2: MAPK_slash_Raf_minus_GTP_minus_Ras_star__slash_Raf_minus_GTP_minus_Ras_star__dot_1_slash_Raf_minus_GTP_minus_Ras_star__dot_1_cplx => MAPK_slash_MAPKK_minus_ser + MAPK_slash_Raf_minus_GTP_minus_Ras_star_; MAPK_slash_Raf_minus_GTP_minus_Ras_star__slash_Raf_minus_GTP_minus_Ras_star__dot_1_2_k3*MAPK_slash_Raf_minus_GTP_minus_Ras_star__slash_Raf_minus_GTP_minus_Ras_star__dot_1_slash_Raf_minus_GTP_minus_Ras_star__dot_1_cplx;
    MAPK_slash_Raf_minus_GTP_minus_Ras_star__slash_Raf_minus_GTP_minus_Ras_star__dot_1_2_k3 = 1.05e-13 vol_secINV;
  // k1*MAPK_slash_MAPKK_minus_ser*MAPK_slash_Raf_minus_GTP_minus_Ras_star_-k2*MAPK_slash_Raf_minus_GTP_minus_Ras_star__slash_Raf_minus_GTP_minus_Ras_star__dot_2_slash_Raf_minus_GTP_minus_Ras_star__dot_2_cplx
  // Same kinetics as other c-raf activated forms. See Force et al PNAS 91 1270-1274 1994. k1 = 1.1e-6, k2 = .42, k3 = 1.05 raise k1 to 5.5e-6
  MAPK_slash_Raf_minus_GTP_minus_Ras_star__slash_Raf_minus_GTP_minus_Ras_star__dot_2_1: MAPK_slash_MAPKK_minus_ser + MAPK_slash_Raf_minus_GTP_minus_Ras_star_ -> MAPK_slash_Raf_minus_GTP_minus_Ras_star__slash_Raf_minus_GTP_minus_Ras_star__dot_2_slash_Raf_minus_GTP_minus_Ras_star__dot_2_cplx; MAPK_slash_Raf_minus_GTP_minus_Ras_star__slash_Raf_minus_GTP_minus_Ras_star__dot_2_1_k1*MAPK_slash_MAPKK_minus_ser*MAPK_slash_Raf_minus_GTP_minus_Ras_star_ - MAPK_slash_Raf_minus_GTP_minus_Ras_star__slash_Raf_minus_GTP_minus_Ras_star__dot_2_1_k2*MAPK_slash_Raf_minus_GTP_minus_Ras_star__slash_Raf_minus_GTP_minus_Ras_star__dot_2_slash_Raf_minus_GTP_minus_Ras_star__dot_2_cplx;
    MAPK_slash_Raf_minus_GTP_minus_Ras_star__slash_Raf_minus_GTP_minus_Ras_star__dot_2_1_k1 = 3.3e-12 vol_uMINVsecINV; MAPK_slash_Raf_minus_GTP_minus_Ras_star__slash_Raf_minus_GTP_minus_Ras_star__dot_2_1_k2 = 4.2e-13 vol_secINV;
  // k3*MAPK_slash_Raf_minus_GTP_minus_Ras_star__slash_Raf_minus_GTP_minus_Ras_star__dot_2_slash_Raf_minus_GTP_minus_Ras_star__dot_2_cplx
  MAPK_slash_Raf_minus_GTP_minus_Ras_star__slash_Raf_minus_GTP_minus_Ras_star__dot_2_2: MAPK_slash_Raf_minus_GTP_minus_Ras_star__slash_Raf_minus_GTP_minus_Ras_star__dot_2_slash_Raf_minus_GTP_minus_Ras_star__dot_2_cplx => MAPK_slash_MAPKK_star_ + MAPK_slash_Raf_minus_GTP_minus_Ras_star_; MAPK_slash_Raf_minus_GTP_minus_Ras_star__slash_Raf_minus_GTP_minus_Ras_star__dot_2_2_k3*MAPK_slash_Raf_minus_GTP_minus_Ras_star__slash_Raf_minus_GTP_minus_Ras_star__dot_2_slash_Raf_minus_GTP_minus_Ras_star__dot_2_cplx;
    MAPK_slash_Raf_minus_GTP_minus_Ras_star__slash_Raf_minus_GTP_minus_Ras_star__dot_2_2_k3 = 1.05e-13 vol_secINV;
  // k1*MAPK_slash_MAPK_minus_tyr*MKP_minus_1-k2*MKP_minus_1_slash_MKP1_minus_tyr_minus_deph_slash_MKP1_minus_tyr_minus_deph_cplx
  // The original kinetics have been modified to obey the k2 = 4 * k3 rule, while keeping kcat and Km fixed. As noted in the NOTES, the only constraining data point is the time course of MAPK dephosphorylation, which this model satisfies. It would be nice to have more accurate estimates of rate consts and MKP-1 levels from the literature. Effective Km : 67 nM kcat = 1.43 umol/min/mg
  MKP_minus_1_slash_MKP1_minus_tyr_minus_deph_1: MAPK_slash_MAPK_minus_tyr + MKP_minus_1 -> MKP_minus_1_slash_MKP1_minus_tyr_minus_deph_slash_MKP1_minus_tyr_minus_deph_cplx; MKP_minus_1_slash_MKP1_minus_tyr_minus_deph_1_k1*MAPK_slash_MAPK_minus_tyr*MKP_minus_1 - MKP_minus_1_slash_MKP1_minus_tyr_minus_deph_1_k2*MKP_minus_1_slash_MKP1_minus_tyr_minus_deph_slash_MKP1_minus_tyr_minus_deph_cplx;
    MKP_minus_1_slash_MKP1_minus_tyr_minus_deph_1_k1 = 7.5e-11 vol_uMINVsecINV; MKP_minus_1_slash_MKP1_minus_tyr_minus_deph_1_k2 = 4e-12 vol_secINV;
  // k3*MKP_minus_1_slash_MKP1_minus_tyr_minus_deph_slash_MKP1_minus_tyr_minus_deph_cplx
  MKP_minus_1_slash_MKP1_minus_tyr_minus_deph_2: MKP_minus_1_slash_MKP1_minus_tyr_minus_deph_slash_MKP1_minus_tyr_minus_deph_cplx => MAPK_slash_MAPK + MKP_minus_1; MKP_minus_1_slash_MKP1_minus_tyr_minus_deph_2_k3*MKP_minus_1_slash_MKP1_minus_tyr_minus_deph_slash_MKP1_minus_tyr_minus_deph_cplx;
    MKP_minus_1_slash_MKP1_minus_tyr_minus_deph_2_k3 = 1e-12 vol_secINV;
  // k1*MAPK_star_*MKP_minus_1-k2*MKP_minus_1_slash_MKP1_minus_thr_minus_deph_slash_MKP1_minus_thr_minus_deph_cplx
  // See MKP1-tyr-deph
  MKP_minus_1_slash_MKP1_minus_thr_minus_deph_1: MAPK_star_ + MKP_minus_1 -> MKP_minus_1_slash_MKP1_minus_thr_minus_deph_slash_MKP1_minus_thr_minus_deph_cplx; MKP_minus_1_slash_MKP1_minus_thr_minus_deph_1_k1*MAPK_star_*MKP_minus_1 - MKP_minus_1_slash_MKP1_minus_thr_minus_deph_1_k2*MKP_minus_1_slash_MKP1_minus_thr_minus_deph_slash_MKP1_minus_thr_minus_deph_cplx;
    MKP_minus_1_slash_MKP1_minus_thr_minus_deph_1_k1 = 7.5e-11 vol_uMINVsecINV; MKP_minus_1_slash_MKP1_minus_thr_minus_deph_1_k2 = 4e-12 vol_secINV;
  // k3*MKP_minus_1_slash_MKP1_minus_thr_minus_deph_slash_MKP1_minus_thr_minus_deph_cplx
  MKP_minus_1_slash_MKP1_minus_thr_minus_deph_2: MKP_minus_1_slash_MKP1_minus_thr_minus_deph_slash_MKP1_minus_thr_minus_deph_cplx => MAPK_slash_MAPK_minus_tyr + MKP_minus_1; MKP_minus_1_slash_MKP1_minus_thr_minus_deph_2_k3*MKP_minus_1_slash_MKP1_minus_thr_minus_deph_slash_MKP1_minus_thr_minus_deph_cplx;
    MKP_minus_1_slash_MKP1_minus_thr_minus_deph_2_k3 = 1e-12 vol_secINV;
  // k1*MAPK_slash_craf_minus_1_star_*PPhosphatase2A-k2*PPhosphatase2A_slash_craf_minus_deph_slash_craf_minus_deph_cplx
  // See parent PPhosphatase2A for parms
  PPhosphatase2A_slash_craf_minus_deph_1: MAPK_slash_craf_minus_1_star_ + PPhosphatase2A -> PPhosphatase2A_slash_craf_minus_deph_slash_craf_minus_deph_cplx; PPhosphatase2A_slash_craf_minus_deph_1_k1*MAPK_slash_craf_minus_1_star_*PPhosphatase2A - PPhosphatase2A_slash_craf_minus_deph_1_k2*PPhosphatase2A_slash_craf_minus_deph_slash_craf_minus_deph_cplx;
    PPhosphatase2A_slash_craf_minus_deph_1_k1 = 1.98e-12 vol_uMINVsecINV; PPhosphatase2A_slash_craf_minus_deph_1_k2 = 2.5e-11 vol_secINV;
  // k3*PPhosphatase2A_slash_craf_minus_deph_slash_craf_minus_deph_cplx
  PPhosphatase2A_slash_craf_minus_deph_2: PPhosphatase2A_slash_craf_minus_deph_slash_craf_minus_deph_cplx => MAPK_slash_craf_minus_1 + PPhosphatase2A; PPhosphatase2A_slash_craf_minus_deph_2_k3*PPhosphatase2A_slash_craf_minus_deph_slash_craf_minus_deph_cplx;
    PPhosphatase2A_slash_craf_minus_deph_2_k3 = 6e-12 vol_secINV;
  // k1*MAPK_slash_MAPKK_star_*PPhosphatase2A-k2*PPhosphatase2A_slash_MAPKK_minus_deph_slash_MAPKK_minus_deph_cplx
  // See: Kyriakis et al Nature 358 pp 417-421 1992 Ahn et al Curr Op Cell Biol 4:992-999 1992 for this pathway. See parent PPhosphatase2A for parms.
  PPhosphatase2A_slash_MAPKK_minus_deph_1: MAPK_slash_MAPKK_star_ + PPhosphatase2A -> PPhosphatase2A_slash_MAPKK_minus_deph_slash_MAPKK_minus_deph_cplx; PPhosphatase2A_slash_MAPKK_minus_deph_1_k1*MAPK_slash_MAPKK_star_*PPhosphatase2A - PPhosphatase2A_slash_MAPKK_minus_deph_1_k2*PPhosphatase2A_slash_MAPKK_minus_deph_slash_MAPKK_minus_deph_cplx;
    PPhosphatase2A_slash_MAPKK_minus_deph_1_k1 = 1.98e-12 vol_uMINVsecINV; PPhosphatase2A_slash_MAPKK_minus_deph_1_k2 = 2.5e-11 vol_secINV;
  // k3*PPhosphatase2A_slash_MAPKK_minus_deph_slash_MAPKK_minus_deph_cplx
  PPhosphatase2A_slash_MAPKK_minus_deph_2: PPhosphatase2A_slash_MAPKK_minus_deph_slash_MAPKK_minus_deph_cplx => MAPK_slash_MAPKK_minus_ser + PPhosphatase2A; PPhosphatase2A_slash_MAPKK_minus_deph_2_k3*PPhosphatase2A_slash_MAPKK_minus_deph_slash_MAPKK_minus_deph_cplx;
    PPhosphatase2A_slash_MAPKK_minus_deph_2_k3 = 6e-12 vol_secINV;
  // k1*MAPK_slash_MAPKK_minus_ser*PPhosphatase2A-k2*PPhosphatase2A_slash_MAPKK_minus_deph_minus_ser_slash_MAPKK_minus_deph_minus_ser_cplx
  PPhosphatase2A_slash_MAPKK_minus_deph_minus_ser_1: MAPK_slash_MAPKK_minus_ser + PPhosphatase2A -> PPhosphatase2A_slash_MAPKK_minus_deph_minus_ser_slash_MAPKK_minus_deph_minus_ser_cplx; PPhosphatase2A_slash_MAPKK_minus_deph_minus_ser_1_k1*MAPK_slash_MAPKK_minus_ser*PPhosphatase2A - PPhosphatase2A_slash_MAPKK_minus_deph_minus_ser_1_k2*PPhosphatase2A_slash_MAPKK_minus_deph_minus_ser_slash_MAPKK_minus_deph_minus_ser_cplx;
    PPhosphatase2A_slash_MAPKK_minus_deph_minus_ser_1_k1 = 1.98e-12 vol_uMINVsecINV; PPhosphatase2A_slash_MAPKK_minus_deph_minus_ser_1_k2 = 2.5e-11 vol_secINV;
  // k3*PPhosphatase2A_slash_MAPKK_minus_deph_minus_ser_slash_MAPKK_minus_deph_minus_ser_cplx
  PPhosphatase2A_slash_MAPKK_minus_deph_minus_ser_2: PPhosphatase2A_slash_MAPKK_minus_deph_minus_ser_slash_MAPKK_minus_deph_minus_ser_cplx => MAPK_slash_MAPKK + PPhosphatase2A; PPhosphatase2A_slash_MAPKK_minus_deph_minus_ser_2_k3*PPhosphatase2A_slash_MAPKK_minus_deph_minus_ser_slash_MAPKK_minus_deph_minus_ser_cplx;
    PPhosphatase2A_slash_MAPKK_minus_deph_minus_ser_2_k3 = 6e-12 vol_secINV;
  // k1*MAPK_slash_craf_minus_1_star__star_*PPhosphatase2A-k2*PPhosphatase2A_slash_craf_star__star__minus_deph_slash_craf_star__star__minus_deph_cplx
  // Ueki et al JBC 269(22) pp 15756-15761 1994 show hyperphosphorylation of craf, so this is there to dephosphorylate it. Identity of phosphatase is not known to me, but it may be PP2A like the rest, so I have made it so.
  PPhosphatase2A_slash_craf_star__star__minus_deph_1: MAPK_slash_craf_minus_1_star__star_ + PPhosphatase2A -> PPhosphatase2A_slash_craf_star__star__minus_deph_slash_craf_star__star__minus_deph_cplx; PPhosphatase2A_slash_craf_star__star__minus_deph_1_k1*MAPK_slash_craf_minus_1_star__star_*PPhosphatase2A - PPhosphatase2A_slash_craf_star__star__minus_deph_1_k2*PPhosphatase2A_slash_craf_star__star__minus_deph_slash_craf_star__star__minus_deph_cplx;
    PPhosphatase2A_slash_craf_star__star__minus_deph_1_k1 = 1.98e-12 vol_uMINVsecINV; PPhosphatase2A_slash_craf_star__star__minus_deph_1_k2 = 2.5e-11 vol_secINV;
  // k3*PPhosphatase2A_slash_craf_star__star__minus_deph_slash_craf_star__star__minus_deph_cplx
  PPhosphatase2A_slash_craf_star__star__minus_deph_2: PPhosphatase2A_slash_craf_star__star__minus_deph_slash_craf_star__star__minus_deph_cplx => MAPK_slash_craf_minus_1_star_ + PPhosphatase2A; PPhosphatase2A_slash_craf_star__star__minus_deph_2_k3*PPhosphatase2A_slash_craf_star__star__minus_deph_slash_craf_star__star__minus_deph_cplx;
    PPhosphatase2A_slash_craf_star__star__minus_deph_2_k3 = 6e-12 vol_secINV;
  // k1*Ras_slash_GDP_minus_Ras*Ras_slash_GEF_minus_Gprot_minus_bg-k2*Ras_slash_GEF_minus_Gprot_minus_bg_slash_GEF_minus_bg_act_minus_ras_slash_GEF_minus_bg_act_minus_ras_cplx
  // Kinetics based on the activation of Gq by the receptor complex in the Gq model (in turn based on the Mahama and Linderman model) k1 = 2e-5, k2 = 1e-10, k3 = 10 (I do not know why they even bother with k2). Lets put k1 at 2e-6 to get a reasonable equilibrium More specific values from, eg.g: Orita et al JBC 268(34) 25542-25546 from rasGRF and smgGDS: k1=3.3e-7; k2 = 0.08, k3 = 0.02
  Ras_slash_GEF_minus_Gprot_minus_bg_slash_GEF_minus_bg_act_minus_ras_1: Ras_slash_GDP_minus_Ras + Ras_slash_GEF_minus_Gprot_minus_bg -> Ras_slash_GEF_minus_Gprot_minus_bg_slash_GEF_minus_bg_act_minus_ras_slash_GEF_minus_bg_act_minus_ras_cplx; Ras_slash_GEF_minus_Gprot_minus_bg_slash_GEF_minus_bg_act_minus_ras_1_k1*Ras_slash_GDP_minus_Ras*Ras_slash_GEF_minus_Gprot_minus_bg - Ras_slash_GEF_minus_Gprot_minus_bg_slash_GEF_minus_bg_act_minus_ras_1_k2*Ras_slash_GEF_minus_Gprot_minus_bg_slash_GEF_minus_bg_act_minus_ras_slash_GEF_minus_bg_act_minus_ras_cplx;
    Ras_slash_GEF_minus_Gprot_minus_bg_slash_GEF_minus_bg_act_minus_ras_1_k1 = 1.98e-13 vol_uMINVsecINV; Ras_slash_GEF_minus_Gprot_minus_bg_slash_GEF_minus_bg_act_minus_ras_1_k2 = 8e-14 vol_secINV;
  // k3*Ras_slash_GEF_minus_Gprot_minus_bg_slash_GEF_minus_bg_act_minus_ras_slash_GEF_minus_bg_act_minus_ras_cplx
  Ras_slash_GEF_minus_Gprot_minus_bg_slash_GEF_minus_bg_act_minus_ras_2: Ras_slash_GEF_minus_Gprot_minus_bg_slash_GEF_minus_bg_act_minus_ras_slash_GEF_minus_bg_act_minus_ras_cplx => Ras_slash_GTP_minus_Ras + Ras_slash_GEF_minus_Gprot_minus_bg; Ras_slash_GEF_minus_Gprot_minus_bg_slash_GEF_minus_bg_act_minus_ras_2_k3*Ras_slash_GEF_minus_Gprot_minus_bg_slash_GEF_minus_bg_act_minus_ras_slash_GEF_minus_bg_act_minus_ras_cplx;
    Ras_slash_GEF_minus_Gprot_minus_bg_slash_GEF_minus_bg_act_minus_ras_2_k3 = 2e-14 vol_secINV;
  // k1*Ras_slash_GDP_minus_Ras*Ras_slash_GEF_star_-k2*Ras_slash_GEF_star__slash_GEF_star__minus_act_minus_ras_slash_GEF_star__minus_act_minus_ras_cplx
  // Kinetics same as GEF-bg-act-ras
  Ras_slash_GEF_star__slash_GEF_star__minus_act_minus_ras_1: Ras_slash_GDP_minus_Ras + Ras_slash_GEF_star_ -> Ras_slash_GEF_star__slash_GEF_star__minus_act_minus_ras_slash_GEF_star__minus_act_minus_ras_cplx; Ras_slash_GEF_star__slash_GEF_star__minus_act_minus_ras_1_k1*Ras_slash_GDP_minus_Ras*Ras_slash_GEF_star_ - Ras_slash_GEF_star__slash_GEF_star__minus_act_minus_ras_1_k2*Ras_slash_GEF_star__slash_GEF_star__minus_act_minus_ras_slash_GEF_star__minus_act_minus_ras_cplx;
    Ras_slash_GEF_star__slash_GEF_star__minus_act_minus_ras_1_k1 = 1.98e-13 vol_uMINVsecINV; Ras_slash_GEF_star__slash_GEF_star__minus_act_minus_ras_1_k2 = 8e-14 vol_secINV;
  // k3*Ras_slash_GEF_star__slash_GEF_star__minus_act_minus_ras_slash_GEF_star__minus_act_minus_ras_cplx
  Ras_slash_GEF_star__slash_GEF_star__minus_act_minus_ras_2: Ras_slash_GEF_star__slash_GEF_star__minus_act_minus_ras_slash_GEF_star__minus_act_minus_ras_cplx => Ras_slash_GTP_minus_Ras + Ras_slash_GEF_star_; Ras_slash_GEF_star__slash_GEF_star__minus_act_minus_ras_2_k3*Ras_slash_GEF_star__slash_GEF_star__minus_act_minus_ras_slash_GEF_star__minus_act_minus_ras_cplx;
    Ras_slash_GEF_star__slash_GEF_star__minus_act_minus_ras_2_k3 = 2e-14 vol_secINV;
  // k1*Ras_slash_GTP_minus_Ras*Ras_slash_GAP-k2*Ras_slash_GAP_slash_GAP_minus_inact_minus_ras_slash_GAP_minus_inact_minus_ras_cplx
  // From Eccleston et al JBC 268(36)pp27012-19 get Kd < 2uM, kcat - 10/sec From Martin et al Cell 63 843-849 1990 get Kd ~ 250 nM, kcat = 20/min I will go with the Eccleston figures as there are good error bars (10%). In general the values are reasonably close. k1 = 1.666e-3/sec, k2 = 1000/sec, k3 = 10/sec (note k3 is rate-limiting) 5 Nov 2002: Changed ratio term to 4 from 100. Now we have k1=8.25e-5; k2=40, k3=10. k3 is still rate-limiting.
  Ras_slash_GAP_slash_GAP_minus_inact_minus_ras_1: Ras_slash_GTP_minus_Ras + Ras_slash_GAP -> Ras_slash_GAP_slash_GAP_minus_inact_minus_ras_slash_GAP_minus_inact_minus_ras_cplx; Ras_slash_GAP_slash_GAP_minus_inact_minus_ras_1_k1*Ras_slash_GTP_minus_Ras*Ras_slash_GAP - Ras_slash_GAP_slash_GAP_minus_inact_minus_ras_1_k2*Ras_slash_GAP_slash_GAP_minus_inact_minus_ras_slash_GAP_minus_inact_minus_ras_cplx;
    Ras_slash_GAP_slash_GAP_minus_inact_minus_ras_1_k1 = 4.94856e-11 vol_uMINVsecINV; Ras_slash_GAP_slash_GAP_minus_inact_minus_ras_1_k2 = 4e-11 vol_secINV;
  // k3*Ras_slash_GAP_slash_GAP_minus_inact_minus_ras_slash_GAP_minus_inact_minus_ras_cplx
  Ras_slash_GAP_slash_GAP_minus_inact_minus_ras_2: Ras_slash_GAP_slash_GAP_minus_inact_minus_ras_slash_GAP_minus_inact_minus_ras_cplx => Ras_slash_GDP_minus_Ras + Ras_slash_GAP; Ras_slash_GAP_slash_GAP_minus_inact_minus_ras_2_k3*Ras_slash_GAP_slash_GAP_minus_inact_minus_ras_slash_GAP_minus_inact_minus_ras_cplx;
    Ras_slash_GAP_slash_GAP_minus_inact_minus_ras_2_k3 = 1e-11 vol_secINV;
  // k1*Ras_slash_GDP_minus_Ras*Ras_slash_CaM_minus_GEF-k2*Ras_slash_CaM_minus_GEF_slash_CaM_minus_GEF_minus_act_minus_ras_slash_CaM_minus_GEF_minus_act_minus_ras_cplx
  // Kinetics same as GEF-bg_act-ras
  Ras_slash_CaM_minus_GEF_slash_CaM_minus_GEF_minus_act_minus_ras_1: Ras_slash_GDP_minus_Ras + Ras_slash_CaM_minus_GEF -> Ras_slash_CaM_minus_GEF_slash_CaM_minus_GEF_minus_act_minus_ras_slash_CaM_minus_GEF_minus_act_minus_ras_cplx; Ras_slash_CaM_minus_GEF_slash_CaM_minus_GEF_minus_act_minus_ras_1_k1*Ras_slash_GDP_minus_Ras*Ras_slash_CaM_minus_GEF - Ras_slash_CaM_minus_GEF_slash_CaM_minus_GEF_minus_act_minus_ras_1_k2*Ras_slash_CaM_minus_GEF_slash_CaM_minus_GEF_minus_act_minus_ras_slash_CaM_minus_GEF_minus_act_minus_ras_cplx;
    Ras_slash_CaM_minus_GEF_slash_CaM_minus_GEF_minus_act_minus_ras_1_k1 = 1.98e-13 vol_uMINVsecINV; Ras_slash_CaM_minus_GEF_slash_CaM_minus_GEF_minus_act_minus_ras_1_k2 = 8e-14 vol_secINV;
  // k3*Ras_slash_CaM_minus_GEF_slash_CaM_minus_GEF_minus_act_minus_ras_slash_CaM_minus_GEF_minus_act_minus_ras_cplx
  Ras_slash_CaM_minus_GEF_slash_CaM_minus_GEF_minus_act_minus_ras_2: Ras_slash_CaM_minus_GEF_slash_CaM_minus_GEF_minus_act_minus_ras_slash_CaM_minus_GEF_minus_act_minus_ras_cplx => Ras_slash_GTP_minus_Ras + Ras_slash_CaM_minus_GEF; Ras_slash_CaM_minus_GEF_slash_CaM_minus_GEF_minus_act_minus_ras_2_k3*Ras_slash_CaM_minus_GEF_slash_CaM_minus_GEF_minus_act_minus_ras_slash_CaM_minus_GEF_minus_act_minus_ras_cplx;
    Ras_slash_CaM_minus_GEF_slash_CaM_minus_GEF_minus_act_minus_ras_2_k3 = 2e-14 vol_secINV;
  // k1*Ras_slash_inact_minus_GEF*PKA_minus_active-k2*PKA_minus_active_slash_PKA_minus_phosph_minus_GEF_slash_PKA_minus_phosph_minus_GEF_cplx
  // This pathway inhibits Ras when cAMP is elevated. See: Hordijk et al JBC 269:5 3534-3538 1994 Burgering et al EMBO J 12:11 4211-4220 1993 The rates are the same as used in PKA-phosph-I1
  PKA_minus_active_slash_PKA_minus_phosph_minus_GEF_1: Ras_slash_inact_minus_GEF + $PKA_minus_active -> PKA_minus_active_slash_PKA_minus_phosph_minus_GEF_slash_PKA_minus_phosph_minus_GEF_cplx; PKA_minus_active_slash_PKA_minus_phosph_minus_GEF_1_k1*Ras_slash_inact_minus_GEF*PKA_minus_active - PKA_minus_active_slash_PKA_minus_phosph_minus_GEF_1_k2*PKA_minus_active_slash_PKA_minus_phosph_minus_GEF_slash_PKA_minus_phosph_minus_GEF_cplx;
    PKA_minus_active_slash_PKA_minus_phosph_minus_GEF_1_k1 = 6e-12 vol_uMINVsecINV; PKA_minus_active_slash_PKA_minus_phosph_minus_GEF_1_k2 = 3.6e-11 vol_secINV;
  // k3*PKA_minus_active_slash_PKA_minus_phosph_minus_GEF_slash_PKA_minus_phosph_minus_GEF_cplx
  PKA_minus_active_slash_PKA_minus_phosph_minus_GEF_2: PKA_minus_active_slash_PKA_minus_phosph_minus_GEF_slash_PKA_minus_phosph_minus_GEF_cplx => Ras_slash_inact_minus_GEF_star_ + $PKA_minus_active; PKA_minus_active_slash_PKA_minus_phosph_minus_GEF_2_k3*PKA_minus_active_slash_PKA_minus_phosph_minus_GEF_slash_PKA_minus_phosph_minus_GEF_cplx;
    PKA_minus_active_slash_PKA_minus_phosph_minus_GEF_2_k3 = 9e-12 vol_secINV;
  // k1*Ras_slash_GDP_minus_Ras*Shc_star__dot_Sos_dot_Grb2-k2*Shc_star__dot_Sos_dot_Grb2_slash_Sos_dot_Ras_GEF_slash_Sos_dot_Ras_GEF_cplx
  Shc_star__dot_Sos_dot_Grb2_slash_Sos_dot_Ras_GEF_1: Ras_slash_GDP_minus_Ras + Shc_star__dot_Sos_dot_Grb2 -> Shc_star__dot_Sos_dot_Grb2_slash_Sos_dot_Ras_GEF_slash_Sos_dot_Ras_GEF_cplx; Shc_star__dot_Sos_dot_Grb2_slash_Sos_dot_Ras_GEF_1_k1*Ras_slash_GDP_minus_Ras*Shc_star__dot_Sos_dot_Grb2 - Shc_star__dot_Sos_dot_Grb2_slash_Sos_dot_Ras_GEF_1_k2*Shc_star__dot_Sos_dot_Grb2_slash_Sos_dot_Ras_GEF_slash_Sos_dot_Ras_GEF_cplx;
    Shc_star__dot_Sos_dot_Grb2_slash_Sos_dot_Ras_GEF_1_k1 = 1.98e-13 vol_uMINVsecINV; Shc_star__dot_Sos_dot_Grb2_slash_Sos_dot_Ras_GEF_1_k2 = 8e-14 vol_secINV;
  // k3*Shc_star__dot_Sos_dot_Grb2_slash_Sos_dot_Ras_GEF_slash_Sos_dot_Ras_GEF_cplx
  Shc_star__dot_Sos_dot_Grb2_slash_Sos_dot_Ras_GEF_2: Shc_star__dot_Sos_dot_Grb2_slash_Sos_dot_Ras_GEF_slash_Sos_dot_Ras_GEF_cplx => Ras_slash_GTP_minus_Ras + Shc_star__dot_Sos_dot_Grb2; Shc_star__dot_Sos_dot_Grb2_slash_Sos_dot_Ras_GEF_2_k3*Shc_star__dot_Sos_dot_Grb2_slash_Sos_dot_Ras_GEF_slash_Sos_dot_Ras_GEF_cplx;
    Shc_star__dot_Sos_dot_Grb2_slash_Sos_dot_Ras_GEF_2_k3 = 2e-14 vol_secINV;
  // k1*EGFR_slash_SHC*EGFR_slash_L_dot_EGFR-k2*EGFR_slash_L_dot_EGFR_slash_phosph_Shc_slash_phosph_Shc_cplx
  // Rates from Okada et al JBC 270:35 pp 20737 1995 Km = 0.70 to 0.85 uM, Vmax = 4.4 to 5.0 pmol/min. Unfortunately the amount of enzyme is not known, the prep is only partially purified. Time course of phosph is max within 30 sec, falls back within 20 min. Ref: Sasaoka et al JBC 269:51 32621 1994. Use k3 = 0.1 based on this tau.
  EGFR_slash_L_dot_EGFR_slash_phosph_Shc_1: EGFR_slash_SHC + EGFR_slash_L_dot_EGFR -> EGFR_slash_L_dot_EGFR_slash_phosph_Shc_slash_phosph_Shc_cplx; EGFR_slash_L_dot_EGFR_slash_phosph_Shc_1_k1*EGFR_slash_SHC*EGFR_slash_L_dot_EGFR - EGFR_slash_L_dot_EGFR_slash_phosph_Shc_1_k2*EGFR_slash_L_dot_EGFR_slash_phosph_Shc_slash_phosph_Shc_cplx;
    EGFR_slash_L_dot_EGFR_slash_phosph_Shc_1_k1 = 1.2e-12 vol_uMINVsecINV; EGFR_slash_L_dot_EGFR_slash_phosph_Shc_1_k2 = 8e-13 vol_secINV;
  // k3*EGFR_slash_L_dot_EGFR_slash_phosph_Shc_slash_phosph_Shc_cplx
  EGFR_slash_L_dot_EGFR_slash_phosph_Shc_2: EGFR_slash_L_dot_EGFR_slash_phosph_Shc_slash_phosph_Shc_cplx => EGFR_slash_SHC_star_ + EGFR_slash_L_dot_EGFR; EGFR_slash_L_dot_EGFR_slash_phosph_Shc_2_k3*EGFR_slash_L_dot_EGFR_slash_phosph_Shc_slash_phosph_Shc_cplx;
    EGFR_slash_L_dot_EGFR_slash_phosph_Shc_2_k3 = 2e-13 vol_secINV;

  // Unit definitions:
  unit vol_secINV = litre / second;
  unit vol_uMINVsecINV = litre^2 / (1e-6 mole * second);
  unit substance = 1e-6 mole;
end
