// SBML level 2 version 1

model testid()
  // Hayer2005_simple_AMPAR_traff_model2
  // This is a highly simplified model of the AMPAR trafficking cycle that exhibits bistability. It is model 2 from Hayer and Bhalla, PLoS 2005. Its main purpose it to illustrate how the bistability arises.
  // This model originates from BioModels Database: A Database of Annotated Published Models (http://www.ebi.ac.uk/biomodels/). It is copyright (c) 2005-2011 The BioModels.net Team.
  // To the extent possible under law, all copyright and related or neighbouring rights to this encoded model have been dedicated to the public domain worldwide. Please refer to CC0 Public Domain Dedication for more information.
  // In summary, you are entitled to use this encoded model in absolutely any manner you deem suitable, verbatim, or with modification, alone or embedded it in a larger context, redistribute it, commercially or not, in a restricted way or not..
  // To cite BioModels Database, please use: Li C, Donizelli M, Rodriguez N, Dharuri H, Endler L, Chelliah V, Li L, He E, Henry A, Stefan MI, Snoep JL, Hucka M, Le Novère N, Laibe C (2010) BioModels Database: An enhanced, curated and annotated resource for published quantitative kinetic models. BMC Syst Biol., 4:92.
  // biomodels.db:MODEL9086628127
  // isDescribedBy pubmed:16110334
  // biomodels.db:MODEL9086628127
  // isDescribedBy pubmed:16110334
  // biomodels.db:MODEL9086628127
  // biomodels.db:MODEL9086628127

  // Compartments:
  compartment default_compartment = 1e-18;
  compartment dendrite_geometry = 5e-15;
  compartment spine_geometry = 9e-17;
  compartment PSD_geometry = 1e-17;

  // Species:
  species Membrane_slash_PP1_minus_active in PSD_geometry = 0.3333333;
  species Membrane_slash_PP1_minus_active_slash_PP1_slash_PP1_cplx in PSD_geometry = 0;
  species Membrane_slash_PP1_minus_active_slash_PP1_sbo_1_sbc__slash_PP1_sbo_1_sbc__cplx in PSD_geometry = 0;
  species Membrane_slash_MR_star_ in PSD_geometry = 0;
  species Membrane_slash_MR in PSD_geometry = 0;
  species Membrane_slash_MR_star__star_ in PSD_geometry = 0;
  species Internal_slash_IR_star__star_ in spine_geometry = 0;
  species Internal_slash_IR in spine_geometry = 0;
  species Internal_slash_IR_star_ in spine_geometry = 0;
  species PKA_minus_active_slash_memb_minus_PKA_minus_act_slash_memb_minus_PKA_minus_act_cplx in spine_geometry = 0;
  species PKA_minus_active_slash_internal_minus_PKA_minus_act_slash_internal_minus_PKA_minus_act_cplx in spine_geometry = 0;
  species PKA_minus_active_slash_memb_minus_PKA_minus_act_sbo_1_sbc__slash_memb_minus_PKA_minus_act_sbo_1_sbc__cplx in spine_geometry = 0;
  species PKA_minus_active_slash_internal_minus_PKA_minus_act_sbo_1_sbc__slash_internal_minus_PKA_minus_act_sbo_1_sbc__cplx in spine_geometry = 0;
  species Anchor in PSD_geometry = 27.33333;
  species $PKA_minus_active in spine_geometry = 0.01851852;
  species $Bulk_AMPAR in dendrite_geometry = 0.003;

  // Reactions:
  // kf*Anchor*Internal_slash_IR_star__star_-kb*Membrane_slash_MR_star__star_
  to_memb: Anchor + Internal_slash_IR_star__star_ -> Membrane_slash_MR_star__star_; to_memb_kf*Anchor*Internal_slash_IR_star__star_ - to_memb_kb*Membrane_slash_MR_star__star_;
    to_memb_kf = 1.08e-19 vol_uMINVsecINV; to_memb_kb = 8e-20 vol_secINV;
  // kf*Membrane_slash_MR-kb*Anchor*Internal_slash_IR
  from_memb: Membrane_slash_MR -> Anchor + Internal_slash_IR; from_memb_kf*Membrane_slash_MR - from_memb_kb*Anchor*Internal_slash_IR;
    from_memb_kf = 8e-21 vol_secINV; from_memb_kb = 0 vol_uMINVsecINV;
  // kf*Bulk_AMPAR-kb*Internal_slash_IR
  exchange: $Bulk_AMPAR -> Internal_slash_IR; exchange_kf*Bulk_AMPAR - exchange_kb*Internal_slash_IR;
    exchange_kf = 9e-17 vol_secINV; exchange_kb = 9e-17 vol_secINV;
  // kf*Internal_slash_IR_star__star_-kb*Bulk_AMPAR
  degradation_sbo_1_sbc_: Internal_slash_IR_star__star_ -> $Bulk_AMPAR; degradation_sbo_1_sbc__kf*Internal_slash_IR_star__star_ - degradation_sbo_1_sbc__kb*Bulk_AMPAR;
    degradation_sbo_1_sbc__kf = 1.8e-21 vol_secINV; degradation_sbo_1_sbc__kb = 0 vol_secINV;
  // kf*Internal_slash_IR_star_-kb*Bulk_AMPAR
  degradation: Internal_slash_IR_star_ -> $Bulk_AMPAR; degradation_kf*Internal_slash_IR_star_ - degradation_kb*Bulk_AMPAR;
    degradation_kf = 1.8e-21 vol_secINV; degradation_kb = 0 vol_secINV;
  // k1*Membrane_slash_MR_star_*Membrane_slash_PP1_minus_active-k2*Membrane_slash_PP1_minus_active_slash_PP1_slash_PP1_cplx
  // Note that Km is halved from 2 to 1, as compared to original detailed model. This is because each substrate represents two subunits of the original detailed model.
  Membrane_slash_PP1_minus_active_slash_PP1_1: Membrane_slash_MR_star_ + Membrane_slash_PP1_minus_active -> Membrane_slash_PP1_minus_active_slash_PP1_slash_PP1_cplx; Membrane_slash_PP1_minus_active_slash_PP1_1_k1*Membrane_slash_MR_star_*Membrane_slash_PP1_minus_active - Membrane_slash_PP1_minus_active_slash_PP1_1_k2*Membrane_slash_PP1_minus_active_slash_PP1_slash_PP1_cplx;
    Membrane_slash_PP1_minus_active_slash_PP1_1_k1 = 1.75002e-17 vol_uMINVsecINV; Membrane_slash_PP1_minus_active_slash_PP1_1_k2 = 1.4e-17 vol_secINV;
  // k3*Membrane_slash_PP1_minus_active_slash_PP1_slash_PP1_cplx
  Membrane_slash_PP1_minus_active_slash_PP1_2: Membrane_slash_PP1_minus_active_slash_PP1_slash_PP1_cplx => Membrane_slash_MR + Membrane_slash_PP1_minus_active; Membrane_slash_PP1_minus_active_slash_PP1_2_k3*Membrane_slash_PP1_minus_active_slash_PP1_slash_PP1_cplx;
    Membrane_slash_PP1_minus_active_slash_PP1_2_k3 = 3.5e-18 vol_secINV;
  // k1*Membrane_slash_MR_star__star_*Membrane_slash_PP1_minus_active-k2*Membrane_slash_PP1_minus_active_slash_PP1_sbo_1_sbc__slash_PP1_sbo_1_sbc__cplx
  // Note halving of Km from 2 to 1. See also notes for internal-PKA-act. Basically, the enzyme must act on two substrate subunits which are lumped in the current simplification of the original detailed model. We thank an anonymous reviewer for pointing this out.
  Membrane_slash_PP1_minus_active_slash_PP1_sbo_1_sbc__1: Membrane_slash_MR_star__star_ + Membrane_slash_PP1_minus_active -> Membrane_slash_PP1_minus_active_slash_PP1_sbo_1_sbc__slash_PP1_sbo_1_sbc__cplx; Membrane_slash_PP1_minus_active_slash_PP1_sbo_1_sbc__1_k1*Membrane_slash_MR_star__star_*Membrane_slash_PP1_minus_active - Membrane_slash_PP1_minus_active_slash_PP1_sbo_1_sbc__1_k2*Membrane_slash_PP1_minus_active_slash_PP1_sbo_1_sbc__slash_PP1_sbo_1_sbc__cplx;
    Membrane_slash_PP1_minus_active_slash_PP1_sbo_1_sbc__1_k1 = 1.75002e-17 vol_uMINVsecINV; Membrane_slash_PP1_minus_active_slash_PP1_sbo_1_sbc__1_k2 = 1.4e-17 vol_secINV;
  // k3*Membrane_slash_PP1_minus_active_slash_PP1_sbo_1_sbc__slash_PP1_sbo_1_sbc__cplx
  Membrane_slash_PP1_minus_active_slash_PP1_sbo_1_sbc__2: Membrane_slash_PP1_minus_active_slash_PP1_sbo_1_sbc__slash_PP1_sbo_1_sbc__cplx => Membrane_slash_MR_star_ + Membrane_slash_PP1_minus_active; Membrane_slash_PP1_minus_active_slash_PP1_sbo_1_sbc__2_k3*Membrane_slash_PP1_minus_active_slash_PP1_sbo_1_sbc__slash_PP1_sbo_1_sbc__cplx;
    Membrane_slash_PP1_minus_active_slash_PP1_sbo_1_sbc__2_k3 = 3.5e-18 vol_secINV;
  // k1*Membrane_slash_MR*PKA_minus_active-k2*PKA_minus_active_slash_memb_minus_PKA_minus_act_slash_memb_minus_PKA_minus_act_cplx
  // Note halving of Km. See notes for internal-PKA-act enzymatic step.
  PKA_minus_active_slash_memb_minus_PKA_minus_act_1: Membrane_slash_MR + $PKA_minus_active -> PKA_minus_active_slash_memb_minus_PKA_minus_act_slash_memb_minus_PKA_minus_act_cplx; PKA_minus_active_slash_memb_minus_PKA_minus_act_1_k1*Membrane_slash_MR*PKA_minus_active - PKA_minus_active_slash_memb_minus_PKA_minus_act_1_k2*PKA_minus_active_slash_memb_minus_PKA_minus_act_slash_memb_minus_PKA_minus_act_cplx;
    PKA_minus_active_slash_memb_minus_PKA_minus_act_1_k1 = 8.0001e-17 vol_uMINVsecINV; PKA_minus_active_slash_memb_minus_PKA_minus_act_1_k2 = 2.16e-15 vol_secINV;
  // k3*PKA_minus_active_slash_memb_minus_PKA_minus_act_slash_memb_minus_PKA_minus_act_cplx
  PKA_minus_active_slash_memb_minus_PKA_minus_act_2: PKA_minus_active_slash_memb_minus_PKA_minus_act_slash_memb_minus_PKA_minus_act_cplx => Membrane_slash_MR_star_ + $PKA_minus_active; PKA_minus_active_slash_memb_minus_PKA_minus_act_2_k3*PKA_minus_active_slash_memb_minus_PKA_minus_act_slash_memb_minus_PKA_minus_act_cplx;
    PKA_minus_active_slash_memb_minus_PKA_minus_act_2_k3 = 5.4e-16 vol_secINV;
  // k1*Internal_slash_IR*PKA_minus_active-k2*PKA_minus_active_slash_internal_minus_PKA_minus_act_slash_internal_minus_PKA_minus_act_cplx
  // Note that Km is halved from the main model, from 7.5 to 3.75. This is because here we lump two subunits into one, thus double the effective substrate conc that the enzyme must deal with. We thank an anonymous reviewer for pointing this out.
  PKA_minus_active_slash_internal_minus_PKA_minus_act_1: Internal_slash_IR + $PKA_minus_active -> PKA_minus_active_slash_internal_minus_PKA_minus_act_slash_internal_minus_PKA_minus_act_cplx; PKA_minus_active_slash_internal_minus_PKA_minus_act_1_k1*Internal_slash_IR*PKA_minus_active - PKA_minus_active_slash_internal_minus_PKA_minus_act_1_k2*PKA_minus_active_slash_internal_minus_PKA_minus_act_slash_internal_minus_PKA_minus_act_cplx;
    PKA_minus_active_slash_internal_minus_PKA_minus_act_1_k1 = 7.20009e-16 vol_uMINVsecINV; PKA_minus_active_slash_internal_minus_PKA_minus_act_1_k2 = 2.16e-15 vol_secINV;
  // k3*PKA_minus_active_slash_internal_minus_PKA_minus_act_slash_internal_minus_PKA_minus_act_cplx
  PKA_minus_active_slash_internal_minus_PKA_minus_act_2: PKA_minus_active_slash_internal_minus_PKA_minus_act_slash_internal_minus_PKA_minus_act_cplx => Internal_slash_IR_star_ + $PKA_minus_active; PKA_minus_active_slash_internal_minus_PKA_minus_act_2_k3*PKA_minus_active_slash_internal_minus_PKA_minus_act_slash_internal_minus_PKA_minus_act_cplx;
    PKA_minus_active_slash_internal_minus_PKA_minus_act_2_k3 = 5.4e-16 vol_secINV;
  // k1*Membrane_slash_MR_star_*PKA_minus_active-k2*PKA_minus_active_slash_memb_minus_PKA_minus_act_sbo_1_sbc__slash_memb_minus_PKA_minus_act_sbo_1_sbc__cplx
  // Note halving of Km. See notes for internal-PKA-act enzyme step.
  PKA_minus_active_slash_memb_minus_PKA_minus_act_sbo_1_sbc__1: Membrane_slash_MR_star_ + $PKA_minus_active -> PKA_minus_active_slash_memb_minus_PKA_minus_act_sbo_1_sbc__slash_memb_minus_PKA_minus_act_sbo_1_sbc__cplx; PKA_minus_active_slash_memb_minus_PKA_minus_act_sbo_1_sbc__1_k1*Membrane_slash_MR_star_*PKA_minus_active - PKA_minus_active_slash_memb_minus_PKA_minus_act_sbo_1_sbc__1_k2*PKA_minus_active_slash_memb_minus_PKA_minus_act_sbo_1_sbc__slash_memb_minus_PKA_minus_act_sbo_1_sbc__cplx;
    PKA_minus_active_slash_memb_minus_PKA_minus_act_sbo_1_sbc__1_k1 = 8.0001e-17 vol_uMINVsecINV; PKA_minus_active_slash_memb_minus_PKA_minus_act_sbo_1_sbc__1_k2 = 2.16e-15 vol_secINV;
  // k3*PKA_minus_active_slash_memb_minus_PKA_minus_act_sbo_1_sbc__slash_memb_minus_PKA_minus_act_sbo_1_sbc__cplx
  PKA_minus_active_slash_memb_minus_PKA_minus_act_sbo_1_sbc__2: PKA_minus_active_slash_memb_minus_PKA_minus_act_sbo_1_sbc__slash_memb_minus_PKA_minus_act_sbo_1_sbc__cplx => Membrane_slash_MR_star__star_ + $PKA_minus_active; PKA_minus_active_slash_memb_minus_PKA_minus_act_sbo_1_sbc__2_k3*PKA_minus_active_slash_memb_minus_PKA_minus_act_sbo_1_sbc__slash_memb_minus_PKA_minus_act_sbo_1_sbc__cplx;
    PKA_minus_active_slash_memb_minus_PKA_minus_act_sbo_1_sbc__2_k3 = 5.4e-16 vol_secINV;
  // k1*Internal_slash_IR_star_*PKA_minus_active-k2*PKA_minus_active_slash_internal_minus_PKA_minus_act_sbo_1_sbc__slash_internal_minus_PKA_minus_act_sbo_1_sbc__cplx
  // Note that Km is halved from the detailed model, as the reaction represents enzyme activity on 2 subunits.
  PKA_minus_active_slash_internal_minus_PKA_minus_act_sbo_1_sbc__1: Internal_slash_IR_star_ + $PKA_minus_active -> PKA_minus_active_slash_internal_minus_PKA_minus_act_sbo_1_sbc__slash_internal_minus_PKA_minus_act_sbo_1_sbc__cplx; PKA_minus_active_slash_internal_minus_PKA_minus_act_sbo_1_sbc__1_k1*Internal_slash_IR_star_*PKA_minus_active - PKA_minus_active_slash_internal_minus_PKA_minus_act_sbo_1_sbc__1_k2*PKA_minus_active_slash_internal_minus_PKA_minus_act_sbo_1_sbc__slash_internal_minus_PKA_minus_act_sbo_1_sbc__cplx;
    PKA_minus_active_slash_internal_minus_PKA_minus_act_sbo_1_sbc__1_k1 = 7.20009e-16 vol_uMINVsecINV; PKA_minus_active_slash_internal_minus_PKA_minus_act_sbo_1_sbc__1_k2 = 2.16e-15 vol_secINV;
  // k3*PKA_minus_active_slash_internal_minus_PKA_minus_act_sbo_1_sbc__slash_internal_minus_PKA_minus_act_sbo_1_sbc__cplx
  PKA_minus_active_slash_internal_minus_PKA_minus_act_sbo_1_sbc__2: PKA_minus_active_slash_internal_minus_PKA_minus_act_sbo_1_sbc__slash_internal_minus_PKA_minus_act_sbo_1_sbc__cplx => Internal_slash_IR_star__star_ + $PKA_minus_active; PKA_minus_active_slash_internal_minus_PKA_minus_act_sbo_1_sbc__2_k3*PKA_minus_active_slash_internal_minus_PKA_minus_act_sbo_1_sbc__slash_internal_minus_PKA_minus_act_sbo_1_sbc__cplx;
    PKA_minus_active_slash_internal_minus_PKA_minus_act_sbo_1_sbc__2_k3 = 5.4e-16 vol_secINV;

  // Unit definitions:
  unit vol_secINV = litre / second;
  unit vol_uMINVsecINV = litre^2 / (1e-6 mole * second);
  unit substance = 1e-6 mole;
end
