// SBML level 2 version 1

model testid()
  // Hayer2005_CaMKII_model3
  // This is the complete model of CaMKII bistability, model 3. It exhibits bistability in CaMKII activation due to autophosphorylation at the PSD and local saturation of PP1. This version of model 3 includes PKA regulatory input. This has little effect on the deterministic calculations, but the PKA pathway introduces a lot of noise which causes a difference in stochastic runs.
  // This model originates from BioModels Database: A Database of Annotated Published Models (http://www.ebi.ac.uk/biomodels/). It is copyright (c) 2005-2011 The BioModels.net Team.
  // To the extent possible under law, all copyright and related or neighbouring rights to this encoded model have been dedicated to the public domain worldwide. Please refer to CC0 Public Domain Dedication for more information.
  // In summary, you are entitled to use this encoded model in absolutely any manner you deem suitable, verbatim, or with modification, alone or embedded it in a larger context, redistribute it, commercially or not, in a restricted way or not..
  // To cite BioModels Database, please use: Li C, Donizelli M, Rodriguez N, Dharuri H, Endler L, Chelliah V, Li L, He E, Henry A, Stefan MI, Snoep JL, Hucka M, Le Novère N, Laibe C (2010) BioModels Database: An enhanced, curated and annotated resource for published quantitative kinetic models. BMC Syst Biol., 4:92.
  // biomodels.db:MODEL9086953089
  // isDescribedBy pubmed:16110334
  // biomodels.db:MODEL9086953089
  // isDescribedBy pubmed:16110334
  // biomodels.db:MODEL9086953089
  // biomodels.db:MODEL9086953089

  // Compartments:
  compartment default_compartment = 1e-18;
  compartment geometry = 9e-17;
  compartment geometry_sbo_1_sbc_ = 1e-17;
  compartment geometry_sbo_2_sbc_ = 5e-15;

  // Species:
  species CaM_minus_Ca4 in geometry = 0;
  species PP1_minus_active in geometry = 1.8;
  species PP1_minus_active_slash_Deph_minus_thr286_slash_Deph_minus_thr286_cplx in geometry = 0;
  species PP1_minus_active_slash_Deph_minus_thr286b_slash_Deph_minus_thr286b_cplx in geometry = 0;
  species PP1_minus_active_slash_Deph_minus_thr305_slash_Deph_minus_thr305_cplx in geometry = 0;
  species PP1_minus_active_slash_Deph_minus_thr286c_slash_Deph_minus_thr286c_cplx in geometry = 0;
  species PP1_minus_active_slash_Deph_minus_thr305a_slash_Deph_minus_thr305a_cplx in geometry = 0;
  species Ca in geometry = 0.08;
  species PKA_minus_active in geometry = 0;
  species PKA_minus_active_slash_PKA_minus_phosph_minus_I1_slash_PKA_minus_phosph_minus_I1_cplx in geometry = 0;
  species PKA_minus_active_slash_PKA_minus_phosph_minus_I1_PSD_slash_PKA_minus_phosph_minus_I1_PSD_cplx in geometry = 0;
  species PKA_minus_active_slash_phosph_minus_PDE_slash_phosph_minus_PDE_cplx in geometry = 0;
  species CaMKII_slash_CaMKII in geometry = 20;
  species CaMKII_slash_CaMKII_minus_CaM in geometry = 0;
  species CaMKII_slash_CaMKII_minus_thr286_star__minus_CaM in geometry = 0;
  species CaMKII_slash_CaMKII_star__star__star_ in geometry = 0;
  species CaMKII_slash_CaMKII_minus_thr286 in geometry = 0;
  species CaMKII_slash_tot_CaM_CaMKII_slash_CaM_act_305_slash_CaM_act_305_cplx in geometry = 6.326296e-11;
  species CaMKII_slash_tot_CaM_CaMKII_slash_CaM_act_286_slash_CaM_act_286_cplx in geometry = 2.44537e-8;
  species CaMKII_slash_tot_autonomous_CaMKII_slash_auton_305_slash_auton_305_cplx in geometry = 4.900556e-8;
  species CaMKII_slash_tot_autonomous_CaMKII_slash_auton_286_slash_auton_286_cplx in geometry = 1.894444e-5;
  species CaMKII_slash_CaMK_minus_thr305 in geometry = 0;
  species CaM_slash_CaM in geometry = 26.33333;
  species CaM_slash_CaM_minus_PSD in geometry_sbo_1_sbc_ = 26.33333;
  species CaM_minus_Ca3 in geometry = 0;
  species CaM_minus_TR2_minus_Ca2 in geometry = 0;
  species PP1_slash_I1 in geometry = 1.8;
  species PP1_slash_I1_star_ in geometry = 0;
  species PP1_slash_PP1_minus_I1_star_ in geometry = 0;
  species PP1_slash_PP1_minus_I1 in geometry = 0;
  species PP2A in geometry = 0.1111111;
  species PP2A_slash_PP2A_minus_dephosph_minus_I1_slash_PP2A_minus_dephosph_minus_I1_cplx in geometry = 1.993333e-6;
  species PP2A_slash_PP2A_minus_dephosph_minus_PP1_minus_I_star__slash_PP2A_minus_dephosph_minus_PP1_minus_I_star__cplx in geometry = 0.00691;
  species PP2A_slash_PP2A_minus_dephosph_minus_I1_PSD_slash_PP2A_minus_dephosph_minus_I1_PSD_cplx in geometry = 2.215556e-7;
  species PP2A_slash_PP2A_minus_dephosph_minus_PP1_minus_I_star__PSD_slash_PP2A_minus_dephosph_minus_PP1_minus_I_star__PSD_cplx in geometry = 0.001279074;
  species CaNAB_minus_Ca4 in geometry = 0;
  species CaNAB_minus_Ca4_slash_dephosph_inhib1_noCaM_slash_dephosph_inhib1_noCaM_cplx in geometry = 0;
  species CaNAB_minus_Ca4_slash_dephosph_inhib1_noCaM_PSD_slash_dephosph_inhib1_noCaM_PSD_cplx in geometry = 0;
  species PP2B_slash_CaNAB in geometry = 1;
  species PP2B_slash_CaNAB_minus_Ca2 in geometry = 0;
  species CaMKII_minus_thr286_minus_CaM_minus_PSD in geometry_sbo_1_sbc_ = 0;
  species CaMKII_minus_CaM_minus_PSD in geometry_sbo_1_sbc_ = 0;
  species CaMKII_minus_thr286_minus_PSD in geometry_sbo_1_sbc_ = 0;
  species CaMKII_minus_PSD in geometry_sbo_1_sbc_ = 0;
  species CaMKII_star__star__star__minus_PSD in geometry_sbo_1_sbc_ = 0;
  species tot_minus_auto_minus_PSD_slash_auton_minus_305_minus_PSD_slash_auton_minus_305_minus_PSD_cplx in geometry_sbo_1_sbc_ = 0;
  species tot_minus_auto_minus_PSD_slash_auton_minus_286_minus_PSD_slash_auton_minus_286_minus_PSD_cplx in geometry_sbo_1_sbc_ = 0;
  species tot_minus_auto_minus_PSD_slash_auton_minus_autoph_slash_auton_minus_autoph_cplx in geometry_sbo_1_sbc_ = 0;
  species CaM_minus_TR2_minus_Ca2_minus_PSD in geometry_sbo_1_sbc_ = 0;
  species CaM_minus_Ca3_minus_PSD in geometry_sbo_1_sbc_ = 0.002545833;
  species CaM_minus_Ca4_minus_PSD in geometry_sbo_1_sbc_ = 0;
  species Ca_minus_PSD in geometry_sbo_1_sbc_ = 0.08;
  species PP1_PSD_slash_I1 in geometry_sbo_1_sbc_ = 4;
  species PP1_PSD_slash_I1_star_ in geometry_sbo_1_sbc_ = 0;
  species PP1_PSD_slash_PP1_minus_I1_star_ in geometry_sbo_1_sbc_ = 0;
  species PP1_PSD_slash_PP1_minus_I1 in geometry_sbo_1_sbc_ = 0;
  species PP1_minus_active_PSD in geometry_sbo_1_sbc_ = 4;
  species PP1_minus_active_PSD_slash_Deph_minus_thr286_slash_Deph_minus_thr286_cplx in geometry_sbo_1_sbc_ = 0;
  species PP1_minus_active_PSD_slash_Deph_minus_thr286b_slash_Deph_minus_thr286b_cplx in geometry_sbo_1_sbc_ = 0;
  species PP1_minus_active_PSD_slash_Deph_minus_thr305_slash_Deph_minus_thr305_cplx in geometry_sbo_1_sbc_ = 0;
  species PP1_minus_active_PSD_slash_Deph_minus_thr286c_slash_Deph_minus_thr286c_cplx in geometry_sbo_1_sbc_ = 0;
  species PP1_minus_active_PSD_slash_Deph_minus_thr305a_slash_Deph_minus_thr305a_cplx in geometry_sbo_1_sbc_ = 0;
  species NMDAR in geometry_sbo_1_sbc_ = 120;
  species CaM_Ca_n_minus_CaNAB in geometry = 0;
  species CaM_Ca_n_minus_CaNAB_slash_dephosph_inhib1_slash_dephosph_inhib1_cplx in geometry = 0;
  species CaM_Ca_n_minus_CaNAB_slash_dephosph_minus_PP1_minus_I_star__slash_dephosph_minus_PP1_minus_I_star__cplx in geometry = 0;
  species CaM_Ca_n_minus_CaNAB_slash_dephosph_inhib1_PSD_slash_dephosph_inhib1_PSD_cplx in geometry = 0;
  species CaM_Ca_n_minus_CaNAB_slash_dephosph_minus_PP1_minus_I_star__PSD_slash_dephosph_minus_PP1_minus_I_star__PSD_cplx in geometry = 0;
  species basal_CaMKII_PSD in geometry_sbo_1_sbc_ = 2;
  species tot_minus_CaM_minus_CaMKII_minus_PSD_slash_CaM_minus_act_minus_305_minus_PSD_slash_CaM_minus_act_minus_305_minus_PSD_cplx in geometry_sbo_1_sbc_ = 0;
  species tot_minus_CaM_minus_CaMKII_minus_PSD_slash_CaM_minus_act_minus_286_minus_PSD_slash_CaM_minus_act_minus_286_minus_PSD_cplx in geometry_sbo_1_sbc_ = 0;
  species tot_minus_CaM_minus_CaMKII_minus_PSD_slash_CaM_act_autoph_slash_CaM_act_autoph_cplx in geometry_sbo_1_sbc_ = 0;
  species cAMP in geometry = 0;
  species AC_slash_AC1_minus_CaM in geometry = 0;
  species AC_slash_AC1 in geometry = 0.07407407;
  species AC_slash_AC2_star_ in geometry = 0;
  species AC_slash_AC2 in geometry = 0.07407407;
  species AC_slash_AMP in geometry = 0;
  species AC_slash_cAMP_minus_PDE in geometry = 0.5555556;
  species AC_slash_cAMP_minus_PDE_slash_PDE_slash_PDE_cplx in geometry = 0;
  species AC_slash_cAMP_minus_PDE_star_ in geometry = 0;
  species AC_slash_cAMP_minus_PDE_star__slash_PDE_star__slash_PDE_star__cplx in geometry = 0;
  species AC_slash_PDE1 in geometry = 2.592593;
  species AC_slash_PDE1_slash_PDE1_slash_PDE1_cplx in geometry = 0;
  species AC_slash_CaM_dot_PDE1 in geometry = 0;
  species AC_slash_CaM_dot_PDE1_slash_CaM_dot_PDE1_slash_CaM_dot_PDE1_cplx in geometry = 0;
  species AC_slash_cAMP_in_dend in geometry_sbo_2_sbc_ = 0;
  species PKA_slash_R2C2 in geometry = 0.5;
  species PKA_slash_R2C2_minus_cAMP in geometry = 0;
  species PKA_slash_R2C2_minus_cAMP2 in geometry = 0;
  species PKA_slash_R2C2_minus_cAMP3 in geometry = 0;
  species PKA_slash_R2C2_minus_cAMP4 in geometry = 0;
  species PKA_slash_R2C_minus_cAMP4 in geometry = 0;
  species PKA_slash_R2_minus_cAMP4 in geometry = 0;
  species PKA_slash_PKA_minus_inhibitor in geometry = 0.2592593;
  species PKA_slash_inhibited_minus_PKA in geometry = 0;
  species PKC_minus_active in geometry = 0.1;
  species PKC_minus_active_slash_phosph_minus_AC2_slash_phosph_minus_AC2_cplx in geometry = 4.007037e-5;
  species CaMKII_minus_thr305_minus_PSD in geometry_sbo_1_sbc_ = 0;
  species $basal_CaMKII_cyt in geometry = 2;
  species $Ca_control_cyt in geometry = 0.08;
  species $Ca_control_PSD in geometry_sbo_1_sbc_ = 0.08;
  species $basal_CaMKII_PSD_control in geometry_sbo_1_sbc_ = 2;
  // ATP is present in all cells between 2 and 10 mM. See Lehninger
  species $AC_slash_ATP in geometry = 2000;
  species $PKC_minus_control in geometry = 0.1;
  species $CaMKII_slash_tot_CaM_CaMKII in geometry;
  species $CaMKII_slash_tot_autonomous_CaMKII in geometry;
  species $tot_minus_auto_minus_PSD in geometry_sbo_1_sbc_;
  species num_286P_minus_PSD in geometry_sbo_1_sbc_;
  species actCaMKII_minus_PSD in geometry_sbo_1_sbc_;
  species tot_CaMKII_PSD in geometry_sbo_1_sbc_;
  species tot_CaMKII_cyt in geometry;
  species act_CaMKII_cyt in geometry;
  species $tot_minus_CaM_minus_CaMKII_minus_PSD in geometry_sbo_1_sbc_;

  // Assignment rules:
  CaMKII_slash_tot_CaM_CaMKII := CaMKII_slash_CaMKII_minus_CaM + CaMKII_slash_CaMKII_minus_thr286_star__minus_CaM;
  CaMKII_slash_tot_autonomous_CaMKII := CaMKII_slash_CaMKII_minus_thr286 + CaMKII_slash_CaMKII_star__star__star_ + basal_CaMKII_cyt;
  tot_minus_auto_minus_PSD := CaMKII_minus_thr286_minus_PSD + CaMKII_star__star__star__minus_PSD + basal_CaMKII_PSD;
  num_286P_minus_PSD := CaMKII_minus_thr286_minus_CaM_minus_PSD + CaMKII_minus_thr286_minus_PSD;
  actCaMKII_minus_PSD := CaMKII_minus_thr286_minus_CaM_minus_PSD + CaMKII_minus_CaM_minus_PSD + tot_minus_auto_minus_PSD;
  tot_CaMKII_PSD := actCaMKII_minus_PSD + CaMKII_minus_PSD + CaMKII_minus_thr305_minus_PSD;
  tot_CaMKII_cyt := CaMKII_slash_CaMKII_minus_CaM + CaMKII_slash_CaMKII_minus_thr286_star__minus_CaM + CaMKII_slash_CaMKII_minus_thr286 + CaMKII_slash_CaMKII_star__star__star_ + CaMKII_slash_CaMK_minus_thr305 + CaMKII_slash_CaMKII + basal_CaMKII_cyt;
  act_CaMKII_cyt := CaMKII_slash_tot_CaM_CaMKII + CaMKII_slash_tot_autonomous_CaMKII;
  tot_minus_CaM_minus_CaMKII_minus_PSD := CaMKII_minus_thr286_minus_CaM_minus_PSD + CaMKII_minus_CaM_minus_PSD;

  // Reactions:
  // kf*CaM_minus_Ca4*CaMKII_slash_CaMKII-kb*CaMKII_slash_CaMKII_minus_CaM
  // This is tricky. There is some cooperativity here arising from interactions between the subunits of the CAMKII holoenzyme. However, the stoichiometry is 1. Kb/Kf = 6e4 #/cell. Rate is fast (see Hanson et al Neuron 12 943-956 1994) so lets say kb = 10. This gives kf = 1.6667e-4 H&S AnnRev Biochem 92 give tau for dissoc as 0.2 sec at low Ca, 0.4 at high. Low Ca = 100 nM = physiol.
  CaMKII_slash_CaMKII_minus_bind_minus_CaM: CaM_minus_Ca4 + CaMKII_slash_CaMKII -> CaMKII_slash_CaMKII_minus_CaM; CaMKII_slash_CaMKII_minus_bind_minus_CaM_kf*CaM_minus_Ca4*CaMKII_slash_CaMKII - CaMKII_slash_CaMKII_minus_bind_minus_CaM_kb*CaMKII_slash_CaMKII_minus_CaM;
    CaMKII_slash_CaMKII_minus_bind_minus_CaM_kf = 4.4999712e-15 vol_uMINVsecINV; CaMKII_slash_CaMKII_minus_bind_minus_CaM_kb = 4.5e-16 vol_secINV;
  // kf*CaMKII_slash_CaMKII_minus_thr286*CaM_minus_Ca4-kb*CaMKII_slash_CaMKII_minus_thr286_star__minus_CaM
  // Affinity is up 1000X. Time to release is about 20 sec, so the kb is OK at 0.1 This makes Kf around 1.6666e-3
  CaMKII_slash_CaMK_minus_thr286_minus_bind_minus_CaM: CaMKII_slash_CaMKII_minus_thr286 + CaM_minus_Ca4 -> CaMKII_slash_CaMKII_minus_thr286_star__minus_CaM; CaMKII_slash_CaMK_minus_thr286_minus_bind_minus_CaM_kf*CaMKII_slash_CaMKII_minus_thr286*CaM_minus_Ca4 - CaMKII_slash_CaMK_minus_thr286_minus_bind_minus_CaM_kb*CaMKII_slash_CaMKII_minus_thr286_star__minus_CaM;
    CaMKII_slash_CaMK_minus_thr286_minus_bind_minus_CaM_kf = 9.001692e-14 vol_uMINVsecINV; CaMKII_slash_CaMK_minus_thr286_minus_bind_minus_CaM_kb = 9e-18 vol_secINV;
  // kf*CaM_slash_CaM*Ca^2-kb*CaM_minus_TR2_minus_Ca2
  // Lets use the fast rate consts here. Since the rates are so different, I am not sure whether the order is relevant. These correspond to the TR2C fragment. We use the Martin et al rates here, plus the Drabicowski binding consts. All are scaled by 3X to cell temp. kf = 2e-10 kb = 72 Stemmer & Klee: K1=.9, K2=1.1. Assume 1.0uM for both. kb/kf=3.6e11. If kb=72, kf = 2e-10 (Exactly the same !)....
  CaM_slash_CaM_minus_TR2_minus_bind_minus_Ca: CaM_slash_CaM + 2 Ca -> CaM_minus_TR2_minus_Ca2; CaM_slash_CaM_minus_TR2_minus_bind_minus_Ca_kf*CaM_slash_CaM*Ca^2 - CaM_slash_CaM_minus_TR2_minus_bind_minus_Ca_kb*CaM_minus_TR2_minus_Ca2;
    CaM_slash_CaM_minus_TR2_minus_bind_minus_Ca_kf = 6.47990604e-15 vol_uMINV2secINV; CaM_slash_CaM_minus_TR2_minus_bind_minus_Ca_kb = 6.48e-15 vol_secINV;
  // kf*CaM_minus_TR2_minus_Ca2*Ca-kb*CaM_minus_Ca3
  // K3 = 21.5, K4 = 2.8. Assuming that the K4 step happens first, we get kb/kf = 2.8 uM = 1.68e6 so kf =6e-6 assuming kb = 10
  CaM_slash_CaM_minus_TR2_minus_Ca2_minus_bind_minus_Ca: CaM_minus_TR2_minus_Ca2 + Ca -> CaM_minus_Ca3; CaM_slash_CaM_minus_TR2_minus_Ca2_minus_bind_minus_Ca_kf*CaM_minus_TR2_minus_Ca2*Ca - CaM_slash_CaM_minus_TR2_minus_Ca2_minus_bind_minus_Ca_kb*CaM_minus_Ca3;
    CaM_slash_CaM_minus_TR2_minus_Ca2_minus_bind_minus_Ca_kf = 3.2400162e-16 vol_uMINVsecINV; CaM_slash_CaM_minus_TR2_minus_Ca2_minus_bind_minus_Ca_kb = 9e-16 vol_secINV;
  // kf*CaM_slash_CaM_minus_PSD*Ca_minus_PSD^2-kb*CaM_minus_TR2_minus_Ca2_minus_PSD
  // Lets use the fast rate consts here. Since the rates are so different, I am not sure whether the order is relevant. These correspond to the TR2C fragment. We use the Martin et al rates here, plus the Drabicowski binding consts. All are scaled by 3X to cell temp. kf = 2e-10 kb = 72 Stemmer & Klee: K1=.9, K2=1.1. Assume 1.0uM for both. kb/kf=3.6e11. If kb=72, kf = 2e-10 (Exactly the same !)....
  CaM_slash_CaM_minus_TR2_minus_bind_minus_Ca_minus_PSD: CaM_slash_CaM_minus_PSD + 2 Ca_minus_PSD -> CaM_minus_TR2_minus_Ca2_minus_PSD; CaM_slash_CaM_minus_TR2_minus_bind_minus_Ca_minus_PSD_kf*CaM_slash_CaM_minus_PSD*Ca_minus_PSD^2 - CaM_slash_CaM_minus_TR2_minus_bind_minus_Ca_minus_PSD_kb*CaM_minus_TR2_minus_Ca2_minus_PSD;
    CaM_slash_CaM_minus_TR2_minus_bind_minus_Ca_minus_PSD_kf = 7.2e-16 vol_uMINV2secINV; CaM_slash_CaM_minus_TR2_minus_bind_minus_Ca_minus_PSD_kb = 7.2e-16 vol_secINV;
  // kf*CaM_minus_TR2_minus_Ca2_minus_PSD*Ca_minus_PSD-kb*CaM_minus_Ca3_minus_PSD
  // K3 = 21.5, K4 = 2.8. Assuming that the K4 step happens first, we get kb/kf = 2.8 uM = 1.68e6 so kf =6e-6 assuming kb = 10
  CaM_slash_CaM_minus_TR2_minus_Ca2_minus_bind_minus_Ca_minus_PSD: CaM_minus_TR2_minus_Ca2_minus_PSD + Ca_minus_PSD -> CaM_minus_Ca3_minus_PSD; CaM_slash_CaM_minus_TR2_minus_Ca2_minus_bind_minus_Ca_minus_PSD_kf*CaM_minus_TR2_minus_Ca2_minus_PSD*Ca_minus_PSD - CaM_slash_CaM_minus_TR2_minus_Ca2_minus_bind_minus_Ca_minus_PSD_kb*CaM_minus_Ca3_minus_PSD;
    CaM_slash_CaM_minus_TR2_minus_Ca2_minus_bind_minus_Ca_minus_PSD_kf = 3.6e-17 vol_uMINVsecINV; CaM_slash_CaM_minus_TR2_minus_Ca2_minus_bind_minus_Ca_minus_PSD_kb = 1e-16 vol_secINV;
  // kf*CaM_minus_Ca3_minus_PSD*Ca_minus_PSD-kb*CaM_minus_Ca4_minus_PSD
  // Use K3 = 21.5 uM here from Stemmer and Klee table 3. kb/kf =21.5 * 6e5 so kf = 7.75e-7, kb = 10
  CaM_slash_CaM_minus_Ca3_minus_bind_minus_Ca_minus_PSD: CaM_minus_Ca3_minus_PSD + Ca_minus_PSD -> CaM_minus_Ca4_minus_PSD; CaM_slash_CaM_minus_Ca3_minus_bind_minus_Ca_minus_PSD_kf*CaM_minus_Ca3_minus_PSD*Ca_minus_PSD - CaM_slash_CaM_minus_Ca3_minus_bind_minus_Ca_minus_PSD_kb*CaM_minus_Ca4_minus_PSD;
    CaM_slash_CaM_minus_Ca3_minus_bind_minus_Ca_minus_PSD_kf = 4.65012e-18 vol_uMINVsecINV; CaM_slash_CaM_minus_Ca3_minus_bind_minus_Ca_minus_PSD_kb = 1e-16 vol_secINV;
  // kf*PP1_slash_I1_star_*PP1_minus_active-kb*PP1_slash_PP1_minus_I1_star_
  // K inhib = 1nM from Cohen Ann Rev Bioch 1989, 4 nM from Foukes et al Assume 2 nM. kf /kb = 8.333e-4
  PP1_slash_Inact_minus_PP1: PP1_slash_I1_star_ + PP1_minus_active -> PP1_slash_PP1_minus_I1_star_; PP1_slash_Inact_minus_PP1_kf*PP1_slash_I1_star_*PP1_minus_active - PP1_slash_Inact_minus_PP1_kb*PP1_slash_PP1_minus_I1_star_;
    PP1_slash_Inact_minus_PP1_kf = 4.4998254e-14 vol_uMINVsecINV; PP1_slash_Inact_minus_PP1_kb = 9e-18 vol_secINV;
  // kf*PP1_slash_PP1_minus_I1-kb*PP1_minus_active*PP1_slash_I1
  // Let us assume that the equil in this case is very far over to the right. This is probably safe.
  PP1_slash_dissoc_minus_PP1_minus_I1: PP1_slash_PP1_minus_I1 -> PP1_minus_active + PP1_slash_I1; PP1_slash_dissoc_minus_PP1_minus_I1_kf*PP1_slash_PP1_minus_I1 - PP1_slash_dissoc_minus_PP1_minus_I1_kb*PP1_minus_active*PP1_slash_I1;
    PP1_slash_dissoc_minus_PP1_minus_I1_kf = 9e-17 vol_secINV; PP1_slash_dissoc_minus_PP1_minus_I1_kb = 0 vol_uMINVsecINV;
  // kf*Ca^2*PP2B_slash_CaNAB_minus_Ca2-kb*CaNAB_minus_Ca4
  // This process is probably much more complicated and involves CaM. However, as I can\'t find detailed info I am bundling this into a single step. Based on Steemer and Klee pg 6863, the Kact is 0.5 uM. kf/kb = 1/(0.5 * 6e5)^2 = 1.11e-11
  PP2B_slash_Ca_minus_bind_minus_CaNAB_minus_Ca2: 2 Ca + PP2B_slash_CaNAB_minus_Ca2 -> CaNAB_minus_Ca4; PP2B_slash_Ca_minus_bind_minus_CaNAB_minus_Ca2_kf*Ca^2*PP2B_slash_CaNAB_minus_Ca2 - PP2B_slash_Ca_minus_bind_minus_CaNAB_minus_Ca2_kb*CaNAB_minus_Ca4;
    PP2B_slash_Ca_minus_bind_minus_CaNAB_minus_Ca2_kf = 3.24008424e-16 vol_uMINV2secINV; PP2B_slash_Ca_minus_bind_minus_CaNAB_minus_Ca2_kb = 9e-17 vol_secINV;
  // kf*PP2B_slash_CaNAB*Ca^2-kb*PP2B_slash_CaNAB_minus_Ca2
  // going on the experience with CaM, we put the fast (high affinity) sites first. We only know (Stemmer and Klee) that the affinity is < 70 nM. Assuming 10 nM at first, we get kf = 2.78e-8, kb = 1. Try 20 nM. kf = 7e-9, kb = 1.
  PP2B_slash_Ca_minus_bind_minus_CaNAB: PP2B_slash_CaNAB + 2 Ca -> PP2B_slash_CaNAB_minus_Ca2; PP2B_slash_Ca_minus_bind_minus_CaNAB_kf*PP2B_slash_CaNAB*Ca^2 - PP2B_slash_Ca_minus_bind_minus_CaNAB_kb*PP2B_slash_CaNAB_minus_Ca2;
    PP2B_slash_Ca_minus_bind_minus_CaNAB_kf = 9.00720324e-13 vol_uMINV2secINV; PP2B_slash_Ca_minus_bind_minus_CaNAB_kb = 9e-17 vol_secINV;
  // kf*CaM_minus_Ca4*CaNAB_minus_Ca4-kb*CaM_Ca_n_minus_CaNAB
  PP2B_slash_CaMCa4_minus_bind_minus_CaNAB: CaM_minus_Ca4 + CaNAB_minus_Ca4 -> CaM_Ca_n_minus_CaNAB; PP2B_slash_CaMCa4_minus_bind_minus_CaNAB_kf*CaM_minus_Ca4*CaNAB_minus_Ca4 - PP2B_slash_CaMCa4_minus_bind_minus_CaNAB_kb*CaM_Ca_n_minus_CaNAB;
    PP2B_slash_CaMCa4_minus_bind_minus_CaNAB_kf = 5.399946e-14 vol_uMINVsecINV; PP2B_slash_CaMCa4_minus_bind_minus_CaNAB_kb = 9e-17 vol_secINV;
  // kf*CaMKII_minus_PSD*CaM_minus_Ca4_minus_PSD-kb*CaMKII_minus_CaM_minus_PSD
  CaMKII_minus_bind_minus_CaM_minus_PSD: CaMKII_minus_PSD + CaM_minus_Ca4_minus_PSD -> CaMKII_minus_CaM_minus_PSD; CaMKII_minus_bind_minus_CaM_minus_PSD_kf*CaMKII_minus_PSD*CaM_minus_Ca4_minus_PSD - CaMKII_minus_bind_minus_CaM_minus_PSD_kb*CaMKII_minus_CaM_minus_PSD;
    CaMKII_minus_bind_minus_CaM_minus_PSD_kf = 4.99998e-16 vol_uMINVsecINV; CaMKII_minus_bind_minus_CaM_minus_PSD_kb = 0 vol_secINV;
  // kf*CaMKII_slash_CaMKII_minus_CaM*NMDAR-kb*CaMKII_minus_CaM_minus_PSD
  // Rates to match curve in fig2 from Shen and Meyer, Science 284:162-166(1999), calculated for 6:1 alpha:beta CaMKII heterodimers
  transloc_1: CaMKII_slash_CaMKII_minus_CaM + NMDAR -> CaMKII_minus_CaM_minus_PSD; transloc_1_kf*CaMKII_slash_CaMKII_minus_CaM*NMDAR - transloc_1_kb*CaMKII_minus_CaM_minus_PSD;
    transloc_1_kf = 1.08e-20 vol_uMINVsecINV; transloc_1_kb = 0 vol_secINV;
  // kf*CaMKII_slash_CaMKII_minus_thr286_star__minus_CaM*NMDAR-kb*CaMKII_minus_thr286_minus_CaM_minus_PSD
  // Same as for transloc_1
  transloc_2: CaMKII_slash_CaMKII_minus_thr286_star__minus_CaM + NMDAR -> CaMKII_minus_thr286_minus_CaM_minus_PSD; transloc_2_kf*CaMKII_slash_CaMKII_minus_thr286_star__minus_CaM*NMDAR - transloc_2_kb*CaMKII_minus_thr286_minus_CaM_minus_PSD;
    transloc_2_kf = 1.08e-20 vol_uMINVsecINV; transloc_2_kb = 0 vol_secINV;
  // kf*CaMKII_minus_PSD-kb*CaMKII_slash_CaMKII*NMDAR
  // Rates set by the translocation experiments of Shen and Meyer, Science 1999.
  back_1: CaMKII_minus_PSD -> CaMKII_slash_CaMKII + NMDAR; back_1_kf*CaMKII_minus_PSD - back_1_kb*CaMKII_slash_CaMKII*NMDAR;
    back_1_kf = 3e-18 vol_secINV; back_1_kb = 5.4e-21 vol_uMINVsecINV;
  // kf*CaMKII_minus_thr305_minus_PSD-kb*CaMKII_slash_CaMK_minus_thr305*NMDAR
  // Same as for back_1
  back_2: CaMKII_minus_thr305_minus_PSD -> CaMKII_slash_CaMK_minus_thr305 + NMDAR; back_2_kf*CaMKII_minus_thr305_minus_PSD - back_2_kb*CaMKII_slash_CaMK_minus_thr305*NMDAR;
    back_2_kf = 3e-18 vol_secINV; back_2_kb = 5.4e-21 vol_uMINVsecINV;
  // kf*CaMKII_minus_thr286_minus_PSD*CaM_minus_Ca4_minus_PSD-kb*CaMKII_minus_thr286_minus_CaM_minus_PSD
  // Same values as for the main compartment Can the main compartment pool of Ca/CaM be used?
  CaMKII_minus_thr286_minus_bind_minus_CaM_minus_PSD: CaMKII_minus_thr286_minus_PSD + CaM_minus_Ca4_minus_PSD -> CaMKII_minus_thr286_minus_CaM_minus_PSD; CaMKII_minus_thr286_minus_bind_minus_CaM_minus_PSD_kf*CaMKII_minus_thr286_minus_PSD*CaM_minus_Ca4_minus_PSD - CaMKII_minus_thr286_minus_bind_minus_CaM_minus_PSD_kb*CaMKII_minus_thr286_minus_CaM_minus_PSD;
    CaMKII_minus_thr286_minus_bind_minus_CaM_minus_PSD_kf = 1.00002e-14 vol_uMINVsecINV; CaMKII_minus_thr286_minus_bind_minus_CaM_minus_PSD_kb = 1e-18 vol_secINV;
  // kf*CaM_minus_Ca4_minus_PSD-kb*CaM_minus_Ca4
  // Diffusional equilibrium between PSD- and cytosolic compartment. According to D. Bary in Cell Movements 2nd ed 2001 D for proteins is 5e-7 cm^2/s giving 10 ms for a translocation of 1 um.
  equilib: CaM_minus_Ca4_minus_PSD -> CaM_minus_Ca4; equilib_kf*CaM_minus_Ca4_minus_PSD - equilib_kb*CaM_minus_Ca4;
    equilib_kf = 5.4e-15 vol_secINV; equilib_kb = 5.4e-15 vol_secINV;
  // kf*PP1_PSD_slash_PP1_minus_I1-kb*PP1_PSD_slash_I1*PP1_minus_active_PSD
  // Let us assume that the equil in this case is very far over to the right. This is probably safe.
  PP1_PSD_slash_dissoc_minus_PP1_minus_I1: PP1_PSD_slash_PP1_minus_I1 -> PP1_PSD_slash_I1 + PP1_minus_active_PSD; PP1_PSD_slash_dissoc_minus_PP1_minus_I1_kf*PP1_PSD_slash_PP1_minus_I1 - PP1_PSD_slash_dissoc_minus_PP1_minus_I1_kb*PP1_PSD_slash_I1*PP1_minus_active_PSD;
    PP1_PSD_slash_dissoc_minus_PP1_minus_I1_kf = 1e-17 vol_secINV; PP1_PSD_slash_dissoc_minus_PP1_minus_I1_kb = 0 vol_uMINVsecINV;
  // kf*PP1_PSD_slash_I1_star_*PP1_minus_active_PSD-kb*PP1_PSD_slash_PP1_minus_I1_star_
  // K inhib = 1nM from Cohen Ann Rev Bioch 1989, 4 nM from Foukes et al Assume 2 nM. kf /kb = 8.333e-4
  Inact_minus_PP1: PP1_PSD_slash_I1_star_ + PP1_minus_active_PSD -> PP1_PSD_slash_PP1_minus_I1_star_; Inact_minus_PP1_kf*PP1_PSD_slash_I1_star_*PP1_minus_active_PSD - Inact_minus_PP1_kb*PP1_PSD_slash_PP1_minus_I1_star_;
    Inact_minus_PP1_kf = 4.9998e-15 vol_uMINVsecINV; Inact_minus_PP1_kb = 1e-18 vol_secINV;
  // kf*CaM_minus_Ca3*Ca-kb*CaM_minus_Ca4
  // Use K3 = 21.5 uM here from Stemmer and Klee table 3. kb/kf =21.5 * 6e5 so kf = 7.75e-7, kb = 10
  CaM_minus_Ca3_minus_bind_minus_Ca: CaM_minus_Ca3 + Ca -> CaM_minus_Ca4; CaM_minus_Ca3_minus_bind_minus_Ca_kf*CaM_minus_Ca3*Ca - CaM_minus_Ca3_minus_bind_minus_Ca_kb*CaM_minus_Ca4;
    CaM_minus_Ca3_minus_bind_minus_Ca_kf = 4.1849946e-17 vol_uMINVsecINV; CaM_minus_Ca3_minus_bind_minus_Ca_kb = 9e-16 vol_secINV;
  // kf*CaMKII_minus_CaM_minus_PSD-kb*CaM_minus_Ca4_minus_PSD*CaMKII_minus_PSD
  CaMKII_minus_diss_minus_CaM: CaMKII_minus_CaM_minus_PSD -> CaM_minus_Ca4_minus_PSD + CaMKII_minus_PSD; CaMKII_minus_diss_minus_CaM_kf*CaMKII_minus_CaM_minus_PSD - CaMKII_minus_diss_minus_CaM_kb*CaM_minus_Ca4_minus_PSD*CaMKII_minus_PSD;
    CaMKII_minus_diss_minus_CaM_kf = 5e-17 vol_secINV; CaMKII_minus_diss_minus_CaM_kb = 0 vol_uMINVsecINV;
  // kf*Ca_control_cyt-kb*Ca
  Ca_stoch_cyt: $Ca_control_cyt -> Ca; Ca_stoch_cyt_kf*Ca_control_cyt - Ca_stoch_cyt_kb*Ca;
    Ca_stoch_cyt_kf = 9e-15 vol_secINV; Ca_stoch_cyt_kb = 9e-15 vol_secINV;
  // kf*Ca_control_PSD-kb*Ca_minus_PSD
  Ca_stoch_PSD: $Ca_control_PSD -> Ca_minus_PSD; Ca_stoch_PSD_kf*Ca_control_PSD - Ca_stoch_PSD_kb*Ca_minus_PSD;
    Ca_stoch_PSD_kf = 1e-15 vol_secINV; Ca_stoch_PSD_kb = 1e-15 vol_secINV;
  // kf*basal_CaMKII_PSD_control-kb*basal_CaMKII_PSD
  Stoch_Basal_CaMKII_PSD: $basal_CaMKII_PSD_control -> basal_CaMKII_PSD; Stoch_Basal_CaMKII_PSD_kf*basal_CaMKII_PSD_control - Stoch_Basal_CaMKII_PSD_kb*basal_CaMKII_PSD;
    Stoch_Basal_CaMKII_PSD_kf = 1e-17 vol_secINV; Stoch_Basal_CaMKII_PSD_kb = 1e-17 vol_secINV;
  // kf*PKC_minus_control-kb*PKC_minus_active
  PKC_minus_stoch_minus_input: $PKC_minus_control -> PKC_minus_active; PKC_minus_stoch_minus_input_kf*PKC_minus_control - PKC_minus_stoch_minus_input_kb*PKC_minus_active;
    PKC_minus_stoch_minus_input_kf = 2.25e-16 vol_secINV; PKC_minus_stoch_minus_input_kb = 2.25e-16 vol_secINV;
  // kf*CaM_minus_Ca4*AC_slash_AC1-kb*AC_slash_AC1_minus_CaM
  // Half-max at 20 nM CaM (Tang et al JBC 266:13 8595-8603 1991 kb/kf = 20 nM = 12000 #/cell so kf = kb/12000 = kb * 8.333e-5
  AC_slash_CaM_minus_bind_minus_AC1: CaM_minus_Ca4 + AC_slash_AC1 -> AC_slash_AC1_minus_CaM; AC_slash_CaM_minus_bind_minus_AC1_kf*CaM_minus_Ca4*AC_slash_AC1 - AC_slash_CaM_minus_bind_minus_AC1_kb*AC_slash_AC1_minus_CaM;
    AC_slash_CaM_minus_bind_minus_AC1_kf = 4.4999712e-15 vol_uMINVsecINV; AC_slash_CaM_minus_bind_minus_AC1_kb = 9e-17 vol_secINV;
  // kf*AC_slash_AC2_star_-kb*AC_slash_AC2
  // Random rate.
  AC_slash_dephosph_minus_AC2: AC_slash_AC2_star_ -> AC_slash_AC2; AC_slash_dephosph_minus_AC2_kf*AC_slash_AC2_star_ - AC_slash_dephosph_minus_AC2_kb*AC_slash_AC2;
    AC_slash_dephosph_minus_AC2_kf = 9e-18 vol_secINV; AC_slash_dephosph_minus_AC2_kb = 0 vol_secINV;
  // kf*AC_slash_cAMP_minus_PDE_star_-kb*AC_slash_cAMP_minus_PDE
  // The rates for this are poorly constrained. In adipocytes (probably a different PDE) the dephosphorylation is complete within 15 min, but there are no intermediate time points so it could be much faster. Identity of phosphatase etc is still unknown.
  AC_slash_dephosph_minus_PDE: AC_slash_cAMP_minus_PDE_star_ -> AC_slash_cAMP_minus_PDE; AC_slash_dephosph_minus_PDE_kf*AC_slash_cAMP_minus_PDE_star_ - AC_slash_dephosph_minus_PDE_kb*AC_slash_cAMP_minus_PDE;
    AC_slash_dephosph_minus_PDE_kf = 9e-19 vol_secINV; AC_slash_dephosph_minus_PDE_kb = 0 vol_secINV;
  // kf*AC_slash_PDE1*CaM_minus_Ca4-kb*AC_slash_CaM_dot_PDE1
  // For olf epi PDE1, affinity is 7 nM. Assume same for brain. Reaction should be pretty fast. Assume kb = 5/sec. Then kf = 5 / (0.007 * 6e5) = 1.2e-3
  AC_slash_CaM_bind_PDE1: AC_slash_PDE1 + CaM_minus_Ca4 -> AC_slash_CaM_dot_PDE1; AC_slash_CaM_bind_PDE1_kf*AC_slash_PDE1*CaM_minus_Ca4 - AC_slash_CaM_bind_PDE1_kb*AC_slash_CaM_dot_PDE1;
    AC_slash_CaM_bind_PDE1_kf = 6.479838e-14 vol_uMINVsecINV; AC_slash_CaM_bind_PDE1_kb = 4.5e-16 vol_secINV;
  // kf*cAMP-kb*AC_slash_cAMP_in_dend
  // Represents diffusion, from a volume of 9e-20 to 5e-18. Assuming neck dimensions of 0.1 x 0.1 microns, this works out to a diffusion const of about 270 um^2/sec, which is pretty conservative. It is what cAMP does in frog cilia.
  AC_slash_cAMP_diffusion: cAMP -> AC_slash_cAMP_in_dend; AC_slash_cAMP_diffusion_kf*cAMP - AC_slash_cAMP_diffusion_kb*AC_slash_cAMP_in_dend;
    AC_slash_cAMP_diffusion_kf = 2.7e-14 vol_secINV; AC_slash_cAMP_diffusion_kb = 2.7e-14 vol_secINV;
  // kf*PKA_slash_R2C2*cAMP-kb*PKA_slash_R2C2_minus_cAMP
  // Hasler et al FASEB J 6:2734-2741 1992 say Kd =1e-7M for type II, 5.6e-8 M for type I. Take mean which comes to 2e-13 #/cell Smith et al PNAS USA 78:3 1591-1595 1981 have better data. First kf/kb=2.1e7/M = 3.5e-5 (#/cell). Ogreid and Doskeland Febs Lett 129:2 287-292 1981 have figs suggesting time course of complete assoc is < 1 min.
  PKA_slash_cAMP_minus_bind_minus_site_minus_B1: PKA_slash_R2C2 + cAMP -> PKA_slash_R2C2_minus_cAMP; PKA_slash_cAMP_minus_bind_minus_site_minus_B1_kf*PKA_slash_R2C2*cAMP - PKA_slash_cAMP_minus_bind_minus_site_minus_B1_kb*PKA_slash_R2C2_minus_cAMP;
    PKA_slash_cAMP_minus_bind_minus_site_minus_B1_kf = 4.86e-15 vol_uMINVsecINV; PKA_slash_cAMP_minus_bind_minus_site_minus_B1_kb = 2.97e-15 vol_secINV;
  // kf*PKA_slash_R2C2_minus_cAMP*cAMP-kb*PKA_slash_R2C2_minus_cAMP2
  // For now let us set this to the same Km (1e-7M) as site B. This gives kf/kb = .7e-7M * 1e6 / (6e5^2) : 1/(6e5^2) = 2e-13:2.77e-12 Smith et al have better values. They say that this is cooperative, so the consts are now kf/kb =8.3e-4
  PKA_slash_cAMP_minus_bind_minus_site_minus_B2: PKA_slash_R2C2_minus_cAMP + cAMP -> PKA_slash_R2C2_minus_cAMP2; PKA_slash_cAMP_minus_bind_minus_site_minus_B2_kf*PKA_slash_R2C2_minus_cAMP*cAMP - PKA_slash_cAMP_minus_bind_minus_site_minus_B2_kb*PKA_slash_R2C2_minus_cAMP2;
    PKA_slash_cAMP_minus_bind_minus_site_minus_B2_kf = 4.86e-15 vol_uMINVsecINV; PKA_slash_cAMP_minus_bind_minus_site_minus_B2_kb = 2.97e-15 vol_secINV;
  // kf*PKA_slash_R2C2_minus_cAMP2*cAMP-kb*PKA_slash_R2C2_minus_cAMP3
  PKA_slash_cAMP_minus_bind_minus_site_minus_A1: PKA_slash_R2C2_minus_cAMP2 + cAMP -> PKA_slash_R2C2_minus_cAMP3; PKA_slash_cAMP_minus_bind_minus_site_minus_A1_kf*PKA_slash_R2C2_minus_cAMP2*cAMP - PKA_slash_cAMP_minus_bind_minus_site_minus_A1_kb*PKA_slash_R2C2_minus_cAMP3;
    PKA_slash_cAMP_minus_bind_minus_site_minus_A1_kf = 6.750054e-15 vol_uMINVsecINV; PKA_slash_cAMP_minus_bind_minus_site_minus_A1_kb = 9.9e-15 vol_secINV;
  // kf*cAMP*PKA_slash_R2C2_minus_cAMP3-kb*PKA_slash_R2C2_minus_cAMP4
  PKA_slash_cAMP_minus_bind_minus_site_minus_A2: cAMP + PKA_slash_R2C2_minus_cAMP3 -> PKA_slash_R2C2_minus_cAMP4; PKA_slash_cAMP_minus_bind_minus_site_minus_A2_kf*cAMP*PKA_slash_R2C2_minus_cAMP3 - PKA_slash_cAMP_minus_bind_minus_site_minus_A2_kb*PKA_slash_R2C2_minus_cAMP4;
    PKA_slash_cAMP_minus_bind_minus_site_minus_A2_kf = 6.750054e-15 vol_uMINVsecINV; PKA_slash_cAMP_minus_bind_minus_site_minus_A2_kb = 2.925e-15 vol_secINV;
  // kf*PKA_slash_R2C2_minus_cAMP4-kb*PKA_minus_active*PKA_slash_R2C_minus_cAMP4
  // This has to be fast, as the activation of PKA by cAMP is also fast. kf was 10
  PKA_slash_Release_minus_C1: PKA_slash_R2C2_minus_cAMP4 -> PKA_minus_active + PKA_slash_R2C_minus_cAMP4; PKA_slash_Release_minus_C1_kf*PKA_slash_R2C2_minus_cAMP4 - PKA_slash_Release_minus_C1_kb*PKA_minus_active*PKA_slash_R2C_minus_cAMP4;
    PKA_slash_Release_minus_C1_kf = 5.4e-15 vol_secINV; PKA_slash_Release_minus_C1_kb = 1.6199838e-15 vol_uMINVsecINV;
  // kf*PKA_slash_R2C_minus_cAMP4-kb*PKA_minus_active*PKA_slash_R2_minus_cAMP4
  PKA_slash_Release_minus_C2: PKA_slash_R2C_minus_cAMP4 -> PKA_minus_active + PKA_slash_R2_minus_cAMP4; PKA_slash_Release_minus_C2_kf*PKA_slash_R2C_minus_cAMP4 - PKA_slash_Release_minus_C2_kb*PKA_minus_active*PKA_slash_R2_minus_cAMP4;
    PKA_slash_Release_minus_C2_kf = 5.4e-15 vol_secINV; PKA_slash_Release_minus_C2_kb = 1.6199838e-15 vol_uMINVsecINV;
  // kf*PKA_minus_active*PKA_slash_PKA_minus_inhibitor-kb*PKA_slash_inhibited_minus_PKA
  // This has to be set to zero for matching the expts in vitro. In vivo we need to consider the inhibition though. kf = 1e-5 kb = 1
  PKA_slash_inhib_minus_PKA: PKA_minus_active + PKA_slash_PKA_minus_inhibitor -> PKA_slash_inhibited_minus_PKA; PKA_slash_inhib_minus_PKA_kf*PKA_minus_active*PKA_slash_PKA_minus_inhibitor - PKA_slash_inhib_minus_PKA_kb*PKA_slash_inhibited_minus_PKA;
    PKA_slash_inhib_minus_PKA_kf = 5.399946e-15 vol_uMINVsecINV; PKA_slash_inhib_minus_PKA_kb = 9e-17 vol_secINV;
  // k1*CaMKII_slash_CaMKII_minus_thr286_star__minus_CaM*PP1_minus_active-k2*PP1_minus_active_slash_Deph_minus_thr286_slash_Deph_minus_thr286_cplx
  PP1_minus_active_slash_Deph_minus_thr286_1: CaMKII_slash_CaMKII_minus_thr286_star__minus_CaM + PP1_minus_active -> PP1_minus_active_slash_Deph_minus_thr286_slash_Deph_minus_thr286_cplx; PP1_minus_active_slash_Deph_minus_thr286_1_k1*CaMKII_slash_CaMKII_minus_thr286_star__minus_CaM*PP1_minus_active - PP1_minus_active_slash_Deph_minus_thr286_1_k2*PP1_minus_active_slash_Deph_minus_thr286_slash_Deph_minus_thr286_cplx;
    PP1_minus_active_slash_Deph_minus_thr286_1_k1 = 2.2062942e-16 vol_uMINVsecINV; PP1_minus_active_slash_Deph_minus_thr286_1_k2 = 9e-16 vol_secINV;
  // k3*PP1_minus_active_slash_Deph_minus_thr286_slash_Deph_minus_thr286_cplx
  PP1_minus_active_slash_Deph_minus_thr286_2: PP1_minus_active_slash_Deph_minus_thr286_slash_Deph_minus_thr286_cplx => CaMKII_slash_CaMKII_minus_CaM + PP1_minus_active; PP1_minus_active_slash_Deph_minus_thr286_2_k3*PP1_minus_active_slash_Deph_minus_thr286_slash_Deph_minus_thr286_cplx;
    PP1_minus_active_slash_Deph_minus_thr286_2_k3 = 2.25e-16 vol_secINV;
  // k1*CaMKII_slash_CaMKII_minus_thr286*PP1_minus_active-k2*PP1_minus_active_slash_Deph_minus_thr286b_slash_Deph_minus_thr286b_cplx
  PP1_minus_active_slash_Deph_minus_thr286b_1: CaMKII_slash_CaMKII_minus_thr286 + PP1_minus_active -> PP1_minus_active_slash_Deph_minus_thr286b_slash_Deph_minus_thr286b_cplx; PP1_minus_active_slash_Deph_minus_thr286b_1_k1*CaMKII_slash_CaMKII_minus_thr286*PP1_minus_active - PP1_minus_active_slash_Deph_minus_thr286b_1_k2*PP1_minus_active_slash_Deph_minus_thr286b_slash_Deph_minus_thr286b_cplx;
    PP1_minus_active_slash_Deph_minus_thr286b_1_k1 = 2.2062942e-16 vol_uMINVsecINV; PP1_minus_active_slash_Deph_minus_thr286b_1_k2 = 9e-16 vol_secINV;
  // k3*PP1_minus_active_slash_Deph_minus_thr286b_slash_Deph_minus_thr286b_cplx
  PP1_minus_active_slash_Deph_minus_thr286b_2: PP1_minus_active_slash_Deph_minus_thr286b_slash_Deph_minus_thr286b_cplx => CaMKII_slash_CaMKII + PP1_minus_active; PP1_minus_active_slash_Deph_minus_thr286b_2_k3*PP1_minus_active_slash_Deph_minus_thr286b_slash_Deph_minus_thr286b_cplx;
    PP1_minus_active_slash_Deph_minus_thr286b_2_k3 = 2.25e-16 vol_secINV;
  // k1*CaMKII_slash_CaMKII_star__star__star_*PP1_minus_active-k2*PP1_minus_active_slash_Deph_minus_thr305_slash_Deph_minus_thr305_cplx
  PP1_minus_active_slash_Deph_minus_thr305_1: CaMKII_slash_CaMKII_star__star__star_ + PP1_minus_active -> PP1_minus_active_slash_Deph_minus_thr305_slash_Deph_minus_thr305_cplx; PP1_minus_active_slash_Deph_minus_thr305_1_k1*CaMKII_slash_CaMKII_star__star__star_*PP1_minus_active - PP1_minus_active_slash_Deph_minus_thr305_1_k2*PP1_minus_active_slash_Deph_minus_thr305_slash_Deph_minus_thr305_cplx;
    PP1_minus_active_slash_Deph_minus_thr305_1_k1 = 2.2062942e-16 vol_uMINVsecINV; PP1_minus_active_slash_Deph_minus_thr305_1_k2 = 9e-16 vol_secINV;
  // k3*PP1_minus_active_slash_Deph_minus_thr305_slash_Deph_minus_thr305_cplx
  PP1_minus_active_slash_Deph_minus_thr305_2: PP1_minus_active_slash_Deph_minus_thr305_slash_Deph_minus_thr305_cplx => CaMKII_slash_CaMKII_minus_thr286 + PP1_minus_active; PP1_minus_active_slash_Deph_minus_thr305_2_k3*PP1_minus_active_slash_Deph_minus_thr305_slash_Deph_minus_thr305_cplx;
    PP1_minus_active_slash_Deph_minus_thr305_2_k3 = 2.25e-16 vol_secINV;
  // k1*CaMKII_slash_CaMKII_star__star__star_*PP1_minus_active-k2*PP1_minus_active_slash_Deph_minus_thr286c_slash_Deph_minus_thr286c_cplx
  PP1_minus_active_slash_Deph_minus_thr286c_1: CaMKII_slash_CaMKII_star__star__star_ + PP1_minus_active -> PP1_minus_active_slash_Deph_minus_thr286c_slash_Deph_minus_thr286c_cplx; PP1_minus_active_slash_Deph_minus_thr286c_1_k1*CaMKII_slash_CaMKII_star__star__star_*PP1_minus_active - PP1_minus_active_slash_Deph_minus_thr286c_1_k2*PP1_minus_active_slash_Deph_minus_thr286c_slash_Deph_minus_thr286c_cplx;
    PP1_minus_active_slash_Deph_minus_thr286c_1_k1 = 2.2062942e-16 vol_uMINVsecINV; PP1_minus_active_slash_Deph_minus_thr286c_1_k2 = 9e-16 vol_secINV;
  // k3*PP1_minus_active_slash_Deph_minus_thr286c_slash_Deph_minus_thr286c_cplx
  PP1_minus_active_slash_Deph_minus_thr286c_2: PP1_minus_active_slash_Deph_minus_thr286c_slash_Deph_minus_thr286c_cplx => CaMKII_slash_CaMK_minus_thr305 + PP1_minus_active; PP1_minus_active_slash_Deph_minus_thr286c_2_k3*PP1_minus_active_slash_Deph_minus_thr286c_slash_Deph_minus_thr286c_cplx;
    PP1_minus_active_slash_Deph_minus_thr286c_2_k3 = 2.25e-16 vol_secINV;
  // k1*CaMKII_slash_CaMK_minus_thr305*PP1_minus_active-k2*PP1_minus_active_slash_Deph_minus_thr305a_slash_Deph_minus_thr305a_cplx
  PP1_minus_active_slash_Deph_minus_thr305a_1: CaMKII_slash_CaMK_minus_thr305 + PP1_minus_active -> PP1_minus_active_slash_Deph_minus_thr305a_slash_Deph_minus_thr305a_cplx; PP1_minus_active_slash_Deph_minus_thr305a_1_k1*CaMKII_slash_CaMK_minus_thr305*PP1_minus_active - PP1_minus_active_slash_Deph_minus_thr305a_1_k2*PP1_minus_active_slash_Deph_minus_thr305a_slash_Deph_minus_thr305a_cplx;
    PP1_minus_active_slash_Deph_minus_thr305a_1_k1 = 2.2062942e-16 vol_uMINVsecINV; PP1_minus_active_slash_Deph_minus_thr305a_1_k2 = 9e-16 vol_secINV;
  // k3*PP1_minus_active_slash_Deph_minus_thr305a_slash_Deph_minus_thr305a_cplx
  PP1_minus_active_slash_Deph_minus_thr305a_2: PP1_minus_active_slash_Deph_minus_thr305a_slash_Deph_minus_thr305a_cplx => CaMKII_slash_CaMKII + PP1_minus_active; PP1_minus_active_slash_Deph_minus_thr305a_2_k3*PP1_minus_active_slash_Deph_minus_thr305a_slash_Deph_minus_thr305a_cplx;
    PP1_minus_active_slash_Deph_minus_thr305a_2_k3 = 2.25e-16 vol_secINV;
  // k1*PP1_slash_I1*PKA_minus_active-k2*PKA_minus_active_slash_PKA_minus_phosph_minus_I1_slash_PKA_minus_phosph_minus_I1_cplx
  // #s from Bramson et al CRC crit rev Biochem 15:2 93-124. They have a huge list of peptide substrates and I have chosen high-ish rates. These consts give too much PKA activity, so lower Vmax 1/3. Now, k1 = 3e-5, k2 = 36, k3 = 9 (still pretty fast). Also lower Km 1/3 so k1 = 1e-5 Cohen et al FEBS Lett 76:182-86 1977 say rate =30% PKA act on phosphokinase beta.
  PKA_minus_active_slash_PKA_minus_phosph_minus_I1_1: PP1_slash_I1 + PKA_minus_active -> PKA_minus_active_slash_PKA_minus_phosph_minus_I1_slash_PKA_minus_phosph_minus_I1_cplx; PKA_minus_active_slash_PKA_minus_phosph_minus_I1_1_k1*PP1_slash_I1*PKA_minus_active - PKA_minus_active_slash_PKA_minus_phosph_minus_I1_1_k2*PKA_minus_active_slash_PKA_minus_phosph_minus_I1_slash_PKA_minus_phosph_minus_I1_cplx;
    PKA_minus_active_slash_PKA_minus_phosph_minus_I1_1_k1 = 5.399946e-16 vol_uMINVsecINV; PKA_minus_active_slash_PKA_minus_phosph_minus_I1_1_k2 = 3.24e-15 vol_secINV;
  // k3*PKA_minus_active_slash_PKA_minus_phosph_minus_I1_slash_PKA_minus_phosph_minus_I1_cplx
  PKA_minus_active_slash_PKA_minus_phosph_minus_I1_2: PKA_minus_active_slash_PKA_minus_phosph_minus_I1_slash_PKA_minus_phosph_minus_I1_cplx => PP1_slash_I1_star_ + PKA_minus_active; PKA_minus_active_slash_PKA_minus_phosph_minus_I1_2_k3*PKA_minus_active_slash_PKA_minus_phosph_minus_I1_slash_PKA_minus_phosph_minus_I1_cplx;
    PKA_minus_active_slash_PKA_minus_phosph_minus_I1_2_k3 = 8.1e-16 vol_secINV;
  // k1*PP1_PSD_slash_I1*PKA_minus_active-k2*PKA_minus_active_slash_PKA_minus_phosph_minus_I1_PSD_slash_PKA_minus_phosph_minus_I1_PSD_cplx
  PKA_minus_active_slash_PKA_minus_phosph_minus_I1_PSD_1: PP1_PSD_slash_I1 + PKA_minus_active -> PKA_minus_active_slash_PKA_minus_phosph_minus_I1_PSD_slash_PKA_minus_phosph_minus_I1_PSD_cplx; PKA_minus_active_slash_PKA_minus_phosph_minus_I1_PSD_1_k1*PP1_PSD_slash_I1*PKA_minus_active - PKA_minus_active_slash_PKA_minus_phosph_minus_I1_PSD_1_k2*PKA_minus_active_slash_PKA_minus_phosph_minus_I1_PSD_slash_PKA_minus_phosph_minus_I1_PSD_cplx;
    PKA_minus_active_slash_PKA_minus_phosph_minus_I1_PSD_1_k1 = 5.99994e-17 vol_uMINVsecINV; PKA_minus_active_slash_PKA_minus_phosph_minus_I1_PSD_1_k2 = 3.24e-15 vol_secINV;
  // k3*PKA_minus_active_slash_PKA_minus_phosph_minus_I1_PSD_slash_PKA_minus_phosph_minus_I1_PSD_cplx
  PKA_minus_active_slash_PKA_minus_phosph_minus_I1_PSD_2: PKA_minus_active_slash_PKA_minus_phosph_minus_I1_PSD_slash_PKA_minus_phosph_minus_I1_PSD_cplx => PP1_PSD_slash_I1_star_ + PKA_minus_active; PKA_minus_active_slash_PKA_minus_phosph_minus_I1_PSD_2_k3*PKA_minus_active_slash_PKA_minus_phosph_minus_I1_PSD_slash_PKA_minus_phosph_minus_I1_PSD_cplx;
    PKA_minus_active_slash_PKA_minus_phosph_minus_I1_PSD_2_k3 = 8.1e-16 vol_secINV;
  // k1*AC_slash_cAMP_minus_PDE*PKA_minus_active-k2*PKA_minus_active_slash_phosph_minus_PDE_slash_phosph_minus_PDE_cplx
  // Same rates as PKA-phosph-I1
  PKA_minus_active_slash_phosph_minus_PDE_1: AC_slash_cAMP_minus_PDE + PKA_minus_active -> PKA_minus_active_slash_phosph_minus_PDE_slash_phosph_minus_PDE_cplx; PKA_minus_active_slash_phosph_minus_PDE_1_k1*AC_slash_cAMP_minus_PDE*PKA_minus_active - PKA_minus_active_slash_phosph_minus_PDE_1_k2*PKA_minus_active_slash_phosph_minus_PDE_slash_phosph_minus_PDE_cplx;
    PKA_minus_active_slash_phosph_minus_PDE_1_k1 = 5.399946e-16 vol_uMINVsecINV; PKA_minus_active_slash_phosph_minus_PDE_1_k2 = 3.24e-15 vol_secINV;
  // k3*PKA_minus_active_slash_phosph_minus_PDE_slash_phosph_minus_PDE_cplx
  PKA_minus_active_slash_phosph_minus_PDE_2: PKA_minus_active_slash_phosph_minus_PDE_slash_phosph_minus_PDE_cplx => AC_slash_cAMP_minus_PDE_star_ + PKA_minus_active; PKA_minus_active_slash_phosph_minus_PDE_2_k3*PKA_minus_active_slash_phosph_minus_PDE_slash_phosph_minus_PDE_cplx;
    PKA_minus_active_slash_phosph_minus_PDE_2_k3 = 8.1e-16 vol_secINV;
  // k1*CaMKII_slash_CaMKII_minus_thr286*CaMKII_slash_tot_CaM_CaMKII-k2*CaMKII_slash_tot_CaM_CaMKII_slash_CaM_act_305_slash_CaM_act_305_cplx
  // Rates from autocamtide phosphorylation, from Hanson and Schulman JBC 267:24 17216-17224 1992. Jan 1 1998: Speed up 12x to match fig 5.
  CaMKII_slash_tot_CaM_CaMKII_slash_CaM_act_305_1: CaMKII_slash_CaMKII_minus_thr286 + $CaMKII_slash_tot_CaM_CaMKII -> CaMKII_slash_tot_CaM_CaMKII_slash_CaM_act_305_slash_CaM_act_305_cplx; CaMKII_slash_tot_CaM_CaMKII_slash_CaM_act_305_1_k1*CaMKII_slash_CaMKII_minus_thr286*CaMKII_slash_tot_CaM_CaMKII - CaMKII_slash_tot_CaM_CaMKII_slash_CaM_act_305_1_k2*CaMKII_slash_tot_CaM_CaMKII_slash_CaM_act_305_slash_CaM_act_305_cplx;
    CaMKII_slash_tot_CaM_CaMKII_slash_CaM_act_305_1_k1 = 1.1894364e-17 vol_uMINVsecINV; CaMKII_slash_tot_CaM_CaMKII_slash_CaM_act_305_1_k2 = 2.16e-15 vol_secINV;
  // k3*CaMKII_slash_tot_CaM_CaMKII_slash_CaM_act_305_slash_CaM_act_305_cplx
  CaMKII_slash_tot_CaM_CaMKII_slash_CaM_act_305_2: CaMKII_slash_tot_CaM_CaMKII_slash_CaM_act_305_slash_CaM_act_305_cplx => CaMKII_slash_CaMKII_star__star__star_ + $CaMKII_slash_tot_CaM_CaMKII; CaMKII_slash_tot_CaM_CaMKII_slash_CaM_act_305_2_k3*CaMKII_slash_tot_CaM_CaMKII_slash_CaM_act_305_slash_CaM_act_305_cplx;
    CaMKII_slash_tot_CaM_CaMKII_slash_CaM_act_305_2_k3 = 5.4e-16 vol_secINV;
  // k1*CaMKII_slash_CaMKII_minus_CaM*CaMKII_slash_tot_CaM_CaMKII-k2*CaMKII_slash_tot_CaM_CaMKII_slash_CaM_act_286_slash_CaM_act_286_cplx
  CaMKII_slash_tot_CaM_CaMKII_slash_CaM_act_286_1: CaMKII_slash_CaMKII_minus_CaM + $CaMKII_slash_tot_CaM_CaMKII -> CaMKII_slash_tot_CaM_CaMKII_slash_CaM_act_286_slash_CaM_act_286_cplx; CaMKII_slash_tot_CaM_CaMKII_slash_CaM_act_286_1_k1*CaMKII_slash_CaMKII_minus_CaM*CaMKII_slash_tot_CaM_CaMKII - CaMKII_slash_tot_CaM_CaMKII_slash_CaM_act_286_1_k2*CaMKII_slash_tot_CaM_CaMKII_slash_CaM_act_286_slash_CaM_act_286_cplx;
    CaMKII_slash_tot_CaM_CaMKII_slash_CaM_act_286_1_k1 = 9.91197e-19 vol_uMINVsecINV; CaMKII_slash_tot_CaM_CaMKII_slash_CaM_act_286_1_k2 = 1.8e-16 vol_secINV;
  // k3*CaMKII_slash_tot_CaM_CaMKII_slash_CaM_act_286_slash_CaM_act_286_cplx
  CaMKII_slash_tot_CaM_CaMKII_slash_CaM_act_286_2: CaMKII_slash_tot_CaM_CaMKII_slash_CaM_act_286_slash_CaM_act_286_cplx => CaMKII_slash_CaMKII_minus_thr286_star__minus_CaM + $CaMKII_slash_tot_CaM_CaMKII; CaMKII_slash_tot_CaM_CaMKII_slash_CaM_act_286_2_k3*CaMKII_slash_tot_CaM_CaMKII_slash_CaM_act_286_slash_CaM_act_286_cplx;
    CaMKII_slash_tot_CaM_CaMKII_slash_CaM_act_286_2_k3 = 4.5e-17 vol_secINV;
  // k1*CaMKII_slash_CaMKII_minus_thr286*CaMKII_slash_tot_autonomous_CaMKII-k2*CaMKII_slash_tot_autonomous_CaMKII_slash_auton_305_slash_auton_305_cplx
  // See Hanson and Schulman again, for afterburst rates of phosph.
  CaMKII_slash_tot_autonomous_CaMKII_slash_auton_305_1: CaMKII_slash_CaMKII_minus_thr286 + $CaMKII_slash_tot_autonomous_CaMKII -> CaMKII_slash_tot_autonomous_CaMKII_slash_auton_305_slash_auton_305_cplx; CaMKII_slash_tot_autonomous_CaMKII_slash_auton_305_1_k1*CaMKII_slash_CaMKII_minus_thr286*CaMKII_slash_tot_autonomous_CaMKII - CaMKII_slash_tot_autonomous_CaMKII_slash_auton_305_1_k2*CaMKII_slash_tot_autonomous_CaMKII_slash_auton_305_slash_auton_305_cplx;
    CaMKII_slash_tot_autonomous_CaMKII_slash_auton_305_1_k1 = 7.714278e-18 vol_uMINVsecINV; CaMKII_slash_tot_autonomous_CaMKII_slash_auton_305_1_k2 = 2.16e-15 vol_secINV;
  // k3*CaMKII_slash_tot_autonomous_CaMKII_slash_auton_305_slash_auton_305_cplx
  CaMKII_slash_tot_autonomous_CaMKII_slash_auton_305_2: CaMKII_slash_tot_autonomous_CaMKII_slash_auton_305_slash_auton_305_cplx => CaMKII_slash_CaMKII_star__star__star_ + $CaMKII_slash_tot_autonomous_CaMKII; CaMKII_slash_tot_autonomous_CaMKII_slash_auton_305_2_k3*CaMKII_slash_tot_autonomous_CaMKII_slash_auton_305_slash_auton_305_cplx;
    CaMKII_slash_tot_autonomous_CaMKII_slash_auton_305_2_k3 = 5.4e-16 vol_secINV;
  // k1*CaMKII_slash_CaMKII_minus_CaM*CaMKII_slash_tot_autonomous_CaMKII-k2*CaMKII_slash_tot_autonomous_CaMKII_slash_auton_286_slash_auton_286_cplx
  CaMKII_slash_tot_autonomous_CaMKII_slash_auton_286_1: CaMKII_slash_CaMKII_minus_CaM + $CaMKII_slash_tot_autonomous_CaMKII -> CaMKII_slash_tot_autonomous_CaMKII_slash_auton_286_slash_auton_286_cplx; CaMKII_slash_tot_autonomous_CaMKII_slash_auton_286_1_k1*CaMKII_slash_CaMKII_minus_CaM*CaMKII_slash_tot_autonomous_CaMKII - CaMKII_slash_tot_autonomous_CaMKII_slash_auton_286_1_k2*CaMKII_slash_tot_autonomous_CaMKII_slash_auton_286_slash_auton_286_cplx;
    CaMKII_slash_tot_autonomous_CaMKII_slash_auton_286_1_k1 = 6.428808e-19 vol_uMINVsecINV; CaMKII_slash_tot_autonomous_CaMKII_slash_auton_286_1_k2 = 1.8e-16 vol_secINV;
  // k3*CaMKII_slash_tot_autonomous_CaMKII_slash_auton_286_slash_auton_286_cplx
  CaMKII_slash_tot_autonomous_CaMKII_slash_auton_286_2: CaMKII_slash_tot_autonomous_CaMKII_slash_auton_286_slash_auton_286_cplx => CaMKII_slash_CaMKII_minus_thr286_star__minus_CaM + $CaMKII_slash_tot_autonomous_CaMKII; CaMKII_slash_tot_autonomous_CaMKII_slash_auton_286_2_k3*CaMKII_slash_tot_autonomous_CaMKII_slash_auton_286_slash_auton_286_cplx;
    CaMKII_slash_tot_autonomous_CaMKII_slash_auton_286_2_k3 = 4.5e-17 vol_secINV;
  // k1*PP1_slash_I1_star_*PP2A-k2*PP2A_slash_PP2A_minus_dephosph_minus_I1_slash_PP2A_minus_dephosph_minus_I1_cplx
  // PP2A does most of the dephosph of I1 at basal Ca levels. See the review by Cohen in Ann Rev Biochem 1989. For now, lets halve Km. k1 was 3.3e-6, now 6.6e-6
  PP2A_slash_PP2A_minus_dephosph_minus_I1_1: PP1_slash_I1_star_ + PP2A -> PP2A_slash_PP2A_minus_dephosph_minus_I1_slash_PP2A_minus_dephosph_minus_I1_cplx; PP2A_slash_PP2A_minus_dephosph_minus_I1_1_k1*PP1_slash_I1_star_*PP2A - PP2A_slash_PP2A_minus_dephosph_minus_I1_1_k2*PP2A_slash_PP2A_minus_dephosph_minus_I1_slash_PP2A_minus_dephosph_minus_I1_cplx;
    PP2A_slash_PP2A_minus_dephosph_minus_I1_1_k1 = 5.81256e-17 vol_uMINVsecINV; PP2A_slash_PP2A_minus_dephosph_minus_I1_1_k2 = 7.50006e-16 vol_secINV;
  // k3*PP2A_slash_PP2A_minus_dephosph_minus_I1_slash_PP2A_minus_dephosph_minus_I1_cplx
  PP2A_slash_PP2A_minus_dephosph_minus_I1_2: PP2A_slash_PP2A_minus_dephosph_minus_I1_slash_PP2A_minus_dephosph_minus_I1_cplx => PP1_slash_I1 + PP2A; PP2A_slash_PP2A_minus_dephosph_minus_I1_2_k3*PP2A_slash_PP2A_minus_dephosph_minus_I1_slash_PP2A_minus_dephosph_minus_I1_cplx;
    PP2A_slash_PP2A_minus_dephosph_minus_I1_2_k3 = 1.8e-16 vol_secINV;
  // k1*PP1_slash_PP1_minus_I1_star_*PP2A-k2*PP2A_slash_PP2A_minus_dephosph_minus_PP1_minus_I_star__slash_PP2A_minus_dephosph_minus_PP1_minus_I_star__cplx
  // k1 changed from 3.3e-6 to 6.6e-6
  PP2A_slash_PP2A_minus_dephosph_minus_PP1_minus_I_star__1: PP1_slash_PP1_minus_I1_star_ + PP2A -> PP2A_slash_PP2A_minus_dephosph_minus_PP1_minus_I_star__slash_PP2A_minus_dephosph_minus_PP1_minus_I_star__cplx; PP2A_slash_PP2A_minus_dephosph_minus_PP1_minus_I_star__1_k1*PP1_slash_PP1_minus_I1_star_*PP2A - PP2A_slash_PP2A_minus_dephosph_minus_PP1_minus_I_star__1_k2*PP2A_slash_PP2A_minus_dephosph_minus_PP1_minus_I_star__slash_PP2A_minus_dephosph_minus_PP1_minus_I_star__cplx;
    PP2A_slash_PP2A_minus_dephosph_minus_PP1_minus_I_star__1_k1 = 5.81256e-17 vol_uMINVsecINV; PP2A_slash_PP2A_minus_dephosph_minus_PP1_minus_I_star__1_k2 = 7.50006e-16 vol_secINV;
  // k3*PP2A_slash_PP2A_minus_dephosph_minus_PP1_minus_I_star__slash_PP2A_minus_dephosph_minus_PP1_minus_I_star__cplx
  PP2A_slash_PP2A_minus_dephosph_minus_PP1_minus_I_star__2: PP2A_slash_PP2A_minus_dephosph_minus_PP1_minus_I_star__slash_PP2A_minus_dephosph_minus_PP1_minus_I_star__cplx => PP1_slash_PP1_minus_I1 + PP2A; PP2A_slash_PP2A_minus_dephosph_minus_PP1_minus_I_star__2_k3*PP2A_slash_PP2A_minus_dephosph_minus_PP1_minus_I_star__slash_PP2A_minus_dephosph_minus_PP1_minus_I_star__cplx;
    PP2A_slash_PP2A_minus_dephosph_minus_PP1_minus_I_star__2_k3 = 1.8e-16 vol_secINV;
  // k1*PP1_PSD_slash_I1_star_*PP2A-k2*PP2A_slash_PP2A_minus_dephosph_minus_I1_PSD_slash_PP2A_minus_dephosph_minus_I1_PSD_cplx
  // PP2A does most of the dephosph of I1 at basal Ca levels. See the review by Cohen in Ann Rev Biochem 1989. For now, lets halve Km. k1 was 3.3e-6, now 6.6e-6
  PP2A_slash_PP2A_minus_dephosph_minus_I1_PSD_1: PP1_PSD_slash_I1_star_ + PP2A -> PP2A_slash_PP2A_minus_dephosph_minus_I1_PSD_slash_PP2A_minus_dephosph_minus_I1_PSD_cplx; PP2A_slash_PP2A_minus_dephosph_minus_I1_PSD_1_k1*PP1_PSD_slash_I1_star_*PP2A - PP2A_slash_PP2A_minus_dephosph_minus_I1_PSD_1_k2*PP2A_slash_PP2A_minus_dephosph_minus_I1_PSD_slash_PP2A_minus_dephosph_minus_I1_PSD_cplx;
    PP2A_slash_PP2A_minus_dephosph_minus_I1_PSD_1_k1 = 6.4584e-18 vol_uMINVsecINV; PP2A_slash_PP2A_minus_dephosph_minus_I1_PSD_1_k2 = 7.50006e-16 vol_secINV;
  // k3*PP2A_slash_PP2A_minus_dephosph_minus_I1_PSD_slash_PP2A_minus_dephosph_minus_I1_PSD_cplx
  PP2A_slash_PP2A_minus_dephosph_minus_I1_PSD_2: PP2A_slash_PP2A_minus_dephosph_minus_I1_PSD_slash_PP2A_minus_dephosph_minus_I1_PSD_cplx => PP1_PSD_slash_I1 + PP2A; PP2A_slash_PP2A_minus_dephosph_minus_I1_PSD_2_k3*PP2A_slash_PP2A_minus_dephosph_minus_I1_PSD_slash_PP2A_minus_dephosph_minus_I1_PSD_cplx;
    PP2A_slash_PP2A_minus_dephosph_minus_I1_PSD_2_k3 = 1.8e-16 vol_secINV;
  // k1*PP1_PSD_slash_PP1_minus_I1_star_*PP2A-k2*PP2A_slash_PP2A_minus_dephosph_minus_PP1_minus_I_star__PSD_slash_PP2A_minus_dephosph_minus_PP1_minus_I_star__PSD_cplx
  // k1 changed from 3.3e-6 to 6.6e-6
  PP2A_slash_PP2A_minus_dephosph_minus_PP1_minus_I_star__PSD_1: PP1_PSD_slash_PP1_minus_I1_star_ + PP2A -> PP2A_slash_PP2A_minus_dephosph_minus_PP1_minus_I_star__PSD_slash_PP2A_minus_dephosph_minus_PP1_minus_I_star__PSD_cplx; PP2A_slash_PP2A_minus_dephosph_minus_PP1_minus_I_star__PSD_1_k1*PP1_PSD_slash_PP1_minus_I1_star_*PP2A - PP2A_slash_PP2A_minus_dephosph_minus_PP1_minus_I_star__PSD_1_k2*PP2A_slash_PP2A_minus_dephosph_minus_PP1_minus_I_star__PSD_slash_PP2A_minus_dephosph_minus_PP1_minus_I_star__PSD_cplx;
    PP2A_slash_PP2A_minus_dephosph_minus_PP1_minus_I_star__PSD_1_k1 = 6.4584e-18 vol_uMINVsecINV; PP2A_slash_PP2A_minus_dephosph_minus_PP1_minus_I_star__PSD_1_k2 = 7.50006e-16 vol_secINV;
  // k3*PP2A_slash_PP2A_minus_dephosph_minus_PP1_minus_I_star__PSD_slash_PP2A_minus_dephosph_minus_PP1_minus_I_star__PSD_cplx
  PP2A_slash_PP2A_minus_dephosph_minus_PP1_minus_I_star__PSD_2: PP2A_slash_PP2A_minus_dephosph_minus_PP1_minus_I_star__PSD_slash_PP2A_minus_dephosph_minus_PP1_minus_I_star__PSD_cplx => PP1_PSD_slash_PP1_minus_I1 + PP2A; PP2A_slash_PP2A_minus_dephosph_minus_PP1_minus_I_star__PSD_2_k3*PP2A_slash_PP2A_minus_dephosph_minus_PP1_minus_I_star__PSD_slash_PP2A_minus_dephosph_minus_PP1_minus_I_star__PSD_cplx;
    PP2A_slash_PP2A_minus_dephosph_minus_PP1_minus_I_star__PSD_2_k3 = 1.8e-16 vol_secINV;
  // k1*PP1_slash_I1_star_*CaNAB_minus_Ca4-k2*CaNAB_minus_Ca4_slash_dephosph_inhib1_noCaM_slash_dephosph_inhib1_noCaM_cplx
  // The rates here are so slow I do not know if we should even bother with this enz reacn. These numbers are from Liu and Storm. Other refs suggest that the Km stays the same but the Vmax goes to 10% of the CaM stim levels. Prev: k1=2.2e-9, k2 = 0.0052, k3 = 0.0013 New : k1=5.7e-8, k2=.136, k3=.034
  CaNAB_minus_Ca4_slash_dephosph_inhib1_noCaM_1: PP1_slash_I1_star_ + CaNAB_minus_Ca4 -> CaNAB_minus_Ca4_slash_dephosph_inhib1_noCaM_slash_dephosph_inhib1_noCaM_cplx; CaNAB_minus_Ca4_slash_dephosph_inhib1_noCaM_1_k1*PP1_slash_I1_star_*CaNAB_minus_Ca4 - CaNAB_minus_Ca4_slash_dephosph_inhib1_noCaM_1_k2*CaNAB_minus_Ca4_slash_dephosph_inhib1_noCaM_slash_dephosph_inhib1_noCaM_cplx;
    CaNAB_minus_Ca4_slash_dephosph_inhib1_noCaM_1_k1 = 3.0779838e-18 vol_uMINVsecINV; CaNAB_minus_Ca4_slash_dephosph_inhib1_noCaM_1_k2 = 1.224e-17 vol_secINV;
  // k3*CaNAB_minus_Ca4_slash_dephosph_inhib1_noCaM_slash_dephosph_inhib1_noCaM_cplx
  CaNAB_minus_Ca4_slash_dephosph_inhib1_noCaM_2: CaNAB_minus_Ca4_slash_dephosph_inhib1_noCaM_slash_dephosph_inhib1_noCaM_cplx => PP1_slash_I1 + CaNAB_minus_Ca4; CaNAB_minus_Ca4_slash_dephosph_inhib1_noCaM_2_k3*CaNAB_minus_Ca4_slash_dephosph_inhib1_noCaM_slash_dephosph_inhib1_noCaM_cplx;
    CaNAB_minus_Ca4_slash_dephosph_inhib1_noCaM_2_k3 = 3.06e-18 vol_secINV;
  // k1*PP1_PSD_slash_I1_star_*CaNAB_minus_Ca4-k2*CaNAB_minus_Ca4_slash_dephosph_inhib1_noCaM_PSD_slash_dephosph_inhib1_noCaM_PSD_cplx
  // The rates here are so slow I do not know if we should even bother with this enz reacn. These numbers are from Liu and Storm. Other refs suggest that the Km stays the same but the Vmax goes to 10% of the CaM stim levels. Prev: k1=2.2e-9, k2 = 0.0052, k3 = 0.0013 New : k1=5.7e-8, k2=.136, k3=.034
  CaNAB_minus_Ca4_slash_dephosph_inhib1_noCaM_PSD_1: PP1_PSD_slash_I1_star_ + CaNAB_minus_Ca4 -> CaNAB_minus_Ca4_slash_dephosph_inhib1_noCaM_PSD_slash_dephosph_inhib1_noCaM_PSD_cplx; CaNAB_minus_Ca4_slash_dephosph_inhib1_noCaM_PSD_1_k1*PP1_PSD_slash_I1_star_*CaNAB_minus_Ca4 - CaNAB_minus_Ca4_slash_dephosph_inhib1_noCaM_PSD_1_k2*CaNAB_minus_Ca4_slash_dephosph_inhib1_noCaM_PSD_slash_dephosph_inhib1_noCaM_PSD_cplx;
    CaNAB_minus_Ca4_slash_dephosph_inhib1_noCaM_PSD_1_k1 = 3.420036e-19 vol_uMINVsecINV; CaNAB_minus_Ca4_slash_dephosph_inhib1_noCaM_PSD_1_k2 = 1.224e-17 vol_secINV;
  // k3*CaNAB_minus_Ca4_slash_dephosph_inhib1_noCaM_PSD_slash_dephosph_inhib1_noCaM_PSD_cplx
  CaNAB_minus_Ca4_slash_dephosph_inhib1_noCaM_PSD_2: CaNAB_minus_Ca4_slash_dephosph_inhib1_noCaM_PSD_slash_dephosph_inhib1_noCaM_PSD_cplx => PP1_PSD_slash_I1 + CaNAB_minus_Ca4; CaNAB_minus_Ca4_slash_dephosph_inhib1_noCaM_PSD_2_k3*CaNAB_minus_Ca4_slash_dephosph_inhib1_noCaM_PSD_slash_dephosph_inhib1_noCaM_PSD_cplx;
    CaNAB_minus_Ca4_slash_dephosph_inhib1_noCaM_PSD_2_k3 = 3.06e-18 vol_secINV;
  // k1*CaMKII_minus_thr286_minus_PSD*tot_minus_auto_minus_PSD-k2*tot_minus_auto_minus_PSD_slash_auton_minus_305_minus_PSD_slash_auton_minus_305_minus_PSD_cplx
  tot_minus_auto_minus_PSD_slash_auton_minus_305_minus_PSD_1: CaMKII_minus_thr286_minus_PSD + $tot_minus_auto_minus_PSD -> tot_minus_auto_minus_PSD_slash_auton_minus_305_minus_PSD_slash_auton_minus_305_minus_PSD_cplx; tot_minus_auto_minus_PSD_slash_auton_minus_305_minus_PSD_1_k1*CaMKII_minus_thr286_minus_PSD*tot_minus_auto_minus_PSD - tot_minus_auto_minus_PSD_slash_auton_minus_305_minus_PSD_1_k2*tot_minus_auto_minus_PSD_slash_auton_minus_305_minus_PSD_slash_auton_minus_305_minus_PSD_cplx;
    tot_minus_auto_minus_PSD_slash_auton_minus_305_minus_PSD_1_k1 = 6e-19 vol_uMINVsecINV; tot_minus_auto_minus_PSD_slash_auton_minus_305_minus_PSD_1_k2 = 2.4e-16 vol_secINV;
  // k3*tot_minus_auto_minus_PSD_slash_auton_minus_305_minus_PSD_slash_auton_minus_305_minus_PSD_cplx
  tot_minus_auto_minus_PSD_slash_auton_minus_305_minus_PSD_2: tot_minus_auto_minus_PSD_slash_auton_minus_305_minus_PSD_slash_auton_minus_305_minus_PSD_cplx => CaMKII_star__star__star__minus_PSD + $tot_minus_auto_minus_PSD; tot_minus_auto_minus_PSD_slash_auton_minus_305_minus_PSD_2_k3*tot_minus_auto_minus_PSD_slash_auton_minus_305_minus_PSD_slash_auton_minus_305_minus_PSD_cplx;
    tot_minus_auto_minus_PSD_slash_auton_minus_305_minus_PSD_2_k3 = 6e-17 vol_secINV;
  // k1*CaMKII_minus_CaM_minus_PSD*tot_minus_auto_minus_PSD-k2*tot_minus_auto_minus_PSD_slash_auton_minus_286_minus_PSD_slash_auton_minus_286_minus_PSD_cplx
  tot_minus_auto_minus_PSD_slash_auton_minus_286_minus_PSD_1: CaMKII_minus_CaM_minus_PSD + $tot_minus_auto_minus_PSD -> tot_minus_auto_minus_PSD_slash_auton_minus_286_minus_PSD_slash_auton_minus_286_minus_PSD_cplx; tot_minus_auto_minus_PSD_slash_auton_minus_286_minus_PSD_1_k1*CaMKII_minus_CaM_minus_PSD*tot_minus_auto_minus_PSD - tot_minus_auto_minus_PSD_slash_auton_minus_286_minus_PSD_1_k2*tot_minus_auto_minus_PSD_slash_auton_minus_286_minus_PSD_slash_auton_minus_286_minus_PSD_cplx;
    tot_minus_auto_minus_PSD_slash_auton_minus_286_minus_PSD_1_k1 = 4.99998e-20 vol_uMINVsecINV; tot_minus_auto_minus_PSD_slash_auton_minus_286_minus_PSD_1_k2 = 2e-17 vol_secINV;
  // k3*tot_minus_auto_minus_PSD_slash_auton_minus_286_minus_PSD_slash_auton_minus_286_minus_PSD_cplx
  tot_minus_auto_minus_PSD_slash_auton_minus_286_minus_PSD_2: tot_minus_auto_minus_PSD_slash_auton_minus_286_minus_PSD_slash_auton_minus_286_minus_PSD_cplx => CaMKII_minus_thr286_minus_CaM_minus_PSD + $tot_minus_auto_minus_PSD; tot_minus_auto_minus_PSD_slash_auton_minus_286_minus_PSD_2_k3*tot_minus_auto_minus_PSD_slash_auton_minus_286_minus_PSD_slash_auton_minus_286_minus_PSD_cplx;
    tot_minus_auto_minus_PSD_slash_auton_minus_286_minus_PSD_2_k3 = 5e-18 vol_secINV;
  // k1*CaMKII_minus_PSD*tot_minus_auto_minus_PSD-k2*tot_minus_auto_minus_PSD_slash_auton_minus_autoph_slash_auton_minus_autoph_cplx
  tot_minus_auto_minus_PSD_slash_auton_minus_autoph_1: CaMKII_minus_PSD + $tot_minus_auto_minus_PSD -> tot_minus_auto_minus_PSD_slash_auton_minus_autoph_slash_auton_minus_autoph_cplx; tot_minus_auto_minus_PSD_slash_auton_minus_autoph_1_k1*CaMKII_minus_PSD*tot_minus_auto_minus_PSD - tot_minus_auto_minus_PSD_slash_auton_minus_autoph_1_k2*tot_minus_auto_minus_PSD_slash_auton_minus_autoph_slash_auton_minus_autoph_cplx;
    tot_minus_auto_minus_PSD_slash_auton_minus_autoph_1_k1 = 1.99998e-19 vol_uMINVsecINV; tot_minus_auto_minus_PSD_slash_auton_minus_autoph_1_k2 = 8e-17 vol_secINV;
  // k3*tot_minus_auto_minus_PSD_slash_auton_minus_autoph_slash_auton_minus_autoph_cplx
  tot_minus_auto_minus_PSD_slash_auton_minus_autoph_2: tot_minus_auto_minus_PSD_slash_auton_minus_autoph_slash_auton_minus_autoph_cplx => CaMKII_minus_thr286_minus_PSD + $tot_minus_auto_minus_PSD; tot_minus_auto_minus_PSD_slash_auton_minus_autoph_2_k3*tot_minus_auto_minus_PSD_slash_auton_minus_autoph_slash_auton_minus_autoph_cplx;
    tot_minus_auto_minus_PSD_slash_auton_minus_autoph_2_k3 = 2e-17 vol_secINV;
  // k1*CaMKII_minus_thr286_minus_CaM_minus_PSD*PP1_minus_active_PSD-k2*PP1_minus_active_PSD_slash_Deph_minus_thr286_slash_Deph_minus_thr286_cplx
  PP1_minus_active_PSD_slash_Deph_minus_thr286_1: CaMKII_minus_thr286_minus_CaM_minus_PSD + PP1_minus_active_PSD -> PP1_minus_active_PSD_slash_Deph_minus_thr286_slash_Deph_minus_thr286_cplx; PP1_minus_active_PSD_slash_Deph_minus_thr286_1_k1*CaMKII_minus_thr286_minus_CaM_minus_PSD*PP1_minus_active_PSD - PP1_minus_active_PSD_slash_Deph_minus_thr286_1_k2*PP1_minus_active_PSD_slash_Deph_minus_thr286_slash_Deph_minus_thr286_cplx;
    PP1_minus_active_PSD_slash_Deph_minus_thr286_1_k1 = 4.99998e-18 vol_uMINVsecINV; PP1_minus_active_PSD_slash_Deph_minus_thr286_1_k2 = 8e-18 vol_secINV;
  // k3*PP1_minus_active_PSD_slash_Deph_minus_thr286_slash_Deph_minus_thr286_cplx
  PP1_minus_active_PSD_slash_Deph_minus_thr286_2: PP1_minus_active_PSD_slash_Deph_minus_thr286_slash_Deph_minus_thr286_cplx => CaMKII_minus_CaM_minus_PSD + PP1_minus_active_PSD; PP1_minus_active_PSD_slash_Deph_minus_thr286_2_k3*PP1_minus_active_PSD_slash_Deph_minus_thr286_slash_Deph_minus_thr286_cplx;
    PP1_minus_active_PSD_slash_Deph_minus_thr286_2_k3 = 2e-18 vol_secINV;
  // k1*CaMKII_minus_thr286_minus_PSD*PP1_minus_active_PSD-k2*PP1_minus_active_PSD_slash_Deph_minus_thr286b_slash_Deph_minus_thr286b_cplx
  PP1_minus_active_PSD_slash_Deph_minus_thr286b_1: CaMKII_minus_thr286_minus_PSD + PP1_minus_active_PSD -> PP1_minus_active_PSD_slash_Deph_minus_thr286b_slash_Deph_minus_thr286b_cplx; PP1_minus_active_PSD_slash_Deph_minus_thr286b_1_k1*CaMKII_minus_thr286_minus_PSD*PP1_minus_active_PSD - PP1_minus_active_PSD_slash_Deph_minus_thr286b_1_k2*PP1_minus_active_PSD_slash_Deph_minus_thr286b_slash_Deph_minus_thr286b_cplx;
    PP1_minus_active_PSD_slash_Deph_minus_thr286b_1_k1 = 4.99998e-18 vol_uMINVsecINV; PP1_minus_active_PSD_slash_Deph_minus_thr286b_1_k2 = 8e-18 vol_secINV;
  // k3*PP1_minus_active_PSD_slash_Deph_minus_thr286b_slash_Deph_minus_thr286b_cplx
  PP1_minus_active_PSD_slash_Deph_minus_thr286b_2: PP1_minus_active_PSD_slash_Deph_minus_thr286b_slash_Deph_minus_thr286b_cplx => CaMKII_minus_PSD + PP1_minus_active_PSD; PP1_minus_active_PSD_slash_Deph_minus_thr286b_2_k3*PP1_minus_active_PSD_slash_Deph_minus_thr286b_slash_Deph_minus_thr286b_cplx;
    PP1_minus_active_PSD_slash_Deph_minus_thr286b_2_k3 = 2e-18 vol_secINV;
  // k1*CaMKII_star__star__star__minus_PSD*PP1_minus_active_PSD-k2*PP1_minus_active_PSD_slash_Deph_minus_thr305_slash_Deph_minus_thr305_cplx
  PP1_minus_active_PSD_slash_Deph_minus_thr305_1: CaMKII_star__star__star__minus_PSD + PP1_minus_active_PSD -> PP1_minus_active_PSD_slash_Deph_minus_thr305_slash_Deph_minus_thr305_cplx; PP1_minus_active_PSD_slash_Deph_minus_thr305_1_k1*CaMKII_star__star__star__minus_PSD*PP1_minus_active_PSD - PP1_minus_active_PSD_slash_Deph_minus_thr305_1_k2*PP1_minus_active_PSD_slash_Deph_minus_thr305_slash_Deph_minus_thr305_cplx;
    PP1_minus_active_PSD_slash_Deph_minus_thr305_1_k1 = 4.99998e-18 vol_uMINVsecINV; PP1_minus_active_PSD_slash_Deph_minus_thr305_1_k2 = 8e-18 vol_secINV;
  // k3*PP1_minus_active_PSD_slash_Deph_minus_thr305_slash_Deph_minus_thr305_cplx
  PP1_minus_active_PSD_slash_Deph_minus_thr305_2: PP1_minus_active_PSD_slash_Deph_minus_thr305_slash_Deph_minus_thr305_cplx => CaMKII_minus_thr286_minus_PSD + PP1_minus_active_PSD; PP1_minus_active_PSD_slash_Deph_minus_thr305_2_k3*PP1_minus_active_PSD_slash_Deph_minus_thr305_slash_Deph_minus_thr305_cplx;
    PP1_minus_active_PSD_slash_Deph_minus_thr305_2_k3 = 2e-18 vol_secINV;
  // k1*CaMKII_star__star__star__minus_PSD*PP1_minus_active_PSD-k2*PP1_minus_active_PSD_slash_Deph_minus_thr286c_slash_Deph_minus_thr286c_cplx
  PP1_minus_active_PSD_slash_Deph_minus_thr286c_1: CaMKII_star__star__star__minus_PSD + PP1_minus_active_PSD -> PP1_minus_active_PSD_slash_Deph_minus_thr286c_slash_Deph_minus_thr286c_cplx; PP1_minus_active_PSD_slash_Deph_minus_thr286c_1_k1*CaMKII_star__star__star__minus_PSD*PP1_minus_active_PSD - PP1_minus_active_PSD_slash_Deph_minus_thr286c_1_k2*PP1_minus_active_PSD_slash_Deph_minus_thr286c_slash_Deph_minus_thr286c_cplx;
    PP1_minus_active_PSD_slash_Deph_minus_thr286c_1_k1 = 4.99998e-18 vol_uMINVsecINV; PP1_minus_active_PSD_slash_Deph_minus_thr286c_1_k2 = 8e-18 vol_secINV;
  // k3*PP1_minus_active_PSD_slash_Deph_minus_thr286c_slash_Deph_minus_thr286c_cplx
  PP1_minus_active_PSD_slash_Deph_minus_thr286c_2: PP1_minus_active_PSD_slash_Deph_minus_thr286c_slash_Deph_minus_thr286c_cplx => CaMKII_minus_thr305_minus_PSD + PP1_minus_active_PSD; PP1_minus_active_PSD_slash_Deph_minus_thr286c_2_k3*PP1_minus_active_PSD_slash_Deph_minus_thr286c_slash_Deph_minus_thr286c_cplx;
    PP1_minus_active_PSD_slash_Deph_minus_thr286c_2_k3 = 2e-18 vol_secINV;
  // k1*CaMKII_minus_thr305_minus_PSD*PP1_minus_active_PSD-k2*PP1_minus_active_PSD_slash_Deph_minus_thr305a_slash_Deph_minus_thr305a_cplx
  PP1_minus_active_PSD_slash_Deph_minus_thr305a_1: CaMKII_minus_thr305_minus_PSD + PP1_minus_active_PSD -> PP1_minus_active_PSD_slash_Deph_minus_thr305a_slash_Deph_minus_thr305a_cplx; PP1_minus_active_PSD_slash_Deph_minus_thr305a_1_k1*CaMKII_minus_thr305_minus_PSD*PP1_minus_active_PSD - PP1_minus_active_PSD_slash_Deph_minus_thr305a_1_k2*PP1_minus_active_PSD_slash_Deph_minus_thr305a_slash_Deph_minus_thr305a_cplx;
    PP1_minus_active_PSD_slash_Deph_minus_thr305a_1_k1 = 4.99998e-18 vol_uMINVsecINV; PP1_minus_active_PSD_slash_Deph_minus_thr305a_1_k2 = 8e-18 vol_secINV;
  // k3*PP1_minus_active_PSD_slash_Deph_minus_thr305a_slash_Deph_minus_thr305a_cplx
  PP1_minus_active_PSD_slash_Deph_minus_thr305a_2: PP1_minus_active_PSD_slash_Deph_minus_thr305a_slash_Deph_minus_thr305a_cplx => CaMKII_minus_PSD + PP1_minus_active_PSD; PP1_minus_active_PSD_slash_Deph_minus_thr305a_2_k3*PP1_minus_active_PSD_slash_Deph_minus_thr305a_slash_Deph_minus_thr305a_cplx;
    PP1_minus_active_PSD_slash_Deph_minus_thr305a_2_k3 = 2e-18 vol_secINV;
  // k1*PP1_slash_I1_star_*CaM_Ca_n_minus_CaNAB-k2*CaM_Ca_n_minus_CaNAB_slash_dephosph_inhib1_slash_dephosph_inhib1_cplx
  CaM_Ca_n_minus_CaNAB_slash_dephosph_inhib1_1: PP1_slash_I1_star_ + CaM_Ca_n_minus_CaNAB -> CaM_Ca_n_minus_CaNAB_slash_dephosph_inhib1_slash_dephosph_inhib1_cplx; CaM_Ca_n_minus_CaNAB_slash_dephosph_inhib1_1_k1*PP1_slash_I1_star_*CaM_Ca_n_minus_CaNAB - CaM_Ca_n_minus_CaNAB_slash_dephosph_inhib1_1_k2*CaM_Ca_n_minus_CaNAB_slash_dephosph_inhib1_slash_dephosph_inhib1_cplx;
    CaM_Ca_n_minus_CaNAB_slash_dephosph_inhib1_1_k1 = 3.0779838e-17 vol_uMINVsecINV; CaM_Ca_n_minus_CaNAB_slash_dephosph_inhib1_1_k2 = 1.224e-16 vol_secINV;
  // k3*CaM_Ca_n_minus_CaNAB_slash_dephosph_inhib1_slash_dephosph_inhib1_cplx
  CaM_Ca_n_minus_CaNAB_slash_dephosph_inhib1_2: CaM_Ca_n_minus_CaNAB_slash_dephosph_inhib1_slash_dephosph_inhib1_cplx => PP1_slash_I1 + CaM_Ca_n_minus_CaNAB; CaM_Ca_n_minus_CaNAB_slash_dephosph_inhib1_2_k3*CaM_Ca_n_minus_CaNAB_slash_dephosph_inhib1_slash_dephosph_inhib1_cplx;
    CaM_Ca_n_minus_CaNAB_slash_dephosph_inhib1_2_k3 = 3.06e-17 vol_secINV;
  // k1*PP1_slash_PP1_minus_I1_star_*CaM_Ca_n_minus_CaNAB-k2*CaM_Ca_n_minus_CaNAB_slash_dephosph_minus_PP1_minus_I_star__slash_dephosph_minus_PP1_minus_I_star__cplx
  CaM_Ca_n_minus_CaNAB_slash_dephosph_minus_PP1_minus_I_star__1: PP1_slash_PP1_minus_I1_star_ + CaM_Ca_n_minus_CaNAB -> CaM_Ca_n_minus_CaNAB_slash_dephosph_minus_PP1_minus_I_star__slash_dephosph_minus_PP1_minus_I_star__cplx; CaM_Ca_n_minus_CaNAB_slash_dephosph_minus_PP1_minus_I_star__1_k1*PP1_slash_PP1_minus_I1_star_*CaM_Ca_n_minus_CaNAB - CaM_Ca_n_minus_CaNAB_slash_dephosph_minus_PP1_minus_I_star__1_k2*CaM_Ca_n_minus_CaNAB_slash_dephosph_minus_PP1_minus_I_star__slash_dephosph_minus_PP1_minus_I_star__cplx;
    CaM_Ca_n_minus_CaNAB_slash_dephosph_minus_PP1_minus_I_star__1_k1 = 3.0779838e-17 vol_uMINVsecINV; CaM_Ca_n_minus_CaNAB_slash_dephosph_minus_PP1_minus_I_star__1_k2 = 1.224e-16 vol_secINV;
  // k3*CaM_Ca_n_minus_CaNAB_slash_dephosph_minus_PP1_minus_I_star__slash_dephosph_minus_PP1_minus_I_star__cplx
  CaM_Ca_n_minus_CaNAB_slash_dephosph_minus_PP1_minus_I_star__2: CaM_Ca_n_minus_CaNAB_slash_dephosph_minus_PP1_minus_I_star__slash_dephosph_minus_PP1_minus_I_star__cplx => PP1_slash_PP1_minus_I1 + CaM_Ca_n_minus_CaNAB; CaM_Ca_n_minus_CaNAB_slash_dephosph_minus_PP1_minus_I_star__2_k3*CaM_Ca_n_minus_CaNAB_slash_dephosph_minus_PP1_minus_I_star__slash_dephosph_minus_PP1_minus_I_star__cplx;
    CaM_Ca_n_minus_CaNAB_slash_dephosph_minus_PP1_minus_I_star__2_k3 = 3.06e-17 vol_secINV;
  // k1*PP1_PSD_slash_I1_star_*CaM_Ca_n_minus_CaNAB-k2*CaM_Ca_n_minus_CaNAB_slash_dephosph_inhib1_PSD_slash_dephosph_inhib1_PSD_cplx
  CaM_Ca_n_minus_CaNAB_slash_dephosph_inhib1_PSD_1: PP1_PSD_slash_I1_star_ + CaM_Ca_n_minus_CaNAB -> CaM_Ca_n_minus_CaNAB_slash_dephosph_inhib1_PSD_slash_dephosph_inhib1_PSD_cplx; CaM_Ca_n_minus_CaNAB_slash_dephosph_inhib1_PSD_1_k1*PP1_PSD_slash_I1_star_*CaM_Ca_n_minus_CaNAB - CaM_Ca_n_minus_CaNAB_slash_dephosph_inhib1_PSD_1_k2*CaM_Ca_n_minus_CaNAB_slash_dephosph_inhib1_PSD_slash_dephosph_inhib1_PSD_cplx;
    CaM_Ca_n_minus_CaNAB_slash_dephosph_inhib1_PSD_1_k1 = 3.420036e-18 vol_uMINVsecINV; CaM_Ca_n_minus_CaNAB_slash_dephosph_inhib1_PSD_1_k2 = 1.224e-16 vol_secINV;
  // k3*CaM_Ca_n_minus_CaNAB_slash_dephosph_inhib1_PSD_slash_dephosph_inhib1_PSD_cplx
  CaM_Ca_n_minus_CaNAB_slash_dephosph_inhib1_PSD_2: CaM_Ca_n_minus_CaNAB_slash_dephosph_inhib1_PSD_slash_dephosph_inhib1_PSD_cplx => PP1_PSD_slash_I1 + CaM_Ca_n_minus_CaNAB; CaM_Ca_n_minus_CaNAB_slash_dephosph_inhib1_PSD_2_k3*CaM_Ca_n_minus_CaNAB_slash_dephosph_inhib1_PSD_slash_dephosph_inhib1_PSD_cplx;
    CaM_Ca_n_minus_CaNAB_slash_dephosph_inhib1_PSD_2_k3 = 3.06e-17 vol_secINV;
  // k1*PP1_PSD_slash_PP1_minus_I1_star_*CaM_Ca_n_minus_CaNAB-k2*CaM_Ca_n_minus_CaNAB_slash_dephosph_minus_PP1_minus_I_star__PSD_slash_dephosph_minus_PP1_minus_I_star__PSD_cplx
  CaM_Ca_n_minus_CaNAB_slash_dephosph_minus_PP1_minus_I_star__PSD_1: PP1_PSD_slash_PP1_minus_I1_star_ + CaM_Ca_n_minus_CaNAB -> CaM_Ca_n_minus_CaNAB_slash_dephosph_minus_PP1_minus_I_star__PSD_slash_dephosph_minus_PP1_minus_I_star__PSD_cplx; CaM_Ca_n_minus_CaNAB_slash_dephosph_minus_PP1_minus_I_star__PSD_1_k1*PP1_PSD_slash_PP1_minus_I1_star_*CaM_Ca_n_minus_CaNAB - CaM_Ca_n_minus_CaNAB_slash_dephosph_minus_PP1_minus_I_star__PSD_1_k2*CaM_Ca_n_minus_CaNAB_slash_dephosph_minus_PP1_minus_I_star__PSD_slash_dephosph_minus_PP1_minus_I_star__PSD_cplx;
    CaM_Ca_n_minus_CaNAB_slash_dephosph_minus_PP1_minus_I_star__PSD_1_k1 = 3.420036e-18 vol_uMINVsecINV; CaM_Ca_n_minus_CaNAB_slash_dephosph_minus_PP1_minus_I_star__PSD_1_k2 = 1.224e-16 vol_secINV;
  // k3*CaM_Ca_n_minus_CaNAB_slash_dephosph_minus_PP1_minus_I_star__PSD_slash_dephosph_minus_PP1_minus_I_star__PSD_cplx
  CaM_Ca_n_minus_CaNAB_slash_dephosph_minus_PP1_minus_I_star__PSD_2: CaM_Ca_n_minus_CaNAB_slash_dephosph_minus_PP1_minus_I_star__PSD_slash_dephosph_minus_PP1_minus_I_star__PSD_cplx => PP1_PSD_slash_PP1_minus_I1 + CaM_Ca_n_minus_CaNAB; CaM_Ca_n_minus_CaNAB_slash_dephosph_minus_PP1_minus_I_star__PSD_2_k3*CaM_Ca_n_minus_CaNAB_slash_dephosph_minus_PP1_minus_I_star__PSD_slash_dephosph_minus_PP1_minus_I_star__PSD_cplx;
    CaM_Ca_n_minus_CaNAB_slash_dephosph_minus_PP1_minus_I_star__PSD_2_k3 = 3.06e-17 vol_secINV;
  // k1*CaMKII_minus_thr286_minus_PSD*tot_minus_CaM_minus_CaMKII_minus_PSD-k2*tot_minus_CaM_minus_CaMKII_minus_PSD_slash_CaM_minus_act_minus_305_minus_PSD_slash_CaM_minus_act_minus_305_minus_PSD_cplx
  tot_minus_CaM_minus_CaMKII_minus_PSD_slash_CaM_minus_act_minus_305_minus_PSD_1: CaMKII_minus_thr286_minus_PSD + $tot_minus_CaM_minus_CaMKII_minus_PSD -> tot_minus_CaM_minus_CaMKII_minus_PSD_slash_CaM_minus_act_minus_305_minus_PSD_slash_CaM_minus_act_minus_305_minus_PSD_cplx; tot_minus_CaM_minus_CaMKII_minus_PSD_slash_CaM_minus_act_minus_305_minus_PSD_1_k1*CaMKII_minus_thr286_minus_PSD*tot_minus_CaM_minus_CaMKII_minus_PSD - tot_minus_CaM_minus_CaMKII_minus_PSD_slash_CaM_minus_act_minus_305_minus_PSD_1_k2*tot_minus_CaM_minus_CaMKII_minus_PSD_slash_CaM_minus_act_minus_305_minus_PSD_slash_CaM_minus_act_minus_305_minus_PSD_cplx;
    tot_minus_CaM_minus_CaMKII_minus_PSD_slash_CaM_minus_act_minus_305_minus_PSD_1_k1 = 9.375e-19 vol_uMINVsecINV; tot_minus_CaM_minus_CaMKII_minus_PSD_slash_CaM_minus_act_minus_305_minus_PSD_1_k2 = 2.4e-16 vol_secINV;
  // k3*tot_minus_CaM_minus_CaMKII_minus_PSD_slash_CaM_minus_act_minus_305_minus_PSD_slash_CaM_minus_act_minus_305_minus_PSD_cplx
  tot_minus_CaM_minus_CaMKII_minus_PSD_slash_CaM_minus_act_minus_305_minus_PSD_2: tot_minus_CaM_minus_CaMKII_minus_PSD_slash_CaM_minus_act_minus_305_minus_PSD_slash_CaM_minus_act_minus_305_minus_PSD_cplx => CaMKII_star__star__star__minus_PSD + $tot_minus_CaM_minus_CaMKII_minus_PSD; tot_minus_CaM_minus_CaMKII_minus_PSD_slash_CaM_minus_act_minus_305_minus_PSD_2_k3*tot_minus_CaM_minus_CaMKII_minus_PSD_slash_CaM_minus_act_minus_305_minus_PSD_slash_CaM_minus_act_minus_305_minus_PSD_cplx;
    tot_minus_CaM_minus_CaMKII_minus_PSD_slash_CaM_minus_act_minus_305_minus_PSD_2_k3 = 6e-17 vol_secINV;
  // k1*CaMKII_minus_CaM_minus_PSD*tot_minus_CaM_minus_CaMKII_minus_PSD-k2*tot_minus_CaM_minus_CaMKII_minus_PSD_slash_CaM_minus_act_minus_286_minus_PSD_slash_CaM_minus_act_minus_286_minus_PSD_cplx
  tot_minus_CaM_minus_CaMKII_minus_PSD_slash_CaM_minus_act_minus_286_minus_PSD_1: CaMKII_minus_CaM_minus_PSD + $tot_minus_CaM_minus_CaMKII_minus_PSD -> tot_minus_CaM_minus_CaMKII_minus_PSD_slash_CaM_minus_act_minus_286_minus_PSD_slash_CaM_minus_act_minus_286_minus_PSD_cplx; tot_minus_CaM_minus_CaMKII_minus_PSD_slash_CaM_minus_act_minus_286_minus_PSD_1_k1*CaMKII_minus_CaM_minus_PSD*tot_minus_CaM_minus_CaMKII_minus_PSD - tot_minus_CaM_minus_CaMKII_minus_PSD_slash_CaM_minus_act_minus_286_minus_PSD_1_k2*tot_minus_CaM_minus_CaMKII_minus_PSD_slash_CaM_minus_act_minus_286_minus_PSD_slash_CaM_minus_act_minus_286_minus_PSD_cplx;
    tot_minus_CaM_minus_CaMKII_minus_PSD_slash_CaM_minus_act_minus_286_minus_PSD_1_k1 = 7.8126e-20 vol_uMINVsecINV; tot_minus_CaM_minus_CaMKII_minus_PSD_slash_CaM_minus_act_minus_286_minus_PSD_1_k2 = 2e-17 vol_secINV;
  // k3*tot_minus_CaM_minus_CaMKII_minus_PSD_slash_CaM_minus_act_minus_286_minus_PSD_slash_CaM_minus_act_minus_286_minus_PSD_cplx
  tot_minus_CaM_minus_CaMKII_minus_PSD_slash_CaM_minus_act_minus_286_minus_PSD_2: tot_minus_CaM_minus_CaMKII_minus_PSD_slash_CaM_minus_act_minus_286_minus_PSD_slash_CaM_minus_act_minus_286_minus_PSD_cplx => CaMKII_minus_thr286_minus_CaM_minus_PSD + $tot_minus_CaM_minus_CaMKII_minus_PSD; tot_minus_CaM_minus_CaMKII_minus_PSD_slash_CaM_minus_act_minus_286_minus_PSD_2_k3*tot_minus_CaM_minus_CaMKII_minus_PSD_slash_CaM_minus_act_minus_286_minus_PSD_slash_CaM_minus_act_minus_286_minus_PSD_cplx;
    tot_minus_CaM_minus_CaMKII_minus_PSD_slash_CaM_minus_act_minus_286_minus_PSD_2_k3 = 5e-18 vol_secINV;
  // k1*CaMKII_minus_PSD*tot_minus_CaM_minus_CaMKII_minus_PSD-k2*tot_minus_CaM_minus_CaMKII_minus_PSD_slash_CaM_act_autoph_slash_CaM_act_autoph_cplx
  tot_minus_CaM_minus_CaMKII_minus_PSD_slash_CaM_act_autoph_1: CaMKII_minus_PSD + $tot_minus_CaM_minus_CaMKII_minus_PSD -> tot_minus_CaM_minus_CaMKII_minus_PSD_slash_CaM_act_autoph_slash_CaM_act_autoph_cplx; tot_minus_CaM_minus_CaMKII_minus_PSD_slash_CaM_act_autoph_1_k1*CaMKII_minus_PSD*tot_minus_CaM_minus_CaMKII_minus_PSD - tot_minus_CaM_minus_CaMKII_minus_PSD_slash_CaM_act_autoph_1_k2*tot_minus_CaM_minus_CaMKII_minus_PSD_slash_CaM_act_autoph_slash_CaM_act_autoph_cplx;
    tot_minus_CaM_minus_CaMKII_minus_PSD_slash_CaM_act_autoph_1_k1 = 3.12498e-19 vol_uMINVsecINV; tot_minus_CaM_minus_CaMKII_minus_PSD_slash_CaM_act_autoph_1_k2 = 8e-17 vol_secINV;
  // k3*tot_minus_CaM_minus_CaMKII_minus_PSD_slash_CaM_act_autoph_slash_CaM_act_autoph_cplx
  tot_minus_CaM_minus_CaMKII_minus_PSD_slash_CaM_act_autoph_2: tot_minus_CaM_minus_CaMKII_minus_PSD_slash_CaM_act_autoph_slash_CaM_act_autoph_cplx => CaMKII_minus_thr286_minus_PSD + $tot_minus_CaM_minus_CaMKII_minus_PSD; tot_minus_CaM_minus_CaMKII_minus_PSD_slash_CaM_act_autoph_2_k3*tot_minus_CaM_minus_CaMKII_minus_PSD_slash_CaM_act_autoph_slash_CaM_act_autoph_cplx;
    tot_minus_CaM_minus_CaMKII_minus_PSD_slash_CaM_act_autoph_2_k3 = 2e-17 vol_secINV;
  // kcat*AC_slash_AC1_minus_CaM*AC_slash_ATP/(Km+AC_slash_ATP)
  // 17 Feb 2005 Halved Vmax as the amount of enzyme has been doubled to get an integer value in the spine. 18 Feb 2005. Updated Km from BRENDA: EC No 4.6.1.1 Rat Km: 0.95 mM Turnover 12/sec. Human Km: 0.3 mM 12 umol/min/mg for mammalia, turnover is 12/sec See PMID 8663304 by Dessauer and Gilman JBC 271 1996 Unfortunately turnover range is from 34 down to 0.1 in different studies, according to BRENDA.
  AC_slash_AC1_minus_CaM_slash_kenz: $AC_slash_ATP => cAMP; AC_slash_AC1_minus_CaM_slash_kenz_kcat*AC_slash_AC1_minus_CaM*AC_slash_ATP/(AC_slash_AC1_minus_CaM_slash_kenz_Km + AC_slash_ATP);  // modifiers: AC_slash_AC1_minus_CaM
    AC_slash_AC1_minus_CaM_slash_kenz_kcat = 4.05e-16 vol_secINV; AC_slash_AC1_minus_CaM_slash_kenz_Km = 299.9976 uM1;
  // kcat*AC_slash_AC2_star_*AC_slash_ATP/(Km+AC_slash_ATP)
  // Reduced Km to match expt data for basal activation of AC2 by PKC. Now k1 = 2.9e-6, k2 = 72, k3 = 18 18 Feb: Raised Km to 300 based on BRENDA data. Unlikely to make much difference, given the vast amount of ATP.
  AC_slash_AC2_star__slash_kenz: $AC_slash_ATP => cAMP; AC_slash_AC2_star__slash_kenz_kcat*AC_slash_AC2_star_*AC_slash_ATP/(AC_slash_AC2_star__slash_kenz_Km + AC_slash_ATP);  // modifiers: AC_slash_AC2_star_
    AC_slash_AC2_star__slash_kenz_kcat = 1.8e-16 vol_secINV; AC_slash_AC2_star__slash_kenz_Km = 300.0019 uM1;
  // k1*cAMP*AC_slash_cAMP_minus_PDE-k2*AC_slash_cAMP_minus_PDE_slash_PDE_slash_PDE_cplx
  // Best rates are from Conti et al Biochem 34 7979-7987 1995. Though these are for the Sertoli cell form, it looks like they carry nicely into alternatively spliced brain form. See Sette et al JBC 269:28 18271-18274 Km ~2 uM, Vmax est ~ 10 umol/min/mg for pure form. Brain protein is 93 kD but this was 67. So k3 ~10, k2 ~40, k1 ~4.2e-6
  AC_slash_cAMP_minus_PDE_slash_PDE_1: cAMP + AC_slash_cAMP_minus_PDE -> AC_slash_cAMP_minus_PDE_slash_PDE_slash_PDE_cplx; AC_slash_cAMP_minus_PDE_slash_PDE_1_k1*cAMP*AC_slash_cAMP_minus_PDE - AC_slash_cAMP_minus_PDE_slash_PDE_1_k2*AC_slash_cAMP_minus_PDE_slash_PDE_slash_PDE_cplx;
    AC_slash_cAMP_minus_PDE_slash_PDE_1_k1 = 2.2680162e-16 vol_uMINVsecINV; AC_slash_cAMP_minus_PDE_slash_PDE_1_k2 = 3.6e-15 vol_secINV;
  // k3*AC_slash_cAMP_minus_PDE_slash_PDE_slash_PDE_cplx
  AC_slash_cAMP_minus_PDE_slash_PDE_2: AC_slash_cAMP_minus_PDE_slash_PDE_slash_PDE_cplx => AC_slash_AMP + AC_slash_cAMP_minus_PDE; AC_slash_cAMP_minus_PDE_slash_PDE_2_k3*AC_slash_cAMP_minus_PDE_slash_PDE_slash_PDE_cplx;
    AC_slash_cAMP_minus_PDE_slash_PDE_2_k3 = 9e-16 vol_secINV;
  // k1*cAMP*AC_slash_cAMP_minus_PDE_star_-k2*AC_slash_cAMP_minus_PDE_star__slash_PDE_star__slash_PDE_star__cplx
  // This form has about twice the activity of the unphosphorylated form. See Sette et al JBC 269:28 18271-18274 1994. We\'ll ignore cGMP effects for now.
  AC_slash_cAMP_minus_PDE_star__slash_PDE_star__1: cAMP + AC_slash_cAMP_minus_PDE_star_ -> AC_slash_cAMP_minus_PDE_star__slash_PDE_star__slash_PDE_star__cplx; AC_slash_cAMP_minus_PDE_star__slash_PDE_star__1_k1*cAMP*AC_slash_cAMP_minus_PDE_star_ - AC_slash_cAMP_minus_PDE_star__slash_PDE_star__1_k2*AC_slash_cAMP_minus_PDE_star__slash_PDE_star__slash_PDE_star__cplx;
    AC_slash_cAMP_minus_PDE_star__slash_PDE_star__1_k1 = 4.5359838e-16 vol_uMINVsecINV; AC_slash_cAMP_minus_PDE_star__slash_PDE_star__1_k2 = 7.2e-15 vol_secINV;
  // k3*AC_slash_cAMP_minus_PDE_star__slash_PDE_star__slash_PDE_star__cplx
  AC_slash_cAMP_minus_PDE_star__slash_PDE_star__2: AC_slash_cAMP_minus_PDE_star__slash_PDE_star__slash_PDE_star__cplx => AC_slash_AMP + AC_slash_cAMP_minus_PDE_star_; AC_slash_cAMP_minus_PDE_star__slash_PDE_star__2_k3*AC_slash_cAMP_minus_PDE_star__slash_PDE_star__slash_PDE_star__cplx;
    AC_slash_cAMP_minus_PDE_star__slash_PDE_star__2_k3 = 1.8e-15 vol_secINV;
  // k1*cAMP*AC_slash_PDE1-k2*AC_slash_PDE1_slash_PDE1_slash_PDE1_cplx
  // Rate is 1/6 of the CaM stim form. We\'ll just reduce all lf k1, k2, k3 so that the Vmax goes down 1/6.
  AC_slash_PDE1_slash_PDE1_1: cAMP + AC_slash_PDE1 -> AC_slash_PDE1_slash_PDE1_slash_PDE1_cplx; AC_slash_PDE1_slash_PDE1_1_k1*cAMP*AC_slash_PDE1 - AC_slash_PDE1_slash_PDE1_1_k2*AC_slash_PDE1_slash_PDE1_slash_PDE1_cplx;
    AC_slash_PDE1_slash_PDE1_1_k1 = 1.8900054e-17 vol_uMINVsecINV; AC_slash_PDE1_slash_PDE1_1_k2 = 6.003e-16 vol_secINV;
  // k3*AC_slash_PDE1_slash_PDE1_slash_PDE1_cplx
  AC_slash_PDE1_slash_PDE1_2: AC_slash_PDE1_slash_PDE1_slash_PDE1_cplx => AC_slash_AMP + AC_slash_PDE1; AC_slash_PDE1_slash_PDE1_2_k3*AC_slash_PDE1_slash_PDE1_slash_PDE1_cplx;
    AC_slash_PDE1_slash_PDE1_2_k3 = 1.5003e-16 vol_secINV;
  // k1*cAMP*AC_slash_CaM_dot_PDE1-k2*AC_slash_CaM_dot_PDE1_slash_CaM_dot_PDE1_slash_CaM_dot_PDE1_cplx
  // Max activity ~10umol/min/mg in presence of lots of CaM. Affinity is low, 40 uM. k3 = 10, k2 = 40, k1 = (50/40) / 6e5.
  AC_slash_CaM_dot_PDE1_slash_CaM_dot_PDE1_1: cAMP + AC_slash_CaM_dot_PDE1 -> AC_slash_CaM_dot_PDE1_slash_CaM_dot_PDE1_slash_CaM_dot_PDE1_cplx; AC_slash_CaM_dot_PDE1_slash_CaM_dot_PDE1_1_k1*cAMP*AC_slash_CaM_dot_PDE1 - AC_slash_CaM_dot_PDE1_slash_CaM_dot_PDE1_1_k2*AC_slash_CaM_dot_PDE1_slash_CaM_dot_PDE1_slash_CaM_dot_PDE1_cplx;
    AC_slash_CaM_dot_PDE1_slash_CaM_dot_PDE1_1_k1 = 1.1339838e-16 vol_uMINVsecINV; AC_slash_CaM_dot_PDE1_slash_CaM_dot_PDE1_1_k2 = 3.6e-15 vol_secINV;
  // k3*AC_slash_CaM_dot_PDE1_slash_CaM_dot_PDE1_slash_CaM_dot_PDE1_cplx
  AC_slash_CaM_dot_PDE1_slash_CaM_dot_PDE1_2: AC_slash_CaM_dot_PDE1_slash_CaM_dot_PDE1_slash_CaM_dot_PDE1_cplx => AC_slash_AMP + AC_slash_CaM_dot_PDE1; AC_slash_CaM_dot_PDE1_slash_CaM_dot_PDE1_2_k3*AC_slash_CaM_dot_PDE1_slash_CaM_dot_PDE1_slash_CaM_dot_PDE1_cplx;
    AC_slash_CaM_dot_PDE1_slash_CaM_dot_PDE1_2_k3 = 9e-16 vol_secINV;
  // k1*AC_slash_AC2*PKC_minus_active-k2*PKC_minus_active_slash_phosph_minus_AC2_slash_phosph_minus_AC2_cplx
  // Phorbol esters have little effect on AC1 or on the Gs-stimulation of AC2. So in this model we are only dealing with the increase in basal activation of AC2 induced by PKC k1 = 1.66e-6 k2 = 16 k3 =4
  PKC_minus_active_slash_phosph_minus_AC2_1: AC_slash_AC2 + PKC_minus_active -> PKC_minus_active_slash_phosph_minus_AC2_slash_phosph_minus_AC2_cplx; PKC_minus_active_slash_phosph_minus_AC2_1_k1*AC_slash_AC2*PKC_minus_active - PKC_minus_active_slash_phosph_minus_AC2_1_k2*PKC_minus_active_slash_phosph_minus_AC2_slash_phosph_minus_AC2_cplx;
    PKC_minus_active_slash_phosph_minus_AC2_1_k1 = 5.399946e-17 vol_uMINVsecINV; PKC_minus_active_slash_phosph_minus_AC2_1_k2 = 1.44e-15 vol_secINV;
  // k3*PKC_minus_active_slash_phosph_minus_AC2_slash_phosph_minus_AC2_cplx
  PKC_minus_active_slash_phosph_minus_AC2_2: PKC_minus_active_slash_phosph_minus_AC2_slash_phosph_minus_AC2_cplx => AC_slash_AC2_star_ + PKC_minus_active; PKC_minus_active_slash_phosph_minus_AC2_2_k3*PKC_minus_active_slash_phosph_minus_AC2_slash_phosph_minus_AC2_cplx;
    PKC_minus_active_slash_phosph_minus_AC2_2_k3 = 3.6e-16 vol_secINV;

  // Unit definitions:
  unit uM1 = 1e-6 mole / litre;
  unit vol_secINV = litre / second;
  unit vol_uMINV2secINV = litre^3 / ((1e-6 mole)^2 * second);
  unit vol_uMINVsecINV = litre^2 / (1e-6 mole * second);
  unit substance = 1e-6 mole;
end
