// SBML level 2 version 1

model testid()
  // Abu-Soud1999_L-Arginine
  // This model was taken from the <a href = "http://www.ncbi.nlm.nih.gov/entrez/query.fcgi?db=pubmed&cmd=Retrieve&dopt=AbstractPlus&list_uids=10493814&query_hl=10&itool=pubmed_docsum">Abu-Soud HM et al. Biochemistry. 1999 Sep 21;38(38):12446-51</a>. This model shows kinetic binding of L-Arginine to neuronal nitric oxide synthase. Model shows the substrate (L-Arginine) binding to nNOS in a two-step reversible fashion. First there is rapid binding equilibrium between Im-nNOS and L-Arginine to form an intermediate that contains bound imidazole and L-Arginine. This is followed by a slower conformational change in the Im-enzyme-substrate complex that is associated with release of bound imidazole and generation of a modified enzyme-substrate complex which is detected due to spectral change. Replicates Figure 4 panel)
  // This model originates from BioModels Database: A Database of Annotated Published Models (http://www.ebi.ac.uk/biomodels/). It is copyright (c) 2005-2011 The BioModels.net Team.
  // To the extent possible under law, all copyright and related or neighbouring rights to this encoded model have been dedicated to the public domain worldwide. Please refer to CC0 Public Domain Dedication for more information.
  // In summary, you are entitled to use this encoded model in absolutely any manner you deem suitable, verbatim, or with modification, alone or embedded it in a larger context, redistribute it, commercially or not, in a restricted way or not..
  // To cite BioModels Database, please use: Li C, Donizelli M, Rodriguez N, Dharuri H, Endler L, Chelliah V, Li L, He E, Henry A, Stefan MI, Snoep JL, Hucka M, Le Novère N, Laibe C (2010) BioModels Database: An enhanced, curated and annotated resource for published quantitative kinetic models. BMC Syst Biol., 4:92.
  // biomodels.db:MODEL9087766308
  // isDescribedBy pubmed:10493814
  // biomodels.db:MODEL9087766308
  // isDescribedBy pubmed:10493814
  // biomodels.db:MODEL9087766308
  // biomodels.db:MODEL9087766308

  // Compartments:
  compartment default_compartment = 1e-18;
  compartment geometry = 1.6667e-18;

  // Species:
  species Im_minus_nNOS in geometry = 1;
  species L_minus_Arginine in geometry = 6000;
  species Im_minus_nNOS_minus_L_minus_Arginine in geometry = 0;
  species nNOS_minus_L_minus_Arginine in geometry = 0;
  species Imidazole in geometry = 0;

  // Reactions:
  // kf*L_minus_Arginine*Im_minus_nNOS-kb*Im_minus_nNOS_minus_L_minus_Arginine
  // Binding of L-Arginine to Imidazole bound rat brain neuronal Nitric Oxide Synthase. Kd = 0.5mM = 500uM Abu-Soud HM et al. Biochemistry. 1999 21;38(38):12446-51.
  Arginine_binding: L_minus_Arginine + Im_minus_nNOS -> Im_minus_nNOS_minus_L_minus_Arginine; Arginine_binding_kf*L_minus_Arginine*Im_minus_nNOS - Arginine_binding_kb*Im_minus_nNOS_minus_L_minus_Arginine;
    Arginine_binding_kf = 4.166667e-16 vol_uMINVsecINV; Arginine_binding_kb = 2.083333e-13 vol_secINV;
  // kf*Im_minus_nNOS_minus_L_minus_Arginine-kb*nNOS_minus_L_minus_Arginine*Imidazole
  // Release of Imidazole from complex of L-Arginine and Imidazole bound rat brain neuronal Nitric Oxide Synthase. Abu-Soud HM et al. Biochemistry. 1999 21;38(38):12446-51.
  Imidazole_release: Im_minus_nNOS_minus_L_minus_Arginine -> nNOS_minus_L_minus_Arginine + Imidazole; Imidazole_release_kf*Im_minus_nNOS_minus_L_minus_Arginine - Imidazole_release_kb*nNOS_minus_L_minus_Arginine*Imidazole;
    Imidazole_release_kf = 1.35e-16 vol_secINV; Imidazole_release_kb = 7.5e-19 vol_uMINVsecINV;

  // Unit definitions:
  unit vol_secINV = litre / second;
  unit vol_uMINVsecINV = litre^2 / (1e-6 mole * second);
  unit substance = 1e-6 mole;
end
