// SBML level 2 version 1

model testid()
  // Ajay_Bhalla_2004_PKM_MKP3_Tuning
  // This model is based on <a href = "http://www.ncbi.nlm.nih.gov/entrez/query.fcgi?db=pubmed&cmd=Retrieve&dopt=AbstractPlus&list_uids=15548210&query_hl=1&itool=pubmed_docsum">Ajay SM, Bhalla US. Eur J Neurosci. 2004 Nov;20(10):2671-80</a>. This is the feedforward model with MPK3 from figure 8a.
  // This model originates from BioModels Database: A Database of Annotated Published Models. It is copyright (c) 2005-2011 The BioModels.net Team.
  // To the extent possible under law, all copyright and related or neighbouring rights to this encoded model have been dedicated to the public domain worldwide. Please refer to CC0 Public Domain Dedication for more information.
  // In summary, you are entitled to use this encoded model in absolutely any manner you deem suitable, verbatim, or with modification, alone or embedded it in a larger context, redistribute it, commercially or not, in a restricted way or not..
  // To cite BioModels Database, please use: Li C, Donizelli M, Rodriguez N, Dharuri H, Endler L, Chelliah V, Li L, He E, Henry A, Stefan MI, Snoep JL, Hucka M, Le Novère N, Laibe C (2010) BioModels Database: An enhanced, curated and annotated resource for published quantitative kinetic models. BMC Syst Biol., 4:92.
  // biomodels.db:MODEL9089538076
  // isDescribedBy pubmed:15548210
  // biomodels.db:MODEL9089538076
  // isDescribedBy pubmed:15548210
  // biomodels.db:MODEL9089538076
  // biomodels.db:MODEL9089538076

  // Compartments:
  compartment default_compartment = 1e-18;
  compartment geometry = 1.5e-15;
  compartment geometry_sbo_1_sbc_ = 2.5e-21;

  // Species:
  species PKC_slash_PKC_minus_Ca in geometry = 3.720778e-17;
  species PKC_slash_PKC_minus_Ca_minus_memb_star_ in geometry = 1.389556e-17;
  species PKC_slash_PKC_minus_DAG_minus_memb_star_ in geometry = 9.435111e-21;
  species PKC_slash_PKC_minus_Ca_minus_DAG in geometry = 8.463111e-23;
  species PKC_slash_PKC_minus_DAG in geometry = 1.161e-16;
  species PKC_slash_PKC_minus_cytosolic in geometry = 1;
  species PKC_slash_PKM_minus_zeta in geometry = 0.05555556;
  species DAG in geometry = 0;
  species AA in geometry = 0;
  species PLA2_slash_PLA2_minus_cytosolic in geometry = 0.4;
  species PLA2_slash_PLA2_minus_Ca_star_ in geometry = 0;
  species PLA2_slash_PLA2_minus_Ca_star__slash_kenz_slash_kenz_cplx in geometry = 0;
  species PLA2_slash_PIP2_minus_PLA2_star_ in geometry = 0;
  species PLA2_slash_PIP2_minus_PLA2_star__slash_kenz_slash_kenz_cplx in geometry = 0;
  species PLA2_slash_PIP2_minus_Ca_minus_PLA2_star_ in geometry = 0;
  species PLA2_slash_PIP2_minus_Ca_minus_PLA2_star__slash_kenz_slash_kenz_cplx in geometry = 0;
  species PLA2_slash_DAG_minus_Ca_minus_PLA2_star_ in geometry = 0;
  species PLA2_slash_DAG_minus_Ca_minus_PLA2_star__slash_kenz_slash_kenz_cplx in geometry = 0;
  species PLA2_slash_PLA2_star__minus_Ca in geometry = 0;
  species PLA2_slash_PLA2_star__minus_Ca_slash_kenz_slash_kenz_cplx in geometry = 0;
  species PLA2_slash_PLA2_star_ in geometry = 0;
  species MAPK_star_ in geometry = 0;
  species MAPK_star__slash_MAPK_star__slash_MAPK_star__cplx in geometry = 0;
  species MAPK_star__slash_MAPK_star__minus_feedback_slash_MAPK_star__minus_feedback_cplx in geometry = 0;
  species MAPK_star__slash_phosph_Sos_slash_phosph_Sos_cplx in geometry = 0;
  species IP3 in geometry = 0.73;
  species PLCbeta_slash_PLC in geometry = 0.8;
  species PLCbeta_slash_PLC_minus_Ca in geometry = 0;
  species PLCbeta_slash_PLC_minus_Ca_slash_PLC_minus_Ca_slash_PLC_minus_Ca_cplx in geometry = 0;
  species PLCbeta_slash_PLC_minus_Ca_minus_Gq in geometry = 0;
  species PLCbeta_slash_PLC_minus_Ca_minus_Gq_slash_PLCb_minus_Ca_minus_Gq_slash_PLCb_minus_Ca_minus_Gq_cplx in geometry = 0;
  species PLCbeta_slash_PLC_minus_Gq in geometry = 0;
  species BetaGamma in geometry = 0;
  species G_star_GTP in geometry = 0;
  species G_star_GDP in geometry = 0;
  species Gq_slash_G_minus_GDP in geometry = 1;
  species Gq_slash_mGluR in geometry = 0.3;
  species Gq_slash_Rec_minus_Glu in geometry = 0;
  species Gq_slash_Rec_minus_Gq in geometry = 0;
  species Gq_slash_Rec_minus_Glu_minus_Gq in geometry = 0;
  species Gq_slash_Blocked_minus_rec_minus_Gq in geometry = 0;
  species MAPK_slash_craf_minus_1 in geometry = 0.5;
  species MAPK_slash_craf_minus_1_star_ in geometry = 0;
  species MAPK_slash_MAPKK in geometry = 0.5;
  species MAPK_slash_MAPK in geometry = 3.6;
  species MAPK_slash_craf_minus_1_star__star_ in geometry = 0;
  species MAPK_slash_MAPK_minus_tyr in geometry = 0;
  species MAPK_slash_MAPKK_star_ in geometry = 0;
  species MAPK_slash_MAPKK_star__slash_MAPKKtyr_slash_MAPKKtyr_cplx in geometry = 0;
  species MAPK_slash_MAPKK_star__slash_MAPKKthr_slash_MAPKKthr_cplx in geometry = 0;
  species MAPK_slash_MAPKK_minus_ser in geometry = 0;
  species MAPK_slash_Raf_star__minus_GTP_minus_Ras in geometry = 0;
  species MAPK_slash_Raf_star__minus_GTP_minus_Ras_slash_Raf_star__minus_GTP_minus_Ras_dot_1_slash_Raf_star__minus_GTP_minus_Ras_dot_1_cplx in geometry = 0;
  species MAPK_slash_Raf_star__minus_GTP_minus_Ras_slash_Raf_star__minus_GTP_minus_Ras_dot_2_slash_Raf_star__minus_GTP_minus_Ras_dot_2_cplx in geometry = 0;
  species PPhosphatase2A in geometry = 1;
  species PPhosphatase2A_slash_craf_minus_deph_slash_craf_minus_deph_cplx in geometry = 0;
  species PPhosphatase2A_slash_MAPKK_minus_deph_slash_MAPKK_minus_deph_cplx in geometry = 0;
  species PPhosphatase2A_slash_MAPKK_minus_deph_minus_ser_slash_MAPKK_minus_deph_minus_ser_cplx in geometry = 0;
  species PPhosphatase2A_slash_craf_star__star__minus_deph_slash_craf_star__star__minus_deph_cplx in geometry = 0;
  species CaM_po_Ca_pc_n_minus_CaNAB_slash_dephosph_minus_PP1_minus_I_star__slash_dephosph_minus_PP1_minus_I_star__cplx in geometry = 0;
  species Ras_slash_GEF_minus_Gprot_minus_bg in geometry = 0;
  species Ras_slash_GEF_minus_Gprot_minus_bg_slash_GEF_minus_bg_act_minus_ras_slash_GEF_minus_bg_act_minus_ras_cplx in geometry = 0;
  species Ras_slash_inact_minus_GEF in geometry = 0.1;
  species Ras_slash_GEF_star_ in geometry = 0;
  species Ras_slash_GEF_star__slash_GEF_star__minus_act_minus_ras_slash_GEF_star__minus_act_minus_ras_cplx in geometry = 0;
  species Ras_slash_GTP_minus_Ras in geometry = 0;
  species Ras_slash_GDP_minus_Ras in geometry = 0.5;
  species Ras_slash_GAP_star_ in geometry = 0;
  species Ras_slash_GAP in geometry = 0.01;
  species Ras_slash_GAP_slash_GAP_minus_inact_minus_ras_slash_GAP_minus_inact_minus_ras_cplx in geometry = 0;
  species Ras_slash_inact_minus_GEF_star_ in geometry = 0;
  species Ras_slash_CaM_minus_GEF in geometry = 0;
  species Ras_slash_CaM_minus_GEF_slash_CaM_minus_GEF_minus_act_minus_ras_slash_CaM_minus_GEF_minus_act_minus_ras_cplx in geometry = 0;
  species PKA_minus_active in geometry = 0;
  species PKA_minus_active_slash_PKA_minus_phosph_minus_GEF_slash_PKA_minus_phosph_minus_GEF_cplx in geometry = 0;
  species PKA_minus_active_slash_PKA_minus_phosph_minus_I1_slash_PKA_minus_phosph_minus_I1_cplx in geometry = 0;
  species PKA_minus_active_slash_phosph_minus_PDE_slash_phosph_minus_PDE_cplx in geometry = 0;
  species CaM_minus_Ca4 in geometry = 0;
  species Shc_star__dot_Sos_dot_Grb2 in geometry = 0;
  species Shc_star__dot_Sos_dot_Grb2_slash_Sos_dot_Ras_GEF_slash_Sos_dot_Ras_GEF_cplx in geometry = 0;
  species EGFR_slash_EGFR in geometry = 0.1666667;
  species EGFR_slash_L_dot_EGFR in geometry = 0;
  species EGFR_slash_L_dot_EGFR_slash_phosph_PLC_g_slash_phosph_PLC_g_cplx in geometry = 0;
  species EGFR_slash_L_dot_EGFR_slash_phosph_Shc_slash_phosph_Shc_cplx in geometry = 0;
  species EGFR_slash_SHC in geometry = 0.5;
  species EGFR_slash_SHC_star_ in geometry = 0;
  species EGFR_slash_Internal_L_dot_EGFR in geometry = 0;
  species Sos_slash_Sos_star__dot_Grb2 in geometry = 0;
  species Sos_slash_Grb2 in geometry = 1;
  species Sos_slash_Sos_dot_Grb2 in geometry = 0;
  species Sos_slash_Sos_star_ in geometry = 0;
  species Sos_slash_Sos in geometry = 0.1;
  species PLC_g_slash_PLC_g in geometry = 0.82;
  species PLC_g_slash_PLC_G_star_ in geometry = 0;
  species PLC_g_slash_Ca_dot_PLC_g in geometry = 0;
  species PLC_g_slash_Ca_dot_PLC_g_star_ in geometry = 0;
  species CaMKII_slash_CaMKII in geometry = 70;
  species CaMKII_slash_CaMKII_minus_CaM in geometry = 0;
  species CaMKII_slash_CaMKII_minus_thr286_star__minus_CaM in geometry = 0;
  species CaMKII_slash_CaMKII_star__star__star_ in geometry = 0;
  species CaMKII_slash_CaMKII_minus_thr286 in geometry = 0;
  species CaMKII_slash_CaMK_minus_thr306 in geometry = 0;
  species CaMKII_slash_tot_CaM_CaMKII_slash_CaM_act_305_slash_CaM_act_305_cplx in geometry = 0;
  species CaMKII_slash_tot_CaM_CaMKII_slash_CaM_act_286_slash_CaM_act_286_cplx in geometry = 0;
  species CaMKII_slash_tot_autonomous_CaMKII_slash_auton_305_slash_auton_305_cplx in geometry = 0;
  species CaMKII_slash_tot_autonomous_CaMKII_slash_auton_286_slash_auton_286_cplx in geometry = 0;
  species PP1_minus_active in geometry = 1.8;
  species PP1_minus_active_slash_Deph_minus_thr286_slash_Deph_minus_thr286_cplx in geometry = 0;
  species PP1_minus_active_slash_Deph_minus_thr305_slash_Deph_minus_thr305_cplx in geometry = 0;
  species PP1_minus_active_slash_Deph_minus_thr306_slash_Deph_minus_thr306_cplx in geometry = 0;
  species PP1_minus_active_slash_Deph_minus_thr286c_slash_Deph_minus_thr286c_cplx in geometry = 0;
  species PP1_minus_active_slash_Deph_thr286b_slash_Deph_thr286b_cplx in geometry = 0;
  species CaM_slash_CaM in geometry = 20;
  species CaM_slash_neurogranin_minus_CaM in geometry = 0;
  species CaM_slash_neurogranin_star_ in geometry = 0;
  species CaM_slash_neurogranin in geometry = 10;
  species CaM_minus_Ca3 in geometry = 0;
  species CaM_minus_TR2_minus_Ca2 in geometry = 0;
  species CaM_po_Ca_pc_n_minus_CaNAB_slash_dephosph_neurogranin_slash_dephosph_neurogranin_cplx in geometry = 0;
  species CaM_po_Ca_pc_n_minus_CaNAB_slash_dephosph_inhib1_slash_dephosph_inhib1_cplx in geometry = 0;
  species PP1_slash_I1 in geometry = 1.8;
  species PP1_slash_I1_star_ in geometry = 0.001;
  species PP1_slash_PP1_minus_I1_star_ in geometry = 0;
  species PP1_slash_PP1_minus_I1 in geometry = 0;
  species PP2A in geometry = 0.12;
  species PP2A_slash_PP2A_minus_dephosph_minus_I1_slash_PP2A_minus_dephosph_minus_I1_cplx in geometry = 0;
  species PP2A_slash_PP2A_minus_dephosph_minus_PP1_minus_I_star__slash_PP2A_minus_dephosph_minus_PP1_minus_I_star__cplx in geometry = 0;
  species CaNAB_minus_Ca4 in geometry = 0;
  species CaNAB_minus_Ca4_slash_dephosph_inhib1_noCaM_slash_dephosph_inhib1_noCaM_cplx in geometry = 0;
  species PP2B_slash_CaNAB in geometry = 1;
  species PP2B_slash_CaNAB_minus_Ca2 in geometry = 0;
  species PP2B_slash_CaMCa3_minus_CaNAB in geometry = 0;
  species PP2B_slash_CaMCa2_minus_CANAB in geometry = 0;
  species PP2B_slash_CaMCa4_minus_CaNAB in geometry = 0;
  species PKA_slash_R2C2 in geometry = 0.5;
  species PKA_slash_R2C2_minus_cAMP in geometry = 0;
  species PKA_slash_R2C2_minus_cAMP2 in geometry = 0;
  species PKA_slash_R2C2_minus_cAMP3 in geometry = 0;
  species PKA_slash_R2C2_minus_cAMP4 in geometry = 0;
  species PKA_slash_R2C_minus_cAMP4 in geometry = 0;
  species PKA_slash_R2_minus_cAMP4 in geometry = 0;
  species PKA_slash_PKA_minus_inhibitor in geometry = 0.25;
  species PKA_slash_inhibited_minus_PKA in geometry = 0;
  species cAMP in geometry = 0;
  species AC_slash_AC1_minus_CaM in geometry = 0;
  species AC_slash_AC1 in geometry = 0.02;
  species AC_slash_AC2_star_ in geometry = 0;
  species AC_slash_AC2_minus_Gs in geometry = 0;
  species AC_slash_AC2 in geometry = 0.015;
  species AC_slash_AC1_minus_Gs in geometry = 0;
  species AC_slash_AMP in geometry_sbo_1_sbc_ = 325493.3;
  species AC_slash_AC2_star__minus_Gs in geometry = 0;
  species AC_slash_cAMP_minus_PDE in geometry = 0.45;
  species AC_slash_cAMP_minus_PDE_slash_PDE_slash_PDE_cplx in geometry = 0;
  species AC_slash_cAMP_minus_PDE_star_ in geometry = 0;
  species AC_slash_cAMP_minus_PDE_star__slash_PDE_star__slash_PDE_star__cplx in geometry = 0;
  species AC_slash_PDE1 in geometry = 2;
  species AC_slash_PDE1_slash_PDE1_slash_PDE1_cplx in geometry = 0;
  species AC_slash_CaM_dot_PDE1 in geometry = 0;
  species AC_slash_CaM_dot_PDE1_slash_CaM_dot_PDE1_slash_CaM_dot_PDE1_cplx in geometry = 0;
  species Gs_minus_alpha in geometry = 0;
  species Ca in geometry = 0.08;
  species Ca_input in geometry = 0.08;
  species MKP3_slash_nuc_MAPK_star_ in geometry = 0;
  species MKP3_slash_nuc_MAPK_star__slash_act_transcription_slash_act_transcription_cplx in geometry = 0;
  species MKP3_slash_MKP_minus_3 in geometry = 0.02;
  species MKP3_slash_MKP_minus_3_slash_MKP3_minus_thr_minus_deph_slash_MKP3_minus_thr_minus_deph_cplx in geometry = 0;
  species MKP3_slash_MKP_minus_3_slash_MKP3_minus_tyr_minus_deph_slash_MKP3_minus_tyr_minus_deph_cplx in geometry = 0;
  species MKP3_slash_MKP3_synthesis in geometry = 0.0014;
  species MKP3_slash_MKP3_synthesis_slash_kenz_slash_kenz_cplx in geometry = 0;
  species PKC_minus_active_slash_PKC_minus_act_minus_raf_slash_PKC_minus_act_minus_raf_cplx in geometry = 0;
  species PKC_minus_active_slash_PKC_minus_inact_minus_GAP_slash_PKC_minus_inact_minus_GAP_cplx in geometry = 0;
  species PKC_minus_active_slash_PKC_minus_act_minus_GEF_slash_PKC_minus_act_minus_GEF_cplx in geometry = 0;
  species PKC_minus_active_slash_PKC_minus_phosph_minus_neurogranin_slash_PKC_minus_phosph_minus_neurogranin_cplx in geometry = 0;
  species PKC_minus_active_slash_PKC_minus_phosph_minus_ng_minus_CaM_slash_PKC_minus_phosph_minus_ng_minus_CaM_cplx in geometry = 0;
  species PKC_minus_active_slash_phosph_minus_AC2_slash_phosph_minus_AC2_cplx in geometry = 0;
  species PKM_slash_Ca_detector in geometry = 1;
  species PKM_slash_PKM_synthesis in geometry = 0.005555556;
  species PKM_slash_PKM_synthesis_slash_kenz_slash_kenz_cplx in geometry = 0;
  species PKM_slash_Ca_dot_detector_complex in geometry = 0;
  species PKM_slash_Ca_dot_detector_complex_slash_kenz_slash_kenz_cplx in geometry = 0;
  species PKM_slash_PKM_activator in geometry = 0.09444444;
  // arachodonylphosphatidylcholine is the favoured substrate from Wijkander and Sundler, JBC 202 pp 873-880, 1991. Their assay used 30 uM substrate, which is what the kinetics in this model are based on. For the later model we should locate a more realistic value for APC.
  species $PLA2_slash_APC in geometry = 30;
  // This isn\'t explicitly present in the M&L model, but is obviously needed. I assume its conc is fixed at 1uM for now, which is a bit high. PLA2 is stim 7x by PIP2 @ 0.5 uM (Leslie and Channon BBA 1045:261(1990) Leslie and Channon say PIP2 is present at 0.1 - 0.2mol% range in membs, which comes to 50 nM. Ref is Majerus et al Cell 37 pp 701-703 1984 Lets use a lower level of 30 nM, same ref....
  species $temp_minus_PIP2 in geometry = 2.5;
  // Varying the amount of (steady state) glu between .01 uM and up, the final amount of G*GTP complex does not change much. This means that the system should be reasonably robust wr to the amount of glu in the synaptic cleft. It would be nice to know how fast it is removed.
  species $Glu in geometry = 0;
  species $PLCbeta_slash_Inositol in geometry = 0;
  // Phosphatidylcholine is the main (around 55%) metabolic product of DAG, follwed by PE (around 25%). Ref is Welsh and Cabot, JCB35:231-245(1987)
  species $PLCbeta_slash_PC in geometry_sbo_1_sbc_ = 0;
  species $PIP2 in geometry = 10;
  // I am implementing this as acting only on the Rec-Gq complex, based on a more complete model PLC_Gq48.g which showed that the binding to the rec alone contributed only a small amount.
  species $Gq_slash_mGluRAntag in geometry = 0;
  species $EGFR_slash_EGF in geometry = 0;
  // ATP is present in all cells between 2 and 10 mM. See Lehninger.
  species $AC_slash_ATP in geometry = 5000;
  species $MKP3_slash_nucleotides in geometry = 0.2;
  species $MKP3_slash_ubiquitination in geometry = 0;
  // Amino acids for MKP3 synthesis.
  species $MKP3_slash_MKP3_AA in geometry = 1;
  species $PKM_slash_AA_pool in geometry = 1;
  species $PKM_slash_degraded_PKM in geometry = 0;
  species $CaMKII_slash_tot_CaM_CaMKII in geometry;
  species $CaMKII_slash_tot_autonomous_CaMKII in geometry;
  species $CaM_po_Ca_pc_n_minus_CaNAB in geometry;
  species $PKC_minus_active in geometry;

  // Assignment rules:
  CaMKII_slash_tot_CaM_CaMKII := CaMKII_slash_CaMKII_minus_CaM + CaMKII_slash_CaMKII_minus_thr286_star__minus_CaM;
  CaMKII_slash_tot_autonomous_CaMKII := CaMKII_slash_CaMKII_minus_thr286 + CaMKII_slash_CaMKII_star__star__star_;
  CaM_po_Ca_pc_n_minus_CaNAB := PP2B_slash_CaMCa4_minus_CaNAB + PP2B_slash_CaMCa3_minus_CaNAB + PP2B_slash_CaMCa2_minus_CANAB;
  PKC_minus_active := PKC_slash_PKC_minus_Ca_minus_memb_star_ + PKC_slash_PKC_minus_DAG_minus_memb_star_ + PKC_slash_PKM_minus_zeta;

  // Reactions:
  // kf*PKC_slash_PKC_minus_cytosolic*Ca-kb*PKC_slash_PKC_minus_Ca
  // Need est of rate of assoc of Ca and PKC. Assume it is fast The original parameter-searched kf of 439.4 has been scaled by 1/6e8 to account for change of units to n. Kf now 8.16e-7, kb=.6085 Raised kf to 1e-6 to match Ca curve, kb to .5
  PKC_slash_PKC_minus_act_minus_by_minus_Ca: PKC_slash_PKC_minus_cytosolic + Ca -> PKC_slash_PKC_minus_Ca; PKC_slash_PKC_minus_act_minus_by_minus_Ca_kf*PKC_slash_PKC_minus_cytosolic*Ca - PKC_slash_PKC_minus_act_minus_by_minus_Ca_kb*PKC_slash_PKC_minus_Ca;
    PKC_slash_PKC_minus_act_minus_by_minus_Ca_kf = 9.000045e-16 vol_uMINVsecINV; PKC_slash_PKC_minus_act_minus_by_minus_Ca_kb = 7.5e-16 vol_secINV;
  // kf*DAG*PKC_slash_PKC_minus_Ca-kb*PKC_slash_PKC_minus_Ca_minus_DAG
  // Need est of rate. Assume it is fast Obtained from param search kf raised 10 X : see Shinomura et al PNAS 88 5149-5153 1991. kf changed from 3.865e-7 to 2.0e-7 in line with closer analysis of Shinomura data. 26 June 1996: Corrected DAG data: reduce kf 15x from 2e-7 to 1.333e-8
  PKC_slash_PKC_minus_act_minus_by_minus_DAG: DAG + PKC_slash_PKC_minus_Ca -> PKC_slash_PKC_minus_Ca_minus_DAG; PKC_slash_PKC_minus_act_minus_by_minus_DAG_kf*DAG*PKC_slash_PKC_minus_Ca - PKC_slash_PKC_minus_act_minus_by_minus_DAG_kb*PKC_slash_PKC_minus_Ca_minus_DAG;
    PKC_slash_PKC_minus_act_minus_by_minus_DAG_kf = 1.1999745e-17 vol_uMINVsecINV; PKC_slash_PKC_minus_act_minus_by_minus_DAG_kb = 1.29522e-14 vol_secINV;
  // kf*PKC_slash_PKC_minus_Ca-kb*PKC_slash_PKC_minus_Ca_minus_memb_star_
  PKC_slash_PKC_minus_Ca_minus_to_minus_memb: PKC_slash_PKC_minus_Ca -> PKC_slash_PKC_minus_Ca_minus_memb_star_; PKC_slash_PKC_minus_Ca_minus_to_minus_memb_kf*PKC_slash_PKC_minus_Ca - PKC_slash_PKC_minus_Ca_minus_to_minus_memb_kb*PKC_slash_PKC_minus_Ca_minus_memb_star_;
    PKC_slash_PKC_minus_Ca_minus_to_minus_memb_kf = 1.90575e-15 vol_secINV; PKC_slash_PKC_minus_Ca_minus_to_minus_memb_kb = 5.2539e-15 vol_secINV;
  // kf*PKC_slash_PKC_minus_Ca_minus_DAG-kb*PKC_slash_PKC_minus_DAG_minus_memb_star_
  // Raise kb from .087 to 0.1 to match data from Shinomura et al. Lower kf from 1.155 to 1.0 to match data from Shinomura et al.
  PKC_slash_PKC_minus_DAG_minus_to_minus_memb: PKC_slash_PKC_minus_Ca_minus_DAG -> PKC_slash_PKC_minus_DAG_minus_memb_star_; PKC_slash_PKC_minus_DAG_minus_to_minus_memb_kf*PKC_slash_PKC_minus_Ca_minus_DAG - PKC_slash_PKC_minus_DAG_minus_to_minus_memb_kb*PKC_slash_PKC_minus_DAG_minus_memb_star_;
    PKC_slash_PKC_minus_DAG_minus_to_minus_memb_kf = 1.5e-15 vol_secINV; PKC_slash_PKC_minus_DAG_minus_to_minus_memb_kb = 1.5e-16 vol_secINV;
  // kf*PKC_slash_PKC_minus_cytosolic*DAG-kb*PKC_slash_PKC_minus_DAG
  // kf raised 10 X based on Shinomura et al PNAS 88 5149-5153 1991 closer analysis of Shinomura et al: kf now 1e-8 (was 1.66e-8). Further tweak. To get sufficient AA synergy, increase kf to 1.5e-8 26 June 1996: Corrected DAG levels: reduce kf by 15x from 1.5e-8 to 1e-9
  PKC_slash_PKC_minus_n_minus_DAG: PKC_slash_PKC_minus_cytosolic + DAG -> PKC_slash_PKC_minus_DAG; PKC_slash_PKC_minus_n_minus_DAG_kf*PKC_slash_PKC_minus_cytosolic*DAG - PKC_slash_PKC_minus_n_minus_DAG_kb*PKC_slash_PKC_minus_DAG;
    PKC_slash_PKC_minus_n_minus_DAG_kf = 9.000045e-19 vol_uMINVsecINV; PKC_slash_PKC_minus_n_minus_DAG_kb = 1.5e-16 vol_secINV;
  // kf*PLA2_slash_PLA2_minus_cytosolic*Ca-kb*PLA2_slash_PLA2_minus_Ca_star_
  // Leslie and Channon BBA 1045 (1990) 261-270 fig6 pp267.
  PLA2_slash_PLA2_minus_Ca_minus_act: PLA2_slash_PLA2_minus_cytosolic + Ca -> PLA2_slash_PLA2_minus_Ca_star_; PLA2_slash_PLA2_minus_Ca_minus_act_kf*PLA2_slash_PLA2_minus_cytosolic*Ca - PLA2_slash_PLA2_minus_Ca_minus_act_kb*PLA2_slash_PLA2_minus_Ca_star_;
    PLA2_slash_PLA2_minus_Ca_minus_act_kf = 1.499985e-15 vol_uMINVsecINV; PLA2_slash_PLA2_minus_Ca_minus_act_kb = 1.5e-16 vol_secINV;
  // kf*temp_minus_PIP2*PLA2_slash_PLA2_minus_cytosolic-kb*PLA2_slash_PIP2_minus_PLA2_star_
  PLA2_slash_PIP2_minus_PLA2_minus_act: $temp_minus_PIP2 + PLA2_slash_PLA2_minus_cytosolic -> PLA2_slash_PIP2_minus_PLA2_star_; PLA2_slash_PIP2_minus_PLA2_minus_act_kf*temp_minus_PIP2*PLA2_slash_PLA2_minus_cytosolic - PLA2_slash_PIP2_minus_PLA2_minus_act_kb*PLA2_slash_PIP2_minus_PLA2_star_;
    PLA2_slash_PIP2_minus_PLA2_minus_act_kf = 1.799955e-18 vol_uMINVsecINV; PLA2_slash_PIP2_minus_PLA2_minus_act_kb = 7.5e-16 vol_secINV;
  // kf*temp_minus_PIP2*PLA2_slash_PLA2_minus_Ca_star_-kb*PLA2_slash_PIP2_minus_Ca_minus_PLA2_star_
  PLA2_slash_PIP2_minus_Ca_minus_PLA2_minus_act: $temp_minus_PIP2 + PLA2_slash_PLA2_minus_Ca_star_ -> PLA2_slash_PIP2_minus_Ca_minus_PLA2_star_; PLA2_slash_PIP2_minus_Ca_minus_PLA2_minus_act_kf*temp_minus_PIP2*PLA2_slash_PLA2_minus_Ca_star_ - PLA2_slash_PIP2_minus_Ca_minus_PLA2_minus_act_kb*PLA2_slash_PIP2_minus_Ca_minus_PLA2_star_;
    PLA2_slash_PIP2_minus_Ca_minus_PLA2_minus_act_kf = 1.799955e-17 vol_uMINVsecINV; PLA2_slash_PIP2_minus_Ca_minus_PLA2_minus_act_kb = 1.5e-16 vol_secINV;
  // kf*DAG*PLA2_slash_PLA2_minus_Ca_star_-kb*PLA2_slash_DAG_minus_Ca_minus_PLA2_star_
  // 27 June 1996 Scaled kf down by 0.015 from 3.33e-7 to 5e-9 to fit with revised DAG estimates and use of mole-fraction to calculate eff on PLA2.
  PLA2_slash_DAG_minus_Ca_minus_PLA2_minus_act: DAG + PLA2_slash_PLA2_minus_Ca_star_ -> PLA2_slash_DAG_minus_Ca_minus_PLA2_star_; PLA2_slash_DAG_minus_Ca_minus_PLA2_minus_act_kf*DAG*PLA2_slash_PLA2_minus_Ca_star_ - PLA2_slash_DAG_minus_Ca_minus_PLA2_minus_act_kb*PLA2_slash_DAG_minus_Ca_minus_PLA2_star_;
    PLA2_slash_DAG_minus_Ca_minus_PLA2_minus_act_kf = 4.499955e-18 vol_uMINVsecINV; PLA2_slash_DAG_minus_Ca_minus_PLA2_minus_act_kb = 6e-15 vol_secINV;
  // kf*AA-kb*PLA2_slash_APC
  // I need to check if the AA degradation pathway really leads back to APC. Anyway, it is a convenient buffered pool to dump it back into. For the purposes of the full model we use a rate of degradation of 0.2/sec Raised decay to 0.4 : see PLA35.g notes for Feb17
  PLA2_slash_Degrade_minus_AA: AA -> $PLA2_slash_APC; PLA2_slash_Degrade_minus_AA_kf*AA - PLA2_slash_Degrade_minus_AA_kb*PLA2_slash_APC;
    PLA2_slash_Degrade_minus_AA_kf = 6e-16 vol_secINV; PLA2_slash_Degrade_minus_AA_kb = 0 vol_secINV;
  // kf*PLA2_slash_PLA2_star_*Ca-kb*PLA2_slash_PLA2_star__minus_Ca
  // To start off, same kinetics as the PLA2-Ca-act direct pathway. Oops ! Missed out the Ca input to this pathway first time round. Let\'s raise the forward rate about 3x to 5e-6. This will let us reduce the rather high rates we have used for the kenz on PLA2*-Ca. In fact, it may be that the rates are not that different, just that this pathway for getting the PLA2 to the memb is more efficien....
  PLA2_slash_PLA2_star__minus_Ca_minus_act: PLA2_slash_PLA2_star_ + Ca -> PLA2_slash_PLA2_star__minus_Ca; PLA2_slash_PLA2_star__minus_Ca_minus_act_kf*PLA2_slash_PLA2_star_*Ca - PLA2_slash_PLA2_star__minus_Ca_minus_act_kb*PLA2_slash_PLA2_star__minus_Ca;
    PLA2_slash_PLA2_star__minus_Ca_minus_act_kf = 9.000045e-15 vol_uMINVsecINV; PLA2_slash_PLA2_star__minus_Ca_minus_act_kb = 1.5e-16 vol_secINV;
  // kf*PLA2_slash_PLA2_star_-kb*PLA2_slash_PLA2_minus_cytosolic
  PLA2_slash_dephosphorylate_minus_PLA2_star_: PLA2_slash_PLA2_star_ -> PLA2_slash_PLA2_minus_cytosolic; PLA2_slash_dephosphorylate_minus_PLA2_star__kf*PLA2_slash_PLA2_star_ - PLA2_slash_dephosphorylate_minus_PLA2_star__kb*PLA2_slash_PLA2_minus_cytosolic;
    PLA2_slash_dephosphorylate_minus_PLA2_star__kf = 2.55e-16 vol_secINV; PLA2_slash_dephosphorylate_minus_PLA2_star__kb = 0 vol_secINV;
  // kf*Ca*PLCbeta_slash_PLC-kb*PLCbeta_slash_PLC_minus_Ca
  // Affinity for Ca = 1uM without AlF, 0.1 with: from Smrcka et al science 251 pp 804-807 1991 so [Ca].kf = kb so kb/kf = 1 * 6e5 = 1/1.66e-6 11 June 1996: Raised affinity to 5e-6 to maintain balance. See notes.
  PLCbeta_slash_Act_minus_PLC_minus_Ca: Ca + PLCbeta_slash_PLC -> PLCbeta_slash_PLC_minus_Ca; PLCbeta_slash_Act_minus_PLC_minus_Ca_kf*Ca*PLCbeta_slash_PLC - PLCbeta_slash_Act_minus_PLC_minus_Ca_kb*PLCbeta_slash_PLC_minus_Ca;
    PLCbeta_slash_Act_minus_PLC_minus_Ca_kf = 4.499955e-15 vol_uMINVsecINV; PLCbeta_slash_Act_minus_PLC_minus_Ca_kb = 1.5e-15 vol_secINV;
  // kf*IP3-kb*PLCbeta_slash_Inositol
  // The enzyme is IP3 5-phosphomonesterase. about 45K. Actual products are Ins(1,4)P2, and cIns(1:2,4,5)P3. review in Majerus et al Science 234 1519-1526, 1986. Meyer and Stryer 1988 PNAS 85:5051-5055 est decay of IP3 at 1-3/sec
  PLCbeta_slash_Degrade_minus_IP3: IP3 -> $PLCbeta_slash_Inositol; PLCbeta_slash_Degrade_minus_IP3_kf*IP3 - PLCbeta_slash_Degrade_minus_IP3_kb*PLCbeta_slash_Inositol;
    PLCbeta_slash_Degrade_minus_IP3_kf = 3.75e-15 vol_secINV; PLCbeta_slash_Degrade_minus_IP3_kb = 0 vol_secINV;
  // kf*DAG-kb*PLCbeta_slash_PC
  // These rates are the same as for degrading IP3, but I am sure that they could be improved. Lets double kf to 0.2, since the amount of DAG in the cell should be <= 1uM. Need to double it again, for the same reason. kf now 0.5 27 June 1996 kf is now 0.02 to get 50 sec time course 30 Aug 1997: Raised kf to 0.11 to accomodate PLC_gamma 27 Mar 1998: kf now 0.15 for PLC_gamma
  PLCbeta_slash_Degrade_minus_DAG: DAG -> $PLCbeta_slash_PC; PLCbeta_slash_Degrade_minus_DAG_kf*DAG - PLCbeta_slash_Degrade_minus_DAG_kb*PLCbeta_slash_PC;
    PLCbeta_slash_Degrade_minus_DAG_kf = 2.25e-16 vol_secINV; PLCbeta_slash_Degrade_minus_DAG_kb = 0 vol_secINV;
  // kf*G_star_GTP*PLCbeta_slash_PLC_minus_Ca-kb*PLCbeta_slash_PLC_minus_Ca_minus_Gq
  // Affinity for Gq is > 20 nM (Smrcka et al Science251 804-807 1991) so [Gq].kf = kb so 40nM * 6e5 = kb/kf = 24e3 so kf = 4.2e-5, kb =1
  PLCbeta_slash_Act_minus_PLC_minus_by_minus_Gq: G_star_GTP + PLCbeta_slash_PLC_minus_Ca -> PLCbeta_slash_PLC_minus_Ca_minus_Gq; PLCbeta_slash_Act_minus_PLC_minus_by_minus_Gq_kf*G_star_GTP*PLCbeta_slash_PLC_minus_Ca - PLCbeta_slash_Act_minus_PLC_minus_by_minus_Gq_kb*PLCbeta_slash_PLC_minus_Ca_minus_Gq;
    PLCbeta_slash_Act_minus_PLC_minus_by_minus_Gq_kf = 3.78e-14 vol_uMINVsecINV; PLCbeta_slash_Act_minus_PLC_minus_by_minus_Gq_kb = 1.5e-15 vol_secINV;
  // kf*PLCbeta_slash_PLC_minus_Ca_minus_Gq-kb*G_star_GDP*PLCbeta_slash_PLC_minus_Ca
  // This process is assumed to be directly caused by the inactivation of the G*GTP to G*GDP. Hence, kf = .013 /sec = 0.8/min, same as the rate for Inact-G. kb = 0 since this is irreversible. We may be interested in studying the role of PLC as a GAP. If so, the kf would be faster here than in Inact-G
  PLCbeta_slash_Inact_minus_PLC_minus_Gq: PLCbeta_slash_PLC_minus_Ca_minus_Gq -> G_star_GDP + PLCbeta_slash_PLC_minus_Ca; PLCbeta_slash_Inact_minus_PLC_minus_Gq_kf*PLCbeta_slash_PLC_minus_Ca_minus_Gq - PLCbeta_slash_Inact_minus_PLC_minus_Gq_kb*G_star_GDP*PLCbeta_slash_PLC_minus_Ca;
    PLCbeta_slash_Inact_minus_PLC_minus_Gq_kf = 1.995e-17 vol_secINV; PLCbeta_slash_Inact_minus_PLC_minus_Gq_kb = 0 vol_uMINVsecINV;
  // kf*PLCbeta_slash_PLC*G_star_GTP-kb*PLCbeta_slash_PLC_minus_Gq
  // this binding does not produce active PLC. This step was needed to implement the described (Smrcka et al) increase in affinity for Ca by PLC once Gq was bound. The kinetics are the same as the binding step for Ca-PLC to Gq. June 1996: Changed the kf to 4.2e-5 to 4.2e-6 to preserve balance around the reactions.
  PLCbeta_slash_PLC_minus_bind_minus_Gq: PLCbeta_slash_PLC + G_star_GTP -> PLCbeta_slash_PLC_minus_Gq; PLCbeta_slash_PLC_minus_bind_minus_Gq_kf*PLCbeta_slash_PLC*G_star_GTP - PLCbeta_slash_PLC_minus_bind_minus_Gq_kb*PLCbeta_slash_PLC_minus_Gq;
    PLCbeta_slash_PLC_minus_bind_minus_Gq_kf = 3.78e-15 vol_uMINVsecINV; PLCbeta_slash_PLC_minus_bind_minus_Gq_kb = 1.5e-15 vol_secINV;
  // kf*Ca*PLCbeta_slash_PLC_minus_Gq-kb*PLCbeta_slash_PLC_minus_Ca_minus_Gq
  // this step has a high affinity for Ca, from Smrcka et al. 0.1uM so kf /kb = 1/6e4 = 1.666e-5:1. See the Act-PLC-by-Gq reac. 11 Jun 1996: Raised kf to 5e-5 based on match to conc-eff curves from Smrcka et al.
  PLCbeta_slash_PLC_minus_Gq_minus_bind_minus_Ca: Ca + PLCbeta_slash_PLC_minus_Gq -> PLCbeta_slash_PLC_minus_Ca_minus_Gq; PLCbeta_slash_PLC_minus_Gq_minus_bind_minus_Ca_kf*Ca*PLCbeta_slash_PLC_minus_Gq - PLCbeta_slash_PLC_minus_Gq_minus_bind_minus_Ca_kb*PLCbeta_slash_PLC_minus_Ca_minus_Gq;
    PLCbeta_slash_PLC_minus_Gq_minus_bind_minus_Ca_kf = 4.499955e-14 vol_uMINVsecINV; PLCbeta_slash_PLC_minus_Gq_minus_bind_minus_Ca_kb = 1.5e-15 vol_secINV;
  // kf*Gq_slash_mGluR*Glu-kb*Gq_slash_Rec_minus_Glu
  // kf = kf from text = 1e7 / M / sec = 10 /uM/sec = 10 / 6e5 / # / sec = 1.67e-5 kb = kr from text = 60 / sec Note that we continue to use uM here since [phenylephrine] is also in uM. From Martin et al FEBS Lett 316:2 191-196 1993 we have Kd = 600 nM Assuming kb = 10/sec, we get kf = 10/(0.6 uM * 6e5) = 2.8e-5 1/sec/#
  Gq_slash_RecLigandBinding: Gq_slash_mGluR + $Glu -> Gq_slash_Rec_minus_Glu; Gq_slash_RecLigandBinding_kf*Gq_slash_mGluR*Glu - Gq_slash_RecLigandBinding_kb*Gq_slash_Rec_minus_Glu;
    Gq_slash_RecLigandBinding_kf = 2.520045e-14 vol_uMINVsecINV; Gq_slash_RecLigandBinding_kb = 1.5e-14 vol_secINV;
  // kf*Gq_slash_G_minus_GDP-kb*G_star_GTP*BetaGamma
  // kf = kg1 = 0.01/sec, kb = 0. This is the basal exchange of GTP for GDP.
  Gq_slash_Basal_minus_Act_minus_G: Gq_slash_G_minus_GDP -> G_star_GTP + BetaGamma; Gq_slash_Basal_minus_Act_minus_G_kf*Gq_slash_G_minus_GDP - Gq_slash_Basal_minus_Act_minus_G_kb*G_star_GTP*BetaGamma;
    Gq_slash_Basal_minus_Act_minus_G_kf = 1.5e-19 vol_secINV; Gq_slash_Basal_minus_Act_minus_G_kb = 0 vol_uMINVsecINV;
  // kf*G_star_GDP*BetaGamma-kb*Gq_slash_G_minus_GDP
  // kf == kg3 = 1e-5 /cell/sec. As usual, there is no back-reaction kb = 0
  Gq_slash_Trimerize_minus_G: G_star_GDP + BetaGamma -> Gq_slash_G_minus_GDP; Gq_slash_Trimerize_minus_G_kf*G_star_GDP*BetaGamma - Gq_slash_Trimerize_minus_G_kb*Gq_slash_G_minus_GDP;
    Gq_slash_Trimerize_minus_G_kf = 9.000045e-15 vol_uMINVsecINV; Gq_slash_Trimerize_minus_G_kb = 0 vol_secINV;
  // kf*G_star_GTP-kb*G_star_GDP
  // From Berstein et al JBC 267:12 8081-8088 1992, kcat for GTPase activity of Gq is only 0.8/min
  Gq_slash_Inact_minus_G: G_star_GTP -> G_star_GDP; Gq_slash_Inact_minus_G_kf*G_star_GTP - Gq_slash_Inact_minus_G_kb*G_star_GDP;
    Gq_slash_Inact_minus_G_kf = 1.995e-17 vol_secINV; Gq_slash_Inact_minus_G_kb = 0 vol_secINV;
  // kf*Gq_slash_G_minus_GDP*Gq_slash_Rec_minus_Glu-kb*Gq_slash_Rec_minus_Glu_minus_Gq
  // This is the k1-k2 equivalent for enzyme complex formation in the binding of Rec-Glu to Gq. See Fay et al Biochem 30 5066-5075 1991. kf = 5e-5 which is nearly the same as calculated by Fay et al. (4.67e-5) kb = .04 June 1996: Closer reading of Fay et al suggests that kb <= 0.0001, so kf = 1e-8 by detailed balance. This reaction appears to be neglible.
  Gq_slash_Rec_minus_Glu_minus_bind_minus_Gq: Gq_slash_G_minus_GDP + Gq_slash_Rec_minus_Glu -> Gq_slash_Rec_minus_Glu_minus_Gq; Gq_slash_Rec_minus_Glu_minus_bind_minus_Gq_kf*Gq_slash_G_minus_GDP*Gq_slash_Rec_minus_Glu - Gq_slash_Rec_minus_Glu_minus_bind_minus_Gq_kb*Gq_slash_Rec_minus_Glu_minus_Gq;
    Gq_slash_Rec_minus_Glu_minus_bind_minus_Gq_kf = 9.000045e-18 vol_uMINVsecINV; Gq_slash_Rec_minus_Glu_minus_bind_minus_Gq_kb = 1.5e-19 vol_secINV;
  // kf*Glu*Gq_slash_Rec_minus_Gq-kb*Gq_slash_Rec_minus_Glu_minus_Gq
  // From Fay et al kb3 = kb = 1.06e-3 which is rather slow. k+1 = kf = 2.8e7 /M/sec= 4.67e-5/sec use 5e-5. However, the Kd from Martin et al may be more appropriate, as this is Glu not the system from Fay. kf = 2.8e-5, kb = 10 Let us compromise. since we have the Fay model, keep kf = k+1 = 2.8e-5. But kb (k-3) is .01 * k-1 from Fay. Scaling by .01, kb = .01 * 10 = 0.1
  Gq_slash_Glu_minus_bind_minus_Rec_minus_Gq: $Glu + Gq_slash_Rec_minus_Gq -> Gq_slash_Rec_minus_Glu_minus_Gq; Gq_slash_Glu_minus_bind_minus_Rec_minus_Gq_kf*Glu*Gq_slash_Rec_minus_Gq - Gq_slash_Glu_minus_bind_minus_Rec_minus_Gq_kb*Gq_slash_Rec_minus_Glu_minus_Gq;
    Gq_slash_Glu_minus_bind_minus_Rec_minus_Gq_kf = 2.520045e-14 vol_uMINVsecINV; Gq_slash_Glu_minus_bind_minus_Rec_minus_Gq_kb = 1.5e-16 vol_secINV;
  // kf*Gq_slash_Rec_minus_Glu_minus_Gq-kb*G_star_GTP*BetaGamma*Gq_slash_Rec_minus_Glu
  // This is the kcat==k3 stage of the Rec-Glu ezymatic activation of Gq. From Berstein et al actiation is at .35 - 0.7/min From Fay et al Biochem 30 5066-5075 1991 kf = .01/sec From Nakamura et al J physiol Lond 474:1 35-41 1994 see time courses. Also (Berstein) 15-40% of gprot is in GTP-bound form on stim.
  Gq_slash_Activate_minus_Gq: Gq_slash_Rec_minus_Glu_minus_Gq -> G_star_GTP + BetaGamma + Gq_slash_Rec_minus_Glu; Gq_slash_Activate_minus_Gq_kf*Gq_slash_Rec_minus_Glu_minus_Gq - Gq_slash_Activate_minus_Gq_kb*G_star_GTP*BetaGamma*Gq_slash_Rec_minus_Glu;
    Gq_slash_Activate_minus_Gq_kf = 1.5e-17 vol_secINV; Gq_slash_Activate_minus_Gq_kb = 0 vol_uMINV2secINV;
  // kf*Gq_slash_G_minus_GDP*Gq_slash_mGluR-kb*Gq_slash_Rec_minus_Gq
  // Lets try out the same kinetics as the Rec-Glu-bind-Gq This is much too forward. We know that the steady-state amount of Rec-Gq should be 40% of the total amount of receptor. This is for a different receptor, still we can try to match the value. kf = 1e-6 and kb = 1 give 0.333:0.8 which is pretty close.
  Gq_slash_Rec_minus_bind_minus_Gq: Gq_slash_G_minus_GDP + Gq_slash_mGluR -> Gq_slash_Rec_minus_Gq; Gq_slash_Rec_minus_bind_minus_Gq_kf*Gq_slash_G_minus_GDP*Gq_slash_mGluR - Gq_slash_Rec_minus_bind_minus_Gq_kb*Gq_slash_Rec_minus_Gq;
    Gq_slash_Rec_minus_bind_minus_Gq_kf = 9.000045e-16 vol_uMINVsecINV; Gq_slash_Rec_minus_bind_minus_Gq_kb = 1.5e-15 vol_secINV;
  // kf*Gq_slash_Rec_minus_Gq*Gq_slash_mGluRAntag-kb*Gq_slash_Blocked_minus_rec_minus_Gq
  // The rate consts give a total binding affinity of only
  Gq_slash_Antag_minus_bind_minus_Rec_minus_Gq: Gq_slash_Rec_minus_Gq + $Gq_slash_mGluRAntag -> Gq_slash_Blocked_minus_rec_minus_Gq; Gq_slash_Antag_minus_bind_minus_Rec_minus_Gq_kf*Gq_slash_Rec_minus_Gq*Gq_slash_mGluRAntag - Gq_slash_Antag_minus_bind_minus_Rec_minus_Gq_kb*Gq_slash_Blocked_minus_rec_minus_Gq;
    Gq_slash_Antag_minus_bind_minus_Rec_minus_Gq_kf = 9.000045e-14 vol_uMINVsecINV; Gq_slash_Antag_minus_bind_minus_Rec_minus_Gq_kb = 1.5e-17 vol_secINV;
  // kf*MAPK_slash_craf_minus_1_star_*Ras_slash_GTP_minus_Ras-kb*MAPK_slash_Raf_star__minus_GTP_minus_Ras
  // Assume the binding is fast and limited only by the amount of Ras* available. So kf=kb/[craf-1] If kb is 1/sec, then kf = 1/0.2 uM = 1/(0.2 * 6e5) = 8.3e-6 Later: Raise it by 10 X to 4e-5 From Hallberg et al JBC 269:6 3913-3916 1994, 3% of cellular Raf is complexed with Ras. So we raise kb 4x to 4 This step needed to memb-anchor and activate Raf: Leevers et al Nature 369 411-414 May 16, 2003 Changed Ras and Raf to synaptic levels, an increase of about 2x for each. To maintain the percentage of complexed Raf, reduced the kf by 2.4 fold to 10.
  Ras_minus_act_minus_craf: MAPK_slash_craf_minus_1_star_ + Ras_slash_GTP_minus_Ras -> MAPK_slash_Raf_star__minus_GTP_minus_Ras; Ras_minus_act_minus_craf_kf*MAPK_slash_craf_minus_1_star_*Ras_slash_GTP_minus_Ras - Ras_minus_act_minus_craf_kb*MAPK_slash_Raf_star__minus_GTP_minus_Ras;
    Ras_minus_act_minus_craf_kf = 1.499985e-14 vol_uMINVsecINV; Ras_minus_act_minus_craf_kb = 7.5e-16 vol_secINV;
  // kf*BetaGamma*Ras_slash_inact_minus_GEF-kb*Ras_slash_GEF_minus_Gprot_minus_bg
  // SoS/GEF is present at 50 nM ie 3e4/cell. BetaGamma maxes out at 9e4. Assume we have 1/3 of the GEF active when the BetaGamma is 1.5e4. so 1e4 * kb = 2e4 * 1.5e4 * kf, so kf/kb = 3e-5. The rate of this equil should be reasonably fast, say 1/sec
  Ras_slash_bg_minus_act_minus_GEF: BetaGamma + Ras_slash_inact_minus_GEF -> Ras_slash_GEF_minus_Gprot_minus_bg; Ras_slash_bg_minus_act_minus_GEF_kf*BetaGamma*Ras_slash_inact_minus_GEF - Ras_slash_bg_minus_act_minus_GEF_kb*Ras_slash_GEF_minus_Gprot_minus_bg;
    Ras_slash_bg_minus_act_minus_GEF_kf = 9.000045e-15 vol_uMINVsecINV; Ras_slash_bg_minus_act_minus_GEF_kb = 1.5e-15 vol_secINV;
  // kf*Ras_slash_GEF_star_-kb*Ras_slash_inact_minus_GEF
  Ras_slash_dephosph_minus_GEF: Ras_slash_GEF_star_ -> Ras_slash_inact_minus_GEF; Ras_slash_dephosph_minus_GEF_kf*Ras_slash_GEF_star_ - Ras_slash_dephosph_minus_GEF_kb*Ras_slash_inact_minus_GEF;
    Ras_slash_dephosph_minus_GEF_kf = 1.5e-15 vol_secINV; Ras_slash_dephosph_minus_GEF_kb = 0 vol_secINV;
  // kf*Ras_slash_GTP_minus_Ras-kb*Ras_slash_GDP_minus_Ras
  // This is extremely slow (1e-4), but it is significant as so little GAP actually gets complexed with it that the total GTP turnover rises only by 2-3 X (see Gibbs et al, JBC 265(33) 20437-20422) and Eccleston et al JBC 268(36) 27012-27019 kf = 1e-4
  Ras_slash_Ras_minus_intrinsic_minus_GTPase: Ras_slash_GTP_minus_Ras -> Ras_slash_GDP_minus_Ras; Ras_slash_Ras_minus_intrinsic_minus_GTPase_kf*Ras_slash_GTP_minus_Ras - Ras_slash_Ras_minus_intrinsic_minus_GTPase_kb*Ras_slash_GDP_minus_Ras;
    Ras_slash_Ras_minus_intrinsic_minus_GTPase_kf = 1.5e-19 vol_secINV; Ras_slash_Ras_minus_intrinsic_minus_GTPase_kb = 0 vol_secINV;
  // kf*Ras_slash_GAP_star_-kb*Ras_slash_GAP
  // Assume a reasonably good rate for dephosphorylating it, 1/sec
  Ras_slash_dephosph_minus_GAP: Ras_slash_GAP_star_ -> Ras_slash_GAP; Ras_slash_dephosph_minus_GAP_kf*Ras_slash_GAP_star_ - Ras_slash_dephosph_minus_GAP_kb*Ras_slash_GAP;
    Ras_slash_dephosph_minus_GAP_kf = 1.5e-16 vol_secINV; Ras_slash_dephosph_minus_GAP_kb = 0 vol_secINV;
  // kf*Ras_slash_inact_minus_GEF*CaM_minus_Ca4-kb*Ras_slash_CaM_minus_GEF
  // We have no numbers for this. It is probably between the two extremes represented by the CaMKII phosph states, and I have used guesses based on this. kf=1e-4 kb=1 The reaction is based on Farnsworth et al Nature 376 524-527 1995 2 Aug 2004 Raised Kf from 60 to 200 to achieve higher MAPK activation following Ca stimulus for PKM models. 3 Aug 2004. Lowered Kf to 100.
  Ras_slash_CaM_minus_bind_minus_GEF: Ras_slash_inact_minus_GEF + CaM_minus_Ca4 -> Ras_slash_CaM_minus_GEF; Ras_slash_CaM_minus_bind_minus_GEF_kf*Ras_slash_inact_minus_GEF*CaM_minus_Ca4 - Ras_slash_CaM_minus_bind_minus_GEF_kb*Ras_slash_CaM_minus_GEF;
    Ras_slash_CaM_minus_bind_minus_GEF_kf = 2.99997e-13 vol_uMINVsecINV; Ras_slash_CaM_minus_bind_minus_GEF_kb = 1.5e-15 vol_secINV;
  // kf*Ras_slash_inact_minus_GEF_star_-kb*Ras_slash_inact_minus_GEF
  Ras_slash_dephosph_minus_inact_minus_GEF_star_: Ras_slash_inact_minus_GEF_star_ -> Ras_slash_inact_minus_GEF; Ras_slash_dephosph_minus_inact_minus_GEF_star__kf*Ras_slash_inact_minus_GEF_star_ - Ras_slash_dephosph_minus_inact_minus_GEF_star__kb*Ras_slash_inact_minus_GEF;
    Ras_slash_dephosph_minus_inact_minus_GEF_star__kf = 1.5e-15 vol_secINV; Ras_slash_dephosph_minus_inact_minus_GEF_star__kb = 0 vol_secINV;
  // kf*EGFR_slash_EGFR*EGFR_slash_EGF-kb*EGFR_slash_L_dot_EGFR
  // Affinity of EGFR for EGF is complex: depends on [EGFR]. We\'ll assume fixed [EGFR] and use exptal affinity ~20 nM (see Sherrill and Kyte Biochem 1996 35 5705-5718, Berkers et al JBC 266:2 922-927 1991, Sorokin et al JBC 269:13 9752-9759 1994). Tau =~2 min (Davis et al JBC 263:11 5373-5379 1988) or Berkers Kass = 6.2e5/M/sec, Kdiss=3.5e-4/sec. Sherrill and Kyte have Hill Coeff=1.7
  EGFR_slash_act_EGFR: EGFR_slash_EGFR + $EGFR_slash_EGF -> EGFR_slash_L_dot_EGFR; EGFR_slash_act_EGFR_kf*EGFR_slash_EGFR*EGFR_slash_EGF - EGFR_slash_act_EGFR_kb*EGFR_slash_L_dot_EGFR;
    EGFR_slash_act_EGFR_kf = 6.300045e-15 vol_uMINVsecINV; EGFR_slash_act_EGFR_kb = 3.75e-16 vol_secINV;
  // kf*EGFR_slash_SHC_star_-kb*EGFR_slash_SHC
  // Time course of decline of phosph is 20 min. Part of this is the turnoff time of the EGFR itself. Lets assume a tau of 10 min for this dephosph. It may be wildly off.
  EGFR_slash_dephosph_Shc: EGFR_slash_SHC_star_ -> EGFR_slash_SHC; EGFR_slash_dephosph_Shc_kf*EGFR_slash_SHC_star_ - EGFR_slash_dephosph_Shc_kb*EGFR_slash_SHC;
    EGFR_slash_dephosph_Shc_kf = 2.50005e-18 vol_secINV; EGFR_slash_dephosph_Shc_kb = 0 vol_secINV;
  // kf*EGFR_slash_L_dot_EGFR-kb*EGFR_slash_Internal_L_dot_EGFR
  // See Helin and Beguinot JBC 266:13 1991 pg 8363-8368. In Fig 3 they have internalization tau about 10 min, equil at about 20% EGF available. So kf = 4x kb, and 1/(kf + kb) = 600 sec so kb = 1/3K = 3.3e-4, and kf = 1.33e-3. This doesn\'t take into account the unbound receptor, so we need to push the kf up a bit, to 0.002
  EGFR_slash_Internalize: EGFR_slash_L_dot_EGFR -> EGFR_slash_Internal_L_dot_EGFR; EGFR_slash_Internalize_kf*EGFR_slash_L_dot_EGFR - EGFR_slash_Internalize_kb*EGFR_slash_Internal_L_dot_EGFR;
    EGFR_slash_Internalize_kf = 3e-18 vol_secINV; EGFR_slash_Internalize_kb = 4.95e-19 vol_secINV;
  // kf*Sos_slash_Sos_dot_Grb2*EGFR_slash_SHC_star_-kb*Shc_star__dot_Sos_dot_Grb2
  // Sasaoka et al JBC 269:51 pp 32621 1994, table on pg 32623 indicates that this pathway accounts for about 50% of the GEF activation. (88% - 39%). Error is large, about 20%. Fig 1 is most useful in constraining rates. Chook et al JBC 271:48 pp 30472, 1996 say that the Kd is 0.2 uM for Shc binding to EGFR. The Kd for Grb direct binding is 0.7, so we\'ll ignore it.
  Sos_slash_Shc_bind_Sos_dot_Grb2: Sos_slash_Sos_dot_Grb2 + EGFR_slash_SHC_star_ -> Shc_star__dot_Sos_dot_Grb2; Sos_slash_Shc_bind_Sos_dot_Grb2_kf*Sos_slash_Sos_dot_Grb2*EGFR_slash_SHC_star_ - Sos_slash_Shc_bind_Sos_dot_Grb2_kb*Shc_star__dot_Sos_dot_Grb2;
    Sos_slash_Shc_bind_Sos_dot_Grb2_kf = 7.499655e-16 vol_uMINVsecINV; Sos_slash_Shc_bind_Sos_dot_Grb2_kb = 1.5e-16 vol_secINV;
  // kf*Sos_slash_Sos_star_*Sos_slash_Grb2-kb*Sos_slash_Sos_star__dot_Grb2
  // Same rates as Grb2_bind_Sos: Porfiri and McCormick JBC 271:10 pp 5871 1996 show that the binding is not affected by the phosph.
  Sos_slash_Grb2_bind_Sos_star_: Sos_slash_Sos_star_ + Sos_slash_Grb2 -> Sos_slash_Sos_star__dot_Grb2; Sos_slash_Grb2_bind_Sos_star__kf*Sos_slash_Sos_star_*Sos_slash_Grb2 - Sos_slash_Grb2_bind_Sos_star__kb*Sos_slash_Sos_star__dot_Grb2;
    Sos_slash_Grb2_bind_Sos_star__kf = 3.75003e-17 vol_uMINVsecINV; Sos_slash_Grb2_bind_Sos_star__kb = 2.52e-17 vol_secINV;
  // kf*Sos_slash_Sos_star_-kb*Sos_slash_Sos
  // The only clue I have to these rates is from the time courses of the EGF activation, which is around 1 to 5 min. The dephosph would be expected to be of the same order, perhaps a bit longer. Lets use 0.002 which is about 8 min. Sep 17: The transient activation curve matches better with kf = 0.001
  Sos_slash_dephosph_Sos: Sos_slash_Sos_star_ -> Sos_slash_Sos; Sos_slash_dephosph_Sos_kf*Sos_slash_Sos_star_ - Sos_slash_dephosph_Sos_kb*Sos_slash_Sos;
    Sos_slash_dephosph_Sos_kf = 1.5e-18 vol_secINV; Sos_slash_dephosph_Sos_kb = 0 vol_secINV;
  // kf*Sos_slash_Grb2*Sos_slash_Sos-kb*Sos_slash_Sos_dot_Grb2
  // As there are 2 SH3 domains, this reaction could be 2nd order. I have a Kd of 22 uM from peptide binding (Lemmon et al JBC 269:50 pg 31653). However, Chook et al JBC 271:48 pg30472 say it is 0.4uM with purified proteins, so we believe them. They say it is 1:1 binding.
  Sos_slash_Grb2_bind_Sos: Sos_slash_Grb2 + Sos_slash_Sos -> Sos_slash_Sos_dot_Grb2; Sos_slash_Grb2_bind_Sos_kf*Sos_slash_Grb2*Sos_slash_Sos - Sos_slash_Grb2_bind_Sos_kb*Sos_slash_Sos_dot_Grb2;
    Sos_slash_Grb2_bind_Sos_kf = 3.75003e-17 vol_uMINVsecINV; Sos_slash_Grb2_bind_Sos_kb = 2.52e-17 vol_secINV;
  // kf*PLC_g_slash_PLC_g*Ca-kb*PLC_g_slash_Ca_dot_PLC_g
  // Nice curves from Homma et al JBC 263:14 6592-6598 1988 Fig 5c. The activity falls above 10 uM, but that is too high to reach physiologically anyway, so we\'ll ignore the higher pts and match the lower ones only. Half-max at 1 uM. But Wahl et al JBC 267:15 10447-10456 1992 have half-max at 56 nM which is what I\'ll use.
  PLC_g_slash_Ca_act_PLC_g: PLC_g_slash_PLC_g + Ca -> PLC_g_slash_Ca_dot_PLC_g; PLC_g_slash_Ca_act_PLC_g_kf*PLC_g_slash_PLC_g*Ca - PLC_g_slash_Ca_act_PLC_g_kb*PLC_g_slash_Ca_dot_PLC_g;
    PLC_g_slash_Ca_act_PLC_g_kf = 2.7e-13 vol_uMINVsecINV; PLC_g_slash_Ca_act_PLC_g_kb = 1.5e-14 vol_secINV;
  // kf*Ca*PLC_g_slash_PLC_G_star_-kb*PLC_g_slash_Ca_dot_PLC_g_star_
  // Again, we refer to Homma et al and Wahl et al, for preference using Wahl. Half-Max of the phosph form is at 316 nM. Use kb of 10 as this is likely to be pretty fast. Did some curve comparisons, and instead of 316 nM giving a kf of 5.27e-5, we will use 8e-5 for kf. 16 Sep 97. As we are now phosphorylating the Ca-bound form, equils have shifted. kf should now be 2e-5 to match the curves.
  PLC_g_slash_Ca_act_PLC_g_star_: Ca + PLC_g_slash_PLC_G_star_ -> PLC_g_slash_Ca_dot_PLC_g_star_; PLC_g_slash_Ca_act_PLC_g_star__kf*Ca*PLC_g_slash_PLC_G_star_ - PLC_g_slash_Ca_act_PLC_g_star__kb*PLC_g_slash_Ca_dot_PLC_g_star_;
    PLC_g_slash_Ca_act_PLC_g_star__kf = 1.799955e-14 vol_uMINVsecINV; PLC_g_slash_Ca_act_PLC_g_star__kb = 1.5e-14 vol_secINV;
  // kf*PLC_g_slash_Ca_dot_PLC_g_star_-kb*PLC_g_slash_Ca_dot_PLC_g
  PLC_g_slash_dephosph_PLC_g: PLC_g_slash_Ca_dot_PLC_g_star_ -> PLC_g_slash_Ca_dot_PLC_g; PLC_g_slash_dephosph_PLC_g_kf*PLC_g_slash_Ca_dot_PLC_g_star_ - PLC_g_slash_dephosph_PLC_g_kb*PLC_g_slash_Ca_dot_PLC_g;
    PLC_g_slash_dephosph_PLC_g_kf = 7.5e-17 vol_secINV; PLC_g_slash_dephosph_PLC_g_kb = 0 vol_secINV;
  // kf*CaM_minus_Ca4*CaMKII_slash_CaMKII-kb*CaMKII_slash_CaMKII_minus_CaM
  // This is tricky. There is some cooperativity here arising from interactions between the subunits of the CAMKII holoenzyme. However, the stoichiometry is 1. Kb/Kf = 6e4 #/cell. Rate is fast (see Hanson et al Neuron 12 943-956 1994) so lets say kb = 10. This gives kf = 1.6667e-4 H&S AnnRev Biochem 92 give tau for dissoc as 0.2 sec at low Ca, 0.4 at high. Low Ca = 100 nM = physiol.
  CaMKII_slash_CaMKII_minus_bind_minus_CaM: CaM_minus_Ca4 + CaMKII_slash_CaMKII -> CaMKII_slash_CaMKII_minus_CaM; CaMKII_slash_CaMKII_minus_bind_minus_CaM_kf*CaM_minus_Ca4*CaMKII_slash_CaMKII - CaMKII_slash_CaMKII_minus_bind_minus_CaM_kb*CaMKII_slash_CaMKII_minus_CaM;
    CaMKII_slash_CaMKII_minus_bind_minus_CaM_kf = 7.499925e-14 vol_uMINVsecINV; CaMKII_slash_CaMKII_minus_bind_minus_CaM_kb = 7.5e-15 vol_secINV;
  // kf*CaMKII_slash_CaMKII_minus_thr286*CaM_minus_Ca4-kb*CaMKII_slash_CaMKII_minus_thr286_star__minus_CaM
  // Affinity is up 1000X. Time to release is about 20 sec, so the kb is OK at 0.1 This makes Kf around 1.6666e-3
  CaMKII_slash_CaMK_minus_thr286_minus_bind_minus_CaM: CaMKII_slash_CaMKII_minus_thr286 + CaM_minus_Ca4 -> CaMKII_slash_CaMKII_minus_thr286_star__minus_CaM; CaMKII_slash_CaMK_minus_thr286_minus_bind_minus_CaM_kf*CaMKII_slash_CaMKII_minus_thr286*CaM_minus_Ca4 - CaMKII_slash_CaMK_minus_thr286_minus_bind_minus_CaM_kb*CaMKII_slash_CaMKII_minus_thr286_star__minus_CaM;
    CaMKII_slash_CaMK_minus_thr286_minus_bind_minus_CaM_kf = 1.500255e-12 vol_uMINVsecINV; CaMKII_slash_CaMK_minus_thr286_minus_bind_minus_CaM_kb = 1.5e-16 vol_secINV;
  // kf*CaMKII_slash_CaMKII-kb*CaMKII_slash_CaMKII_minus_thr286
  // This reaction represents one of the big unknowns in CaMK-II biochemistry: what maintains the basal level of phosphorylation on thr 286 ? See Hanson and Schulman Ann Rev Biochem 1992 61:559-601, specially pg 580, for review. I have not been able to find any compelling mechanism in the literature, but fortunately the level of basal activity is well documented.
  CaMKII_slash_basal_minus_activity: CaMKII_slash_CaMKII -> CaMKII_slash_CaMKII_minus_thr286; CaMKII_slash_basal_minus_activity_kf*CaMKII_slash_CaMKII - CaMKII_slash_basal_minus_activity_kb*CaMKII_slash_CaMKII_minus_thr286;
    CaMKII_slash_basal_minus_activity_kf = 4.5e-18 vol_secINV; CaMKII_slash_basal_minus_activity_kb = 0 vol_secINV;
  // kf*CaM_slash_CaM*Ca^2-kb*CaM_minus_TR2_minus_Ca2
  // Lets use the fast rate consts here. Since the rates are so different, I am not sure whether the order is relevant. These correspond to the TR2C fragment. We use the Martin et al rates here, plus the Drabicowski binding consts. All are scaled by 3X to cell temp. kf = 2e-10 kb = 72 Stemmer & Klee: K1=.9, K2=1.1. Assume 1.0uM for both. kb/kf=3.6e11. If kb=72, kf = 2e-10 (Exactly the same !)....
  CaM_slash_CaM_minus_TR2_minus_bind_minus_Ca: CaM_slash_CaM + 2 Ca -> CaM_minus_TR2_minus_Ca2; CaM_slash_CaM_minus_TR2_minus_bind_minus_Ca_kf*CaM_slash_CaM*Ca^2 - CaM_slash_CaM_minus_TR2_minus_bind_minus_Ca_kb*CaM_minus_TR2_minus_Ca2;
    CaM_slash_CaM_minus_TR2_minus_bind_minus_Ca_kf = 1.08000135e-13 vol_uMINV2secINV; CaM_slash_CaM_minus_TR2_minus_bind_minus_Ca_kb = 1.08e-13 vol_secINV;
  // kf*CaM_minus_TR2_minus_Ca2*Ca-kb*CaM_minus_Ca3
  // K3 = 21.5, K4 = 2.8. Assuming that the K4 step happens first, we get kb/kf = 2.8 uM = 1.68e6 so kf =6e-6 assuming kb = 10
  CaM_slash_CaM_minus_TR2_minus_Ca2_minus_bind_minus_Ca: CaM_minus_TR2_minus_Ca2 + Ca -> CaM_minus_Ca3; CaM_slash_CaM_minus_TR2_minus_Ca2_minus_bind_minus_Ca_kf*CaM_minus_TR2_minus_Ca2*Ca - CaM_slash_CaM_minus_TR2_minus_Ca2_minus_bind_minus_Ca_kb*CaM_minus_Ca3;
    CaM_slash_CaM_minus_TR2_minus_Ca2_minus_bind_minus_Ca_kf = 5.4e-15 vol_uMINVsecINV; CaM_slash_CaM_minus_TR2_minus_Ca2_minus_bind_minus_Ca_kb = 1.5e-14 vol_secINV;
  // kf*CaM_minus_Ca3*Ca-kb*CaM_minus_Ca4
  // Use K3 = 21.5 uM here from Stemmer and Klee table 3. kb/kf =21.5 * 6e5 so kf = 7.75e-7, kb = 10
  CaM_slash_CaM_minus_Ca3_minus_bind_minus_Ca: CaM_minus_Ca3 + Ca -> CaM_minus_Ca4; CaM_slash_CaM_minus_Ca3_minus_bind_minus_Ca_kf*CaM_minus_Ca3*Ca - CaM_slash_CaM_minus_Ca3_minus_bind_minus_Ca_kb*CaM_minus_Ca4;
    CaM_slash_CaM_minus_Ca3_minus_bind_minus_Ca_kf = 6.975045e-16 vol_uMINVsecINV; CaM_slash_CaM_minus_Ca3_minus_bind_minus_Ca_kb = 1.5e-14 vol_secINV;
  // kf*CaM_slash_neurogranin*CaM_slash_CaM-kb*CaM_slash_neurogranin_minus_CaM
  // Surprisingly, no direct info on rates from neurogranin at this time. These rates are based on GAP-43 binding studies. As GAP-43 and neurogranin share near identity in the CaM/PKC binding regions, and also similarity in phosph and dephosph rates, I am borrowing GAP-43 kinetic info. See Alexander et al JBC 262:13 6108-6113 1987
  CaM_slash_neurogranin_minus_bind_minus_CaM: CaM_slash_neurogranin + CaM_slash_CaM -> CaM_slash_neurogranin_minus_CaM; CaM_slash_neurogranin_minus_bind_minus_CaM_kf*CaM_slash_neurogranin*CaM_slash_CaM - CaM_slash_neurogranin_minus_bind_minus_CaM_kb*CaM_slash_neurogranin_minus_CaM;
    CaM_slash_neurogranin_minus_bind_minus_CaM_kf = 4.499955e-16 vol_uMINVsecINV; CaM_slash_neurogranin_minus_bind_minus_CaM_kb = 1.5e-15 vol_secINV;
  // kf*CaM_slash_neurogranin_star_-kb*CaM_slash_neurogranin
  // This is put in to keep the basal levels of neurogranin* experimentally reasonable. From various papers, specially Ramakers et al JBC 270:23 1995 13892-13898, it looks like the basal level of phosph is between 20 and 40%. I est around 25 % The kf of 0.005 gives around this level at basal PKC activity levels of 0.1 uM active PKC.
  CaM_slash_dephosph_minus_neurogranin: CaM_slash_neurogranin_star_ -> CaM_slash_neurogranin; CaM_slash_dephosph_minus_neurogranin_kf*CaM_slash_neurogranin_star_ - CaM_slash_dephosph_minus_neurogranin_kb*CaM_slash_neurogranin;
    CaM_slash_dephosph_minus_neurogranin_kf = 7.5e-18 vol_secINV; CaM_slash_dephosph_minus_neurogranin_kb = 0 vol_secINV;
  // kf*PP1_slash_I1_star_*PP1_minus_active-kb*PP1_slash_PP1_minus_I1_star_
  // K inhib = 1nM from Cohen Ann Rev Bioch 1989, 4 nM from Foukes et al Assume 2 nM. kf /kb = 8.333e-4
  PP1_slash_Inact_minus_PP1: PP1_slash_I1_star_ + PP1_minus_active -> PP1_slash_PP1_minus_I1_star_; PP1_slash_Inact_minus_PP1_kf*PP1_slash_I1_star_*PP1_minus_active - PP1_slash_Inact_minus_PP1_kb*PP1_slash_PP1_minus_I1_star_;
    PP1_slash_Inact_minus_PP1_kf = 7.499655e-13 vol_uMINVsecINV; PP1_slash_Inact_minus_PP1_kb = 1.5e-16 vol_secINV;
  // kf*PP1_slash_PP1_minus_I1-kb*PP1_minus_active*PP1_slash_I1
  // Let us assume that the equil in this case is very far over to the right. This is probably safe.
  PP1_slash_dissoc_minus_PP1_minus_I1: PP1_slash_PP1_minus_I1 -> PP1_minus_active + PP1_slash_I1; PP1_slash_dissoc_minus_PP1_minus_I1_kf*PP1_slash_PP1_minus_I1 - PP1_slash_dissoc_minus_PP1_minus_I1_kb*PP1_minus_active*PP1_slash_I1;
    PP1_slash_dissoc_minus_PP1_minus_I1_kf = 1.5e-15 vol_secINV; PP1_slash_dissoc_minus_PP1_minus_I1_kb = 0 vol_uMINVsecINV;
  // kf*Ca^2*PP2B_slash_CaNAB_minus_Ca2-kb*CaNAB_minus_Ca4
  // This process is probably much more complicated and involves CaM. However, as I can\'t find detailed info I am bundling this into a single step. Based on Steemer and Klee pg 6863, the Kact is 0.5 uM. kf/kb = 1/(0.5 * 6e5)^2 = 1.11e-11
  PP2B_slash_Ca_minus_bind_minus_CaNAB_minus_Ca2: 2 Ca + PP2B_slash_CaNAB_minus_Ca2 -> CaNAB_minus_Ca4; PP2B_slash_Ca_minus_bind_minus_CaNAB_minus_Ca2_kf*Ca^2*PP2B_slash_CaNAB_minus_Ca2 - PP2B_slash_Ca_minus_bind_minus_CaNAB_minus_Ca2_kb*CaNAB_minus_Ca4;
    PP2B_slash_Ca_minus_bind_minus_CaNAB_minus_Ca2_kf = 5.399946e-15 vol_uMINV2secINV; PP2B_slash_Ca_minus_bind_minus_CaNAB_minus_Ca2_kb = 1.5e-15 vol_secINV;
  // kf*PP2B_slash_CaNAB*Ca^2-kb*PP2B_slash_CaNAB_minus_Ca2
  // going on the experience with CaM, we put the fast (high affinity) sites first. We only know (Stemmer and Klee) that the affinity is < 70 nM. Assuming 10 nM at first, we get kf = 2.78e-8, kb = 1. Try 20 nM. kf = 7e-9, kb = 1
  PP2B_slash_Ca_minus_bind_minus_CaNAB: PP2B_slash_CaNAB + 2 Ca -> PP2B_slash_CaNAB_minus_Ca2; PP2B_slash_Ca_minus_bind_minus_CaNAB_kf*PP2B_slash_CaNAB*Ca^2 - PP2B_slash_Ca_minus_bind_minus_CaNAB_kb*PP2B_slash_CaNAB_minus_Ca2;
    PP2B_slash_Ca_minus_bind_minus_CaNAB_kf = 1.501254e-11 vol_uMINV2secINV; PP2B_slash_Ca_minus_bind_minus_CaNAB_kb = 1.5e-15 vol_secINV;
  // kf*CaNAB_minus_Ca4*CaM_minus_TR2_minus_Ca2-kb*PP2B_slash_CaMCa2_minus_CANAB
  // Disabled. See notes for PP2B7.g
  PP2B_slash_CaM_minus_Ca2_minus_bind_minus_CaNAB: CaNAB_minus_Ca4 + CaM_minus_TR2_minus_Ca2 -> PP2B_slash_CaMCa2_minus_CANAB; PP2B_slash_CaM_minus_Ca2_minus_bind_minus_CaNAB_kf*CaNAB_minus_Ca4*CaM_minus_TR2_minus_Ca2 - PP2B_slash_CaM_minus_Ca2_minus_bind_minus_CaNAB_kb*PP2B_slash_CaMCa2_minus_CANAB;
    PP2B_slash_CaM_minus_Ca2_minus_bind_minus_CaNAB_kf = 3.600045e-16 vol_uMINVsecINV; PP2B_slash_CaM_minus_Ca2_minus_bind_minus_CaNAB_kb = 1.5e-15 vol_secINV;
  // kf*CaM_minus_Ca3*CaNAB_minus_Ca4-kb*PP2B_slash_CaMCa3_minus_CaNAB
  PP2B_slash_CaMCa3_minus_bind_minus_CaNAB: CaM_minus_Ca3 + CaNAB_minus_Ca4 -> PP2B_slash_CaMCa3_minus_CaNAB; PP2B_slash_CaMCa3_minus_bind_minus_CaNAB_kf*CaM_minus_Ca3*CaNAB_minus_Ca4 - PP2B_slash_CaMCa3_minus_bind_minus_CaNAB_kb*PP2B_slash_CaMCa3_minus_CaNAB;
    PP2B_slash_CaMCa3_minus_bind_minus_CaNAB_kf = 3.357045e-15 vol_uMINVsecINV; PP2B_slash_CaMCa3_minus_bind_minus_CaNAB_kb = 1.5e-15 vol_secINV;
  // kf*CaM_minus_Ca4*CaNAB_minus_Ca4-kb*PP2B_slash_CaMCa4_minus_CaNAB
  PP2B_slash_CaMCa4_minus_bind_minus_CaNAB: CaM_minus_Ca4 + CaNAB_minus_Ca4 -> PP2B_slash_CaMCa4_minus_CaNAB; PP2B_slash_CaMCa4_minus_bind_minus_CaNAB_kf*CaM_minus_Ca4*CaNAB_minus_Ca4 - PP2B_slash_CaMCa4_minus_bind_minus_CaNAB_kb*PP2B_slash_CaMCa4_minus_CaNAB;
    PP2B_slash_CaMCa4_minus_bind_minus_CaNAB_kf = 9.000045e-13 vol_uMINVsecINV; PP2B_slash_CaMCa4_minus_bind_minus_CaNAB_kb = 1.5e-15 vol_secINV;
  // kf*PKA_slash_R2C2*cAMP-kb*PKA_slash_R2C2_minus_cAMP
  // Hasler et al FASEB J 6:2734-2741 1992 say Kd =1e-7M for type II, 5.6e-8 M for type I. Take mean which comes to 2e-13 #/cell Smith et al PNAS USA 78:3 1591-1595 1981 have better data. First kf/kb=2.1e7/M = 3.5e-5 (#/cell). Ogreid and Doskeland Febs Lett 129:2 287-292 1981 have figs suggesting time course of complete assoc is < 1 min.
  PKA_slash_cAMP_minus_bind_minus_site_minus_B1: PKA_slash_R2C2 + cAMP -> PKA_slash_R2C2_minus_cAMP; PKA_slash_cAMP_minus_bind_minus_site_minus_B1_kf*PKA_slash_R2C2*cAMP - PKA_slash_cAMP_minus_bind_minus_site_minus_B1_kb*PKA_slash_R2C2_minus_cAMP;
    PKA_slash_cAMP_minus_bind_minus_site_minus_B1_kf = 8.1e-14 vol_uMINVsecINV; PKA_slash_cAMP_minus_bind_minus_site_minus_B1_kb = 4.95e-14 vol_secINV;
  // kf*PKA_slash_R2C2_minus_cAMP*cAMP-kb*PKA_slash_R2C2_minus_cAMP2
  // For now let us set this to the same Km (1e-7M) as site B. This gives kf/kb = .7e-7M * 1e6 / (6e5^2) : 1/(6e5^2) = 2e-13:2.77e-12 Smith et al have better values. They say that this is cooperative, so the consts are now kf/kb =8.3e-4
  PKA_slash_cAMP_minus_bind_minus_site_minus_B2: PKA_slash_R2C2_minus_cAMP + cAMP -> PKA_slash_R2C2_minus_cAMP2; PKA_slash_cAMP_minus_bind_minus_site_minus_B2_kf*PKA_slash_R2C2_minus_cAMP*cAMP - PKA_slash_cAMP_minus_bind_minus_site_minus_B2_kb*PKA_slash_R2C2_minus_cAMP2;
    PKA_slash_cAMP_minus_bind_minus_site_minus_B2_kf = 8.1e-14 vol_uMINVsecINV; PKA_slash_cAMP_minus_bind_minus_site_minus_B2_kb = 4.95e-14 vol_secINV;
  // kf*PKA_slash_R2C2_minus_cAMP2*cAMP-kb*PKA_slash_R2C2_minus_cAMP3
  PKA_slash_cAMP_minus_bind_minus_site_minus_A1: PKA_slash_R2C2_minus_cAMP2 + cAMP -> PKA_slash_R2C2_minus_cAMP3; PKA_slash_cAMP_minus_bind_minus_site_minus_A1_kf*PKA_slash_R2C2_minus_cAMP2*cAMP - PKA_slash_cAMP_minus_bind_minus_site_minus_A1_kb*PKA_slash_R2C2_minus_cAMP3;
    PKA_slash_cAMP_minus_bind_minus_site_minus_A1_kf = 1.1249955e-13 vol_uMINVsecINV; PKA_slash_cAMP_minus_bind_minus_site_minus_A1_kb = 1.65e-13 vol_secINV;
  // kf*cAMP*PKA_slash_R2C2_minus_cAMP3-kb*PKA_slash_R2C2_minus_cAMP4
  PKA_slash_cAMP_minus_bind_minus_site_minus_A2: cAMP + PKA_slash_R2C2_minus_cAMP3 -> PKA_slash_R2C2_minus_cAMP4; PKA_slash_cAMP_minus_bind_minus_site_minus_A2_kf*cAMP*PKA_slash_R2C2_minus_cAMP3 - PKA_slash_cAMP_minus_bind_minus_site_minus_A2_kb*PKA_slash_R2C2_minus_cAMP4;
    PKA_slash_cAMP_minus_bind_minus_site_minus_A2_kf = 1.1249955e-13 vol_uMINVsecINV; PKA_slash_cAMP_minus_bind_minus_site_minus_A2_kb = 4.875e-14 vol_secINV;
  // kf*PKA_slash_R2C2_minus_cAMP4-kb*PKA_minus_active*PKA_slash_R2C_minus_cAMP4
  // This has to be fast, as the activation of PKA by cAMP is also fast. kf was 10
  PKA_slash_Release_minus_C1: PKA_slash_R2C2_minus_cAMP4 -> PKA_minus_active + PKA_slash_R2C_minus_cAMP4; PKA_slash_Release_minus_C1_kf*PKA_slash_R2C2_minus_cAMP4 - PKA_slash_Release_minus_C1_kb*PKA_minus_active*PKA_slash_R2C_minus_cAMP4;
    PKA_slash_Release_minus_C1_kf = 9e-14 vol_secINV; PKA_slash_Release_minus_C1_kb = 2.7e-14 vol_uMINVsecINV;
  // kf*PKA_slash_R2C_minus_cAMP4-kb*PKA_minus_active*PKA_slash_R2_minus_cAMP4
  PKA_slash_Release_minus_C2: PKA_slash_R2C_minus_cAMP4 -> PKA_minus_active + PKA_slash_R2_minus_cAMP4; PKA_slash_Release_minus_C2_kf*PKA_slash_R2C_minus_cAMP4 - PKA_slash_Release_minus_C2_kb*PKA_minus_active*PKA_slash_R2_minus_cAMP4;
    PKA_slash_Release_minus_C2_kf = 9e-14 vol_secINV; PKA_slash_Release_minus_C2_kb = 2.7e-14 vol_uMINVsecINV;
  // kf*PKA_minus_active*PKA_slash_PKA_minus_inhibitor-kb*PKA_slash_inhibited_minus_PKA
  // This has to be set to zero for matching the expts in vitro. In vivo we need to consider the inhibition though. kf = 1e-5 kb = 1
  PKA_slash_inhib_minus_PKA: PKA_minus_active + PKA_slash_PKA_minus_inhibitor -> PKA_slash_inhibited_minus_PKA; PKA_slash_inhib_minus_PKA_kf*PKA_minus_active*PKA_slash_PKA_minus_inhibitor - PKA_slash_inhib_minus_PKA_kb*PKA_slash_inhibited_minus_PKA;
    PKA_slash_inhib_minus_PKA_kf = 9.000045e-14 vol_uMINVsecINV; PKA_slash_inhib_minus_PKA_kb = 1.5e-15 vol_secINV;
  // kf*CaM_minus_Ca4*AC_slash_AC1-kb*AC_slash_AC1_minus_CaM
  // Half-max at 20 nM CaM (Tang et al JBC 266:13 8595-8603 1991 kb/kf = 20 nM = 12000 #/cell so kf = kb/12000 = kb * 8.333e-5
  AC_slash_CaM_minus_bind_minus_AC1: CaM_minus_Ca4 + AC_slash_AC1 -> AC_slash_AC1_minus_CaM; AC_slash_CaM_minus_bind_minus_AC1_kf*CaM_minus_Ca4*AC_slash_AC1 - AC_slash_CaM_minus_bind_minus_AC1_kb*AC_slash_AC1_minus_CaM;
    AC_slash_CaM_minus_bind_minus_AC1_kf = 7.499925e-14 vol_uMINVsecINV; AC_slash_CaM_minus_bind_minus_AC1_kb = 1.5e-15 vol_secINV;
  // kf*AC_slash_AC2_star_-kb*AC_slash_AC2
  // Random rate.
  AC_slash_dephosph_minus_AC2: AC_slash_AC2_star_ -> AC_slash_AC2; AC_slash_dephosph_minus_AC2_kf*AC_slash_AC2_star_ - AC_slash_dephosph_minus_AC2_kb*AC_slash_AC2;
    AC_slash_dephosph_minus_AC2_kf = 1.5e-16 vol_secINV; AC_slash_dephosph_minus_AC2_kb = 0 vol_secINV;
  // kf*AC_slash_AC2*Gs_minus_alpha-kb*AC_slash_AC2_minus_Gs
  // Half-max at around 3nM = kb/kf from fig 5 in Feinstein et al PNAS USA 88 10173-10177 1991 kf = kb/1800 = 5.56e-4 kb Ofer\'s thesis data indicates it is more like 2 nM. kf = kb/1200 = 8.33e-4
  AC_slash_Gs_minus_bind_minus_AC2: AC_slash_AC2 + Gs_minus_alpha -> AC_slash_AC2_minus_Gs; AC_slash_Gs_minus_bind_minus_AC2_kf*AC_slash_AC2*Gs_minus_alpha - AC_slash_Gs_minus_bind_minus_AC2_kb*AC_slash_AC2_minus_Gs;
    AC_slash_Gs_minus_bind_minus_AC2_kf = 7.499925e-13 vol_uMINVsecINV; AC_slash_Gs_minus_bind_minus_AC2_kb = 1.5e-15 vol_secINV;
  // kf*Gs_minus_alpha*AC_slash_AC1-kb*AC_slash_AC1_minus_Gs
  // Half-max 8nM from Tang et al JBC266:13 8595-8603 kb/kf = 8 nM = 4800#/cell so kf = kb * 2.08e-4
  AC_slash_Gs_minus_bind_minus_AC1: Gs_minus_alpha + AC_slash_AC1 -> AC_slash_AC1_minus_Gs; AC_slash_Gs_minus_bind_minus_AC1_kf*Gs_minus_alpha*AC_slash_AC1 - AC_slash_Gs_minus_bind_minus_AC1_kb*AC_slash_AC1_minus_Gs;
    AC_slash_Gs_minus_bind_minus_AC1_kf = 1.89e-13 vol_uMINVsecINV; AC_slash_Gs_minus_bind_minus_AC1_kb = 1.5e-15 vol_secINV;
  // kf*Gs_minus_alpha*AC_slash_AC2_star_-kb*AC_slash_AC2_star__minus_Gs
  // kb/kf = 1.2 nM so kf = kb/720 = 1.3888 * kb.
  AC_slash_Gs_minus_bind_minus_AC2_star_: Gs_minus_alpha + AC_slash_AC2_star_ -> AC_slash_AC2_star__minus_Gs; AC_slash_Gs_minus_bind_minus_AC2_star__kf*Gs_minus_alpha*AC_slash_AC2_star_ - AC_slash_Gs_minus_bind_minus_AC2_star__kb*AC_slash_AC2_star__minus_Gs;
    AC_slash_Gs_minus_bind_minus_AC2_star__kf = 1.2499245e-12 vol_uMINVsecINV; AC_slash_Gs_minus_bind_minus_AC2_star__kb = 1.5e-15 vol_secINV;
  // kf*AC_slash_cAMP_minus_PDE_star_-kb*AC_slash_cAMP_minus_PDE
  // The rates for this are poorly constrained. In adipocytes (probably a different PDE) the dephosphorylation is complete within 15 min, but there are no intermediate time points so it could be much faster. Identity of phosphatase etc is still unknown.
  AC_slash_dephosph_minus_PDE: AC_slash_cAMP_minus_PDE_star_ -> AC_slash_cAMP_minus_PDE; AC_slash_dephosph_minus_PDE_kf*AC_slash_cAMP_minus_PDE_star_ - AC_slash_dephosph_minus_PDE_kb*AC_slash_cAMP_minus_PDE;
    AC_slash_dephosph_minus_PDE_kf = 1.5e-16 vol_secINV; AC_slash_dephosph_minus_PDE_kb = 0 vol_secINV;
  // kf*AC_slash_PDE1*CaM_minus_Ca4-kb*AC_slash_CaM_dot_PDE1
  // For olf epi PDE1, affinity is 7 nM. Assume same for brain. Reaction should be pretty fast. Assume kb = 5/sec. Then kf = 5 / (0.007 * 6e5) = 1.2e-3
  AC_slash_CaM_bind_PDE1: AC_slash_PDE1 + CaM_minus_Ca4 -> AC_slash_CaM_dot_PDE1; AC_slash_CaM_bind_PDE1_kf*AC_slash_PDE1*CaM_minus_Ca4 - AC_slash_CaM_bind_PDE1_kb*AC_slash_CaM_dot_PDE1;
    AC_slash_CaM_bind_PDE1_kf = 1.08e-12 vol_uMINVsecINV; AC_slash_CaM_bind_PDE1_kb = 7.5e-15 vol_secINV;
  // kf*Ca_input-kb*Ca
  Ca_stoch: Ca_input -> Ca; Ca_stoch_kf*Ca_input - Ca_stoch_kb*Ca;
    Ca_stoch_kf = 1.5e-13 vol_secINV; Ca_stoch_kb = 1.5e-13 vol_secINV;
  // kf*MAPK_star_^2-kb*MKP3_slash_nuc_MAPK_star_
  MKP3_slash_translocation: 2 MAPK_star_ -> MKP3_slash_nuc_MAPK_star_; MKP3_slash_translocation_kf*MAPK_star_^2 - MKP3_slash_translocation_kb*MKP3_slash_nuc_MAPK_star_;
    MKP3_slash_translocation_kf = 3.75003e-19 vol_uMINVsecINV; MKP3_slash_translocation_kb = 1.5e-18 vol_secINV;
  // kf*MKP3_slash_nucleotides-kb*MKP3_slash_MKP3_synthesis
  // Reverse reaction is for turning off the synthesis.
  MKP3_slash_basal_transcription: $MKP3_slash_nucleotides -> MKP3_slash_MKP3_synthesis; MKP3_slash_basal_transcription_kf*MKP3_slash_nucleotides - MKP3_slash_basal_transcription_kb*MKP3_slash_MKP3_synthesis;
    MKP3_slash_basal_transcription_kf = 1.5e-21 vol_secINV; MKP3_slash_basal_transcription_kb = 1.5e-18 vol_secINV;
  // kf*MKP3_slash_MKP_minus_3-kb*MKP3_slash_ubiquitination
  MKP3_slash_MKP3_minus_turnover: MKP3_slash_MKP_minus_3 -> $MKP3_slash_ubiquitination; MKP3_slash_MKP3_minus_turnover_kf*MKP3_slash_MKP_minus_3 - MKP3_slash_MKP3_minus_turnover_kb*MKP3_slash_ubiquitination;
    MKP3_slash_MKP3_minus_turnover_kf = 7.5e-19 vol_secINV; MKP3_slash_MKP3_minus_turnover_kb = 0 vol_secINV;
  // kf*PKM_slash_Ca_detector*Ca^2-kb*PKM_slash_Ca_dot_detector_complex
  PKM_slash_trigger_PKM: PKM_slash_Ca_detector + 2 Ca -> PKM_slash_Ca_dot_detector_complex; PKM_slash_trigger_PKM_kf*PKM_slash_Ca_detector*Ca^2 - PKM_slash_trigger_PKM_kb*PKM_slash_Ca_dot_detector_complex;
    PKM_slash_trigger_PKM_kf = 1.500039e-16 vol_uMINV2secINV; PKM_slash_trigger_PKM_kb = 6e-16 vol_secINV;
  // kf*PKC_slash_PKM_minus_zeta-kb*PKM_slash_degraded_PKM
  // Time-course of 2 hours.
  PKM_slash_PKM_degradation: PKC_slash_PKM_minus_zeta -> $PKM_slash_degraded_PKM; PKM_slash_PKM_degradation_kf*PKC_slash_PKM_minus_zeta - PKM_slash_PKM_degradation_kb*PKM_slash_degraded_PKM;
    PKM_slash_PKM_degradation_kf = 7.5e-19 vol_secINV; PKM_slash_PKM_degradation_kb = 0 vol_secINV;
  // kf*PKM_slash_PKM_synthesis-kb*PKM_slash_PKM_activator
  PKM_slash_turn_off_activator: PKM_slash_PKM_synthesis -> PKM_slash_PKM_activator; PKM_slash_turn_off_activator_kf*PKM_slash_PKM_synthesis - PKM_slash_turn_off_activator_kb*PKM_slash_PKM_activator;
    PKM_slash_turn_off_activator_kf = 1.5e-18 vol_secINV; PKM_slash_turn_off_activator_kb = 0 vol_secINV;
  // k1*PLA2_slash_APC*PLA2_slash_PLA2_minus_Ca_star_-k2*PLA2_slash_PLA2_minus_Ca_star__slash_kenz_slash_kenz_cplx
  // 10 x raise oct22 12 x oct 24, set k2 = 4 * k3
  PLA2_slash_PLA2_minus_Ca_star__slash_kenz_1: $PLA2_slash_APC + PLA2_slash_PLA2_minus_Ca_star_ -> PLA2_slash_PLA2_minus_Ca_star__slash_kenz_slash_kenz_cplx; PLA2_slash_PLA2_minus_Ca_star__slash_kenz_1_k1*PLA2_slash_APC*PLA2_slash_PLA2_minus_Ca_star_ - PLA2_slash_PLA2_minus_Ca_star__slash_kenz_1_k2*PLA2_slash_PLA2_minus_Ca_star__slash_kenz_slash_kenz_cplx;
    PLA2_slash_PLA2_minus_Ca_star__slash_kenz_1_k1 = 2.025e-15 vol_uMINVsecINV; PLA2_slash_PLA2_minus_Ca_star__slash_kenz_1_k2 = 3.24e-14 vol_secINV;
  // k3*PLA2_slash_PLA2_minus_Ca_star__slash_kenz_slash_kenz_cplx
  PLA2_slash_PLA2_minus_Ca_star__slash_kenz_2: PLA2_slash_PLA2_minus_Ca_star__slash_kenz_slash_kenz_cplx => AA + PLA2_slash_PLA2_minus_Ca_star_; PLA2_slash_PLA2_minus_Ca_star__slash_kenz_2_k3*PLA2_slash_PLA2_minus_Ca_star__slash_kenz_slash_kenz_cplx;
    PLA2_slash_PLA2_minus_Ca_star__slash_kenz_2_k3 = 8.1e-15 vol_secINV;
  // k1*PLA2_slash_APC*PLA2_slash_PIP2_minus_PLA2_star_-k2*PLA2_slash_PIP2_minus_PLA2_star__slash_kenz_slash_kenz_cplx
  // 10 X raise oct 22 12 X further raise oct 24 to allow for correct conc of enzyme
  PLA2_slash_PIP2_minus_PLA2_star__slash_kenz_1: $PLA2_slash_APC + PLA2_slash_PIP2_minus_PLA2_star_ -> PLA2_slash_PIP2_minus_PLA2_star__slash_kenz_slash_kenz_cplx; PLA2_slash_PIP2_minus_PLA2_star__slash_kenz_1_k1*PLA2_slash_APC*PLA2_slash_PIP2_minus_PLA2_star_ - PLA2_slash_PIP2_minus_PLA2_star__slash_kenz_1_k2*PLA2_slash_PIP2_minus_PLA2_star__slash_kenz_slash_kenz_cplx;
    PLA2_slash_PIP2_minus_PLA2_star__slash_kenz_1_k1 = 4.140045e-15 vol_uMINVsecINV; PLA2_slash_PIP2_minus_PLA2_star__slash_kenz_1_k2 = 6.624e-14 vol_secINV;
  // k3*PLA2_slash_PIP2_minus_PLA2_star__slash_kenz_slash_kenz_cplx
  PLA2_slash_PIP2_minus_PLA2_star__slash_kenz_2: PLA2_slash_PIP2_minus_PLA2_star__slash_kenz_slash_kenz_cplx => AA + PLA2_slash_PIP2_minus_PLA2_star_; PLA2_slash_PIP2_minus_PLA2_star__slash_kenz_2_k3*PLA2_slash_PIP2_minus_PLA2_star__slash_kenz_slash_kenz_cplx;
    PLA2_slash_PIP2_minus_PLA2_star__slash_kenz_2_k3 = 1.656e-14 vol_secINV;
  // k1*PLA2_slash_APC*PLA2_slash_PIP2_minus_Ca_minus_PLA2_star_-k2*PLA2_slash_PIP2_minus_Ca_minus_PLA2_star__slash_kenz_slash_kenz_cplx
  // 10 x raise oct 22 12 x and rescale for k2 = 4 * k3 convention oct 24 Increase further to get the match to expt, which was spoilt due to large accumulation of PLA2 in the enzyme complexed forms. Lets raise k3, leaving the others at k1 = 1.5e-5 and k2 = 144 since they are large already.
  PLA2_slash_PIP2_minus_Ca_minus_PLA2_star__slash_kenz_1: $PLA2_slash_APC + PLA2_slash_PIP2_minus_Ca_minus_PLA2_star_ -> PLA2_slash_PIP2_minus_Ca_minus_PLA2_star__slash_kenz_slash_kenz_cplx; PLA2_slash_PIP2_minus_Ca_minus_PLA2_star__slash_kenz_1_k1*PLA2_slash_APC*PLA2_slash_PIP2_minus_Ca_minus_PLA2_star_ - PLA2_slash_PIP2_minus_Ca_minus_PLA2_star__slash_kenz_1_k2*PLA2_slash_PIP2_minus_Ca_minus_PLA2_star__slash_kenz_slash_kenz_cplx;
    PLA2_slash_PIP2_minus_Ca_minus_PLA2_star__slash_kenz_1_k1 = 1.35e-14 vol_uMINVsecINV; PLA2_slash_PIP2_minus_Ca_minus_PLA2_star__slash_kenz_1_k2 = 2.16e-13 vol_secINV;
  // k3*PLA2_slash_PIP2_minus_Ca_minus_PLA2_star__slash_kenz_slash_kenz_cplx
  PLA2_slash_PIP2_minus_Ca_minus_PLA2_star__slash_kenz_2: PLA2_slash_PIP2_minus_Ca_minus_PLA2_star__slash_kenz_slash_kenz_cplx => AA + PLA2_slash_PIP2_minus_Ca_minus_PLA2_star_; PLA2_slash_PIP2_minus_Ca_minus_PLA2_star__slash_kenz_2_k3*PLA2_slash_PIP2_minus_Ca_minus_PLA2_star__slash_kenz_slash_kenz_cplx;
    PLA2_slash_PIP2_minus_Ca_minus_PLA2_star__slash_kenz_2_k3 = 5.4e-14 vol_secINV;
  // k1*PLA2_slash_APC*PLA2_slash_DAG_minus_Ca_minus_PLA2_star_-k2*PLA2_slash_DAG_minus_Ca_minus_PLA2_star__slash_kenz_slash_kenz_cplx
  // 10 X raise oct 22 12 X raise oct 24 + conversion to k2 =4 * k3
  PLA2_slash_DAG_minus_Ca_minus_PLA2_star__slash_kenz_1: $PLA2_slash_APC + PLA2_slash_DAG_minus_Ca_minus_PLA2_star_ -> PLA2_slash_DAG_minus_Ca_minus_PLA2_star__slash_kenz_slash_kenz_cplx; PLA2_slash_DAG_minus_Ca_minus_PLA2_star__slash_kenz_1_k1*PLA2_slash_APC*PLA2_slash_DAG_minus_Ca_minus_PLA2_star_ - PLA2_slash_DAG_minus_Ca_minus_PLA2_star__slash_kenz_1_k2*PLA2_slash_DAG_minus_Ca_minus_PLA2_star__slash_kenz_slash_kenz_cplx;
    PLA2_slash_DAG_minus_Ca_minus_PLA2_star__slash_kenz_1_k1 = 2.250045e-14 vol_uMINVsecINV; PLA2_slash_DAG_minus_Ca_minus_PLA2_star__slash_kenz_1_k2 = 3.6e-13 vol_secINV;
  // k3*PLA2_slash_DAG_minus_Ca_minus_PLA2_star__slash_kenz_slash_kenz_cplx
  PLA2_slash_DAG_minus_Ca_minus_PLA2_star__slash_kenz_2: PLA2_slash_DAG_minus_Ca_minus_PLA2_star__slash_kenz_slash_kenz_cplx => AA + PLA2_slash_DAG_minus_Ca_minus_PLA2_star_; PLA2_slash_DAG_minus_Ca_minus_PLA2_star__slash_kenz_2_k3*PLA2_slash_DAG_minus_Ca_minus_PLA2_star__slash_kenz_slash_kenz_cplx;
    PLA2_slash_DAG_minus_Ca_minus_PLA2_star__slash_kenz_2_k3 = 9e-14 vol_secINV;
  // k1*PLA2_slash_APC*PLA2_slash_PLA2_star__minus_Ca-k2*PLA2_slash_PLA2_star__minus_Ca_slash_kenz_slash_kenz_cplx
  // This form should be 3 to 6 times as fast as the Ca-only form. I have scaled by 4x which seems to give a 5x rise. 10x raise Oct 22 12 x oct 24, changed k2 = 4 * k3
  PLA2_slash_PLA2_star__minus_Ca_slash_kenz_1: $PLA2_slash_APC + PLA2_slash_PLA2_star__minus_Ca -> PLA2_slash_PLA2_star__minus_Ca_slash_kenz_slash_kenz_cplx; PLA2_slash_PLA2_star__minus_Ca_slash_kenz_1_k1*PLA2_slash_APC*PLA2_slash_PLA2_star__minus_Ca - PLA2_slash_PLA2_star__minus_Ca_slash_kenz_1_k2*PLA2_slash_PLA2_star__minus_Ca_slash_kenz_slash_kenz_cplx;
    PLA2_slash_PLA2_star__minus_Ca_slash_kenz_1_k1 = 4.499955e-14 vol_uMINVsecINV; PLA2_slash_PLA2_star__minus_Ca_slash_kenz_1_k2 = 7.2e-13 vol_secINV;
  // k3*PLA2_slash_PLA2_star__minus_Ca_slash_kenz_slash_kenz_cplx
  PLA2_slash_PLA2_star__minus_Ca_slash_kenz_2: PLA2_slash_PLA2_star__minus_Ca_slash_kenz_slash_kenz_cplx => AA + PLA2_slash_PLA2_star__minus_Ca; PLA2_slash_PLA2_star__minus_Ca_slash_kenz_2_k3*PLA2_slash_PLA2_star__minus_Ca_slash_kenz_slash_kenz_cplx;
    PLA2_slash_PLA2_star__minus_Ca_slash_kenz_2_k3 = 1.8e-13 vol_secINV;
  // k1*PLA2_slash_PLA2_minus_cytosolic*MAPK_star_-k2*MAPK_star__slash_MAPK_star__slash_MAPK_star__cplx
  // Km = 25uM @ 50 uM ATP and 1mg/ml MBP (huge XS of substrate) Vmax = 4124 pmol/min/ml at a conc of 125 pmol/ml of enz, so: k3 = .5/sec (rate limiting) k1 = (k2 + k3)/Km = (.5 + 0)/(25*6e5) = 2e-8 (#/cell)^-1 #s from Sanghera et al JBC 265 pp 52 , 1990. From Nemenoff et al JBC 268(3):1960-1964 - using Sanghera\'s 1e-4 ratio of MAPK to protein, we get k3 = 7/sec from 1000 pmol/min/mg fig 5
  MAPK_star__slash_MAPK_star__1: PLA2_slash_PLA2_minus_cytosolic + MAPK_star_ -> MAPK_star__slash_MAPK_star__slash_MAPK_star__cplx; MAPK_star__slash_MAPK_star__1_k1*PLA2_slash_PLA2_minus_cytosolic*MAPK_star_ - MAPK_star__slash_MAPK_star__1_k2*MAPK_star__slash_MAPK_star__slash_MAPK_star__cplx;
    MAPK_star__slash_MAPK_star__1_k1 = 2.925045e-15 vol_uMINVsecINV; MAPK_star__slash_MAPK_star__1_k2 = 6e-14 vol_secINV;
  // k3*MAPK_star__slash_MAPK_star__slash_MAPK_star__cplx
  MAPK_star__slash_MAPK_star__2: MAPK_star__slash_MAPK_star__slash_MAPK_star__cplx => PLA2_slash_PLA2_star_ + MAPK_star_; MAPK_star__slash_MAPK_star__2_k3*MAPK_star__slash_MAPK_star__slash_MAPK_star__cplx;
    MAPK_star__slash_MAPK_star__2_k3 = 1.5e-14 vol_secINV;
  // k1*MAPK_slash_craf_minus_1_star_*MAPK_star_-k2*MAPK_star__slash_MAPK_star__minus_feedback_slash_MAPK_star__minus_feedback_cplx
  // Ueki et al JBC 269(22):15756-15761 show the presence of this step, but not the rate consts, which are derived from Sanghera et al JBC 265(1):52-57, 1990, see the deriv in the MAPK* notes.
  MAPK_star__slash_MAPK_star__minus_feedback_1: MAPK_slash_craf_minus_1_star_ + MAPK_star_ -> MAPK_star__slash_MAPK_star__minus_feedback_slash_MAPK_star__minus_feedback_cplx; MAPK_star__slash_MAPK_star__minus_feedback_1_k1*MAPK_slash_craf_minus_1_star_*MAPK_star_ - MAPK_star__slash_MAPK_star__minus_feedback_1_k2*MAPK_star__slash_MAPK_star__minus_feedback_slash_MAPK_star__minus_feedback_cplx;
    MAPK_star__slash_MAPK_star__minus_feedback_1_k1 = 2.925045e-15 vol_uMINVsecINV; MAPK_star__slash_MAPK_star__minus_feedback_1_k2 = 6e-14 vol_secINV;
  // k3*MAPK_star__slash_MAPK_star__minus_feedback_slash_MAPK_star__minus_feedback_cplx
  MAPK_star__slash_MAPK_star__minus_feedback_2: MAPK_star__slash_MAPK_star__minus_feedback_slash_MAPK_star__minus_feedback_cplx => MAPK_slash_craf_minus_1_star__star_ + MAPK_star_; MAPK_star__slash_MAPK_star__minus_feedback_2_k3*MAPK_star__slash_MAPK_star__minus_feedback_slash_MAPK_star__minus_feedback_cplx;
    MAPK_star__slash_MAPK_star__minus_feedback_2_k3 = 1.5e-14 vol_secINV;
  // k1*Sos_slash_Sos*MAPK_star_-k2*MAPK_star__slash_phosph_Sos_slash_phosph_Sos_cplx
  // See Porfiri and McCormick JBC 271:10 pp5871 1996 for the existence of this step. We\'ll take the rates from the ones used for the phosph of Raf by MAPK. Sep 17 1997: The transient activation curve matches better with k1 up by 10 x.
  MAPK_star__slash_phosph_Sos_1: Sos_slash_Sos + MAPK_star_ -> MAPK_star__slash_phosph_Sos_slash_phosph_Sos_cplx; MAPK_star__slash_phosph_Sos_1_k1*Sos_slash_Sos*MAPK_star_ - MAPK_star__slash_phosph_Sos_1_k2*MAPK_star__slash_phosph_Sos_slash_phosph_Sos_cplx;
    MAPK_star__slash_phosph_Sos_1_k1 = 2.925045e-14 vol_uMINVsecINV; MAPK_star__slash_phosph_Sos_1_k2 = 6e-14 vol_secINV;
  // k3*MAPK_star__slash_phosph_Sos_slash_phosph_Sos_cplx
  MAPK_star__slash_phosph_Sos_2: MAPK_star__slash_phosph_Sos_slash_phosph_Sos_cplx => Sos_slash_Sos_star_ + MAPK_star_; MAPK_star__slash_phosph_Sos_2_k3*MAPK_star__slash_phosph_Sos_slash_phosph_Sos_cplx;
    MAPK_star__slash_phosph_Sos_2_k3 = 1.5e-14 vol_secINV;
  // k1*PIP2*PLCbeta_slash_PLC_minus_Ca-k2*PLCbeta_slash_PLC_minus_Ca_slash_PLC_minus_Ca_slash_PLC_minus_Ca_cplx
  // From Sternweis et al Phil Trans R Soc Lond 1992, also matched by Homma et al. k1 = 1.5e-5, now 4.2e-6 k2 = 70/sec; now 40/sec k3 = 17.5/sec; now 10/sec Note that the wording in Sternweis et al is ambiguous re the Km.
  PLCbeta_slash_PLC_minus_Ca_slash_PLC_minus_Ca_1: $PIP2 + PLCbeta_slash_PLC_minus_Ca -> PLCbeta_slash_PLC_minus_Ca_slash_PLC_minus_Ca_slash_PLC_minus_Ca_cplx; PLCbeta_slash_PLC_minus_Ca_slash_PLC_minus_Ca_1_k1*PIP2*PLCbeta_slash_PLC_minus_Ca - PLCbeta_slash_PLC_minus_Ca_slash_PLC_minus_Ca_1_k2*PLCbeta_slash_PLC_minus_Ca_slash_PLC_minus_Ca_slash_PLC_minus_Ca_cplx;
    PLCbeta_slash_PLC_minus_Ca_slash_PLC_minus_Ca_1_k1 = 3.78e-15 vol_uMINVsecINV; PLCbeta_slash_PLC_minus_Ca_slash_PLC_minus_Ca_1_k2 = 6e-14 vol_secINV;
  // k3*PLCbeta_slash_PLC_minus_Ca_slash_PLC_minus_Ca_slash_PLC_minus_Ca_cplx
  PLCbeta_slash_PLC_minus_Ca_slash_PLC_minus_Ca_2: PLCbeta_slash_PLC_minus_Ca_slash_PLC_minus_Ca_slash_PLC_minus_Ca_cplx => DAG + IP3 + PLCbeta_slash_PLC_minus_Ca; PLCbeta_slash_PLC_minus_Ca_slash_PLC_minus_Ca_2_k3*PLCbeta_slash_PLC_minus_Ca_slash_PLC_minus_Ca_slash_PLC_minus_Ca_cplx;
    PLCbeta_slash_PLC_minus_Ca_slash_PLC_minus_Ca_2_k3 = 1.5e-14 vol_secINV;
  // k1*PIP2*PLCbeta_slash_PLC_minus_Ca_minus_Gq-k2*PLCbeta_slash_PLC_minus_Ca_minus_Gq_slash_PLCb_minus_Ca_minus_Gq_slash_PLCb_minus_Ca_minus_Gq_cplx
  // From Sternweis et al, Phil Trans R Soc Lond 1992, and the values from other refs eg Homma et al JBC 263(14) pp6592 1988 match. k1 = 5e-5/sec k2 = 240/sec; now 120/sec k3 = 60/sec; now 30/sec Note that the wording in Sternweis et al is ambiguous wr. to the Km for Gq vs non-Gq states of PLC. K1 is still a bit too low. Raise to 7e-5 9 Jun 1996: k1 was 0.0002, changed to 5e-5
  PLCbeta_slash_PLC_minus_Ca_minus_Gq_slash_PLCb_minus_Ca_minus_Gq_1: $PIP2 + PLCbeta_slash_PLC_minus_Ca_minus_Gq -> PLCbeta_slash_PLC_minus_Ca_minus_Gq_slash_PLCb_minus_Ca_minus_Gq_slash_PLCb_minus_Ca_minus_Gq_cplx; PLCbeta_slash_PLC_minus_Ca_minus_Gq_slash_PLCb_minus_Ca_minus_Gq_1_k1*PIP2*PLCbeta_slash_PLC_minus_Ca_minus_Gq - PLCbeta_slash_PLC_minus_Ca_minus_Gq_slash_PLCb_minus_Ca_minus_Gq_1_k2*PLCbeta_slash_PLC_minus_Ca_minus_Gq_slash_PLCb_minus_Ca_minus_Gq_slash_PLCb_minus_Ca_minus_Gq_cplx;
    PLCbeta_slash_PLC_minus_Ca_minus_Gq_slash_PLCb_minus_Ca_minus_Gq_1_k1 = 7.199955e-14 vol_uMINVsecINV; PLCbeta_slash_PLC_minus_Ca_minus_Gq_slash_PLCb_minus_Ca_minus_Gq_1_k2 = 2.88e-13 vol_secINV;
  // k3*PLCbeta_slash_PLC_minus_Ca_minus_Gq_slash_PLCb_minus_Ca_minus_Gq_slash_PLCb_minus_Ca_minus_Gq_cplx
  PLCbeta_slash_PLC_minus_Ca_minus_Gq_slash_PLCb_minus_Ca_minus_Gq_2: PLCbeta_slash_PLC_minus_Ca_minus_Gq_slash_PLCb_minus_Ca_minus_Gq_slash_PLCb_minus_Ca_minus_Gq_cplx => DAG + IP3 + PLCbeta_slash_PLC_minus_Ca_minus_Gq; PLCbeta_slash_PLC_minus_Ca_minus_Gq_slash_PLCb_minus_Ca_minus_Gq_2_k3*PLCbeta_slash_PLC_minus_Ca_minus_Gq_slash_PLCb_minus_Ca_minus_Gq_slash_PLCb_minus_Ca_minus_Gq_cplx;
    PLCbeta_slash_PLC_minus_Ca_minus_Gq_slash_PLCb_minus_Ca_minus_Gq_2_k3 = 7.2e-14 vol_secINV;
  // k1*MAPK_slash_MAPK*MAPK_slash_MAPKK_star_-k2*MAPK_slash_MAPKK_star__slash_MAPKKtyr_slash_MAPKKtyr_cplx
  // The actual MAPKK is 2 forms from Seger et al JBC 267:20 14373(1992) Vmax = 150nmol/min/mg From Haystead et al FEBS 306(1):17-22 we get Km=46.6nM for at least one of the phosphs. Putting these together: k3=0.15/sec, scale to get k2=0.6. k1=0.75/46.6nM=2.7e-5
  MAPK_slash_MAPKK_star__slash_MAPKKtyr_1: MAPK_slash_MAPK + MAPK_slash_MAPKK_star_ -> MAPK_slash_MAPKK_star__slash_MAPKKtyr_slash_MAPKKtyr_cplx; MAPK_slash_MAPKK_star__slash_MAPKKtyr_1_k1*MAPK_slash_MAPK*MAPK_slash_MAPKK_star_ - MAPK_slash_MAPKK_star__slash_MAPKKtyr_1_k2*MAPK_slash_MAPKK_star__slash_MAPKKtyr_slash_MAPKKtyr_cplx;
    MAPK_slash_MAPKK_star__slash_MAPKKtyr_1_k1 = 4.86e-14 vol_uMINVsecINV; MAPK_slash_MAPKK_star__slash_MAPKKtyr_1_k2 = 1.8e-15 vol_secINV;
  // k3*MAPK_slash_MAPKK_star__slash_MAPKKtyr_slash_MAPKKtyr_cplx
  MAPK_slash_MAPKK_star__slash_MAPKKtyr_2: MAPK_slash_MAPKK_star__slash_MAPKKtyr_slash_MAPKKtyr_cplx => MAPK_slash_MAPK_minus_tyr + MAPK_slash_MAPKK_star_; MAPK_slash_MAPKK_star__slash_MAPKKtyr_2_k3*MAPK_slash_MAPKK_star__slash_MAPKKtyr_slash_MAPKKtyr_cplx;
    MAPK_slash_MAPKK_star__slash_MAPKKtyr_2_k3 = 4.5e-16 vol_secINV;
  // k1*MAPK_slash_MAPK_minus_tyr*MAPK_slash_MAPKK_star_-k2*MAPK_slash_MAPKK_star__slash_MAPKKthr_slash_MAPKKthr_cplx
  // Rate consts same as for MAPKKtyr.
  MAPK_slash_MAPKK_star__slash_MAPKKthr_1: MAPK_slash_MAPK_minus_tyr + MAPK_slash_MAPKK_star_ -> MAPK_slash_MAPKK_star__slash_MAPKKthr_slash_MAPKKthr_cplx; MAPK_slash_MAPKK_star__slash_MAPKKthr_1_k1*MAPK_slash_MAPK_minus_tyr*MAPK_slash_MAPKK_star_ - MAPK_slash_MAPKK_star__slash_MAPKKthr_1_k2*MAPK_slash_MAPKK_star__slash_MAPKKthr_slash_MAPKKthr_cplx;
    MAPK_slash_MAPKK_star__slash_MAPKKthr_1_k1 = 4.86e-14 vol_uMINVsecINV; MAPK_slash_MAPKK_star__slash_MAPKKthr_1_k2 = 1.8e-15 vol_secINV;
  // k3*MAPK_slash_MAPKK_star__slash_MAPKKthr_slash_MAPKKthr_cplx
  MAPK_slash_MAPKK_star__slash_MAPKKthr_2: MAPK_slash_MAPKK_star__slash_MAPKKthr_slash_MAPKKthr_cplx => MAPK_star_ + MAPK_slash_MAPKK_star_; MAPK_slash_MAPKK_star__slash_MAPKKthr_2_k3*MAPK_slash_MAPKK_star__slash_MAPKKthr_slash_MAPKKthr_cplx;
    MAPK_slash_MAPKK_star__slash_MAPKKthr_2_k3 = 4.5e-16 vol_secINV;
  // k1*MAPK_slash_MAPKK*MAPK_slash_Raf_star__minus_GTP_minus_Ras-k2*MAPK_slash_Raf_star__minus_GTP_minus_Ras_slash_Raf_star__minus_GTP_minus_Ras_dot_1_slash_Raf_star__minus_GTP_minus_Ras_dot_1_cplx
  // Kinetics are the same as for the craf-1* activity, ie., k1=1.1e-6, k2=.42, k3 =0.105 These are based on Force et al PNAS USA 91 1270-1274 1994. These parms cannot reach the observed 4X stim of MAPK. So lets increase the affinity, ie, raise k1 10X to 1.1e-5 Lets take it back down to where it was. Back up to 5X: 5.5e-6
  MAPK_slash_Raf_star__minus_GTP_minus_Ras_slash_Raf_star__minus_GTP_minus_Ras_dot_1_1: MAPK_slash_MAPKK + MAPK_slash_Raf_star__minus_GTP_minus_Ras -> MAPK_slash_Raf_star__minus_GTP_minus_Ras_slash_Raf_star__minus_GTP_minus_Ras_dot_1_slash_Raf_star__minus_GTP_minus_Ras_dot_1_cplx; MAPK_slash_Raf_star__minus_GTP_minus_Ras_slash_Raf_star__minus_GTP_minus_Ras_dot_1_1_k1*MAPK_slash_MAPKK*MAPK_slash_Raf_star__minus_GTP_minus_Ras - MAPK_slash_Raf_star__minus_GTP_minus_Ras_slash_Raf_star__minus_GTP_minus_Ras_dot_1_1_k2*MAPK_slash_Raf_star__minus_GTP_minus_Ras_slash_Raf_star__minus_GTP_minus_Ras_dot_1_slash_Raf_star__minus_GTP_minus_Ras_dot_1_cplx;
    MAPK_slash_Raf_star__minus_GTP_minus_Ras_slash_Raf_star__minus_GTP_minus_Ras_dot_1_1_k1 = 1.41426e-14 vol_uMINVsecINV; MAPK_slash_Raf_star__minus_GTP_minus_Ras_slash_Raf_star__minus_GTP_minus_Ras_dot_1_1_k2 = 1.8e-15 vol_secINV;
  // k3*MAPK_slash_Raf_star__minus_GTP_minus_Ras_slash_Raf_star__minus_GTP_minus_Ras_dot_1_slash_Raf_star__minus_GTP_minus_Ras_dot_1_cplx
  MAPK_slash_Raf_star__minus_GTP_minus_Ras_slash_Raf_star__minus_GTP_minus_Ras_dot_1_2: MAPK_slash_Raf_star__minus_GTP_minus_Ras_slash_Raf_star__minus_GTP_minus_Ras_dot_1_slash_Raf_star__minus_GTP_minus_Ras_dot_1_cplx => MAPK_slash_MAPKK_minus_ser + MAPK_slash_Raf_star__minus_GTP_minus_Ras; MAPK_slash_Raf_star__minus_GTP_minus_Ras_slash_Raf_star__minus_GTP_minus_Ras_dot_1_2_k3*MAPK_slash_Raf_star__minus_GTP_minus_Ras_slash_Raf_star__minus_GTP_minus_Ras_dot_1_slash_Raf_star__minus_GTP_minus_Ras_dot_1_cplx;
    MAPK_slash_Raf_star__minus_GTP_minus_Ras_slash_Raf_star__minus_GTP_minus_Ras_dot_1_2_k3 = 4.5e-16 vol_secINV;
  // k1*MAPK_slash_MAPKK_minus_ser*MAPK_slash_Raf_star__minus_GTP_minus_Ras-k2*MAPK_slash_Raf_star__minus_GTP_minus_Ras_slash_Raf_star__minus_GTP_minus_Ras_dot_2_slash_Raf_star__minus_GTP_minus_Ras_dot_2_cplx
  // Same kinetics as other c-raf activated forms. See Force et al PNAS 91 1270-1274 1994. k1 = 1.1e-6, k2 = .42, k3 = 1.05 raise k1 to 5.5e-6
  MAPK_slash_Raf_star__minus_GTP_minus_Ras_slash_Raf_star__minus_GTP_minus_Ras_dot_2_1: MAPK_slash_MAPKK_minus_ser + MAPK_slash_Raf_star__minus_GTP_minus_Ras -> MAPK_slash_Raf_star__minus_GTP_minus_Ras_slash_Raf_star__minus_GTP_minus_Ras_dot_2_slash_Raf_star__minus_GTP_minus_Ras_dot_2_cplx; MAPK_slash_Raf_star__minus_GTP_minus_Ras_slash_Raf_star__minus_GTP_minus_Ras_dot_2_1_k1*MAPK_slash_MAPKK_minus_ser*MAPK_slash_Raf_star__minus_GTP_minus_Ras - MAPK_slash_Raf_star__minus_GTP_minus_Ras_slash_Raf_star__minus_GTP_minus_Ras_dot_2_1_k2*MAPK_slash_Raf_star__minus_GTP_minus_Ras_slash_Raf_star__minus_GTP_minus_Ras_dot_2_slash_Raf_star__minus_GTP_minus_Ras_dot_2_cplx;
    MAPK_slash_Raf_star__minus_GTP_minus_Ras_slash_Raf_star__minus_GTP_minus_Ras_dot_2_1_k1 = 1.41426e-14 vol_uMINVsecINV; MAPK_slash_Raf_star__minus_GTP_minus_Ras_slash_Raf_star__minus_GTP_minus_Ras_dot_2_1_k2 = 1.8e-15 vol_secINV;
  // k3*MAPK_slash_Raf_star__minus_GTP_minus_Ras_slash_Raf_star__minus_GTP_minus_Ras_dot_2_slash_Raf_star__minus_GTP_minus_Ras_dot_2_cplx
  MAPK_slash_Raf_star__minus_GTP_minus_Ras_slash_Raf_star__minus_GTP_minus_Ras_dot_2_2: MAPK_slash_Raf_star__minus_GTP_minus_Ras_slash_Raf_star__minus_GTP_minus_Ras_dot_2_slash_Raf_star__minus_GTP_minus_Ras_dot_2_cplx => MAPK_slash_MAPKK_star_ + MAPK_slash_Raf_star__minus_GTP_minus_Ras; MAPK_slash_Raf_star__minus_GTP_minus_Ras_slash_Raf_star__minus_GTP_minus_Ras_dot_2_2_k3*MAPK_slash_Raf_star__minus_GTP_minus_Ras_slash_Raf_star__minus_GTP_minus_Ras_dot_2_slash_Raf_star__minus_GTP_minus_Ras_dot_2_cplx;
    MAPK_slash_Raf_star__minus_GTP_minus_Ras_slash_Raf_star__minus_GTP_minus_Ras_dot_2_2_k3 = 4.5e-16 vol_secINV;
  // k1*MAPK_slash_craf_minus_1_star_*PPhosphatase2A-k2*PPhosphatase2A_slash_craf_minus_deph_slash_craf_minus_deph_cplx
  // See parent PPhosphatase2A for parms
  PPhosphatase2A_slash_craf_minus_deph_1: MAPK_slash_craf_minus_1_star_ + PPhosphatase2A -> PPhosphatase2A_slash_craf_minus_deph_slash_craf_minus_deph_cplx; PPhosphatase2A_slash_craf_minus_deph_1_k1*MAPK_slash_craf_minus_1_star_*PPhosphatase2A - PPhosphatase2A_slash_craf_minus_deph_1_k2*PPhosphatase2A_slash_craf_minus_deph_slash_craf_minus_deph_cplx;
    PPhosphatase2A_slash_craf_minus_deph_1_k1 = 2.87415e-15 vol_uMINVsecINV; PPhosphatase2A_slash_craf_minus_deph_1_k2 = 3.6e-14 vol_secINV;
  // k3*PPhosphatase2A_slash_craf_minus_deph_slash_craf_minus_deph_cplx
  PPhosphatase2A_slash_craf_minus_deph_2: PPhosphatase2A_slash_craf_minus_deph_slash_craf_minus_deph_cplx => MAPK_slash_craf_minus_1 + PPhosphatase2A; PPhosphatase2A_slash_craf_minus_deph_2_k3*PPhosphatase2A_slash_craf_minus_deph_slash_craf_minus_deph_cplx;
    PPhosphatase2A_slash_craf_minus_deph_2_k3 = 9e-15 vol_secINV;
  // k1*MAPK_slash_MAPKK_star_*PPhosphatase2A-k2*PPhosphatase2A_slash_MAPKK_minus_deph_slash_MAPKK_minus_deph_cplx
  // See: Kyriakis et al Nature 358 pp 417-421 1992 Ahn et al Curr Op Cell Biol 4:992-999 1992 for this pathway. See parent PPhosphatase2A for parms.
  PPhosphatase2A_slash_MAPKK_minus_deph_1: MAPK_slash_MAPKK_star_ + PPhosphatase2A -> PPhosphatase2A_slash_MAPKK_minus_deph_slash_MAPKK_minus_deph_cplx; PPhosphatase2A_slash_MAPKK_minus_deph_1_k1*MAPK_slash_MAPKK_star_*PPhosphatase2A - PPhosphatase2A_slash_MAPKK_minus_deph_1_k2*PPhosphatase2A_slash_MAPKK_minus_deph_slash_MAPKK_minus_deph_cplx;
    PPhosphatase2A_slash_MAPKK_minus_deph_1_k1 = 2.87415e-15 vol_uMINVsecINV; PPhosphatase2A_slash_MAPKK_minus_deph_1_k2 = 3.6e-14 vol_secINV;
  // k3*PPhosphatase2A_slash_MAPKK_minus_deph_slash_MAPKK_minus_deph_cplx
  PPhosphatase2A_slash_MAPKK_minus_deph_2: PPhosphatase2A_slash_MAPKK_minus_deph_slash_MAPKK_minus_deph_cplx => MAPK_slash_MAPKK_minus_ser + PPhosphatase2A; PPhosphatase2A_slash_MAPKK_minus_deph_2_k3*PPhosphatase2A_slash_MAPKK_minus_deph_slash_MAPKK_minus_deph_cplx;
    PPhosphatase2A_slash_MAPKK_minus_deph_2_k3 = 9e-15 vol_secINV;
  // k1*MAPK_slash_MAPKK_minus_ser*PPhosphatase2A-k2*PPhosphatase2A_slash_MAPKK_minus_deph_minus_ser_slash_MAPKK_minus_deph_minus_ser_cplx
  PPhosphatase2A_slash_MAPKK_minus_deph_minus_ser_1: MAPK_slash_MAPKK_minus_ser + PPhosphatase2A -> PPhosphatase2A_slash_MAPKK_minus_deph_minus_ser_slash_MAPKK_minus_deph_minus_ser_cplx; PPhosphatase2A_slash_MAPKK_minus_deph_minus_ser_1_k1*MAPK_slash_MAPKK_minus_ser*PPhosphatase2A - PPhosphatase2A_slash_MAPKK_minus_deph_minus_ser_1_k2*PPhosphatase2A_slash_MAPKK_minus_deph_minus_ser_slash_MAPKK_minus_deph_minus_ser_cplx;
    PPhosphatase2A_slash_MAPKK_minus_deph_minus_ser_1_k1 = 2.87415e-15 vol_uMINVsecINV; PPhosphatase2A_slash_MAPKK_minus_deph_minus_ser_1_k2 = 3.6e-14 vol_secINV;
  // k3*PPhosphatase2A_slash_MAPKK_minus_deph_minus_ser_slash_MAPKK_minus_deph_minus_ser_cplx
  PPhosphatase2A_slash_MAPKK_minus_deph_minus_ser_2: PPhosphatase2A_slash_MAPKK_minus_deph_minus_ser_slash_MAPKK_minus_deph_minus_ser_cplx => MAPK_slash_MAPKK + PPhosphatase2A; PPhosphatase2A_slash_MAPKK_minus_deph_minus_ser_2_k3*PPhosphatase2A_slash_MAPKK_minus_deph_minus_ser_slash_MAPKK_minus_deph_minus_ser_cplx;
    PPhosphatase2A_slash_MAPKK_minus_deph_minus_ser_2_k3 = 9e-15 vol_secINV;
  // k1*MAPK_slash_craf_minus_1_star__star_*PPhosphatase2A-k2*PPhosphatase2A_slash_craf_star__star__minus_deph_slash_craf_star__star__minus_deph_cplx
  // Ueki et al JBC 269(22) pp 15756-15761 1994 show hyperphosphorylation of craf, so this is there to dephosphorylate it. Identity of phosphatase is not known to me, but it may be PP2A like the rest, so I have made it so.
  PPhosphatase2A_slash_craf_star__star__minus_deph_1: MAPK_slash_craf_minus_1_star__star_ + PPhosphatase2A -> PPhosphatase2A_slash_craf_star__star__minus_deph_slash_craf_star__star__minus_deph_cplx; PPhosphatase2A_slash_craf_star__star__minus_deph_1_k1*MAPK_slash_craf_minus_1_star__star_*PPhosphatase2A - PPhosphatase2A_slash_craf_star__star__minus_deph_1_k2*PPhosphatase2A_slash_craf_star__star__minus_deph_slash_craf_star__star__minus_deph_cplx;
    PPhosphatase2A_slash_craf_star__star__minus_deph_1_k1 = 2.87415e-15 vol_uMINVsecINV; PPhosphatase2A_slash_craf_star__star__minus_deph_1_k2 = 3.6e-14 vol_secINV;
  // k3*PPhosphatase2A_slash_craf_star__star__minus_deph_slash_craf_star__star__minus_deph_cplx
  PPhosphatase2A_slash_craf_star__star__minus_deph_2: PPhosphatase2A_slash_craf_star__star__minus_deph_slash_craf_star__star__minus_deph_cplx => MAPK_slash_craf_minus_1_star_ + PPhosphatase2A; PPhosphatase2A_slash_craf_star__star__minus_deph_2_k3*PPhosphatase2A_slash_craf_star__star__minus_deph_slash_craf_star__star__minus_deph_cplx;
    PPhosphatase2A_slash_craf_star__star__minus_deph_2_k3 = 9e-15 vol_secINV;
  // k1*Ras_slash_GDP_minus_Ras*Ras_slash_GEF_minus_Gprot_minus_bg-k2*Ras_slash_GEF_minus_Gprot_minus_bg_slash_GEF_minus_bg_act_minus_ras_slash_GEF_minus_bg_act_minus_ras_cplx
  // Kinetics based on the activation of Gq by the receptor complex in the Gq model (in turn based on the Mahama and Linderman model) k1 = 2e-5, k2 = 1e-10, k3 = 10 (I do not know why they even bother with k2). Lets put k1 at 2e-6 to get a reasonable equilibrium More specific values from, eg.g: Orita et al JBC 268(34) 25542-25546 from rasGRF and smgGDS: k1=3.3e-7; k2 = 0.08, k3 = 0.02
  Ras_slash_GEF_minus_Gprot_minus_bg_slash_GEF_minus_bg_act_minus_ras_1: Ras_slash_GDP_minus_Ras + Ras_slash_GEF_minus_Gprot_minus_bg -> Ras_slash_GEF_minus_Gprot_minus_bg_slash_GEF_minus_bg_act_minus_ras_slash_GEF_minus_bg_act_minus_ras_cplx; Ras_slash_GEF_minus_Gprot_minus_bg_slash_GEF_minus_bg_act_minus_ras_1_k1*Ras_slash_GDP_minus_Ras*Ras_slash_GEF_minus_Gprot_minus_bg - Ras_slash_GEF_minus_Gprot_minus_bg_slash_GEF_minus_bg_act_minus_ras_1_k2*Ras_slash_GEF_minus_Gprot_minus_bg_slash_GEF_minus_bg_act_minus_ras_slash_GEF_minus_bg_act_minus_ras_cplx;
    Ras_slash_GEF_minus_Gprot_minus_bg_slash_GEF_minus_bg_act_minus_ras_1_k1 = 2.97e-16 vol_uMINVsecINV; Ras_slash_GEF_minus_Gprot_minus_bg_slash_GEF_minus_bg_act_minus_ras_1_k2 = 1.2e-16 vol_secINV;
  // k3*Ras_slash_GEF_minus_Gprot_minus_bg_slash_GEF_minus_bg_act_minus_ras_slash_GEF_minus_bg_act_minus_ras_cplx
  Ras_slash_GEF_minus_Gprot_minus_bg_slash_GEF_minus_bg_act_minus_ras_2: Ras_slash_GEF_minus_Gprot_minus_bg_slash_GEF_minus_bg_act_minus_ras_slash_GEF_minus_bg_act_minus_ras_cplx => Ras_slash_GTP_minus_Ras + Ras_slash_GEF_minus_Gprot_minus_bg; Ras_slash_GEF_minus_Gprot_minus_bg_slash_GEF_minus_bg_act_minus_ras_2_k3*Ras_slash_GEF_minus_Gprot_minus_bg_slash_GEF_minus_bg_act_minus_ras_slash_GEF_minus_bg_act_minus_ras_cplx;
    Ras_slash_GEF_minus_Gprot_minus_bg_slash_GEF_minus_bg_act_minus_ras_2_k3 = 3e-17 vol_secINV;
  // k1*Ras_slash_GDP_minus_Ras*Ras_slash_GEF_star_-k2*Ras_slash_GEF_star__slash_GEF_star__minus_act_minus_ras_slash_GEF_star__minus_act_minus_ras_cplx
  // Kinetics same as GEF-bg-act-ras
  Ras_slash_GEF_star__slash_GEF_star__minus_act_minus_ras_1: Ras_slash_GDP_minus_Ras + Ras_slash_GEF_star_ -> Ras_slash_GEF_star__slash_GEF_star__minus_act_minus_ras_slash_GEF_star__minus_act_minus_ras_cplx; Ras_slash_GEF_star__slash_GEF_star__minus_act_minus_ras_1_k1*Ras_slash_GDP_minus_Ras*Ras_slash_GEF_star_ - Ras_slash_GEF_star__slash_GEF_star__minus_act_minus_ras_1_k2*Ras_slash_GEF_star__slash_GEF_star__minus_act_minus_ras_slash_GEF_star__minus_act_minus_ras_cplx;
    Ras_slash_GEF_star__slash_GEF_star__minus_act_minus_ras_1_k1 = 2.97e-16 vol_uMINVsecINV; Ras_slash_GEF_star__slash_GEF_star__minus_act_minus_ras_1_k2 = 1.2e-16 vol_secINV;
  // k3*Ras_slash_GEF_star__slash_GEF_star__minus_act_minus_ras_slash_GEF_star__minus_act_minus_ras_cplx
  Ras_slash_GEF_star__slash_GEF_star__minus_act_minus_ras_2: Ras_slash_GEF_star__slash_GEF_star__minus_act_minus_ras_slash_GEF_star__minus_act_minus_ras_cplx => Ras_slash_GTP_minus_Ras + Ras_slash_GEF_star_; Ras_slash_GEF_star__slash_GEF_star__minus_act_minus_ras_2_k3*Ras_slash_GEF_star__slash_GEF_star__minus_act_minus_ras_slash_GEF_star__minus_act_minus_ras_cplx;
    Ras_slash_GEF_star__slash_GEF_star__minus_act_minus_ras_2_k3 = 3e-17 vol_secINV;
  // k1*Ras_slash_GTP_minus_Ras*Ras_slash_GAP-k2*Ras_slash_GAP_slash_GAP_minus_inact_minus_ras_slash_GAP_minus_inact_minus_ras_cplx
  // From Eccleston et al JBC 268(36)pp27012-19 get Kd < 2uM, kcat - 10/sec From Martin et al Cell 63 843-849 1990 get Kd ~ 250 nM, kcat = 20/min I will go with the Eccleston figures as there are good error bars (10%). In general the values are reasonably close. k1 = 1.666e-3/sec, k2 = 1000/sec, k3 = 10/sec (note k3 is rate-limiting) 5 Nov 2002: Changed ratio term to 4 from 100. Now we have k1=8.25e-5; k2=40, k3=10. k3 is still rate-limiting.
  Ras_slash_GAP_slash_GAP_minus_inact_minus_ras_1: Ras_slash_GTP_minus_Ras + Ras_slash_GAP -> Ras_slash_GAP_slash_GAP_minus_inact_minus_ras_slash_GAP_minus_inact_minus_ras_cplx; Ras_slash_GAP_slash_GAP_minus_inact_minus_ras_1_k1*Ras_slash_GTP_minus_Ras*Ras_slash_GAP - Ras_slash_GAP_slash_GAP_minus_inact_minus_ras_1_k2*Ras_slash_GAP_slash_GAP_minus_inact_minus_ras_slash_GAP_minus_inact_minus_ras_cplx;
    Ras_slash_GAP_slash_GAP_minus_inact_minus_ras_1_k1 = 7.42284e-14 vol_uMINVsecINV; Ras_slash_GAP_slash_GAP_minus_inact_minus_ras_1_k2 = 6e-14 vol_secINV;
  // k3*Ras_slash_GAP_slash_GAP_minus_inact_minus_ras_slash_GAP_minus_inact_minus_ras_cplx
  Ras_slash_GAP_slash_GAP_minus_inact_minus_ras_2: Ras_slash_GAP_slash_GAP_minus_inact_minus_ras_slash_GAP_minus_inact_minus_ras_cplx => Ras_slash_GDP_minus_Ras + Ras_slash_GAP; Ras_slash_GAP_slash_GAP_minus_inact_minus_ras_2_k3*Ras_slash_GAP_slash_GAP_minus_inact_minus_ras_slash_GAP_minus_inact_minus_ras_cplx;
    Ras_slash_GAP_slash_GAP_minus_inact_minus_ras_2_k3 = 1.5e-14 vol_secINV;
  // k1*Ras_slash_GDP_minus_Ras*Ras_slash_CaM_minus_GEF-k2*Ras_slash_CaM_minus_GEF_slash_CaM_minus_GEF_minus_act_minus_ras_slash_CaM_minus_GEF_minus_act_minus_ras_cplx
  // Kinetics same as GEF-bg_act-ras
  Ras_slash_CaM_minus_GEF_slash_CaM_minus_GEF_minus_act_minus_ras_1: Ras_slash_GDP_minus_Ras + Ras_slash_CaM_minus_GEF -> Ras_slash_CaM_minus_GEF_slash_CaM_minus_GEF_minus_act_minus_ras_slash_CaM_minus_GEF_minus_act_minus_ras_cplx; Ras_slash_CaM_minus_GEF_slash_CaM_minus_GEF_minus_act_minus_ras_1_k1*Ras_slash_GDP_minus_Ras*Ras_slash_CaM_minus_GEF - Ras_slash_CaM_minus_GEF_slash_CaM_minus_GEF_minus_act_minus_ras_1_k2*Ras_slash_CaM_minus_GEF_slash_CaM_minus_GEF_minus_act_minus_ras_slash_CaM_minus_GEF_minus_act_minus_ras_cplx;
    Ras_slash_CaM_minus_GEF_slash_CaM_minus_GEF_minus_act_minus_ras_1_k1 = 2.97e-16 vol_uMINVsecINV; Ras_slash_CaM_minus_GEF_slash_CaM_minus_GEF_minus_act_minus_ras_1_k2 = 1.2e-16 vol_secINV;
  // k3*Ras_slash_CaM_minus_GEF_slash_CaM_minus_GEF_minus_act_minus_ras_slash_CaM_minus_GEF_minus_act_minus_ras_cplx
  Ras_slash_CaM_minus_GEF_slash_CaM_minus_GEF_minus_act_minus_ras_2: Ras_slash_CaM_minus_GEF_slash_CaM_minus_GEF_minus_act_minus_ras_slash_CaM_minus_GEF_minus_act_minus_ras_cplx => Ras_slash_GTP_minus_Ras + Ras_slash_CaM_minus_GEF; Ras_slash_CaM_minus_GEF_slash_CaM_minus_GEF_minus_act_minus_ras_2_k3*Ras_slash_CaM_minus_GEF_slash_CaM_minus_GEF_minus_act_minus_ras_slash_CaM_minus_GEF_minus_act_minus_ras_cplx;
    Ras_slash_CaM_minus_GEF_slash_CaM_minus_GEF_minus_act_minus_ras_2_k3 = 3e-17 vol_secINV;
  // k1*Ras_slash_inact_minus_GEF*PKA_minus_active-k2*PKA_minus_active_slash_PKA_minus_phosph_minus_GEF_slash_PKA_minus_phosph_minus_GEF_cplx
  // This pathway inhibits Ras when cAMP is elevated. See: Hordijk et al JBC 269:5 3534-3538 1994 Burgering et al EMBO J 12:11 4211-4220 1993 The rates are the same as used in PKA-phosph-I1
  PKA_minus_active_slash_PKA_minus_phosph_minus_GEF_1: Ras_slash_inact_minus_GEF + PKA_minus_active -> PKA_minus_active_slash_PKA_minus_phosph_minus_GEF_slash_PKA_minus_phosph_minus_GEF_cplx; PKA_minus_active_slash_PKA_minus_phosph_minus_GEF_1_k1*Ras_slash_inact_minus_GEF*PKA_minus_active - PKA_minus_active_slash_PKA_minus_phosph_minus_GEF_1_k2*PKA_minus_active_slash_PKA_minus_phosph_minus_GEF_slash_PKA_minus_phosph_minus_GEF_cplx;
    PKA_minus_active_slash_PKA_minus_phosph_minus_GEF_1_k1 = 9.000045e-15 vol_uMINVsecINV; PKA_minus_active_slash_PKA_minus_phosph_minus_GEF_1_k2 = 5.4e-14 vol_secINV;
  // k3*PKA_minus_active_slash_PKA_minus_phosph_minus_GEF_slash_PKA_minus_phosph_minus_GEF_cplx
  PKA_minus_active_slash_PKA_minus_phosph_minus_GEF_2: PKA_minus_active_slash_PKA_minus_phosph_minus_GEF_slash_PKA_minus_phosph_minus_GEF_cplx => Ras_slash_inact_minus_GEF_star_ + PKA_minus_active; PKA_minus_active_slash_PKA_minus_phosph_minus_GEF_2_k3*PKA_minus_active_slash_PKA_minus_phosph_minus_GEF_slash_PKA_minus_phosph_minus_GEF_cplx;
    PKA_minus_active_slash_PKA_minus_phosph_minus_GEF_2_k3 = 1.35e-14 vol_secINV;
  // k1*PP1_slash_I1*PKA_minus_active-k2*PKA_minus_active_slash_PKA_minus_phosph_minus_I1_slash_PKA_minus_phosph_minus_I1_cplx
  // #s from Bramson et al CRC crit rev Biochem 15:2 93-124. They have a huge list of peptide substrates and I have chosen high-ish rates. These consts give too much PKA activity, so lower Vmax 1/3. Now, k1 = 3e-5, k2 = 36, k3 = 9 (still pretty fast). Also lower Km 1/3 so k1 = 1e-5 Cohen et al FEBS Lett 76:182-86 1977 say rate =30% PKA act on phosphokinase beta.
  PKA_minus_active_slash_PKA_minus_phosph_minus_I1_1: PP1_slash_I1 + PKA_minus_active -> PKA_minus_active_slash_PKA_minus_phosph_minus_I1_slash_PKA_minus_phosph_minus_I1_cplx; PKA_minus_active_slash_PKA_minus_phosph_minus_I1_1_k1*PP1_slash_I1*PKA_minus_active - PKA_minus_active_slash_PKA_minus_phosph_minus_I1_1_k2*PKA_minus_active_slash_PKA_minus_phosph_minus_I1_slash_PKA_minus_phosph_minus_I1_cplx;
    PKA_minus_active_slash_PKA_minus_phosph_minus_I1_1_k1 = 9.000045e-15 vol_uMINVsecINV; PKA_minus_active_slash_PKA_minus_phosph_minus_I1_1_k2 = 5.4e-14 vol_secINV;
  // k3*PKA_minus_active_slash_PKA_minus_phosph_minus_I1_slash_PKA_minus_phosph_minus_I1_cplx
  PKA_minus_active_slash_PKA_minus_phosph_minus_I1_2: PKA_minus_active_slash_PKA_minus_phosph_minus_I1_slash_PKA_minus_phosph_minus_I1_cplx => PP1_slash_I1_star_ + PKA_minus_active; PKA_minus_active_slash_PKA_minus_phosph_minus_I1_2_k3*PKA_minus_active_slash_PKA_minus_phosph_minus_I1_slash_PKA_minus_phosph_minus_I1_cplx;
    PKA_minus_active_slash_PKA_minus_phosph_minus_I1_2_k3 = 1.35e-14 vol_secINV;
  // k1*AC_slash_cAMP_minus_PDE*PKA_minus_active-k2*PKA_minus_active_slash_phosph_minus_PDE_slash_phosph_minus_PDE_cplx
  // Same rates as PKA-phosph-I1
  PKA_minus_active_slash_phosph_minus_PDE_1: AC_slash_cAMP_minus_PDE + PKA_minus_active -> PKA_minus_active_slash_phosph_minus_PDE_slash_phosph_minus_PDE_cplx; PKA_minus_active_slash_phosph_minus_PDE_1_k1*AC_slash_cAMP_minus_PDE*PKA_minus_active - PKA_minus_active_slash_phosph_minus_PDE_1_k2*PKA_minus_active_slash_phosph_minus_PDE_slash_phosph_minus_PDE_cplx;
    PKA_minus_active_slash_phosph_minus_PDE_1_k1 = 9.000045e-15 vol_uMINVsecINV; PKA_minus_active_slash_phosph_minus_PDE_1_k2 = 5.4e-14 vol_secINV;
  // k3*PKA_minus_active_slash_phosph_minus_PDE_slash_phosph_minus_PDE_cplx
  PKA_minus_active_slash_phosph_minus_PDE_2: PKA_minus_active_slash_phosph_minus_PDE_slash_phosph_minus_PDE_cplx => AC_slash_cAMP_minus_PDE_star_ + PKA_minus_active; PKA_minus_active_slash_phosph_minus_PDE_2_k3*PKA_minus_active_slash_phosph_minus_PDE_slash_phosph_minus_PDE_cplx;
    PKA_minus_active_slash_phosph_minus_PDE_2_k3 = 1.35e-14 vol_secINV;
  // k1*Ras_slash_GDP_minus_Ras*Shc_star__dot_Sos_dot_Grb2-k2*Shc_star__dot_Sos_dot_Grb2_slash_Sos_dot_Ras_GEF_slash_Sos_dot_Ras_GEF_cplx
  Shc_star__dot_Sos_dot_Grb2_slash_Sos_dot_Ras_GEF_1: Ras_slash_GDP_minus_Ras + Shc_star__dot_Sos_dot_Grb2 -> Shc_star__dot_Sos_dot_Grb2_slash_Sos_dot_Ras_GEF_slash_Sos_dot_Ras_GEF_cplx; Shc_star__dot_Sos_dot_Grb2_slash_Sos_dot_Ras_GEF_1_k1*Ras_slash_GDP_minus_Ras*Shc_star__dot_Sos_dot_Grb2 - Shc_star__dot_Sos_dot_Grb2_slash_Sos_dot_Ras_GEF_1_k2*Shc_star__dot_Sos_dot_Grb2_slash_Sos_dot_Ras_GEF_slash_Sos_dot_Ras_GEF_cplx;
    Shc_star__dot_Sos_dot_Grb2_slash_Sos_dot_Ras_GEF_1_k1 = 2.97e-16 vol_uMINVsecINV; Shc_star__dot_Sos_dot_Grb2_slash_Sos_dot_Ras_GEF_1_k2 = 1.2e-16 vol_secINV;
  // k3*Shc_star__dot_Sos_dot_Grb2_slash_Sos_dot_Ras_GEF_slash_Sos_dot_Ras_GEF_cplx
  Shc_star__dot_Sos_dot_Grb2_slash_Sos_dot_Ras_GEF_2: Shc_star__dot_Sos_dot_Grb2_slash_Sos_dot_Ras_GEF_slash_Sos_dot_Ras_GEF_cplx => Ras_slash_GTP_minus_Ras + Shc_star__dot_Sos_dot_Grb2; Shc_star__dot_Sos_dot_Grb2_slash_Sos_dot_Ras_GEF_2_k3*Shc_star__dot_Sos_dot_Grb2_slash_Sos_dot_Ras_GEF_slash_Sos_dot_Ras_GEF_cplx;
    Shc_star__dot_Sos_dot_Grb2_slash_Sos_dot_Ras_GEF_2_k3 = 3e-17 vol_secINV;
  // k1*PLC_g_slash_Ca_dot_PLC_g*EGFR_slash_L_dot_EGFR-k2*EGFR_slash_L_dot_EGFR_slash_phosph_PLC_g_slash_phosph_PLC_g_cplx
  // Hsu et al JBC 266:1 603-608 1991 Km = 385 +- 100 uM, Vm = 5.1 +-1 pmol/min/ug for PLC-771. Other sites have similar range, but are not stim as much by EGF. k1 = 2.8e-2/385/6e5 = 1.2e-10. Phenomenally slow. But Sherrill and Kyte say turnover # for angiotensin II is 5/min for cell extt, and 2/min for placental. Also see Okada et al for Shc rates which are much faster.
  EGFR_slash_L_dot_EGFR_slash_phosph_PLC_g_1: PLC_g_slash_Ca_dot_PLC_g + EGFR_slash_L_dot_EGFR -> EGFR_slash_L_dot_EGFR_slash_phosph_PLC_g_slash_phosph_PLC_g_cplx; EGFR_slash_L_dot_EGFR_slash_phosph_PLC_g_1_k1*PLC_g_slash_Ca_dot_PLC_g*EGFR_slash_L_dot_EGFR - EGFR_slash_L_dot_EGFR_slash_phosph_PLC_g_1_k2*EGFR_slash_L_dot_EGFR_slash_phosph_PLC_g_slash_phosph_PLC_g_cplx;
    EGFR_slash_L_dot_EGFR_slash_phosph_PLC_g_1_k1 = 4.499955e-15 vol_uMINVsecINV; EGFR_slash_L_dot_EGFR_slash_phosph_PLC_g_1_k2 = 1.2e-15 vol_secINV;
  // k3*EGFR_slash_L_dot_EGFR_slash_phosph_PLC_g_slash_phosph_PLC_g_cplx
  EGFR_slash_L_dot_EGFR_slash_phosph_PLC_g_2: EGFR_slash_L_dot_EGFR_slash_phosph_PLC_g_slash_phosph_PLC_g_cplx => PLC_g_slash_Ca_dot_PLC_g_star_ + EGFR_slash_L_dot_EGFR; EGFR_slash_L_dot_EGFR_slash_phosph_PLC_g_2_k3*EGFR_slash_L_dot_EGFR_slash_phosph_PLC_g_slash_phosph_PLC_g_cplx;
    EGFR_slash_L_dot_EGFR_slash_phosph_PLC_g_2_k3 = 3e-16 vol_secINV;
  // k1*EGFR_slash_SHC*EGFR_slash_L_dot_EGFR-k2*EGFR_slash_L_dot_EGFR_slash_phosph_Shc_slash_phosph_Shc_cplx
  // Rates from Okada et al JBC 270:35 pp 20737 1995 Km = 0.70 to 0.85 uM, Vmax = 4.4 to 5.0 pmol/min. Unfortunately the amount of enzyme is not known, the prep is only partially purified. Time course of phosph is max within 30 sec, falls back within 20 min. Ref: Sasaoka et al JBC 269:51 32621 1994. Use k3 = 0.1 based on this tau.
  EGFR_slash_L_dot_EGFR_slash_phosph_Shc_1: EGFR_slash_SHC + EGFR_slash_L_dot_EGFR -> EGFR_slash_L_dot_EGFR_slash_phosph_Shc_slash_phosph_Shc_cplx; EGFR_slash_L_dot_EGFR_slash_phosph_Shc_1_k1*EGFR_slash_SHC*EGFR_slash_L_dot_EGFR - EGFR_slash_L_dot_EGFR_slash_phosph_Shc_1_k2*EGFR_slash_L_dot_EGFR_slash_phosph_Shc_slash_phosph_Shc_cplx;
    EGFR_slash_L_dot_EGFR_slash_phosph_Shc_1_k1 = 1.799955e-15 vol_uMINVsecINV; EGFR_slash_L_dot_EGFR_slash_phosph_Shc_1_k2 = 1.2e-15 vol_secINV;
  // k3*EGFR_slash_L_dot_EGFR_slash_phosph_Shc_slash_phosph_Shc_cplx
  EGFR_slash_L_dot_EGFR_slash_phosph_Shc_2: EGFR_slash_L_dot_EGFR_slash_phosph_Shc_slash_phosph_Shc_cplx => EGFR_slash_SHC_star_ + EGFR_slash_L_dot_EGFR; EGFR_slash_L_dot_EGFR_slash_phosph_Shc_2_k3*EGFR_slash_L_dot_EGFR_slash_phosph_Shc_slash_phosph_Shc_cplx;
    EGFR_slash_L_dot_EGFR_slash_phosph_Shc_2_k3 = 3e-16 vol_secINV;
  // kcat*PLC_g_slash_Ca_dot_PLC_g*PIP2/(Km+PIP2)
  // Mainly Homma et al JBC 263:14 1988 pp 6592, but these parms are the Ca-stimulated form. It is not clear whether the enzyme is activated by tyrosine phosphorylation at this point or not. Wahl et al JBC 267:15 10447-10456 1992 say that the Ca_stim and phosph form has 7X higher affinity for substrate than control. This is close to Wahl\'s figure 7, which I am using as reference.
  PLC_g_slash_Ca_dot_PLC_g_slash_PIP2_hydrolysis: $PIP2 => DAG + IP3; PLC_g_slash_Ca_dot_PLC_g_slash_PIP2_hydrolysis_kcat*PLC_g_slash_Ca_dot_PLC_g*PIP2/(PLC_g_slash_Ca_dot_PLC_g_slash_PIP2_hydrolysis_Km + PIP2);  // modifiers: PLC_g_slash_Ca_dot_PLC_g
    PLC_g_slash_Ca_dot_PLC_g_slash_PIP2_hydrolysis_kcat = 2.1e-14 vol_secINV; PLC_g_slash_Ca_dot_PLC_g_slash_PIP2_hydrolysis_Km = 97.22222 uM1;
  // kcat*PLC_g_slash_Ca_dot_PLC_g_star_*PIP2/(Km+PIP2)
  // Mainly Homma et al JBC 263:14 1988 pp 6592, but these parms are the Ca-stimulated form. It is not clear whether the enzyme is activated by tyrosine phosphorylation at this point or not. Wahl et al JBC 267:15 10447-10456 1992 say that this has 7X higher affinity for substrate than control.
  PLC_g_slash_Ca_dot_PLC_g_star__slash_PIP2_hydrolysis: $PIP2 => DAG + IP3; PLC_g_slash_Ca_dot_PLC_g_star__slash_PIP2_hydrolysis_kcat*PLC_g_slash_Ca_dot_PLC_g_star_*PIP2/(PLC_g_slash_Ca_dot_PLC_g_star__slash_PIP2_hydrolysis_Km + PIP2);  // modifiers: PLC_g_slash_Ca_dot_PLC_g_star_
    PLC_g_slash_Ca_dot_PLC_g_star__slash_PIP2_hydrolysis_kcat = 8.55e-14 vol_secINV; PLC_g_slash_Ca_dot_PLC_g_star__slash_PIP2_hydrolysis_Km = 19.79167 uM1;
  // k1*CaMKII_slash_CaMKII_minus_thr286*CaMKII_slash_tot_CaM_CaMKII-k2*CaMKII_slash_tot_CaM_CaMKII_slash_CaM_act_305_slash_CaM_act_305_cplx
  // Rates from autocamtide phosphorylation, from Hanson and Schulman JBC 267:24 17216-17224 1992. Jan 1 1998: Speed up 12x to match fig 5.
  CaMKII_slash_tot_CaM_CaMKII_slash_CaM_act_305_1: CaMKII_slash_CaMKII_minus_thr286 + $CaMKII_slash_tot_CaM_CaMKII -> CaMKII_slash_tot_CaM_CaMKII_slash_CaM_act_305_slash_CaM_act_305_cplx; CaMKII_slash_tot_CaM_CaMKII_slash_CaM_act_305_1_k1*CaMKII_slash_CaMKII_minus_thr286*CaMKII_slash_tot_CaM_CaMKII - CaMKII_slash_tot_CaM_CaMKII_slash_CaM_act_305_1_k2*CaMKII_slash_tot_CaM_CaMKII_slash_CaM_act_305_slash_CaM_act_305_cplx;
    CaMKII_slash_tot_CaM_CaMKII_slash_CaM_act_305_1_k1 = 3.961305e-16 vol_uMINVsecINV; CaMKII_slash_tot_CaM_CaMKII_slash_CaM_act_305_1_k2 = 3.6e-14 vol_secINV;
  // k3*CaMKII_slash_tot_CaM_CaMKII_slash_CaM_act_305_slash_CaM_act_305_cplx
  CaMKII_slash_tot_CaM_CaMKII_slash_CaM_act_305_2: CaMKII_slash_tot_CaM_CaMKII_slash_CaM_act_305_slash_CaM_act_305_cplx => CaMKII_slash_CaMKII_star__star__star_ + $CaMKII_slash_tot_CaM_CaMKII; CaMKII_slash_tot_CaM_CaMKII_slash_CaM_act_305_2_k3*CaMKII_slash_tot_CaM_CaMKII_slash_CaM_act_305_slash_CaM_act_305_cplx;
    CaMKII_slash_tot_CaM_CaMKII_slash_CaM_act_305_2_k3 = 9e-15 vol_secINV;
  // k1*CaMKII_slash_CaMKII_minus_CaM*CaMKII_slash_tot_CaM_CaMKII-k2*CaMKII_slash_tot_CaM_CaMKII_slash_CaM_act_286_slash_CaM_act_286_cplx
  CaMKII_slash_tot_CaM_CaMKII_slash_CaM_act_286_1: CaMKII_slash_CaMKII_minus_CaM + $CaMKII_slash_tot_CaM_CaMKII -> CaMKII_slash_tot_CaM_CaMKII_slash_CaM_act_286_slash_CaM_act_286_cplx; CaMKII_slash_tot_CaM_CaMKII_slash_CaM_act_286_1_k1*CaMKII_slash_CaMKII_minus_CaM*CaMKII_slash_tot_CaM_CaMKII - CaMKII_slash_tot_CaM_CaMKII_slash_CaM_act_286_1_k2*CaMKII_slash_tot_CaM_CaMKII_slash_CaM_act_286_slash_CaM_act_286_cplx;
    CaMKII_slash_tot_CaM_CaMKII_slash_CaM_act_286_1_k1 = 3.30102e-17 vol_uMINVsecINV; CaMKII_slash_tot_CaM_CaMKII_slash_CaM_act_286_1_k2 = 3e-15 vol_secINV;
  // k3*CaMKII_slash_tot_CaM_CaMKII_slash_CaM_act_286_slash_CaM_act_286_cplx
  CaMKII_slash_tot_CaM_CaMKII_slash_CaM_act_286_2: CaMKII_slash_tot_CaM_CaMKII_slash_CaM_act_286_slash_CaM_act_286_cplx => CaMKII_slash_CaMKII_minus_thr286_star__minus_CaM + $CaMKII_slash_tot_CaM_CaMKII; CaMKII_slash_tot_CaM_CaMKII_slash_CaM_act_286_2_k3*CaMKII_slash_tot_CaM_CaMKII_slash_CaM_act_286_slash_CaM_act_286_cplx;
    CaMKII_slash_tot_CaM_CaMKII_slash_CaM_act_286_2_k3 = 7.5e-16 vol_secINV;
  // k1*CaMKII_slash_CaMKII_minus_thr286*CaMKII_slash_tot_autonomous_CaMKII-k2*CaMKII_slash_tot_autonomous_CaMKII_slash_auton_305_slash_auton_305_cplx
  // See Hanson and Schulman again, for afterburst rates of phosph.
  CaMKII_slash_tot_autonomous_CaMKII_slash_auton_305_1: CaMKII_slash_CaMKII_minus_thr286 + $CaMKII_slash_tot_autonomous_CaMKII -> CaMKII_slash_tot_autonomous_CaMKII_slash_auton_305_slash_auton_305_cplx; CaMKII_slash_tot_autonomous_CaMKII_slash_auton_305_1_k1*CaMKII_slash_CaMKII_minus_thr286*CaMKII_slash_tot_autonomous_CaMKII - CaMKII_slash_tot_autonomous_CaMKII_slash_auton_305_1_k2*CaMKII_slash_tot_autonomous_CaMKII_slash_auton_305_slash_auton_305_cplx;
    CaMKII_slash_tot_autonomous_CaMKII_slash_auton_305_1_k1 = 2.571345e-16 vol_uMINVsecINV; CaMKII_slash_tot_autonomous_CaMKII_slash_auton_305_1_k2 = 3.6e-14 vol_secINV;
  // k3*CaMKII_slash_tot_autonomous_CaMKII_slash_auton_305_slash_auton_305_cplx
  CaMKII_slash_tot_autonomous_CaMKII_slash_auton_305_2: CaMKII_slash_tot_autonomous_CaMKII_slash_auton_305_slash_auton_305_cplx => CaMKII_slash_CaMKII_star__star__star_ + $CaMKII_slash_tot_autonomous_CaMKII; CaMKII_slash_tot_autonomous_CaMKII_slash_auton_305_2_k3*CaMKII_slash_tot_autonomous_CaMKII_slash_auton_305_slash_auton_305_cplx;
    CaMKII_slash_tot_autonomous_CaMKII_slash_auton_305_2_k3 = 9e-15 vol_secINV;
  // k1*CaMKII_slash_CaMKII_minus_CaM*CaMKII_slash_tot_autonomous_CaMKII-k2*CaMKII_slash_tot_autonomous_CaMKII_slash_auton_286_slash_auton_286_cplx
  CaMKII_slash_tot_autonomous_CaMKII_slash_auton_286_1: CaMKII_slash_CaMKII_minus_CaM + $CaMKII_slash_tot_autonomous_CaMKII -> CaMKII_slash_tot_autonomous_CaMKII_slash_auton_286_slash_auton_286_cplx; CaMKII_slash_tot_autonomous_CaMKII_slash_auton_286_1_k1*CaMKII_slash_CaMKII_minus_CaM*CaMKII_slash_tot_autonomous_CaMKII - CaMKII_slash_tot_autonomous_CaMKII_slash_auton_286_1_k2*CaMKII_slash_tot_autonomous_CaMKII_slash_auton_286_slash_auton_286_cplx;
    CaMKII_slash_tot_autonomous_CaMKII_slash_auton_286_1_k1 = 2.142855e-17 vol_uMINVsecINV; CaMKII_slash_tot_autonomous_CaMKII_slash_auton_286_1_k2 = 3e-15 vol_secINV;
  // k3*CaMKII_slash_tot_autonomous_CaMKII_slash_auton_286_slash_auton_286_cplx
  CaMKII_slash_tot_autonomous_CaMKII_slash_auton_286_2: CaMKII_slash_tot_autonomous_CaMKII_slash_auton_286_slash_auton_286_cplx => CaMKII_slash_CaMKII_minus_thr286_star__minus_CaM + $CaMKII_slash_tot_autonomous_CaMKII; CaMKII_slash_tot_autonomous_CaMKII_slash_auton_286_2_k3*CaMKII_slash_tot_autonomous_CaMKII_slash_auton_286_slash_auton_286_cplx;
    CaMKII_slash_tot_autonomous_CaMKII_slash_auton_286_2_k3 = 7.5e-16 vol_secINV;
  // k1*CaMKII_slash_CaMKII_minus_thr286_star__minus_CaM*PP1_minus_active-k2*PP1_minus_active_slash_Deph_minus_thr286_slash_Deph_minus_thr286_cplx
  // The rates are from Stralfors et al Eur J Biochem 149 295-303 giving Vmax = 5.7 umol/min giving k3 = 3.5/sec and k2 = 14. Foulkes et al Eur J Biochem 132 309-313 1983 give Km = 5.1 uM so k1 becomes 5.72e-6 Simonelli 1984 (Grad Thesis, CUNY) showed that other substrates are about 1/10 rate of phosphorylase a, so we reduce k1,k2,k3 by 10 to 5.72e-7, 1.4, 0.35
  PP1_minus_active_slash_Deph_minus_thr286_1: CaMKII_slash_CaMKII_minus_thr286_star__minus_CaM + PP1_minus_active -> PP1_minus_active_slash_Deph_minus_thr286_slash_Deph_minus_thr286_cplx; PP1_minus_active_slash_Deph_minus_thr286_1_k1*CaMKII_slash_CaMKII_minus_thr286_star__minus_CaM*PP1_minus_active - PP1_minus_active_slash_Deph_minus_thr286_1_k2*PP1_minus_active_slash_Deph_minus_thr286_slash_Deph_minus_thr286_cplx;
    PP1_minus_active_slash_Deph_minus_thr286_1_k1 = 5.147955e-16 vol_uMINVsecINV; PP1_minus_active_slash_Deph_minus_thr286_1_k2 = 2.1e-15 vol_secINV;
  // k3*PP1_minus_active_slash_Deph_minus_thr286_slash_Deph_minus_thr286_cplx
  PP1_minus_active_slash_Deph_minus_thr286_2: PP1_minus_active_slash_Deph_minus_thr286_slash_Deph_minus_thr286_cplx => CaMKII_slash_CaMKII_minus_CaM + PP1_minus_active; PP1_minus_active_slash_Deph_minus_thr286_2_k3*PP1_minus_active_slash_Deph_minus_thr286_slash_Deph_minus_thr286_cplx;
    PP1_minus_active_slash_Deph_minus_thr286_2_k3 = 5.25e-16 vol_secINV;
  // k1*CaMKII_slash_CaMKII_star__star__star_*PP1_minus_active-k2*PP1_minus_active_slash_Deph_minus_thr305_slash_Deph_minus_thr305_cplx
  PP1_minus_active_slash_Deph_minus_thr305_1: CaMKII_slash_CaMKII_star__star__star_ + PP1_minus_active -> PP1_minus_active_slash_Deph_minus_thr305_slash_Deph_minus_thr305_cplx; PP1_minus_active_slash_Deph_minus_thr305_1_k1*CaMKII_slash_CaMKII_star__star__star_*PP1_minus_active - PP1_minus_active_slash_Deph_minus_thr305_1_k2*PP1_minus_active_slash_Deph_minus_thr305_slash_Deph_minus_thr305_cplx;
    PP1_minus_active_slash_Deph_minus_thr305_1_k1 = 5.147955e-16 vol_uMINVsecINV; PP1_minus_active_slash_Deph_minus_thr305_1_k2 = 2.1e-15 vol_secINV;
  // k3*PP1_minus_active_slash_Deph_minus_thr305_slash_Deph_minus_thr305_cplx
  PP1_minus_active_slash_Deph_minus_thr305_2: PP1_minus_active_slash_Deph_minus_thr305_slash_Deph_minus_thr305_cplx => CaMKII_slash_CaMKII_minus_thr286 + PP1_minus_active; PP1_minus_active_slash_Deph_minus_thr305_2_k3*PP1_minus_active_slash_Deph_minus_thr305_slash_Deph_minus_thr305_cplx;
    PP1_minus_active_slash_Deph_minus_thr305_2_k3 = 5.25e-16 vol_secINV;
  // k1*CaMKII_slash_CaMK_minus_thr306*PP1_minus_active-k2*PP1_minus_active_slash_Deph_minus_thr306_slash_Deph_minus_thr306_cplx
  // See Cohen et al
  PP1_minus_active_slash_Deph_minus_thr306_1: CaMKII_slash_CaMK_minus_thr306 + PP1_minus_active -> PP1_minus_active_slash_Deph_minus_thr306_slash_Deph_minus_thr306_cplx; PP1_minus_active_slash_Deph_minus_thr306_1_k1*CaMKII_slash_CaMK_minus_thr306*PP1_minus_active - PP1_minus_active_slash_Deph_minus_thr306_1_k2*PP1_minus_active_slash_Deph_minus_thr306_slash_Deph_minus_thr306_cplx;
    PP1_minus_active_slash_Deph_minus_thr306_1_k1 = 5.147955e-16 vol_uMINVsecINV; PP1_minus_active_slash_Deph_minus_thr306_1_k2 = 2.1e-15 vol_secINV;
  // k3*PP1_minus_active_slash_Deph_minus_thr306_slash_Deph_minus_thr306_cplx
  PP1_minus_active_slash_Deph_minus_thr306_2: PP1_minus_active_slash_Deph_minus_thr306_slash_Deph_minus_thr306_cplx => CaMKII_slash_CaMKII + PP1_minus_active; PP1_minus_active_slash_Deph_minus_thr306_2_k3*PP1_minus_active_slash_Deph_minus_thr306_slash_Deph_minus_thr306_cplx;
    PP1_minus_active_slash_Deph_minus_thr306_2_k3 = 5.25e-16 vol_secINV;
  // k1*CaMKII_slash_CaMKII_star__star__star_*PP1_minus_active-k2*PP1_minus_active_slash_Deph_minus_thr286c_slash_Deph_minus_thr286c_cplx
  PP1_minus_active_slash_Deph_minus_thr286c_1: CaMKII_slash_CaMKII_star__star__star_ + PP1_minus_active -> PP1_minus_active_slash_Deph_minus_thr286c_slash_Deph_minus_thr286c_cplx; PP1_minus_active_slash_Deph_minus_thr286c_1_k1*CaMKII_slash_CaMKII_star__star__star_*PP1_minus_active - PP1_minus_active_slash_Deph_minus_thr286c_1_k2*PP1_minus_active_slash_Deph_minus_thr286c_slash_Deph_minus_thr286c_cplx;
    PP1_minus_active_slash_Deph_minus_thr286c_1_k1 = 5.147955e-16 vol_uMINVsecINV; PP1_minus_active_slash_Deph_minus_thr286c_1_k2 = 2.1e-15 vol_secINV;
  // k3*PP1_minus_active_slash_Deph_minus_thr286c_slash_Deph_minus_thr286c_cplx
  PP1_minus_active_slash_Deph_minus_thr286c_2: PP1_minus_active_slash_Deph_minus_thr286c_slash_Deph_minus_thr286c_cplx => CaMKII_slash_CaMK_minus_thr306 + PP1_minus_active; PP1_minus_active_slash_Deph_minus_thr286c_2_k3*PP1_minus_active_slash_Deph_minus_thr286c_slash_Deph_minus_thr286c_cplx;
    PP1_minus_active_slash_Deph_minus_thr286c_2_k3 = 5.25e-16 vol_secINV;
  // k1*CaMKII_slash_CaMKII_minus_thr286*PP1_minus_active-k2*PP1_minus_active_slash_Deph_thr286b_slash_Deph_thr286b_cplx
  PP1_minus_active_slash_Deph_thr286b_1: CaMKII_slash_CaMKII_minus_thr286 + PP1_minus_active -> PP1_minus_active_slash_Deph_thr286b_slash_Deph_thr286b_cplx; PP1_minus_active_slash_Deph_thr286b_1_k1*CaMKII_slash_CaMKII_minus_thr286*PP1_minus_active - PP1_minus_active_slash_Deph_thr286b_1_k2*PP1_minus_active_slash_Deph_thr286b_slash_Deph_thr286b_cplx;
    PP1_minus_active_slash_Deph_thr286b_1_k1 = 5.147955e-16 vol_uMINVsecINV; PP1_minus_active_slash_Deph_thr286b_1_k2 = 2.1e-15 vol_secINV;
  // k3*PP1_minus_active_slash_Deph_thr286b_slash_Deph_thr286b_cplx
  PP1_minus_active_slash_Deph_thr286b_2: PP1_minus_active_slash_Deph_thr286b_slash_Deph_thr286b_cplx => CaMKII_slash_CaMKII + PP1_minus_active; PP1_minus_active_slash_Deph_thr286b_2_k3*PP1_minus_active_slash_Deph_thr286b_slash_Deph_thr286b_cplx;
    PP1_minus_active_slash_Deph_thr286b_2_k3 = 5.25e-16 vol_secINV;
  // k1*CaM_slash_neurogranin_star_*CaM_po_Ca_pc_n_minus_CaNAB-k2*CaM_po_Ca_pc_n_minus_CaNAB_slash_dephosph_neurogranin_slash_dephosph_neurogranin_cplx
  // From Seki et al ABB 316(2):673-679
  CaM_po_Ca_pc_n_minus_CaNAB_slash_dephosph_neurogranin_1: CaM_slash_neurogranin_star_ + $CaM_po_Ca_pc_n_minus_CaNAB -> CaM_po_Ca_pc_n_minus_CaNAB_slash_dephosph_neurogranin_slash_dephosph_neurogranin_cplx; CaM_po_Ca_pc_n_minus_CaNAB_slash_dephosph_neurogranin_1_k1*CaM_slash_neurogranin_star_*CaM_po_Ca_pc_n_minus_CaNAB - CaM_po_Ca_pc_n_minus_CaNAB_slash_dephosph_neurogranin_1_k2*CaM_po_Ca_pc_n_minus_CaNAB_slash_dephosph_neurogranin_slash_dephosph_neurogranin_cplx;
    CaM_po_Ca_pc_n_minus_CaNAB_slash_dephosph_neurogranin_1_k1 = 5.004045e-16 vol_uMINVsecINV; CaM_po_Ca_pc_n_minus_CaNAB_slash_dephosph_neurogranin_1_k2 = 4.005e-15 vol_secINV;
  // k3*CaM_po_Ca_pc_n_minus_CaNAB_slash_dephosph_neurogranin_slash_dephosph_neurogranin_cplx
  CaM_po_Ca_pc_n_minus_CaNAB_slash_dephosph_neurogranin_2: CaM_po_Ca_pc_n_minus_CaNAB_slash_dephosph_neurogranin_slash_dephosph_neurogranin_cplx => CaM_slash_neurogranin + $CaM_po_Ca_pc_n_minus_CaNAB; CaM_po_Ca_pc_n_minus_CaNAB_slash_dephosph_neurogranin_2_k3*CaM_po_Ca_pc_n_minus_CaNAB_slash_dephosph_neurogranin_slash_dephosph_neurogranin_cplx;
    CaM_po_Ca_pc_n_minus_CaNAB_slash_dephosph_neurogranin_2_k3 = 1.005e-15 vol_secINV;
  // k1*PP1_slash_I1_star_*CaM_po_Ca_pc_n_minus_CaNAB-k2*CaM_po_Ca_pc_n_minus_CaNAB_slash_dephosph_inhib1_slash_dephosph_inhib1_cplx
  CaM_po_Ca_pc_n_minus_CaNAB_slash_dephosph_inhib1_1: PP1_slash_I1_star_ + $CaM_po_Ca_pc_n_minus_CaNAB -> CaM_po_Ca_pc_n_minus_CaNAB_slash_dephosph_inhib1_slash_dephosph_inhib1_cplx; CaM_po_Ca_pc_n_minus_CaNAB_slash_dephosph_inhib1_1_k1*PP1_slash_I1_star_*CaM_po_Ca_pc_n_minus_CaNAB - CaM_po_Ca_pc_n_minus_CaNAB_slash_dephosph_inhib1_1_k2*CaM_po_Ca_pc_n_minus_CaNAB_slash_dephosph_inhib1_slash_dephosph_inhib1_cplx;
    CaM_po_Ca_pc_n_minus_CaNAB_slash_dephosph_inhib1_1_k1 = 5.13e-16 vol_uMINVsecINV; CaM_po_Ca_pc_n_minus_CaNAB_slash_dephosph_inhib1_1_k2 = 2.04e-15 vol_secINV;
  // k3*CaM_po_Ca_pc_n_minus_CaNAB_slash_dephosph_inhib1_slash_dephosph_inhib1_cplx
  CaM_po_Ca_pc_n_minus_CaNAB_slash_dephosph_inhib1_2: CaM_po_Ca_pc_n_minus_CaNAB_slash_dephosph_inhib1_slash_dephosph_inhib1_cplx => PP1_slash_I1 + $CaM_po_Ca_pc_n_minus_CaNAB; CaM_po_Ca_pc_n_minus_CaNAB_slash_dephosph_inhib1_2_k3*CaM_po_Ca_pc_n_minus_CaNAB_slash_dephosph_inhib1_slash_dephosph_inhib1_cplx;
    CaM_po_Ca_pc_n_minus_CaNAB_slash_dephosph_inhib1_2_k3 = 5.1e-16 vol_secINV;
  // k1*PP1_slash_PP1_minus_I1_star_*CaM_po_Ca_pc_n_minus_CaNAB-k2*CaM_po_Ca_pc_n_minus_CaNAB_slash_dephosph_minus_PP1_minus_I_star__slash_dephosph_minus_PP1_minus_I_star__cplx
  CaM_po_Ca_pc_n_minus_CaNAB_slash_dephosph_minus_PP1_minus_I_star__1: PP1_slash_PP1_minus_I1_star_ + $CaM_po_Ca_pc_n_minus_CaNAB -> CaM_po_Ca_pc_n_minus_CaNAB_slash_dephosph_minus_PP1_minus_I_star__slash_dephosph_minus_PP1_minus_I_star__cplx; CaM_po_Ca_pc_n_minus_CaNAB_slash_dephosph_minus_PP1_minus_I_star__1_k1*PP1_slash_PP1_minus_I1_star_*CaM_po_Ca_pc_n_minus_CaNAB - CaM_po_Ca_pc_n_minus_CaNAB_slash_dephosph_minus_PP1_minus_I_star__1_k2*CaM_po_Ca_pc_n_minus_CaNAB_slash_dephosph_minus_PP1_minus_I_star__slash_dephosph_minus_PP1_minus_I_star__cplx;
    CaM_po_Ca_pc_n_minus_CaNAB_slash_dephosph_minus_PP1_minus_I_star__1_k1 = 5.13e-16 vol_uMINVsecINV; CaM_po_Ca_pc_n_minus_CaNAB_slash_dephosph_minus_PP1_minus_I_star__1_k2 = 2.04e-15 vol_secINV;
  // k3*CaM_po_Ca_pc_n_minus_CaNAB_slash_dephosph_minus_PP1_minus_I_star__slash_dephosph_minus_PP1_minus_I_star__cplx
  CaM_po_Ca_pc_n_minus_CaNAB_slash_dephosph_minus_PP1_minus_I_star__2: CaM_po_Ca_pc_n_minus_CaNAB_slash_dephosph_minus_PP1_minus_I_star__slash_dephosph_minus_PP1_minus_I_star__cplx => PP1_slash_PP1_minus_I1 + $CaM_po_Ca_pc_n_minus_CaNAB; CaM_po_Ca_pc_n_minus_CaNAB_slash_dephosph_minus_PP1_minus_I_star__2_k3*CaM_po_Ca_pc_n_minus_CaNAB_slash_dephosph_minus_PP1_minus_I_star__slash_dephosph_minus_PP1_minus_I_star__cplx;
    CaM_po_Ca_pc_n_minus_CaNAB_slash_dephosph_minus_PP1_minus_I_star__2_k3 = 5.1e-16 vol_secINV;
  // k1*PP1_slash_I1_star_*PP2A-k2*PP2A_slash_PP2A_minus_dephosph_minus_I1_slash_PP2A_minus_dephosph_minus_I1_cplx
  // PP2A does most of the dephosph of I1 at basal Ca levels. See the review by Cohen in Ann Rev Biochem 1989. For now, lets halve Km. k1 was 3.3e-6, now 6.6e-6
  PP2A_slash_PP2A_minus_dephosph_minus_I1_1: PP1_slash_I1_star_ + PP2A -> PP2A_slash_PP2A_minus_dephosph_minus_I1_slash_PP2A_minus_dephosph_minus_I1_cplx; PP2A_slash_PP2A_minus_dephosph_minus_I1_1_k1*PP1_slash_I1_star_*PP2A - PP2A_slash_PP2A_minus_dephosph_minus_I1_1_k2*PP2A_slash_PP2A_minus_dephosph_minus_I1_slash_PP2A_minus_dephosph_minus_I1_cplx;
    PP2A_slash_PP2A_minus_dephosph_minus_I1_1_k1 = 5.94e-15 vol_uMINVsecINV; PP2A_slash_PP2A_minus_dephosph_minus_I1_1_k2 = 3.75e-14 vol_secINV;
  // k3*PP2A_slash_PP2A_minus_dephosph_minus_I1_slash_PP2A_minus_dephosph_minus_I1_cplx
  PP2A_slash_PP2A_minus_dephosph_minus_I1_2: PP2A_slash_PP2A_minus_dephosph_minus_I1_slash_PP2A_minus_dephosph_minus_I1_cplx => PP1_slash_I1 + PP2A; PP2A_slash_PP2A_minus_dephosph_minus_I1_2_k3*PP2A_slash_PP2A_minus_dephosph_minus_I1_slash_PP2A_minus_dephosph_minus_I1_cplx;
    PP2A_slash_PP2A_minus_dephosph_minus_I1_2_k3 = 9e-15 vol_secINV;
  // k1*PP1_slash_PP1_minus_I1_star_*PP2A-k2*PP2A_slash_PP2A_minus_dephosph_minus_PP1_minus_I_star__slash_PP2A_minus_dephosph_minus_PP1_minus_I_star__cplx
  // k1 changed from 3.3e-6 to 6.6e-6
  PP2A_slash_PP2A_minus_dephosph_minus_PP1_minus_I_star__1: PP1_slash_PP1_minus_I1_star_ + PP2A -> PP2A_slash_PP2A_minus_dephosph_minus_PP1_minus_I_star__slash_PP2A_minus_dephosph_minus_PP1_minus_I_star__cplx; PP2A_slash_PP2A_minus_dephosph_minus_PP1_minus_I_star__1_k1*PP1_slash_PP1_minus_I1_star_*PP2A - PP2A_slash_PP2A_minus_dephosph_minus_PP1_minus_I_star__1_k2*PP2A_slash_PP2A_minus_dephosph_minus_PP1_minus_I_star__slash_PP2A_minus_dephosph_minus_PP1_minus_I_star__cplx;
    PP2A_slash_PP2A_minus_dephosph_minus_PP1_minus_I_star__1_k1 = 5.94e-15 vol_uMINVsecINV; PP2A_slash_PP2A_minus_dephosph_minus_PP1_minus_I_star__1_k2 = 3.75e-14 vol_secINV;
  // k3*PP2A_slash_PP2A_minus_dephosph_minus_PP1_minus_I_star__slash_PP2A_minus_dephosph_minus_PP1_minus_I_star__cplx
  PP2A_slash_PP2A_minus_dephosph_minus_PP1_minus_I_star__2: PP2A_slash_PP2A_minus_dephosph_minus_PP1_minus_I_star__slash_PP2A_minus_dephosph_minus_PP1_minus_I_star__cplx => PP1_slash_PP1_minus_I1 + PP2A; PP2A_slash_PP2A_minus_dephosph_minus_PP1_minus_I_star__2_k3*PP2A_slash_PP2A_minus_dephosph_minus_PP1_minus_I_star__slash_PP2A_minus_dephosph_minus_PP1_minus_I_star__cplx;
    PP2A_slash_PP2A_minus_dephosph_minus_PP1_minus_I_star__2_k3 = 9e-15 vol_secINV;
  // k1*PP1_slash_I1_star_*CaNAB_minus_Ca4-k2*CaNAB_minus_Ca4_slash_dephosph_inhib1_noCaM_slash_dephosph_inhib1_noCaM_cplx
  // The rates here are so slow I do not know if we should even bother with this enz reacn. These numbers are from Liu and Storm. Other refs suggest that the Km stays the same but the Vmax goes to 10% of the CaM stim levels. Prev: k1=2.2e-9, k2 = 0.0052, k3 = 0.0013 New : k1=5.7e-8, k2=.136, k3=.034
  CaNAB_minus_Ca4_slash_dephosph_inhib1_noCaM_1: PP1_slash_I1_star_ + CaNAB_minus_Ca4 -> CaNAB_minus_Ca4_slash_dephosph_inhib1_noCaM_slash_dephosph_inhib1_noCaM_cplx; CaNAB_minus_Ca4_slash_dephosph_inhib1_noCaM_1_k1*PP1_slash_I1_star_*CaNAB_minus_Ca4 - CaNAB_minus_Ca4_slash_dephosph_inhib1_noCaM_1_k2*CaNAB_minus_Ca4_slash_dephosph_inhib1_noCaM_slash_dephosph_inhib1_noCaM_cplx;
    CaNAB_minus_Ca4_slash_dephosph_inhib1_noCaM_1_k1 = 5.13e-17 vol_uMINVsecINV; CaNAB_minus_Ca4_slash_dephosph_inhib1_noCaM_1_k2 = 2.04e-16 vol_secINV;
  // k3*CaNAB_minus_Ca4_slash_dephosph_inhib1_noCaM_slash_dephosph_inhib1_noCaM_cplx
  CaNAB_minus_Ca4_slash_dephosph_inhib1_noCaM_2: CaNAB_minus_Ca4_slash_dephosph_inhib1_noCaM_slash_dephosph_inhib1_noCaM_cplx => PP1_slash_I1 + CaNAB_minus_Ca4; CaNAB_minus_Ca4_slash_dephosph_inhib1_noCaM_2_k3*CaNAB_minus_Ca4_slash_dephosph_inhib1_noCaM_slash_dephosph_inhib1_noCaM_cplx;
    CaNAB_minus_Ca4_slash_dephosph_inhib1_noCaM_2_k3 = 5.1e-17 vol_secINV;
  // kcat*AC_slash_AC1_minus_CaM*AC_slash_ATP/(Km+AC_slash_ATP)
  AC_slash_AC1_minus_CaM_slash_kenz: $AC_slash_ATP => cAMP; AC_slash_AC1_minus_CaM_slash_kenz_kcat*AC_slash_AC1_minus_CaM*AC_slash_ATP/(AC_slash_AC1_minus_CaM_slash_kenz_Km + AC_slash_ATP);  // modifiers: AC_slash_AC1_minus_CaM
    AC_slash_AC1_minus_CaM_slash_kenz_kcat = 2.7e-14 vol_secINV; AC_slash_AC1_minus_CaM_slash_kenz_Km = 20 uM1;
  // kcat*AC_slash_AC2_star_*AC_slash_ATP/(Km+AC_slash_ATP)
  // Reduced Km to match expt data for basal activation of AC2 by PKC. Now k1 = 2.9e-6, k2 = 72, k3 = 18
  AC_slash_AC2_star__slash_kenz: $AC_slash_ATP => cAMP; AC_slash_AC2_star__slash_kenz_kcat*AC_slash_AC2_star_*AC_slash_ATP/(AC_slash_AC2_star__slash_kenz_Km + AC_slash_ATP);  // modifiers: AC_slash_AC2_star_
    AC_slash_AC2_star__slash_kenz_kcat = 1.05e-14 vol_secINV; AC_slash_AC2_star__slash_kenz_Km = 20.11529 uM1;
  // kcat*AC_slash_AC2_minus_Gs*AC_slash_ATP/(Km+AC_slash_ATP)
  AC_slash_AC2_minus_Gs_slash_kenz: $AC_slash_ATP => cAMP; AC_slash_AC2_minus_Gs_slash_kenz_kcat*AC_slash_AC2_minus_Gs*AC_slash_ATP/(AC_slash_AC2_minus_Gs_slash_kenz_Km + AC_slash_ATP);  // modifiers: AC_slash_AC2_minus_Gs
    AC_slash_AC2_minus_Gs_slash_kenz_kcat = 2.7e-14 vol_secINV; AC_slash_AC2_minus_Gs_slash_kenz_Km = 20 uM1;
  // kcat*AC_slash_AC1_minus_Gs*AC_slash_ATP/(Km+AC_slash_ATP)
  AC_slash_AC1_minus_Gs_slash_kenz: $AC_slash_ATP => cAMP; AC_slash_AC1_minus_Gs_slash_kenz_kcat*AC_slash_AC1_minus_Gs*AC_slash_ATP/(AC_slash_AC1_minus_Gs_slash_kenz_Km + AC_slash_ATP);  // modifiers: AC_slash_AC1_minus_Gs
    AC_slash_AC1_minus_Gs_slash_kenz_kcat = 2.7e-14 vol_secINV; AC_slash_AC1_minus_Gs_slash_kenz_Km = 20 uM1;
  // kcat*AC_slash_AC2_star__minus_Gs*AC_slash_ATP/(Km+AC_slash_ATP)
  AC_slash_AC2_star__minus_Gs_slash_kenz: $AC_slash_ATP => cAMP; AC_slash_AC2_star__minus_Gs_slash_kenz_kcat*AC_slash_AC2_star__minus_Gs*AC_slash_ATP/(AC_slash_AC2_star__minus_Gs_slash_kenz_Km + AC_slash_ATP);  // modifiers: AC_slash_AC2_star__minus_Gs
    AC_slash_AC2_star__minus_Gs_slash_kenz_kcat = 8.1e-14 vol_secINV; AC_slash_AC2_star__minus_Gs_slash_kenz_Km = 60 uM1;
  // k1*cAMP*AC_slash_cAMP_minus_PDE-k2*AC_slash_cAMP_minus_PDE_slash_PDE_slash_PDE_cplx
  // Best rates are from Conti et al Biochem 34 7979-7987 1995. Though these are for the Sertoli cell form, it looks like they carry nicely into alternatively spliced brain form. See Sette et al JBC 269:28 18271-18274 Km ~2 uM, Vmax est ~ 10 umol/min/mg for pure form. Brain protein is 93 kD but this was 67. So k3 ~10, k2 ~40, k1 ~4.2e-6
  AC_slash_cAMP_minus_PDE_slash_PDE_1: cAMP + AC_slash_cAMP_minus_PDE -> AC_slash_cAMP_minus_PDE_slash_PDE_slash_PDE_cplx; AC_slash_cAMP_minus_PDE_slash_PDE_1_k1*cAMP*AC_slash_cAMP_minus_PDE - AC_slash_cAMP_minus_PDE_slash_PDE_1_k2*AC_slash_cAMP_minus_PDE_slash_PDE_slash_PDE_cplx;
    AC_slash_cAMP_minus_PDE_slash_PDE_1_k1 = 3.78e-15 vol_uMINVsecINV; AC_slash_cAMP_minus_PDE_slash_PDE_1_k2 = 6e-14 vol_secINV;
  // k3*AC_slash_cAMP_minus_PDE_slash_PDE_slash_PDE_cplx
  AC_slash_cAMP_minus_PDE_slash_PDE_2: AC_slash_cAMP_minus_PDE_slash_PDE_slash_PDE_cplx => AC_slash_AMP + AC_slash_cAMP_minus_PDE; AC_slash_cAMP_minus_PDE_slash_PDE_2_k3*AC_slash_cAMP_minus_PDE_slash_PDE_slash_PDE_cplx;
    AC_slash_cAMP_minus_PDE_slash_PDE_2_k3 = 1.5e-14 vol_secINV;
  // k1*cAMP*AC_slash_cAMP_minus_PDE_star_-k2*AC_slash_cAMP_minus_PDE_star__slash_PDE_star__slash_PDE_star__cplx
  // This form has about twice the activity of the unphosphorylated form. See Sette et al JBC 269:28 18271-18274 1994. We\'ll ignore cGMP effects for now.
  AC_slash_cAMP_minus_PDE_star__slash_PDE_star__1: cAMP + AC_slash_cAMP_minus_PDE_star_ -> AC_slash_cAMP_minus_PDE_star__slash_PDE_star__slash_PDE_star__cplx; AC_slash_cAMP_minus_PDE_star__slash_PDE_star__1_k1*cAMP*AC_slash_cAMP_minus_PDE_star_ - AC_slash_cAMP_minus_PDE_star__slash_PDE_star__1_k2*AC_slash_cAMP_minus_PDE_star__slash_PDE_star__slash_PDE_star__cplx;
    AC_slash_cAMP_minus_PDE_star__slash_PDE_star__1_k1 = 7.56e-15 vol_uMINVsecINV; AC_slash_cAMP_minus_PDE_star__slash_PDE_star__1_k2 = 1.2e-13 vol_secINV;
  // k3*AC_slash_cAMP_minus_PDE_star__slash_PDE_star__slash_PDE_star__cplx
  AC_slash_cAMP_minus_PDE_star__slash_PDE_star__2: AC_slash_cAMP_minus_PDE_star__slash_PDE_star__slash_PDE_star__cplx => AC_slash_AMP + AC_slash_cAMP_minus_PDE_star_; AC_slash_cAMP_minus_PDE_star__slash_PDE_star__2_k3*AC_slash_cAMP_minus_PDE_star__slash_PDE_star__slash_PDE_star__cplx;
    AC_slash_cAMP_minus_PDE_star__slash_PDE_star__2_k3 = 3e-14 vol_secINV;
  // k1*cAMP*AC_slash_PDE1-k2*AC_slash_PDE1_slash_PDE1_slash_PDE1_cplx
  // Rate is 1/6 of the CaM stim form. We\'ll just reduce all lf k1, k2, k3 so that the Vmax goes down 1/6.
  AC_slash_PDE1_slash_PDE1_1: cAMP + AC_slash_PDE1 -> AC_slash_PDE1_slash_PDE1_slash_PDE1_cplx; AC_slash_PDE1_slash_PDE1_1_k1*cAMP*AC_slash_PDE1 - AC_slash_PDE1_slash_PDE1_1_k2*AC_slash_PDE1_slash_PDE1_slash_PDE1_cplx;
    AC_slash_PDE1_slash_PDE1_1_k1 = 3.149955e-16 vol_uMINVsecINV; AC_slash_PDE1_slash_PDE1_1_k2 = 1.0005e-14 vol_secINV;
  // k3*AC_slash_PDE1_slash_PDE1_slash_PDE1_cplx
  AC_slash_PDE1_slash_PDE1_2: AC_slash_PDE1_slash_PDE1_slash_PDE1_cplx => AC_slash_AMP + AC_slash_PDE1; AC_slash_PDE1_slash_PDE1_2_k3*AC_slash_PDE1_slash_PDE1_slash_PDE1_cplx;
    AC_slash_PDE1_slash_PDE1_2_k3 = 2.5005e-15 vol_secINV;
  // k1*cAMP*AC_slash_CaM_dot_PDE1-k2*AC_slash_CaM_dot_PDE1_slash_CaM_dot_PDE1_slash_CaM_dot_PDE1_cplx
  // Max activity ~10umol/min/mg in presence of lots of CaM. Affinity is low, 40 uM. k3 = 10, k2 = 40, k1 = (50/40) / 6e5.
  AC_slash_CaM_dot_PDE1_slash_CaM_dot_PDE1_1: cAMP + AC_slash_CaM_dot_PDE1 -> AC_slash_CaM_dot_PDE1_slash_CaM_dot_PDE1_slash_CaM_dot_PDE1_cplx; AC_slash_CaM_dot_PDE1_slash_CaM_dot_PDE1_1_k1*cAMP*AC_slash_CaM_dot_PDE1 - AC_slash_CaM_dot_PDE1_slash_CaM_dot_PDE1_1_k2*AC_slash_CaM_dot_PDE1_slash_CaM_dot_PDE1_slash_CaM_dot_PDE1_cplx;
    AC_slash_CaM_dot_PDE1_slash_CaM_dot_PDE1_1_k1 = 1.89e-15 vol_uMINVsecINV; AC_slash_CaM_dot_PDE1_slash_CaM_dot_PDE1_1_k2 = 6e-14 vol_secINV;
  // k3*AC_slash_CaM_dot_PDE1_slash_CaM_dot_PDE1_slash_CaM_dot_PDE1_cplx
  AC_slash_CaM_dot_PDE1_slash_CaM_dot_PDE1_2: AC_slash_CaM_dot_PDE1_slash_CaM_dot_PDE1_slash_CaM_dot_PDE1_cplx => AC_slash_AMP + AC_slash_CaM_dot_PDE1; AC_slash_CaM_dot_PDE1_slash_CaM_dot_PDE1_2_k3*AC_slash_CaM_dot_PDE1_slash_CaM_dot_PDE1_slash_CaM_dot_PDE1_cplx;
    AC_slash_CaM_dot_PDE1_slash_CaM_dot_PDE1_2_k3 = 1.5e-14 vol_secINV;
  // k1*MKP3_slash_nucleotides*MKP3_slash_nuc_MAPK_star_-k2*MKP3_slash_nuc_MAPK_star__slash_act_transcription_slash_act_transcription_cplx
  MKP3_slash_nuc_MAPK_star__slash_act_transcription_1: $MKP3_slash_nucleotides + MKP3_slash_nuc_MAPK_star_ -> MKP3_slash_nuc_MAPK_star__slash_act_transcription_slash_act_transcription_cplx; MKP3_slash_nuc_MAPK_star__slash_act_transcription_1_k1*MKP3_slash_nucleotides*MKP3_slash_nuc_MAPK_star_ - MKP3_slash_nuc_MAPK_star__slash_act_transcription_1_k2*MKP3_slash_nuc_MAPK_star__slash_act_transcription_slash_act_transcription_cplx;
    MKP3_slash_nuc_MAPK_star__slash_act_transcription_1_k1 = 7.50006e-18 vol_uMINVsecINV; MKP3_slash_nuc_MAPK_star__slash_act_transcription_1_k2 = 2.4e-17 vol_secINV;
  // k3*MKP3_slash_nuc_MAPK_star__slash_act_transcription_slash_act_transcription_cplx
  MKP3_slash_nuc_MAPK_star__slash_act_transcription_2: MKP3_slash_nuc_MAPK_star__slash_act_transcription_slash_act_transcription_cplx => MKP3_slash_MKP3_synthesis + MKP3_slash_nuc_MAPK_star_; MKP3_slash_nuc_MAPK_star__slash_act_transcription_2_k3*MKP3_slash_nuc_MAPK_star__slash_act_transcription_slash_act_transcription_cplx;
    MKP3_slash_nuc_MAPK_star__slash_act_transcription_2_k3 = 6e-18 vol_secINV;
  // k1*MAPK_star_*MKP3_slash_MKP_minus_3-k2*MKP3_slash_MKP_minus_3_slash_MKP3_minus_thr_minus_deph_slash_MKP3_minus_thr_minus_deph_cplx
  // See MKP1-tyr-deph Km is twice as high to avoid saturation.
  MKP3_slash_MKP_minus_3_slash_MKP3_minus_thr_minus_deph_1: MAPK_star_ + MKP3_slash_MKP_minus_3 -> MKP3_slash_MKP_minus_3_slash_MKP3_minus_thr_minus_deph_slash_MKP3_minus_thr_minus_deph_cplx; MKP3_slash_MKP_minus_3_slash_MKP3_minus_thr_minus_deph_1_k1*MAPK_star_*MKP3_slash_MKP_minus_3 - MKP3_slash_MKP_minus_3_slash_MKP3_minus_thr_minus_deph_1_k2*MKP3_slash_MKP_minus_3_slash_MKP3_minus_thr_minus_deph_slash_MKP3_minus_thr_minus_deph_cplx;
    MKP3_slash_MKP_minus_3_slash_MKP3_minus_thr_minus_deph_1_k1 = 2.99997e-15 vol_uMINVsecINV; MKP3_slash_MKP_minus_3_slash_MKP3_minus_thr_minus_deph_1_k2 = 2.4e-14 vol_secINV;
  // k3*MKP3_slash_MKP_minus_3_slash_MKP3_minus_thr_minus_deph_slash_MKP3_minus_thr_minus_deph_cplx
  MKP3_slash_MKP_minus_3_slash_MKP3_minus_thr_minus_deph_2: MKP3_slash_MKP_minus_3_slash_MKP3_minus_thr_minus_deph_slash_MKP3_minus_thr_minus_deph_cplx => MAPK_slash_MAPK_minus_tyr + MKP3_slash_MKP_minus_3; MKP3_slash_MKP_minus_3_slash_MKP3_minus_thr_minus_deph_2_k3*MKP3_slash_MKP_minus_3_slash_MKP3_minus_thr_minus_deph_slash_MKP3_minus_thr_minus_deph_cplx;
    MKP3_slash_MKP_minus_3_slash_MKP3_minus_thr_minus_deph_2_k3 = 6e-15 vol_secINV;
  // k1*MAPK_slash_MAPK_minus_tyr*MKP3_slash_MKP_minus_3-k2*MKP3_slash_MKP_minus_3_slash_MKP3_minus_tyr_minus_deph_slash_MKP3_minus_tyr_minus_deph_cplx
  // The original kinetics have been modified to obey the k2 = 4 * k3 rule, while keeping kcat and Km fixed. As noted in the NOTES, the only constraining data point is the time course of MAPK dephosphorylation, which this model satisfies. It would be nice to have more accurate estimates of rate consts and MKP-1 levels from the literature. Effective Km : 67 nM kcat = 1.43 umol/min/mg Km for MKP3 is set to 267 nM, twice as high as MKP1 version, to lessen substrate saturation.
  MKP3_slash_MKP_minus_3_slash_MKP3_minus_tyr_minus_deph_1: MAPK_slash_MAPK_minus_tyr + MKP3_slash_MKP_minus_3 -> MKP3_slash_MKP_minus_3_slash_MKP3_minus_tyr_minus_deph_slash_MKP3_minus_tyr_minus_deph_cplx; MKP3_slash_MKP_minus_3_slash_MKP3_minus_tyr_minus_deph_1_k1*MAPK_slash_MAPK_minus_tyr*MKP3_slash_MKP_minus_3 - MKP3_slash_MKP_minus_3_slash_MKP3_minus_tyr_minus_deph_1_k2*MKP3_slash_MKP_minus_3_slash_MKP3_minus_tyr_minus_deph_slash_MKP3_minus_tyr_minus_deph_cplx;
    MKP3_slash_MKP_minus_3_slash_MKP3_minus_tyr_minus_deph_1_k1 = 2.99997e-15 vol_uMINVsecINV; MKP3_slash_MKP_minus_3_slash_MKP3_minus_tyr_minus_deph_1_k2 = 2.4e-14 vol_secINV;
  // k3*MKP3_slash_MKP_minus_3_slash_MKP3_minus_tyr_minus_deph_slash_MKP3_minus_tyr_minus_deph_cplx
  MKP3_slash_MKP_minus_3_slash_MKP3_minus_tyr_minus_deph_2: MKP3_slash_MKP_minus_3_slash_MKP3_minus_tyr_minus_deph_slash_MKP3_minus_tyr_minus_deph_cplx => MAPK_slash_MAPK + MKP3_slash_MKP_minus_3; MKP3_slash_MKP_minus_3_slash_MKP3_minus_tyr_minus_deph_2_k3*MKP3_slash_MKP_minus_3_slash_MKP3_minus_tyr_minus_deph_slash_MKP3_minus_tyr_minus_deph_cplx;
    MKP3_slash_MKP_minus_3_slash_MKP3_minus_tyr_minus_deph_2_k3 = 6e-15 vol_secINV;
  // k1*MKP3_slash_MKP3_AA*MKP3_slash_MKP3_synthesis-k2*MKP3_slash_MKP3_synthesis_slash_kenz_slash_kenz_cplx
  MKP3_slash_MKP3_synthesis_slash_kenz_1: $MKP3_slash_MKP3_AA + MKP3_slash_MKP3_synthesis -> MKP3_slash_MKP3_synthesis_slash_kenz_slash_kenz_cplx; MKP3_slash_MKP3_synthesis_slash_kenz_1_k1*MKP3_slash_MKP3_AA*MKP3_slash_MKP3_synthesis - MKP3_slash_MKP3_synthesis_slash_kenz_1_k2*MKP3_slash_MKP3_synthesis_slash_kenz_slash_kenz_cplx;
    MKP3_slash_MKP3_synthesis_slash_kenz_1_k1 = 3.75003e-16 vol_uMINVsecINV; MKP3_slash_MKP3_synthesis_slash_kenz_1_k2 = 6e-17 vol_secINV;
  // k3*MKP3_slash_MKP3_synthesis_slash_kenz_slash_kenz_cplx
  MKP3_slash_MKP3_synthesis_slash_kenz_2: MKP3_slash_MKP3_synthesis_slash_kenz_slash_kenz_cplx => MKP3_slash_MKP_minus_3 + MKP3_slash_MKP3_synthesis; MKP3_slash_MKP3_synthesis_slash_kenz_2_k3*MKP3_slash_MKP3_synthesis_slash_kenz_slash_kenz_cplx;
    MKP3_slash_MKP3_synthesis_slash_kenz_2_k3 = 1.5e-17 vol_secINV;
  // k1*MAPK_slash_craf_minus_1*PKC_minus_active-k2*PKC_minus_active_slash_PKC_minus_act_minus_raf_slash_PKC_minus_act_minus_raf_cplx
  // Rate consts from Chen et al Biochem 32, 1032 (1993) k3 = k2 = 4 k1 = 9e-5 recalculated gives 1.666e-5, which is not very different. Looks like k3 is rate-limiting in this case: there is a huge amount of craf locked up in the enz complex. Let us assume a 10x higher Km, ie, lower affinity. k1 drops by 10x. Also changed k2 to 4x k3. Lowerd k1 to 1e-6 to balance 10X DAG sensitivity of PKC 3 Aug 2004. Lowered Km from 66.66 to 3.33, to match that of PKC-inact-GAP
  PKC_minus_active_slash_PKC_minus_act_minus_raf_1: MAPK_slash_craf_minus_1 + $PKC_minus_active -> PKC_minus_active_slash_PKC_minus_act_minus_raf_slash_PKC_minus_act_minus_raf_cplx; PKC_minus_active_slash_PKC_minus_act_minus_raf_1_k1*MAPK_slash_craf_minus_1*PKC_minus_active - PKC_minus_active_slash_PKC_minus_act_minus_raf_1_k2*PKC_minus_active_slash_PKC_minus_act_minus_raf_slash_PKC_minus_act_minus_raf_cplx;
    PKC_minus_active_slash_PKC_minus_act_minus_raf_1_k1 = 1.499985e-15 vol_uMINVsecINV; PKC_minus_active_slash_PKC_minus_act_minus_raf_1_k2 = 2.4e-14 vol_secINV;
  // k3*PKC_minus_active_slash_PKC_minus_act_minus_raf_slash_PKC_minus_act_minus_raf_cplx
  PKC_minus_active_slash_PKC_minus_act_minus_raf_2: PKC_minus_active_slash_PKC_minus_act_minus_raf_slash_PKC_minus_act_minus_raf_cplx => MAPK_slash_craf_minus_1_star_ + $PKC_minus_active; PKC_minus_active_slash_PKC_minus_act_minus_raf_2_k3*PKC_minus_active_slash_PKC_minus_act_minus_raf_slash_PKC_minus_act_minus_raf_cplx;
    PKC_minus_active_slash_PKC_minus_act_minus_raf_2_k3 = 6e-15 vol_secINV;
  // k1*Ras_slash_GAP*PKC_minus_active-k2*PKC_minus_active_slash_PKC_minus_inact_minus_GAP_slash_PKC_minus_inact_minus_GAP_cplx
  // Rate consts copied from PCK-act-raf This reaction inactivates GAP. The idea is from the Boguski and McCormick review.
  PKC_minus_active_slash_PKC_minus_inact_minus_GAP_1: Ras_slash_GAP + $PKC_minus_active -> PKC_minus_active_slash_PKC_minus_inact_minus_GAP_slash_PKC_minus_inact_minus_GAP_cplx; PKC_minus_active_slash_PKC_minus_inact_minus_GAP_1_k1*Ras_slash_GAP*PKC_minus_active - PKC_minus_active_slash_PKC_minus_inact_minus_GAP_1_k2*PKC_minus_active_slash_PKC_minus_inact_minus_GAP_slash_PKC_minus_inact_minus_GAP_cplx;
    PKC_minus_active_slash_PKC_minus_inact_minus_GAP_1_k1 = 9.000045e-15 vol_uMINVsecINV; PKC_minus_active_slash_PKC_minus_inact_minus_GAP_1_k2 = 2.4e-14 vol_secINV;
  // k3*PKC_minus_active_slash_PKC_minus_inact_minus_GAP_slash_PKC_minus_inact_minus_GAP_cplx
  PKC_minus_active_slash_PKC_minus_inact_minus_GAP_2: PKC_minus_active_slash_PKC_minus_inact_minus_GAP_slash_PKC_minus_inact_minus_GAP_cplx => Ras_slash_GAP_star_ + $PKC_minus_active; PKC_minus_active_slash_PKC_minus_inact_minus_GAP_2_k3*PKC_minus_active_slash_PKC_minus_inact_minus_GAP_slash_PKC_minus_inact_minus_GAP_cplx;
    PKC_minus_active_slash_PKC_minus_inact_minus_GAP_2_k3 = 6e-15 vol_secINV;
  // k1*Ras_slash_inact_minus_GEF*PKC_minus_active-k2*PKC_minus_active_slash_PKC_minus_act_minus_GEF_slash_PKC_minus_act_minus_GEF_cplx
  // Rate consts from PKC-act-raf. This reaction activates GEF. It can lead to at least 2X stim of ras, and a 2X stim of MAPK over and above that obtained via direct phosph of c-raf. Note that it is a push-pull reaction, and there is also a contribution through the phosphorylation and inactivation of GAPs. The original PKC-act-raf rate consts are too fast. We lower K1 by 10 X
  PKC_minus_active_slash_PKC_minus_act_minus_GEF_1: Ras_slash_inact_minus_GEF + $PKC_minus_active -> PKC_minus_active_slash_PKC_minus_act_minus_GEF_slash_PKC_minus_act_minus_GEF_cplx; PKC_minus_active_slash_PKC_minus_act_minus_GEF_1_k1*Ras_slash_inact_minus_GEF*PKC_minus_active - PKC_minus_active_slash_PKC_minus_act_minus_GEF_1_k2*PKC_minus_active_slash_PKC_minus_act_minus_GEF_slash_PKC_minus_act_minus_GEF_cplx;
    PKC_minus_active_slash_PKC_minus_act_minus_GEF_1_k1 = 9.000045e-15 vol_uMINVsecINV; PKC_minus_active_slash_PKC_minus_act_minus_GEF_1_k2 = 2.4e-14 vol_secINV;
  // k3*PKC_minus_active_slash_PKC_minus_act_minus_GEF_slash_PKC_minus_act_minus_GEF_cplx
  PKC_minus_active_slash_PKC_minus_act_minus_GEF_2: PKC_minus_active_slash_PKC_minus_act_minus_GEF_slash_PKC_minus_act_minus_GEF_cplx => Ras_slash_GEF_star_ + $PKC_minus_active; PKC_minus_active_slash_PKC_minus_act_minus_GEF_2_k3*PKC_minus_active_slash_PKC_minus_act_minus_GEF_slash_PKC_minus_act_minus_GEF_cplx;
    PKC_minus_active_slash_PKC_minus_act_minus_GEF_2_k3 = 6e-15 vol_secINV;
  // k1*CaM_slash_neurogranin*PKC_minus_active-k2*PKC_minus_active_slash_PKC_minus_phosph_minus_neurogranin_slash_PKC_minus_phosph_minus_neurogranin_cplx
  // Rates from Huang et al ABB 305:2 570-580 1993
  PKC_minus_active_slash_PKC_minus_phosph_minus_neurogranin_1: CaM_slash_neurogranin + $PKC_minus_active -> PKC_minus_active_slash_PKC_minus_phosph_minus_neurogranin_slash_PKC_minus_phosph_minus_neurogranin_cplx; PKC_minus_active_slash_PKC_minus_phosph_minus_neurogranin_1_k1*CaM_slash_neurogranin*PKC_minus_active - PKC_minus_active_slash_PKC_minus_phosph_minus_neurogranin_1_k2*PKC_minus_active_slash_PKC_minus_phosph_minus_neurogranin_slash_PKC_minus_phosph_minus_neurogranin_cplx;
    PKC_minus_active_slash_PKC_minus_phosph_minus_neurogranin_1_k1 = 1.529955e-16 vol_uMINVsecINV; PKC_minus_active_slash_PKC_minus_phosph_minus_neurogranin_1_k2 = 3.51e-15 vol_secINV;
  // k3*PKC_minus_active_slash_PKC_minus_phosph_minus_neurogranin_slash_PKC_minus_phosph_minus_neurogranin_cplx
  PKC_minus_active_slash_PKC_minus_phosph_minus_neurogranin_2: PKC_minus_active_slash_PKC_minus_phosph_minus_neurogranin_slash_PKC_minus_phosph_minus_neurogranin_cplx => CaM_slash_neurogranin_star_ + $PKC_minus_active; PKC_minus_active_slash_PKC_minus_phosph_minus_neurogranin_2_k3*PKC_minus_active_slash_PKC_minus_phosph_minus_neurogranin_slash_PKC_minus_phosph_minus_neurogranin_cplx;
    PKC_minus_active_slash_PKC_minus_phosph_minus_neurogranin_2_k3 = 8.7e-16 vol_secINV;
  // k1*CaM_slash_neurogranin_minus_CaM*PKC_minus_active-k2*PKC_minus_active_slash_PKC_minus_phosph_minus_ng_minus_CaM_slash_PKC_minus_phosph_minus_ng_minus_CaM_cplx
  // Rates are 60% those of PKC-phosph-neurogranin. See Huang et al ABB 305:2 570-580 1993
  PKC_minus_active_slash_PKC_minus_phosph_minus_ng_minus_CaM_1: CaM_slash_neurogranin_minus_CaM + $PKC_minus_active -> PKC_minus_active_slash_PKC_minus_phosph_minus_ng_minus_CaM_slash_PKC_minus_phosph_minus_ng_minus_CaM_cplx; PKC_minus_active_slash_PKC_minus_phosph_minus_ng_minus_CaM_1_k1*CaM_slash_neurogranin_minus_CaM*PKC_minus_active - PKC_minus_active_slash_PKC_minus_phosph_minus_ng_minus_CaM_1_k2*PKC_minus_active_slash_PKC_minus_phosph_minus_ng_minus_CaM_slash_PKC_minus_phosph_minus_ng_minus_CaM_cplx;
    PKC_minus_active_slash_PKC_minus_phosph_minus_ng_minus_CaM_1_k1 = 9.18e-17 vol_uMINVsecINV; PKC_minus_active_slash_PKC_minus_phosph_minus_ng_minus_CaM_1_k2 = 2.1e-15 vol_secINV;
  // k3*PKC_minus_active_slash_PKC_minus_phosph_minus_ng_minus_CaM_slash_PKC_minus_phosph_minus_ng_minus_CaM_cplx
  PKC_minus_active_slash_PKC_minus_phosph_minus_ng_minus_CaM_2: PKC_minus_active_slash_PKC_minus_phosph_minus_ng_minus_CaM_slash_PKC_minus_phosph_minus_ng_minus_CaM_cplx => CaM_slash_CaM + CaM_slash_neurogranin_star_ + $PKC_minus_active; PKC_minus_active_slash_PKC_minus_phosph_minus_ng_minus_CaM_2_k3*PKC_minus_active_slash_PKC_minus_phosph_minus_ng_minus_CaM_slash_PKC_minus_phosph_minus_ng_minus_CaM_cplx;
    PKC_minus_active_slash_PKC_minus_phosph_minus_ng_minus_CaM_2_k3 = 5.25e-16 vol_secINV;
  // k1*AC_slash_AC2*PKC_minus_active-k2*PKC_minus_active_slash_phosph_minus_AC2_slash_phosph_minus_AC2_cplx
  // Phorbol esters have little effect on AC1 or on the Gs-stimulation of AC2. So in this model we are only dealing with the increase in basal activation of AC2 induced by PKC k1 = 1.66e-6 k2 = 16 k3 =4
  PKC_minus_active_slash_phosph_minus_AC2_1: AC_slash_AC2 + $PKC_minus_active -> PKC_minus_active_slash_phosph_minus_AC2_slash_phosph_minus_AC2_cplx; PKC_minus_active_slash_phosph_minus_AC2_1_k1*AC_slash_AC2*PKC_minus_active - PKC_minus_active_slash_phosph_minus_AC2_1_k2*PKC_minus_active_slash_phosph_minus_AC2_slash_phosph_minus_AC2_cplx;
    PKC_minus_active_slash_phosph_minus_AC2_1_k1 = 9.000045e-16 vol_uMINVsecINV; PKC_minus_active_slash_phosph_minus_AC2_1_k2 = 2.4e-14 vol_secINV;
  // k3*PKC_minus_active_slash_phosph_minus_AC2_slash_phosph_minus_AC2_cplx
  PKC_minus_active_slash_phosph_minus_AC2_2: PKC_minus_active_slash_phosph_minus_AC2_slash_phosph_minus_AC2_cplx => AC_slash_AC2_star_ + $PKC_minus_active; PKC_minus_active_slash_phosph_minus_AC2_2_k3*PKC_minus_active_slash_phosph_minus_AC2_slash_phosph_minus_AC2_cplx;
    PKC_minus_active_slash_phosph_minus_AC2_2_k3 = 6e-15 vol_secINV;
  // k1*PKM_slash_AA_pool*PKM_slash_PKM_synthesis-k2*PKM_slash_PKM_synthesis_slash_kenz_slash_kenz_cplx
  PKM_slash_PKM_synthesis_slash_kenz_1: $PKM_slash_AA_pool + PKM_slash_PKM_synthesis -> PKM_slash_PKM_synthesis_slash_kenz_slash_kenz_cplx; PKM_slash_PKM_synthesis_slash_kenz_1_k1*PKM_slash_AA_pool*PKM_slash_PKM_synthesis - PKM_slash_PKM_synthesis_slash_kenz_1_k2*PKM_slash_PKM_synthesis_slash_kenz_slash_kenz_cplx;
    PKM_slash_PKM_synthesis_slash_kenz_1_k1 = 3.75003e-17 vol_uMINVsecINV; PKM_slash_PKM_synthesis_slash_kenz_1_k2 = 3e-16 vol_secINV;
  // k3*PKM_slash_PKM_synthesis_slash_kenz_slash_kenz_cplx
  PKM_slash_PKM_synthesis_slash_kenz_2: PKM_slash_PKM_synthesis_slash_kenz_slash_kenz_cplx => PKC_slash_PKM_minus_zeta + PKM_slash_PKM_synthesis; PKM_slash_PKM_synthesis_slash_kenz_2_k3*PKM_slash_PKM_synthesis_slash_kenz_slash_kenz_cplx;
    PKM_slash_PKM_synthesis_slash_kenz_2_k3 = 7.5e-17 vol_secINV;
  // k1*PKM_slash_PKM_activator*PKM_slash_Ca_dot_detector_complex-k2*PKM_slash_Ca_dot_detector_complex_slash_kenz_slash_kenz_cplx
  PKM_slash_Ca_dot_detector_complex_slash_kenz_1: PKM_slash_PKM_activator + PKM_slash_Ca_dot_detector_complex -> PKM_slash_Ca_dot_detector_complex_slash_kenz_slash_kenz_cplx; PKM_slash_Ca_dot_detector_complex_slash_kenz_1_k1*PKM_slash_PKM_activator*PKM_slash_Ca_dot_detector_complex - PKM_slash_Ca_dot_detector_complex_slash_kenz_1_k2*PKM_slash_Ca_dot_detector_complex_slash_kenz_slash_kenz_cplx;
    PKM_slash_Ca_dot_detector_complex_slash_kenz_1_k1 = 2.99997e-16 vol_uMINVsecINV; PKM_slash_Ca_dot_detector_complex_slash_kenz_1_k2 = 1.2e-15 vol_secINV;
  // k3*PKM_slash_Ca_dot_detector_complex_slash_kenz_slash_kenz_cplx
  PKM_slash_Ca_dot_detector_complex_slash_kenz_2: PKM_slash_Ca_dot_detector_complex_slash_kenz_slash_kenz_cplx => PKM_slash_PKM_synthesis + PKM_slash_Ca_dot_detector_complex; PKM_slash_Ca_dot_detector_complex_slash_kenz_2_k3*PKM_slash_Ca_dot_detector_complex_slash_kenz_slash_kenz_cplx;
    PKM_slash_Ca_dot_detector_complex_slash_kenz_2_k3 = 3e-16 vol_secINV;

  // Unit definitions:
  unit uM1 = 1e-6 mole / litre;
  unit vol_secINV = litre / second;
  unit vol_uMINV2secINV = litre^3 / ((1e-6 mole)^2 * second);
  unit vol_uMINVsecINV = litre^2 / (1e-6 mole * second);
  unit substance = 1e-6 mole;
end
