// SBML level 2 version 1

model testid()
  // Ajay_Bhalla_2007_Bistable
  // This is a model of ERKII signaling which is bistable due to feedback. The feedback occurs through ERKII phosphorylation of phospholipase A2 (PLA2), leading to increased production of arachidonic acid (AA), which activates protein kinase C (PKC) which activates c-Raf which is upstream of ERKII.<br""> The model is a highly simplified variant of more detailed bistable models of MAPK signaling (<a href = "http://www.ncbi.nlm.nih.gov/entrez/query.fcgi?db=pubmed&cmd=Retrieve&dopt=AbstractPlus&list_uids=9888852&query_hl=4&itool=pubmed_docsum>Bhalla US, Iyengar R. Science. 1999 Jan 15;283(5400):381-7</a>, <a href = "http://www.ncbi.nlm.nih.gov/entrez/query.fcgi?db=pubmed&cmd=Retrieve&dopt=AbstractPlus&list_uids=15548210&query_hl=2&itool=pubmed_docsum>Ajay SM, Bhalla US. Eur J Neurosci. 2004 Nov;20(10):2671-80</a>)
  // This model originates from BioModels Database: A Database of Annotated Published Models. It is copyright (c) 2005-2011 The BioModels.net Team.
  // To the extent possible under law, all copyright and related or neighbouring rights to this encoded model have been dedicated to the public domain worldwide. Please refer to CC0 Public Domain Dedication for more information.
  // In summary, you are entitled to use this encoded model in absolutely any manner you deem suitable, verbatim, or with modification, alone or embedded it in a larger context, redistribute it, commercially or not, in a restricted way or not..
  // To cite BioModels Database, please use: Li C, Donizelli M, Rodriguez N, Dharuri H, Endler L, Chelliah V, Li L, He E, Henry A, Stefan MI, Snoep JL, Hucka M, Le Novère N, Laibe C (2010) BioModels Database: An enhanced, curated and annotated resource for published quantitative kinetic models. BMC Syst Biol., 4:92.
  // biomodels.db:MODEL9147091146
  // isDescribedBy pubmed:19404460
  // biomodels.db:MODEL9147091146
  // isDescribedBy pubmed:19404460
  // biomodels.db:MODEL9147091146
  // biomodels.db:MODEL9147091146

  // Compartments:
  compartment default_compartment = 1e-18;
  compartment dendgeom = 1.257e-13;

  // Species:
  species PKC_slash_PKC_minus_Ca in dendgeom = 3.720764e-17;
  species PKC_slash_PKC_minus_DAG_minus_AA_star_ in dendgeom = 4.913683e-18;
  species PKC_slash_PKC_minus_Ca_minus_AA_star_ in dendgeom = 1.750066e-16;
  species PKC_slash_PKC_minus_Ca_minus_memb_star_ in dendgeom = 1.389552e-17;
  species PKC_slash_PKC_minus_DAG_minus_memb_star_ in dendgeom = 9.435163e-21;
  species PKC_slash_PKC_minus_basal_star_ in dendgeom = 0;
  species PKC_slash_PKC_minus_AA_star_ in dendgeom = 1.813312e-17;
  species PKC_slash_PKC_minus_Ca_minus_DAG in dendgeom = 8.46314e-23;
  species PKC_slash_PKC_minus_DAG in dendgeom = 1.161005e-16;
  species PKC_slash_PKC_minus_DAG_minus_AA in dendgeom = 2.518828e-19;
  species PKC_slash_PKC_minus_cytosolic in dendgeom = 1;
  species AA in dendgeom = 0;
  species PLA2_slash_PLA2_minus_cytosolic in dendgeom = 0.4;
  species PLA2_slash_PLA2_minus_Ca_star_ in dendgeom = 0;
  species PLA2_slash_PLA2_minus_Ca_star__slash_kenz_slash_kenz_cplx in dendgeom = 0;
  species PLA2_slash_PIP2_minus_PLA2_star_ in dendgeom = 0;
  species PLA2_slash_PIP2_minus_PLA2_star__slash_kenz_slash_kenz_cplx in dendgeom = 0;
  species PLA2_slash_PIP2_minus_Ca_minus_PLA2_star_ in dendgeom = 0;
  species PLA2_slash_PIP2_minus_Ca_minus_PLA2_star__slash_kenz_slash_kenz_cplx in dendgeom = 0;
  species PLA2_slash_DAG_minus_Ca_minus_PLA2_star_ in dendgeom = 0;
  species PLA2_slash_DAG_minus_Ca_minus_PLA2_star__slash_kenz_slash_kenz_cplx in dendgeom = 0;
  species PLA2_slash_PLA2_star__minus_Ca in dendgeom = 0;
  species PLA2_slash_PLA2_star__minus_Ca_slash_kenz_slash_kenz_cplx in dendgeom = 0;
  species PLA2_slash_PLA2_star_ in dendgeom = 0;
  species MAPK_slash_craf_minus_1 in dendgeom = 0.5;
  species MAPK_slash_craf_minus_1_star_ in dendgeom = 0;
  species MAPK_slash_MAPKK in dendgeom = 0.5;
  species MAPK_slash_MAPK in dendgeom = 3.599973;
  species MAPK_slash_craf_minus_1_star__star_ in dendgeom = 0;
  species MAPK_slash_MAPK_minus_tyr in dendgeom = 0;
  species MAPK_slash_MAPKK_star_ in dendgeom = 0;
  species MAPK_slash_MAPKK_star__slash_MAPKKtyr_slash_MAPKKtyr_cplx in dendgeom = 0;
  species MAPK_slash_MAPKK_star__slash_MAPKKthr_slash_MAPKKthr_cplx in dendgeom = 0;
  species MAPK_slash_MAPKK_minus_ser in dendgeom = 0;
  species MAPK_slash_Raf_minus_GTP_minus_Ras in dendgeom = 0;
  species MAPK_slash_Raf_minus_GTP_minus_Ras_slash_Raf_minus_GTP_minus_Ras_dot_1_slash_Raf_minus_GTP_minus_Ras_dot_1_cplx in dendgeom = 0;
  species MAPK_slash_Raf_minus_GTP_minus_Ras_slash_Raf_minus_GTP_minus_Ras_dot_2_slash_Raf_minus_GTP_minus_Ras_dot_2_cplx in dendgeom = 0;
  species MAPK_slash_Raf_star__minus_GTP_minus_Ras in dendgeom = 0;
  species MAPK_slash_Raf_star__minus_GTP_minus_Ras_slash_Raf_star__minus_GTP_minus_Ras_dot_1_slash_Raf_star__minus_GTP_minus_Ras_dot_1_cplx in dendgeom = 0;
  species MAPK_slash_Raf_star__minus_GTP_minus_Ras_slash_Raf_star__minus_GTP_minus_Ras_dot_2_slash_Raf_star__minus_GTP_minus_Ras_dot_2_cplx in dendgeom = 0;
  species Ras_slash_inact_minus_GEF in dendgeom = 0.1;
  species Ras_slash_inact_minus_GEF_slash_basal_GEF_activity_slash_basal_GEF_activity_cplx in dendgeom = 0;
  species Ras_slash_GEF_star_ in dendgeom = 0;
  species Ras_slash_GEF_star__slash_GEF_star__minus_act_minus_ras_slash_GEF_star__minus_act_minus_ras_cplx in dendgeom = 0;
  species Ras_slash_GTP_minus_Ras in dendgeom = 0;
  species Ras_slash_GDP_minus_Ras in dendgeom = 0.5;
  species Ras_slash_GAP_star_ in dendgeom = 0;
  species Ras_slash_GAP in dendgeom = 0.01;
  species Ras_slash_GAP_slash_GAP_minus_inact_minus_ras_slash_GAP_minus_inact_minus_ras_cplx in dendgeom = 0;
  species Ras_slash_CaM_minus_GEF in dendgeom = 0;
  species Ras_slash_CaM_minus_GEF_slash_CaM_minus_GEF_minus_act_minus_ras_slash_CaM_minus_GEF_minus_act_minus_ras_cplx in dendgeom = 0;
  species Ca in dendgeom = 0.08;
  species PKC_minus_active_slash_PKC_minus_act_minus_raf_slash_PKC_minus_act_minus_raf_cplx in dendgeom = 0;
  species PKC_minus_active_slash_PKC_minus_inact_minus_GAP_slash_PKC_minus_inact_minus_GAP_cplx in dendgeom = 0;
  species PKC_minus_active_slash_PKC_minus_act_minus_GEF_slash_PKC_minus_act_minus_GEF_cplx in dendgeom = 0;
  species PKC_minus_active_slash_phosph_minus_AC2_slash_phosph_minus_AC2_cplx in dendgeom = 0;
  species MAPK_star_ in dendgeom = 0;
  species MAPK_star__slash_MAPK_star__slash_MAPK_star__cplx in dendgeom = 0;
  species MAPK_star__slash_MAPK_star__minus_feedback_slash_MAPK_star__minus_feedback_cplx in dendgeom = 0;
  species MKP_minus_1 in dendgeom = 0.02400027;
  species MKP_minus_1_slash_MKP1_minus_tyr_minus_deph_slash_MKP1_minus_tyr_minus_deph_cplx in dendgeom = 0;
  species MKP_minus_1_slash_MKP1_minus_thr_minus_deph_slash_MKP1_minus_thr_minus_deph_cplx in dendgeom = 0;
  species PPhosphatase2A in dendgeom = 1;
  species PPhosphatase2A_slash_craf_minus_deph_slash_craf_minus_deph_cplx in dendgeom = 0;
  species PPhosphatase2A_slash_MAPKK_minus_deph_slash_MAPKK_minus_deph_cplx in dendgeom = 0;
  species PPhosphatase2A_slash_MAPKK_minus_deph_minus_ser_slash_MAPKK_minus_deph_minus_ser_cplx in dendgeom = 0;
  species PPhosphatase2A_slash_craf_star__star__minus_deph_slash_craf_star__star__minus_deph_cplx in dendgeom = 0;
  species CaM_slash_CaM in dendgeom = 20;
  species CaM_slash_CaM_minus_Ca3 in dendgeom = 0;
  species CaM_slash_CaM_minus_TR2_minus_Ca2 in dendgeom = 0;
  species CaM_slash_CaM_minus_Ca4 in dendgeom = 0;
  // arachodonylphosphatidylcholine is the favoured substrate from Wijkander and Sundler, JBC 202 pp 873-880, 1991. Their assay used 30 uM substrate, which is what the kinetics in this model are based on. For the later model we should locate a more realistic value for APC.
  species $PLA2_slash_APC in dendgeom = 30;
  // This isn\'t explicitly present in the M&L model, but is obviously needed. I assume its conc is fixed at 1uM for now, which is a bit high. PLA2 is stim 7x by PIP2 @ 0.5 uM (Leslie and Channon BBA 1045:261(1990) Leslie and Channon say PIP2 is present at 0.1 - 0.2mol% range in membs, which comes to 50 nM. Ref is Majerus et al Cell 37 pp 701-703 1984 Lets use a lower level of 30 nM, same ref....
  species $temp_minus_PIP2 in dendgeom = 2.5;
  species $DAG in dendgeom = 12.19995;
  // Peak IP3 is perhaps 15 uM, basal <= 0.2 uM.
  species $IP3 in dendgeom = 0.7300053;
  species $Ca_input in dendgeom = 0.08;
  species $PKC_minus_active in dendgeom;

  // Assignment rules:
  PKC_minus_active := PKC_slash_PKC_minus_DAG_minus_AA_star_ + PKC_slash_PKC_minus_Ca_minus_memb_star_ + PKC_slash_PKC_minus_Ca_minus_AA_star_ + PKC_slash_PKC_minus_DAG_minus_memb_star_ + PKC_slash_PKC_minus_basal_star_ + PKC_slash_PKC_minus_AA_star_;

  // Reactions:
  // kf*PKC_slash_PKC_minus_cytosolic*Ca-kb*PKC_slash_PKC_minus_Ca
  // Need est of rate of assoc of Ca and PKC. Assume it is fast The original parameter-searched kf of 439.4 has been scaled by 1/6e8 to account for change of units to n. Kf now 8.16e-7, kb=.6085 Raised kf to 1e-6 to match Ca curve, kb to .5
  PKC_slash_PKC_minus_act_minus_by_minus_Ca: PKC_slash_PKC_minus_cytosolic + Ca -> PKC_slash_PKC_minus_Ca; PKC_slash_PKC_minus_act_minus_by_minus_Ca_kf*PKC_slash_PKC_minus_cytosolic*Ca - PKC_slash_PKC_minus_act_minus_by_minus_Ca_kb*PKC_slash_PKC_minus_Ca;
    PKC_slash_PKC_minus_act_minus_by_minus_Ca_kf = 7.542048e-14 vol_uMINVsecINV; PKC_slash_PKC_minus_act_minus_by_minus_Ca_kb = 6.285e-14 vol_secINV;
  // kf*DAG*PKC_slash_PKC_minus_Ca-kb*PKC_slash_PKC_minus_Ca_minus_DAG
  // Need est of rate. Assume it is fast Obtained from param search kf raised 10 X : see Shinomura et al PNAS 88 5149-5153 1991. kf changed from 3.865e-7 to 2.0e-7 in line with closer analysis of Shinomura data. 26 June 1996: Corrected DAG data: reduce kf 15x from 2e-7 to 1.333e-8
  PKC_slash_PKC_minus_act_minus_by_minus_DAG: $DAG + PKC_slash_PKC_minus_Ca -> PKC_slash_PKC_minus_Ca_minus_DAG; PKC_slash_PKC_minus_act_minus_by_minus_DAG_kf*DAG*PKC_slash_PKC_minus_Ca - PKC_slash_PKC_minus_act_minus_by_minus_DAG_kb*PKC_slash_PKC_minus_Ca_minus_DAG;
    PKC_slash_PKC_minus_act_minus_by_minus_DAG_kf = 1.005575e-15 vol_uMINVsecINV; PKC_slash_PKC_minus_act_minus_by_minus_DAG_kb = 1.08539436e-12 vol_secINV;
  // kf*PKC_slash_PKC_minus_Ca-kb*PKC_slash_PKC_minus_Ca_minus_memb_star_
  PKC_slash_PKC_minus_Ca_minus_to_minus_memb: PKC_slash_PKC_minus_Ca -> PKC_slash_PKC_minus_Ca_minus_memb_star_; PKC_slash_PKC_minus_Ca_minus_to_minus_memb_kf*PKC_slash_PKC_minus_Ca - PKC_slash_PKC_minus_Ca_minus_to_minus_memb_kb*PKC_slash_PKC_minus_Ca_minus_memb_star_;
    PKC_slash_PKC_minus_Ca_minus_to_minus_memb_kf = 1.5970185e-13 vol_secINV; PKC_slash_PKC_minus_Ca_minus_to_minus_memb_kb = 4.4027682e-13 vol_secINV;
  // kf*PKC_slash_PKC_minus_Ca_minus_DAG-kb*PKC_slash_PKC_minus_DAG_minus_memb_star_
  // Raise kb from .087 to 0.1 to match data from Shinomura et al. Lower kf from 1.155 to 1.0 to match data from Shinomura et al.
  PKC_slash_PKC_minus_DAG_minus_to_minus_memb: PKC_slash_PKC_minus_Ca_minus_DAG -> PKC_slash_PKC_minus_DAG_minus_memb_star_; PKC_slash_PKC_minus_DAG_minus_to_minus_memb_kf*PKC_slash_PKC_minus_Ca_minus_DAG - PKC_slash_PKC_minus_DAG_minus_to_minus_memb_kb*PKC_slash_PKC_minus_DAG_minus_memb_star_;
    PKC_slash_PKC_minus_DAG_minus_to_minus_memb_kf = 1.257e-13 vol_secINV; PKC_slash_PKC_minus_DAG_minus_to_minus_memb_kb = 1.257e-14 vol_secINV;
  // kf*PKC_slash_PKC_minus_Ca*AA-kb*PKC_slash_PKC_minus_Ca_minus_AA_star_
  // Schaechter and Benowitz We have to increase Kf for conc scaling Changed kf to 2e-9 on Sept 19, 94. This gives better match.
  PKC_slash_PKC_minus_act_minus_by_minus_Ca_minus_AA: PKC_slash_PKC_minus_Ca + AA -> PKC_slash_PKC_minus_Ca_minus_AA_star_; PKC_slash_PKC_minus_act_minus_by_minus_Ca_minus_AA_kf*PKC_slash_PKC_minus_Ca*AA - PKC_slash_PKC_minus_act_minus_by_minus_Ca_minus_AA_kb*PKC_slash_PKC_minus_Ca_minus_AA_star_;
    PKC_slash_PKC_minus_act_minus_by_minus_Ca_minus_AA_kf = 1.50841e-16 vol_uMINVsecINV; PKC_slash_PKC_minus_act_minus_by_minus_Ca_minus_AA_kb = 1.257e-14 vol_secINV;
  // kf*PKC_slash_PKC_minus_DAG_minus_AA-kb*PKC_slash_PKC_minus_DAG_minus_AA_star_
  // Assume slowish too. Schaechter and Benowitz
  PKC_slash_PKC_minus_act_minus_by_minus_DAG_minus_AA: PKC_slash_PKC_minus_DAG_minus_AA -> PKC_slash_PKC_minus_DAG_minus_AA_star_; PKC_slash_PKC_minus_act_minus_by_minus_DAG_minus_AA_kf*PKC_slash_PKC_minus_DAG_minus_AA - PKC_slash_PKC_minus_act_minus_by_minus_DAG_minus_AA_kb*PKC_slash_PKC_minus_DAG_minus_AA_star_;
    PKC_slash_PKC_minus_act_minus_by_minus_DAG_minus_AA_kf = 2.514e-13 vol_secINV; PKC_slash_PKC_minus_act_minus_by_minus_DAG_minus_AA_kb = 2.514e-14 vol_secINV;
  // kf*PKC_slash_PKC_minus_cytosolic-kb*PKC_slash_PKC_minus_basal_star_
  // Initial basal levels were set by kf = 1, kb = 20. In model, though, the basal levels of PKC activity are higher.
  PKC_slash_PKC_minus_basal_minus_act: PKC_slash_PKC_minus_cytosolic -> PKC_slash_PKC_minus_basal_star_; PKC_slash_PKC_minus_basal_minus_act_kf*PKC_slash_PKC_minus_cytosolic - PKC_slash_PKC_minus_basal_minus_act_kb*PKC_slash_PKC_minus_basal_star_;
    PKC_slash_PKC_minus_basal_minus_act_kf = 1.257e-13 vol_secINV; PKC_slash_PKC_minus_basal_minus_act_kb = 6.285e-12 vol_secINV;
  // kf*AA*PKC_slash_PKC_minus_cytosolic-kb*PKC_slash_PKC_minus_AA_star_
  // Raise kf from 1.667e-10 to 2e-10 to get better match to data.
  PKC_slash_PKC_minus_act_minus_by_minus_AA: AA + PKC_slash_PKC_minus_cytosolic -> PKC_slash_PKC_minus_AA_star_; PKC_slash_PKC_minus_act_minus_by_minus_AA_kf*AA*PKC_slash_PKC_minus_cytosolic - PKC_slash_PKC_minus_act_minus_by_minus_AA_kb*PKC_slash_PKC_minus_AA_star_;
    PKC_slash_PKC_minus_act_minus_by_minus_AA_kf = 1.50841e-17 vol_uMINVsecINV; PKC_slash_PKC_minus_act_minus_by_minus_AA_kb = 1.257e-14 vol_secINV;
  // kf*PKC_slash_PKC_minus_cytosolic*DAG-kb*PKC_slash_PKC_minus_DAG
  // kf raised 10 X based on Shinomura et al PNAS 88 5149-5153 1991 closer analysis of Shinomura et al: kf now 1e-8 (was 1.66e-8). Further tweak. To get sufficient AA synergy, increase kf to 1.5e-8 26 June 1996: Corrected DAG levels: reduce kf by 15x from 1.5e-8 to 1e-9
  PKC_slash_PKC_minus_n_minus_DAG: PKC_slash_PKC_minus_cytosolic + $DAG -> PKC_slash_PKC_minus_DAG; PKC_slash_PKC_minus_n_minus_DAG_kf*PKC_slash_PKC_minus_cytosolic*DAG - PKC_slash_PKC_minus_n_minus_DAG_kb*PKC_slash_PKC_minus_DAG;
    PKC_slash_PKC_minus_n_minus_DAG_kf = 7.542048e-17 vol_uMINVsecINV; PKC_slash_PKC_minus_n_minus_DAG_kb = 1.257e-14 vol_secINV;
  // kf*PKC_slash_PKC_minus_DAG*AA-kb*PKC_slash_PKC_minus_DAG_minus_AA
  // Reduced kf to 0.66X to match Shinomura et al data. Initial: kf = 3.3333e-9 New: 2e-9 Newer: 2e-8 kb was 0.2 now 2.
  PKC_slash_PKC_minus_n_minus_DAG_minus_AA: PKC_slash_PKC_minus_DAG + AA -> PKC_slash_PKC_minus_DAG_minus_AA; PKC_slash_PKC_minus_n_minus_DAG_minus_AA_kf*PKC_slash_PKC_minus_DAG*AA - PKC_slash_PKC_minus_n_minus_DAG_minus_AA_kb*PKC_slash_PKC_minus_DAG_minus_AA;
    PKC_slash_PKC_minus_n_minus_DAG_minus_AA_kf = 2.262567e-15 vol_uMINVsecINV; PKC_slash_PKC_minus_n_minus_DAG_minus_AA_kb = 2.514e-13 vol_secINV;
  // kf*PLA2_slash_PLA2_minus_cytosolic*Ca-kb*PLA2_slash_PLA2_minus_Ca_star_
  // Leslie and Channon BBA 1045 (1990) 261-270 fig6 pp267.
  PLA2_slash_PLA2_minus_Ca_minus_act: PLA2_slash_PLA2_minus_cytosolic + Ca -> PLA2_slash_PLA2_minus_Ca_star_; PLA2_slash_PLA2_minus_Ca_minus_act_kf*PLA2_slash_PLA2_minus_cytosolic*Ca - PLA2_slash_PLA2_minus_Ca_minus_act_kb*PLA2_slash_PLA2_minus_Ca_star_;
    PLA2_slash_PLA2_minus_Ca_minus_act_kf = 1.256992e-13 vol_uMINVsecINV; PLA2_slash_PLA2_minus_Ca_minus_act_kb = 1.257e-14 vol_secINV;
  // kf*temp_minus_PIP2*PLA2_slash_PLA2_minus_cytosolic-kb*PLA2_slash_PIP2_minus_PLA2_star_
  PLA2_slash_PIP2_minus_PLA2_minus_act: $temp_minus_PIP2 + PLA2_slash_PLA2_minus_cytosolic -> PLA2_slash_PIP2_minus_PLA2_star_; PLA2_slash_PIP2_minus_PLA2_minus_act_kf*temp_minus_PIP2*PLA2_slash_PLA2_minus_cytosolic - PLA2_slash_PIP2_minus_PLA2_minus_act_kb*PLA2_slash_PIP2_minus_PLA2_star_;
    PLA2_slash_PIP2_minus_PLA2_minus_act_kf = 1.50841e-16 vol_uMINVsecINV; PLA2_slash_PIP2_minus_PLA2_minus_act_kb = 6.285e-14 vol_secINV;
  // kf*temp_minus_PIP2*PLA2_slash_PLA2_minus_Ca_star_-kb*PLA2_slash_PIP2_minus_Ca_minus_PLA2_star_
  PLA2_slash_PIP2_minus_Ca_minus_PLA2_minus_act: $temp_minus_PIP2 + PLA2_slash_PLA2_minus_Ca_star_ -> PLA2_slash_PIP2_minus_Ca_minus_PLA2_star_; PLA2_slash_PIP2_minus_Ca_minus_PLA2_minus_act_kf*temp_minus_PIP2*PLA2_slash_PLA2_minus_Ca_star_ - PLA2_slash_PIP2_minus_Ca_minus_PLA2_minus_act_kb*PLA2_slash_PIP2_minus_Ca_minus_PLA2_star_;
    PLA2_slash_PIP2_minus_Ca_minus_PLA2_minus_act_kf = 1.50841e-15 vol_uMINVsecINV; PLA2_slash_PIP2_minus_Ca_minus_PLA2_minus_act_kb = 1.257e-14 vol_secINV;
  // kf*DAG*PLA2_slash_PLA2_minus_Ca_star_-kb*PLA2_slash_DAG_minus_Ca_minus_PLA2_star_
  // 27 June 1996 Scaled kf down by 0.015 from 3.33e-7 to 5e-9 to fit with revised DAG estimates and use of mole-fraction to calculate eff on PLA2.
  PLA2_slash_DAG_minus_Ca_minus_PLA2_minus_act: $DAG + PLA2_slash_PLA2_minus_Ca_star_ -> PLA2_slash_DAG_minus_Ca_minus_PLA2_star_; PLA2_slash_DAG_minus_Ca_minus_PLA2_minus_act_kf*DAG*PLA2_slash_PLA2_minus_Ca_star_ - PLA2_slash_DAG_minus_Ca_minus_PLA2_minus_act_kb*PLA2_slash_DAG_minus_Ca_minus_PLA2_star_;
    PLA2_slash_DAG_minus_Ca_minus_PLA2_minus_act_kf = 3.770977e-16 vol_uMINVsecINV; PLA2_slash_DAG_minus_Ca_minus_PLA2_minus_act_kb = 5.028e-13 vol_secINV;
  // kf*AA-kb*PLA2_slash_APC
  // I need to check if the AA degradation pathway really leads back to APC. Anyway, it is a convenient buffered pool to dump it back into. For the purposes of the full model we use a rate of degradation of 0.2/sec Raised decay to 0.4 : see PLA35.g notes for Feb17
  PLA2_slash_Degrade_minus_AA: AA -> $PLA2_slash_APC; PLA2_slash_Degrade_minus_AA_kf*AA - PLA2_slash_Degrade_minus_AA_kb*PLA2_slash_APC;
    PLA2_slash_Degrade_minus_AA_kf = 5.028e-14 vol_secINV; PLA2_slash_Degrade_minus_AA_kb = 0 vol_secINV;
  // kf*PLA2_slash_PLA2_star_*Ca-kb*PLA2_slash_PLA2_star__minus_Ca
  // To start off, same kinetics as the PLA2-Ca-act direct pathway. Oops ! Missed out the Ca input to this pathway first time round. Let\'s raise the forward rate about 3x to 5e-6. This will let us reduce the rather high rates we have used for the kenz on PLA2*-Ca. In fact, it may be that the rates are not that different, just that this pathway for getting the PLA2 to the memb is more efficien....
  PLA2_slash_PLA2_star__minus_Ca_minus_act: PLA2_slash_PLA2_star_ + Ca -> PLA2_slash_PLA2_star__minus_Ca; PLA2_slash_PLA2_star__minus_Ca_minus_act_kf*PLA2_slash_PLA2_star_*Ca - PLA2_slash_PLA2_star__minus_Ca_minus_act_kb*PLA2_slash_PLA2_star__minus_Ca;
    PLA2_slash_PLA2_star__minus_Ca_minus_act_kf = 7.542048e-13 vol_uMINVsecINV; PLA2_slash_PLA2_star__minus_Ca_minus_act_kb = 1.257e-14 vol_secINV;
  // kf*PLA2_slash_PLA2_star_-kb*PLA2_slash_PLA2_minus_cytosolic
  PLA2_slash_dephosphorylate_minus_PLA2_star_: PLA2_slash_PLA2_star_ -> PLA2_slash_PLA2_minus_cytosolic; PLA2_slash_dephosphorylate_minus_PLA2_star__kf*PLA2_slash_PLA2_star_ - PLA2_slash_dephosphorylate_minus_PLA2_star__kb*PLA2_slash_PLA2_minus_cytosolic;
    PLA2_slash_dephosphorylate_minus_PLA2_star__kf = 2.1369e-14 vol_secINV; PLA2_slash_dephosphorylate_minus_PLA2_star__kb = 0 vol_secINV;
  // kf*MAPK_slash_craf_minus_1_star_*Ras_slash_GTP_minus_Ras-kb*MAPK_slash_Raf_star__minus_GTP_minus_Ras
  // Assume the binding is fast and limited only by the amount of Ras* available. So kf=kb/[craf-1] If kb is 1/sec, then kf = 1/0.2 uM = 1/(0.2 * 6e5) = 8.3e-6 Later: Raise it by 10 X to 4e-5 From Hallberg et al JBC 269:6 3913-3916 1994, 3% of cellular Raf is complexed with Ras. So we raise kb 4x to 4 This step needed to memb-anchor and activate Raf: Leevers et al Nature 369 411-414 May 16, 2003 Changed Ras and Raf to synaptic levels, an increase of about 2x for each. To maintain the percentage of complexed Raf, reduced the kf by 2.4 fold to 10.
  Ras_minus_act_minus_craf: MAPK_slash_craf_minus_1_star_ + Ras_slash_GTP_minus_Ras -> MAPK_slash_Raf_star__minus_GTP_minus_Ras; Ras_minus_act_minus_craf_kf*MAPK_slash_craf_minus_1_star_*Ras_slash_GTP_minus_Ras - Ras_minus_act_minus_craf_kb*MAPK_slash_Raf_star__minus_GTP_minus_Ras;
    Ras_minus_act_minus_craf_kf = 1.256992e-12 vol_uMINVsecINV; Ras_minus_act_minus_craf_kb = 6.285e-14 vol_secINV;
  // kf*Ras_slash_GEF_star_-kb*Ras_slash_inact_minus_GEF
  Ras_slash_dephosph_minus_GEF: Ras_slash_GEF_star_ -> Ras_slash_inact_minus_GEF; Ras_slash_dephosph_minus_GEF_kf*Ras_slash_GEF_star_ - Ras_slash_dephosph_minus_GEF_kb*Ras_slash_inact_minus_GEF;
    Ras_slash_dephosph_minus_GEF_kf = 1.257e-13 vol_secINV; Ras_slash_dephosph_minus_GEF_kb = 0 vol_secINV;
  // kf*Ras_slash_GTP_minus_Ras-kb*Ras_slash_GDP_minus_Ras
  // This is extremely slow (1e-4), but it is significant as so little GAP actually gets complexed with it that the total GTP turnover rises only by 2-3 X (see Gibbs et al, JBC 265(33) 20437-20422) and Eccleston et al JBC 268(36) 27012-27019 kf = 1e-4
  Ras_slash_Ras_minus_intrinsic_minus_GTPase: Ras_slash_GTP_minus_Ras -> Ras_slash_GDP_minus_Ras; Ras_slash_Ras_minus_intrinsic_minus_GTPase_kf*Ras_slash_GTP_minus_Ras - Ras_slash_Ras_minus_intrinsic_minus_GTPase_kb*Ras_slash_GDP_minus_Ras;
    Ras_slash_Ras_minus_intrinsic_minus_GTPase_kf = 1.257e-17 vol_secINV; Ras_slash_Ras_minus_intrinsic_minus_GTPase_kb = 0 vol_secINV;
  // kf*Ras_slash_GAP_star_-kb*Ras_slash_GAP
  // Assume a reasonably good rate for dephosphorylating it, 1/sec
  Ras_slash_dephosph_minus_GAP: Ras_slash_GAP_star_ -> Ras_slash_GAP; Ras_slash_dephosph_minus_GAP_kf*Ras_slash_GAP_star_ - Ras_slash_dephosph_minus_GAP_kb*Ras_slash_GAP;
    Ras_slash_dephosph_minus_GAP_kf = 1.257e-14 vol_secINV; Ras_slash_dephosph_minus_GAP_kb = 0 vol_secINV;
  // kf*Ras_slash_inact_minus_GEF*CaM_slash_CaM_minus_Ca4-kb*Ras_slash_CaM_minus_GEF
  // We have no numbers for this. It is probably between the two extremes represented by the CaMKII phosph states, and I have used guesses based on this. kf=1e-4 kb=1 The reaction is based on Farnsworth et al Nature 376 524-527 1995 28 Feb 2006: Increased affinity 36-fold to account for Ca input to MAPK cascade, possibly folding in other pathway inputs. 21 April 2006: Altered affinity to same level as pkm_mapk21.g model to prevent spontaneous turnon. Kf = 200, Kb = 1.
  Ras_slash_CaM_minus_bind_minus_GEF: Ras_slash_inact_minus_GEF + CaM_slash_CaM_minus_Ca4 -> Ras_slash_CaM_minus_GEF; Ras_slash_CaM_minus_bind_minus_GEF_kf*Ras_slash_inact_minus_GEF*CaM_slash_CaM_minus_Ca4 - Ras_slash_CaM_minus_bind_minus_GEF_kb*Ras_slash_CaM_minus_GEF;
    Ras_slash_CaM_minus_bind_minus_GEF_kf = 2.513984e-11 vol_uMINVsecINV; Ras_slash_CaM_minus_bind_minus_GEF_kb = 1.257e-13 vol_secINV;
  // kf*CaM_slash_CaM*Ca^2-kb*CaM_slash_CaM_minus_TR2_minus_Ca2
  // Lets use the fast rate consts here. Since the rates are so different, I am not sure whether the order is relevant. These correspond to the TR2C fragment. We use the Martin et al rates here, plus the Drabicowski binding consts. All are scaled by 3X to cell temp. kf = 2e-10 kb = 72 Stemmer & Klee: K1=.9, K2=1.1. Assume 1.0uM for both. kb/kf=3.6e11. If kb=72, kf = 2e-10 (Exactly the same !)....
  CaM_slash_CaM_minus_TR2_minus_bind_minus_Ca: CaM_slash_CaM + 2 Ca -> CaM_slash_CaM_minus_TR2_minus_Ca2; CaM_slash_CaM_minus_TR2_minus_bind_minus_Ca_kf*CaM_slash_CaM*Ca^2 - CaM_slash_CaM_minus_TR2_minus_bind_minus_Ca_kb*CaM_slash_CaM_minus_TR2_minus_Ca2;
    CaM_slash_CaM_minus_TR2_minus_bind_minus_Ca_kf = 9.050518e-12 vol_uMINV2secINV; CaM_slash_CaM_minus_TR2_minus_bind_minus_Ca_kb = 9.0504e-12 vol_secINV;
  // kf*CaM_slash_CaM_minus_TR2_minus_Ca2*Ca-kb*CaM_slash_CaM_minus_Ca3
  // K3 = 21.5, K4 = 2.8. Assuming that the K4 step happens first, we get kb/kf = 2.8 uM = 1.68e6 so kf =6e-6 assuming kb = 10
  CaM_slash_CaM_minus_TR2_minus_Ca2_minus_bind_minus_Ca: CaM_slash_CaM_minus_TR2_minus_Ca2 + Ca -> CaM_slash_CaM_minus_Ca3; CaM_slash_CaM_minus_TR2_minus_Ca2_minus_bind_minus_Ca_kf*CaM_slash_CaM_minus_TR2_minus_Ca2*Ca - CaM_slash_CaM_minus_TR2_minus_Ca2_minus_bind_minus_Ca_kb*CaM_slash_CaM_minus_Ca3;
    CaM_slash_CaM_minus_TR2_minus_Ca2_minus_bind_minus_Ca_kf = 4.525229e-13 vol_uMINVsecINV; CaM_slash_CaM_minus_TR2_minus_Ca2_minus_bind_minus_Ca_kb = 1.257e-12 vol_secINV;
  // kf*CaM_slash_CaM_minus_Ca3*Ca-kb*CaM_slash_CaM_minus_Ca4
  // Use K3 = 21.5 uM here from Stemmer and Klee table 3. kb/kf =21.5 * 6e5 so kf = 7.75e-7, kb = 10
  CaM_slash_CaM_minus_Ca3_minus_bind_minus_Ca: CaM_slash_CaM_minus_Ca3 + Ca -> CaM_slash_CaM_minus_Ca4; CaM_slash_CaM_minus_Ca3_minus_bind_minus_Ca_kf*CaM_slash_CaM_minus_Ca3*Ca - CaM_slash_CaM_minus_Ca3_minus_bind_minus_Ca_kb*CaM_slash_CaM_minus_Ca4;
    CaM_slash_CaM_minus_Ca3_minus_bind_minus_Ca_kf = 5.845075e-14 vol_uMINVsecINV; CaM_slash_CaM_minus_Ca3_minus_bind_minus_Ca_kb = 1.257e-12 vol_secINV;
  // kf*MAPK_slash_craf_minus_1*Ras_slash_GTP_minus_Ras-kb*MAPK_slash_Raf_minus_GTP_minus_Ras
  // 18 May 2003. This reaction is here to provide basal activity for MAPK as well as the potential for direct EGF stimulus without PKC activation. Based on model from FB/fb28c.g: the model used for MKP-1 turnover. The rates there were constrained by basal activity values.
  Ras_minus_act_minus_unphosph_minus_raf: MAPK_slash_craf_minus_1 + Ras_slash_GTP_minus_Ras -> MAPK_slash_Raf_minus_GTP_minus_Ras; Ras_minus_act_minus_unphosph_minus_raf_kf*MAPK_slash_craf_minus_1*Ras_slash_GTP_minus_Ras - Ras_minus_act_minus_unphosph_minus_raf_kb*MAPK_slash_Raf_minus_GTP_minus_Ras;
    Ras_minus_act_minus_unphosph_minus_raf_kf = 7.542048e-13 vol_uMINVsecINV; Ras_minus_act_minus_unphosph_minus_raf_kb = 1.257e-13 vol_secINV;
  // kf*Ca_input-kb*Ca
  Ca_diff: $Ca_input -> Ca; Ca_diff_kf*Ca_input - Ca_diff_kb*Ca;
    Ca_diff_kf = 2.514e-13 vol_secINV; Ca_diff_kb = 2.514e-13 vol_secINV;
  // k1*PLA2_slash_APC*PLA2_slash_PLA2_minus_Ca_star_-k2*PLA2_slash_PLA2_minus_Ca_star__slash_kenz_slash_kenz_cplx
  // 10 x raise oct22 12 x oct 24, set k2 = 4 * k3
  PLA2_slash_PLA2_minus_Ca_star__slash_kenz_1: $PLA2_slash_APC + PLA2_slash_PLA2_minus_Ca_star_ -> PLA2_slash_PLA2_minus_Ca_star__slash_kenz_slash_kenz_cplx; PLA2_slash_PLA2_minus_Ca_star__slash_kenz_1_k1*PLA2_slash_APC*PLA2_slash_PLA2_minus_Ca_star_ - PLA2_slash_PLA2_minus_Ca_star__slash_kenz_1_k2*PLA2_slash_PLA2_minus_Ca_star__slash_kenz_slash_kenz_cplx;
    PLA2_slash_PLA2_minus_Ca_star__slash_kenz_1_k1 = 1.696973e-13 vol_uMINVsecINV; PLA2_slash_PLA2_minus_Ca_star__slash_kenz_1_k2 = 2.71512e-12 vol_secINV;
  // k3*PLA2_slash_PLA2_minus_Ca_star__slash_kenz_slash_kenz_cplx
  PLA2_slash_PLA2_minus_Ca_star__slash_kenz_2: PLA2_slash_PLA2_minus_Ca_star__slash_kenz_slash_kenz_cplx => AA + PLA2_slash_PLA2_minus_Ca_star_; PLA2_slash_PLA2_minus_Ca_star__slash_kenz_2_k3*PLA2_slash_PLA2_minus_Ca_star__slash_kenz_slash_kenz_cplx;
    PLA2_slash_PLA2_minus_Ca_star__slash_kenz_2_k3 = 6.7878e-13 vol_secINV;
  // k1*PLA2_slash_APC*PLA2_slash_PIP2_minus_PLA2_star_-k2*PLA2_slash_PIP2_minus_PLA2_star__slash_kenz_slash_kenz_cplx
  // 10 X raise oct 22 12 X further raise oct 24 to allow for correct conc of enzyme
  PLA2_slash_PIP2_minus_PLA2_star__slash_kenz_1: $PLA2_slash_APC + PLA2_slash_PIP2_minus_PLA2_star_ -> PLA2_slash_PIP2_minus_PLA2_star__slash_kenz_slash_kenz_cplx; PLA2_slash_PIP2_minus_PLA2_star__slash_kenz_1_k1*PLA2_slash_APC*PLA2_slash_PIP2_minus_PLA2_star_ - PLA2_slash_PIP2_minus_PLA2_star__slash_kenz_1_k2*PLA2_slash_PIP2_minus_PLA2_star__slash_kenz_slash_kenz_cplx;
    PLA2_slash_PIP2_minus_PLA2_star__slash_kenz_1_k1 = 3.469314e-13 vol_uMINVsecINV; PLA2_slash_PIP2_minus_PLA2_star__slash_kenz_1_k2 = 5.550912e-12 vol_secINV;
  // k3*PLA2_slash_PIP2_minus_PLA2_star__slash_kenz_slash_kenz_cplx
  PLA2_slash_PIP2_minus_PLA2_star__slash_kenz_2: PLA2_slash_PIP2_minus_PLA2_star__slash_kenz_slash_kenz_cplx => AA + PLA2_slash_PIP2_minus_PLA2_star_; PLA2_slash_PIP2_minus_PLA2_star__slash_kenz_2_k3*PLA2_slash_PIP2_minus_PLA2_star__slash_kenz_slash_kenz_cplx;
    PLA2_slash_PIP2_minus_PLA2_star__slash_kenz_2_k3 = 1.387728e-12 vol_secINV;
  // k1*PLA2_slash_APC*PLA2_slash_PIP2_minus_Ca_minus_PLA2_star_-k2*PLA2_slash_PIP2_minus_Ca_minus_PLA2_star__slash_kenz_slash_kenz_cplx
  // 10 x raise oct 22 12 x and rescale for k2 = 4 * k3 convention oct 24 Increase further to get the match to expt, which was spoilt due to large accumulation of PLA2 in the enzyme complexed forms. Lets raise k3, leaving the others at k1 = 1.5e-5 and k2 = 144 since they are large already.
  PLA2_slash_PIP2_minus_Ca_minus_PLA2_star__slash_kenz_1: $PLA2_slash_APC + PLA2_slash_PIP2_minus_Ca_minus_PLA2_star_ -> PLA2_slash_PIP2_minus_Ca_minus_PLA2_star__slash_kenz_slash_kenz_cplx; PLA2_slash_PIP2_minus_Ca_minus_PLA2_star__slash_kenz_1_k1*PLA2_slash_APC*PLA2_slash_PIP2_minus_Ca_minus_PLA2_star_ - PLA2_slash_PIP2_minus_Ca_minus_PLA2_star__slash_kenz_1_k2*PLA2_slash_PIP2_minus_Ca_minus_PLA2_star__slash_kenz_slash_kenz_cplx;
    PLA2_slash_PIP2_minus_Ca_minus_PLA2_star__slash_kenz_1_k1 = 1.131283e-12 vol_uMINVsecINV; PLA2_slash_PIP2_minus_Ca_minus_PLA2_star__slash_kenz_1_k2 = 1.81008e-11 vol_secINV;
  // k3*PLA2_slash_PIP2_minus_Ca_minus_PLA2_star__slash_kenz_slash_kenz_cplx
  PLA2_slash_PIP2_minus_Ca_minus_PLA2_star__slash_kenz_2: PLA2_slash_PIP2_minus_Ca_minus_PLA2_star__slash_kenz_slash_kenz_cplx => AA + PLA2_slash_PIP2_minus_Ca_minus_PLA2_star_; PLA2_slash_PIP2_minus_Ca_minus_PLA2_star__slash_kenz_2_k3*PLA2_slash_PIP2_minus_Ca_minus_PLA2_star__slash_kenz_slash_kenz_cplx;
    PLA2_slash_PIP2_minus_Ca_minus_PLA2_star__slash_kenz_2_k3 = 4.5252e-12 vol_secINV;
  // k1*PLA2_slash_APC*PLA2_slash_DAG_minus_Ca_minus_PLA2_star_-k2*PLA2_slash_DAG_minus_Ca_minus_PLA2_star__slash_kenz_slash_kenz_cplx
  // 10 X raise oct 22 12 X raise oct 24 + conversion to k2 =4 * k3
  PLA2_slash_DAG_minus_Ca_minus_PLA2_star__slash_kenz_1: $PLA2_slash_APC + PLA2_slash_DAG_minus_Ca_minus_PLA2_star_ -> PLA2_slash_DAG_minus_Ca_minus_PLA2_star__slash_kenz_slash_kenz_cplx; PLA2_slash_DAG_minus_Ca_minus_PLA2_star__slash_kenz_1_k1*PLA2_slash_APC*PLA2_slash_DAG_minus_Ca_minus_PLA2_star_ - PLA2_slash_DAG_minus_Ca_minus_PLA2_star__slash_kenz_1_k2*PLA2_slash_DAG_minus_Ca_minus_PLA2_star__slash_kenz_slash_kenz_cplx;
    PLA2_slash_DAG_minus_Ca_minus_PLA2_star__slash_kenz_1_k1 = 1.885536e-12 vol_uMINVsecINV; PLA2_slash_DAG_minus_Ca_minus_PLA2_star__slash_kenz_1_k2 = 3.0168e-11 vol_secINV;
  // k3*PLA2_slash_DAG_minus_Ca_minus_PLA2_star__slash_kenz_slash_kenz_cplx
  PLA2_slash_DAG_minus_Ca_minus_PLA2_star__slash_kenz_2: PLA2_slash_DAG_minus_Ca_minus_PLA2_star__slash_kenz_slash_kenz_cplx => AA + PLA2_slash_DAG_minus_Ca_minus_PLA2_star_; PLA2_slash_DAG_minus_Ca_minus_PLA2_star__slash_kenz_2_k3*PLA2_slash_DAG_minus_Ca_minus_PLA2_star__slash_kenz_slash_kenz_cplx;
    PLA2_slash_DAG_minus_Ca_minus_PLA2_star__slash_kenz_2_k3 = 7.542e-12 vol_secINV;
  // k1*PLA2_slash_APC*PLA2_slash_PLA2_star__minus_Ca-k2*PLA2_slash_PLA2_star__minus_Ca_slash_kenz_slash_kenz_cplx
  // This form should be 3 to 6 times as fast as the Ca-only form. I have scaled by 4x which seems to give a 5x rise. 10x raise Oct 22 12 x oct 24, changed k2 = 4 * k3
  PLA2_slash_PLA2_star__minus_Ca_slash_kenz_1: $PLA2_slash_APC + PLA2_slash_PLA2_star__minus_Ca -> PLA2_slash_PLA2_star__minus_Ca_slash_kenz_slash_kenz_cplx; PLA2_slash_PLA2_star__minus_Ca_slash_kenz_1_k1*PLA2_slash_APC*PLA2_slash_PLA2_star__minus_Ca - PLA2_slash_PLA2_star__minus_Ca_slash_kenz_1_k2*PLA2_slash_PLA2_star__minus_Ca_slash_kenz_slash_kenz_cplx;
    PLA2_slash_PLA2_star__minus_Ca_slash_kenz_1_k1 = 3.770977e-12 vol_uMINVsecINV; PLA2_slash_PLA2_star__minus_Ca_slash_kenz_1_k2 = 6.0336e-11 vol_secINV;
  // k3*PLA2_slash_PLA2_star__minus_Ca_slash_kenz_slash_kenz_cplx
  PLA2_slash_PLA2_star__minus_Ca_slash_kenz_2: PLA2_slash_PLA2_star__minus_Ca_slash_kenz_slash_kenz_cplx => AA + PLA2_slash_PLA2_star__minus_Ca; PLA2_slash_PLA2_star__minus_Ca_slash_kenz_2_k3*PLA2_slash_PLA2_star__minus_Ca_slash_kenz_slash_kenz_cplx;
    PLA2_slash_PLA2_star__minus_Ca_slash_kenz_2_k3 = 1.5084e-11 vol_secINV;
  // k1*MAPK_slash_MAPK*MAPK_slash_MAPKK_star_-k2*MAPK_slash_MAPKK_star__slash_MAPKKtyr_slash_MAPKKtyr_cplx
  // The actual MAPKK is 2 forms from Seger et al JBC 267:20 14373(1992) Vmax = 150nmol/min/mg From Haystead et al FEBS 306(1):17-22 we get Km=46.6nM for at least one of the phosphs. Putting these together: k3=0.15/sec, scale to get k2=0.6. k1=0.75/46.6nM=2.7e-5
  MAPK_slash_MAPKK_star__slash_MAPKKtyr_1: MAPK_slash_MAPK + MAPK_slash_MAPKK_star_ -> MAPK_slash_MAPKK_star__slash_MAPKKtyr_slash_MAPKKtyr_cplx; MAPK_slash_MAPKK_star__slash_MAPKKtyr_1_k1*MAPK_slash_MAPK*MAPK_slash_MAPKK_star_ - MAPK_slash_MAPKK_star__slash_MAPKKtyr_1_k2*MAPK_slash_MAPKK_star__slash_MAPKKtyr_slash_MAPKKtyr_cplx;
    MAPK_slash_MAPKK_star__slash_MAPKKtyr_1_k1 = 4.072639e-12 vol_uMINVsecINV; MAPK_slash_MAPKK_star__slash_MAPKKtyr_1_k2 = 1.5084e-13 vol_secINV;
  // k3*MAPK_slash_MAPKK_star__slash_MAPKKtyr_slash_MAPKKtyr_cplx
  MAPK_slash_MAPKK_star__slash_MAPKKtyr_2: MAPK_slash_MAPKK_star__slash_MAPKKtyr_slash_MAPKKtyr_cplx => MAPK_slash_MAPK_minus_tyr + MAPK_slash_MAPKK_star_; MAPK_slash_MAPKK_star__slash_MAPKKtyr_2_k3*MAPK_slash_MAPKK_star__slash_MAPKKtyr_slash_MAPKKtyr_cplx;
    MAPK_slash_MAPKK_star__slash_MAPKKtyr_2_k3 = 3.771e-14 vol_secINV;
  // k1*MAPK_slash_MAPK_minus_tyr*MAPK_slash_MAPKK_star_-k2*MAPK_slash_MAPKK_star__slash_MAPKKthr_slash_MAPKKthr_cplx
  // Rate consts same as for MAPKKtyr.
  MAPK_slash_MAPKK_star__slash_MAPKKthr_1: MAPK_slash_MAPK_minus_tyr + MAPK_slash_MAPKK_star_ -> MAPK_slash_MAPKK_star__slash_MAPKKthr_slash_MAPKKthr_cplx; MAPK_slash_MAPKK_star__slash_MAPKKthr_1_k1*MAPK_slash_MAPK_minus_tyr*MAPK_slash_MAPKK_star_ - MAPK_slash_MAPKK_star__slash_MAPKKthr_1_k2*MAPK_slash_MAPKK_star__slash_MAPKKthr_slash_MAPKKthr_cplx;
    MAPK_slash_MAPKK_star__slash_MAPKKthr_1_k1 = 4.072639e-12 vol_uMINVsecINV; MAPK_slash_MAPKK_star__slash_MAPKKthr_1_k2 = 1.5084e-13 vol_secINV;
  // k3*MAPK_slash_MAPKK_star__slash_MAPKKthr_slash_MAPKKthr_cplx
  MAPK_slash_MAPKK_star__slash_MAPKKthr_2: MAPK_slash_MAPKK_star__slash_MAPKKthr_slash_MAPKKthr_cplx => MAPK_star_ + MAPK_slash_MAPKK_star_; MAPK_slash_MAPKK_star__slash_MAPKKthr_2_k3*MAPK_slash_MAPKK_star__slash_MAPKKthr_slash_MAPKKthr_cplx;
    MAPK_slash_MAPKK_star__slash_MAPKKthr_2_k3 = 3.771e-14 vol_secINV;
  // k1*MAPK_slash_MAPKK*MAPK_slash_Raf_minus_GTP_minus_Ras-k2*MAPK_slash_Raf_minus_GTP_minus_Ras_slash_Raf_minus_GTP_minus_Ras_dot_1_slash_Raf_minus_GTP_minus_Ras_dot_1_cplx
  // Kinetics are the same as for the craf_1* activity, ie., k1=5.5e-6, k2=0.42, k3 = 0.105 These are basedo n Force et al PNAS USA 91 1270-1274, 1994., but k1 is scaled up 5x (ie., Km is scaled down 5x to the value used here and for craf_1* activity: Km = 0.1591).
  MAPK_slash_Raf_minus_GTP_minus_Ras_slash_Raf_minus_GTP_minus_Ras_dot_1_1: MAPK_slash_MAPKK + MAPK_slash_Raf_minus_GTP_minus_Ras -> MAPK_slash_Raf_minus_GTP_minus_Ras_slash_Raf_minus_GTP_minus_Ras_dot_1_slash_Raf_minus_GTP_minus_Ras_dot_1_cplx; MAPK_slash_Raf_minus_GTP_minus_Ras_slash_Raf_minus_GTP_minus_Ras_dot_1_1_k1*MAPK_slash_MAPKK*MAPK_slash_Raf_minus_GTP_minus_Ras - MAPK_slash_Raf_minus_GTP_minus_Ras_slash_Raf_minus_GTP_minus_Ras_dot_1_1_k2*MAPK_slash_Raf_minus_GTP_minus_Ras_slash_Raf_minus_GTP_minus_Ras_dot_1_slash_Raf_minus_GTP_minus_Ras_dot_1_cplx;
    MAPK_slash_Raf_minus_GTP_minus_Ras_slash_Raf_minus_GTP_minus_Ras_dot_1_1_k1 = 1.185132e-12 vol_uMINVsecINV; MAPK_slash_Raf_minus_GTP_minus_Ras_slash_Raf_minus_GTP_minus_Ras_dot_1_1_k2 = 1.5084e-13 vol_secINV;
  // k3*MAPK_slash_Raf_minus_GTP_minus_Ras_slash_Raf_minus_GTP_minus_Ras_dot_1_slash_Raf_minus_GTP_minus_Ras_dot_1_cplx
  MAPK_slash_Raf_minus_GTP_minus_Ras_slash_Raf_minus_GTP_minus_Ras_dot_1_2: MAPK_slash_Raf_minus_GTP_minus_Ras_slash_Raf_minus_GTP_minus_Ras_dot_1_slash_Raf_minus_GTP_minus_Ras_dot_1_cplx => MAPK_slash_MAPKK_minus_ser + MAPK_slash_Raf_minus_GTP_minus_Ras; MAPK_slash_Raf_minus_GTP_minus_Ras_slash_Raf_minus_GTP_minus_Ras_dot_1_2_k3*MAPK_slash_Raf_minus_GTP_minus_Ras_slash_Raf_minus_GTP_minus_Ras_dot_1_slash_Raf_minus_GTP_minus_Ras_dot_1_cplx;
    MAPK_slash_Raf_minus_GTP_minus_Ras_slash_Raf_minus_GTP_minus_Ras_dot_1_2_k3 = 3.771e-14 vol_secINV;
  // k1*MAPK_slash_MAPKK_minus_ser*MAPK_slash_Raf_minus_GTP_minus_Ras-k2*MAPK_slash_Raf_minus_GTP_minus_Ras_slash_Raf_minus_GTP_minus_Ras_dot_2_slash_Raf_minus_GTP_minus_Ras_dot_2_cplx
  // Kinetics are the same as for the craf_1* activity, ie., k1=5.5e-6, k2=0.42, k3 = 0.105 These are basedo n Force et al PNAS USA 91 1270-1274, 1994., but k1 is scaled up 5x (ie., Km is scaled down 5x to the value used here and for craf_1* activity: Km = 0.1591).
  MAPK_slash_Raf_minus_GTP_minus_Ras_slash_Raf_minus_GTP_minus_Ras_dot_2_1: MAPK_slash_MAPKK_minus_ser + MAPK_slash_Raf_minus_GTP_minus_Ras -> MAPK_slash_Raf_minus_GTP_minus_Ras_slash_Raf_minus_GTP_minus_Ras_dot_2_slash_Raf_minus_GTP_minus_Ras_dot_2_cplx; MAPK_slash_Raf_minus_GTP_minus_Ras_slash_Raf_minus_GTP_minus_Ras_dot_2_1_k1*MAPK_slash_MAPKK_minus_ser*MAPK_slash_Raf_minus_GTP_minus_Ras - MAPK_slash_Raf_minus_GTP_minus_Ras_slash_Raf_minus_GTP_minus_Ras_dot_2_1_k2*MAPK_slash_Raf_minus_GTP_minus_Ras_slash_Raf_minus_GTP_minus_Ras_dot_2_slash_Raf_minus_GTP_minus_Ras_dot_2_cplx;
    MAPK_slash_Raf_minus_GTP_minus_Ras_slash_Raf_minus_GTP_minus_Ras_dot_2_1_k1 = 1.185132e-12 vol_uMINVsecINV; MAPK_slash_Raf_minus_GTP_minus_Ras_slash_Raf_minus_GTP_minus_Ras_dot_2_1_k2 = 1.5084e-13 vol_secINV;
  // k3*MAPK_slash_Raf_minus_GTP_minus_Ras_slash_Raf_minus_GTP_minus_Ras_dot_2_slash_Raf_minus_GTP_minus_Ras_dot_2_cplx
  MAPK_slash_Raf_minus_GTP_minus_Ras_slash_Raf_minus_GTP_minus_Ras_dot_2_2: MAPK_slash_Raf_minus_GTP_minus_Ras_slash_Raf_minus_GTP_minus_Ras_dot_2_slash_Raf_minus_GTP_minus_Ras_dot_2_cplx => MAPK_slash_MAPKK_star_ + MAPK_slash_Raf_minus_GTP_minus_Ras; MAPK_slash_Raf_minus_GTP_minus_Ras_slash_Raf_minus_GTP_minus_Ras_dot_2_2_k3*MAPK_slash_Raf_minus_GTP_minus_Ras_slash_Raf_minus_GTP_minus_Ras_dot_2_slash_Raf_minus_GTP_minus_Ras_dot_2_cplx;
    MAPK_slash_Raf_minus_GTP_minus_Ras_slash_Raf_minus_GTP_minus_Ras_dot_2_2_k3 = 3.771e-14 vol_secINV;
  // k1*MAPK_slash_MAPKK*MAPK_slash_Raf_star__minus_GTP_minus_Ras-k2*MAPK_slash_Raf_star__minus_GTP_minus_Ras_slash_Raf_star__minus_GTP_minus_Ras_dot_1_slash_Raf_star__minus_GTP_minus_Ras_dot_1_cplx
  // Kinetics are the same as for the craf-1* activity, ie., k1=1.1e-6, k2=.42, k3 =0.105 These are based on Force et al PNAS USA 91 1270-1274 1994. These parms cannot reach the observed 4X stim of MAPK. So lets increase the affinity, ie, raise k1 10X to 1.1e-5 Lets take it back down to where it was. Back up to 5X: 5.5e-6
  MAPK_slash_Raf_star__minus_GTP_minus_Ras_slash_Raf_star__minus_GTP_minus_Ras_dot_1_1: MAPK_slash_MAPKK + MAPK_slash_Raf_star__minus_GTP_minus_Ras -> MAPK_slash_Raf_star__minus_GTP_minus_Ras_slash_Raf_star__minus_GTP_minus_Ras_dot_1_slash_Raf_star__minus_GTP_minus_Ras_dot_1_cplx; MAPK_slash_Raf_star__minus_GTP_minus_Ras_slash_Raf_star__minus_GTP_minus_Ras_dot_1_1_k1*MAPK_slash_MAPKK*MAPK_slash_Raf_star__minus_GTP_minus_Ras - MAPK_slash_Raf_star__minus_GTP_minus_Ras_slash_Raf_star__minus_GTP_minus_Ras_dot_1_1_k2*MAPK_slash_Raf_star__minus_GTP_minus_Ras_slash_Raf_star__minus_GTP_minus_Ras_dot_1_slash_Raf_star__minus_GTP_minus_Ras_dot_1_cplx;
    MAPK_slash_Raf_star__minus_GTP_minus_Ras_slash_Raf_star__minus_GTP_minus_Ras_dot_1_1_k1 = 1.185132e-12 vol_uMINVsecINV; MAPK_slash_Raf_star__minus_GTP_minus_Ras_slash_Raf_star__minus_GTP_minus_Ras_dot_1_1_k2 = 1.5084e-13 vol_secINV;
  // k3*MAPK_slash_Raf_star__minus_GTP_minus_Ras_slash_Raf_star__minus_GTP_minus_Ras_dot_1_slash_Raf_star__minus_GTP_minus_Ras_dot_1_cplx
  MAPK_slash_Raf_star__minus_GTP_minus_Ras_slash_Raf_star__minus_GTP_minus_Ras_dot_1_2: MAPK_slash_Raf_star__minus_GTP_minus_Ras_slash_Raf_star__minus_GTP_minus_Ras_dot_1_slash_Raf_star__minus_GTP_minus_Ras_dot_1_cplx => MAPK_slash_MAPKK_minus_ser + MAPK_slash_Raf_star__minus_GTP_minus_Ras; MAPK_slash_Raf_star__minus_GTP_minus_Ras_slash_Raf_star__minus_GTP_minus_Ras_dot_1_2_k3*MAPK_slash_Raf_star__minus_GTP_minus_Ras_slash_Raf_star__minus_GTP_minus_Ras_dot_1_slash_Raf_star__minus_GTP_minus_Ras_dot_1_cplx;
    MAPK_slash_Raf_star__minus_GTP_minus_Ras_slash_Raf_star__minus_GTP_minus_Ras_dot_1_2_k3 = 3.771e-14 vol_secINV;
  // k1*MAPK_slash_MAPKK_minus_ser*MAPK_slash_Raf_star__minus_GTP_minus_Ras-k2*MAPK_slash_Raf_star__minus_GTP_minus_Ras_slash_Raf_star__minus_GTP_minus_Ras_dot_2_slash_Raf_star__minus_GTP_minus_Ras_dot_2_cplx
  // Same kinetics as other c-raf activated forms. See Force et al PNAS 91 1270-1274 1994. k1 = 1.1e-6, k2 = .42, k3 = 1.05 raise k1 to 5.5e-6
  MAPK_slash_Raf_star__minus_GTP_minus_Ras_slash_Raf_star__minus_GTP_minus_Ras_dot_2_1: MAPK_slash_MAPKK_minus_ser + MAPK_slash_Raf_star__minus_GTP_minus_Ras -> MAPK_slash_Raf_star__minus_GTP_minus_Ras_slash_Raf_star__minus_GTP_minus_Ras_dot_2_slash_Raf_star__minus_GTP_minus_Ras_dot_2_cplx; MAPK_slash_Raf_star__minus_GTP_minus_Ras_slash_Raf_star__minus_GTP_minus_Ras_dot_2_1_k1*MAPK_slash_MAPKK_minus_ser*MAPK_slash_Raf_star__minus_GTP_minus_Ras - MAPK_slash_Raf_star__minus_GTP_minus_Ras_slash_Raf_star__minus_GTP_minus_Ras_dot_2_1_k2*MAPK_slash_Raf_star__minus_GTP_minus_Ras_slash_Raf_star__minus_GTP_minus_Ras_dot_2_slash_Raf_star__minus_GTP_minus_Ras_dot_2_cplx;
    MAPK_slash_Raf_star__minus_GTP_minus_Ras_slash_Raf_star__minus_GTP_minus_Ras_dot_2_1_k1 = 1.185132e-12 vol_uMINVsecINV; MAPK_slash_Raf_star__minus_GTP_minus_Ras_slash_Raf_star__minus_GTP_minus_Ras_dot_2_1_k2 = 1.5084e-13 vol_secINV;
  // k3*MAPK_slash_Raf_star__minus_GTP_minus_Ras_slash_Raf_star__minus_GTP_minus_Ras_dot_2_slash_Raf_star__minus_GTP_minus_Ras_dot_2_cplx
  MAPK_slash_Raf_star__minus_GTP_minus_Ras_slash_Raf_star__minus_GTP_minus_Ras_dot_2_2: MAPK_slash_Raf_star__minus_GTP_minus_Ras_slash_Raf_star__minus_GTP_minus_Ras_dot_2_slash_Raf_star__minus_GTP_minus_Ras_dot_2_cplx => MAPK_slash_MAPKK_star_ + MAPK_slash_Raf_star__minus_GTP_minus_Ras; MAPK_slash_Raf_star__minus_GTP_minus_Ras_slash_Raf_star__minus_GTP_minus_Ras_dot_2_2_k3*MAPK_slash_Raf_star__minus_GTP_minus_Ras_slash_Raf_star__minus_GTP_minus_Ras_dot_2_slash_Raf_star__minus_GTP_minus_Ras_dot_2_cplx;
    MAPK_slash_Raf_star__minus_GTP_minus_Ras_slash_Raf_star__minus_GTP_minus_Ras_dot_2_2_k3 = 3.771e-14 vol_secINV;
  // k1*Ras_slash_GDP_minus_Ras*Ras_slash_inact_minus_GEF-k2*Ras_slash_inact_minus_GEF_slash_basal_GEF_activity_slash_basal_GEF_activity_cplx
  Ras_slash_inact_minus_GEF_slash_basal_GEF_activity_1: Ras_slash_GDP_minus_Ras + Ras_slash_inact_minus_GEF -> Ras_slash_inact_minus_GEF_slash_basal_GEF_activity_slash_basal_GEF_activity_cplx; Ras_slash_inact_minus_GEF_slash_basal_GEF_activity_1_k1*Ras_slash_GDP_minus_Ras*Ras_slash_inact_minus_GEF - Ras_slash_inact_minus_GEF_slash_basal_GEF_activity_1_k2*Ras_slash_inact_minus_GEF_slash_basal_GEF_activity_slash_basal_GEF_activity_cplx;
    Ras_slash_inact_minus_GEF_slash_basal_GEF_activity_1_k1 = 1.244383e-15 vol_uMINVsecINV; Ras_slash_inact_minus_GEF_slash_basal_GEF_activity_1_k2 = 1.0056e-14 vol_secINV;
  // k3*Ras_slash_inact_minus_GEF_slash_basal_GEF_activity_slash_basal_GEF_activity_cplx
  Ras_slash_inact_minus_GEF_slash_basal_GEF_activity_2: Ras_slash_inact_minus_GEF_slash_basal_GEF_activity_slash_basal_GEF_activity_cplx => Ras_slash_GTP_minus_Ras + Ras_slash_inact_minus_GEF; Ras_slash_inact_minus_GEF_slash_basal_GEF_activity_2_k3*Ras_slash_inact_minus_GEF_slash_basal_GEF_activity_slash_basal_GEF_activity_cplx;
    Ras_slash_inact_minus_GEF_slash_basal_GEF_activity_2_k3 = 2.514e-15 vol_secINV;
  // k1*Ras_slash_GDP_minus_Ras*Ras_slash_GEF_star_-k2*Ras_slash_GEF_star__slash_GEF_star__minus_act_minus_ras_slash_GEF_star__minus_act_minus_ras_cplx
  // Kinetics same as GEF-bg-act-ras
  Ras_slash_GEF_star__slash_GEF_star__minus_act_minus_ras_1: Ras_slash_GDP_minus_Ras + Ras_slash_GEF_star_ -> Ras_slash_GEF_star__slash_GEF_star__minus_act_minus_ras_slash_GEF_star__minus_act_minus_ras_cplx; Ras_slash_GEF_star__slash_GEF_star__minus_act_minus_ras_1_k1*Ras_slash_GDP_minus_Ras*Ras_slash_GEF_star_ - Ras_slash_GEF_star__slash_GEF_star__minus_act_minus_ras_1_k2*Ras_slash_GEF_star__slash_GEF_star__minus_act_minus_ras_slash_GEF_star__minus_act_minus_ras_cplx;
    Ras_slash_GEF_star__slash_GEF_star__minus_act_minus_ras_1_k1 = 2.488862e-14 vol_uMINVsecINV; Ras_slash_GEF_star__slash_GEF_star__minus_act_minus_ras_1_k2 = 1.0056e-14 vol_secINV;
  // k3*Ras_slash_GEF_star__slash_GEF_star__minus_act_minus_ras_slash_GEF_star__minus_act_minus_ras_cplx
  Ras_slash_GEF_star__slash_GEF_star__minus_act_minus_ras_2: Ras_slash_GEF_star__slash_GEF_star__minus_act_minus_ras_slash_GEF_star__minus_act_minus_ras_cplx => Ras_slash_GTP_minus_Ras + Ras_slash_GEF_star_; Ras_slash_GEF_star__slash_GEF_star__minus_act_minus_ras_2_k3*Ras_slash_GEF_star__slash_GEF_star__minus_act_minus_ras_slash_GEF_star__minus_act_minus_ras_cplx;
    Ras_slash_GEF_star__slash_GEF_star__minus_act_minus_ras_2_k3 = 2.514e-15 vol_secINV;
  // k1*Ras_slash_GTP_minus_Ras*Ras_slash_GAP-k2*Ras_slash_GAP_slash_GAP_minus_inact_minus_ras_slash_GAP_minus_inact_minus_ras_cplx
  // From Eccleston et al JBC 268(36)pp27012-19 get Kd < 2uM, kcat - 10/sec From Martin et al Cell 63 843-849 1990 get Kd ~ 250 nM, kcat = 20/min I will go with the Eccleston figures as there are good error bars (10%). In general the values are reasonably close. k1 = 1.666e-3/sec, k2 = 1000/sec, k3 = 10/sec (note k3 is rate-limiting) 5 Nov 2002: Changed ratio term to 4 from 100. Now we have k1=8.25e-5; k2=40, k3=10. k3 is still rate-limiting.
  Ras_slash_GAP_slash_GAP_minus_inact_minus_ras_1: Ras_slash_GTP_minus_Ras + Ras_slash_GAP -> Ras_slash_GAP_slash_GAP_minus_inact_minus_ras_slash_GAP_minus_inact_minus_ras_cplx; Ras_slash_GAP_slash_GAP_minus_inact_minus_ras_1_k1*Ras_slash_GTP_minus_Ras*Ras_slash_GAP - Ras_slash_GAP_slash_GAP_minus_inact_minus_ras_1_k2*Ras_slash_GAP_slash_GAP_minus_inact_minus_ras_slash_GAP_minus_inact_minus_ras_cplx;
    Ras_slash_GAP_slash_GAP_minus_inact_minus_ras_1_k1 = 6.220305e-12 vol_uMINVsecINV; Ras_slash_GAP_slash_GAP_minus_inact_minus_ras_1_k2 = 5.028e-12 vol_secINV;
  // k3*Ras_slash_GAP_slash_GAP_minus_inact_minus_ras_slash_GAP_minus_inact_minus_ras_cplx
  Ras_slash_GAP_slash_GAP_minus_inact_minus_ras_2: Ras_slash_GAP_slash_GAP_minus_inact_minus_ras_slash_GAP_minus_inact_minus_ras_cplx => Ras_slash_GDP_minus_Ras + Ras_slash_GAP; Ras_slash_GAP_slash_GAP_minus_inact_minus_ras_2_k3*Ras_slash_GAP_slash_GAP_minus_inact_minus_ras_slash_GAP_minus_inact_minus_ras_cplx;
    Ras_slash_GAP_slash_GAP_minus_inact_minus_ras_2_k3 = 1.257e-12 vol_secINV;
  // k1*Ras_slash_GDP_minus_Ras*Ras_slash_CaM_minus_GEF-k2*Ras_slash_CaM_minus_GEF_slash_CaM_minus_GEF_minus_act_minus_ras_slash_CaM_minus_GEF_minus_act_minus_ras_cplx
  // Kinetics same as GEF-bg_act-ras
  Ras_slash_CaM_minus_GEF_slash_CaM_minus_GEF_minus_act_minus_ras_1: Ras_slash_GDP_minus_Ras + Ras_slash_CaM_minus_GEF -> Ras_slash_CaM_minus_GEF_slash_CaM_minus_GEF_minus_act_minus_ras_slash_CaM_minus_GEF_minus_act_minus_ras_cplx; Ras_slash_CaM_minus_GEF_slash_CaM_minus_GEF_minus_act_minus_ras_1_k1*Ras_slash_GDP_minus_Ras*Ras_slash_CaM_minus_GEF - Ras_slash_CaM_minus_GEF_slash_CaM_minus_GEF_minus_act_minus_ras_1_k2*Ras_slash_CaM_minus_GEF_slash_CaM_minus_GEF_minus_act_minus_ras_slash_CaM_minus_GEF_minus_act_minus_ras_cplx;
    Ras_slash_CaM_minus_GEF_slash_CaM_minus_GEF_minus_act_minus_ras_1_k1 = 1.244478e-13 vol_uMINVsecINV; Ras_slash_CaM_minus_GEF_slash_CaM_minus_GEF_minus_act_minus_ras_1_k2 = 5.028e-14 vol_secINV;
  // k3*Ras_slash_CaM_minus_GEF_slash_CaM_minus_GEF_minus_act_minus_ras_slash_CaM_minus_GEF_minus_act_minus_ras_cplx
  Ras_slash_CaM_minus_GEF_slash_CaM_minus_GEF_minus_act_minus_ras_2: Ras_slash_CaM_minus_GEF_slash_CaM_minus_GEF_minus_act_minus_ras_slash_CaM_minus_GEF_minus_act_minus_ras_cplx => Ras_slash_GTP_minus_Ras + Ras_slash_CaM_minus_GEF; Ras_slash_CaM_minus_GEF_slash_CaM_minus_GEF_minus_act_minus_ras_2_k3*Ras_slash_CaM_minus_GEF_slash_CaM_minus_GEF_minus_act_minus_ras_slash_CaM_minus_GEF_minus_act_minus_ras_cplx;
    Ras_slash_CaM_minus_GEF_slash_CaM_minus_GEF_minus_act_minus_ras_2_k3 = 1.257e-14 vol_secINV;
  // k1*MAPK_slash_craf_minus_1*PKC_minus_active-k2*PKC_minus_active_slash_PKC_minus_act_minus_raf_slash_PKC_minus_act_minus_raf_cplx
  // Rate consts from Chen et al Biochem 32, 1032 (1993) k3 = k2 = 4 k1 = 9e-5 recalculated gives 1.666e-5, which is not very different. Looks like k3 is rate-limiting in this case: there is a huge amount of craf locked up in the enz complex. Let us assume a 10x higher Km, ie, lower affinity. k1 drops by 10x. Also changed k2 to 4x k3. Lowerd k1 to 1e-6 to balance 10X DAG sensitivity of PKC
  PKC_minus_active_slash_PKC_minus_act_minus_raf_1: MAPK_slash_craf_minus_1 + $PKC_minus_active -> PKC_minus_active_slash_PKC_minus_act_minus_raf_slash_PKC_minus_act_minus_raf_cplx; PKC_minus_active_slash_PKC_minus_act_minus_raf_1_k1*MAPK_slash_craf_minus_1*PKC_minus_active - PKC_minus_active_slash_PKC_minus_act_minus_raf_1_k2*PKC_minus_active_slash_PKC_minus_act_minus_raf_slash_PKC_minus_act_minus_raf_cplx;
    PKC_minus_active_slash_PKC_minus_act_minus_raf_1_k1 = 3.770977e-14 vol_uMINVsecINV; PKC_minus_active_slash_PKC_minus_act_minus_raf_1_k2 = 2.0112e-12 vol_secINV;
  // k3*PKC_minus_active_slash_PKC_minus_act_minus_raf_slash_PKC_minus_act_minus_raf_cplx
  PKC_minus_active_slash_PKC_minus_act_minus_raf_2: PKC_minus_active_slash_PKC_minus_act_minus_raf_slash_PKC_minus_act_minus_raf_cplx => MAPK_slash_craf_minus_1_star_ + $PKC_minus_active; PKC_minus_active_slash_PKC_minus_act_minus_raf_2_k3*PKC_minus_active_slash_PKC_minus_act_minus_raf_slash_PKC_minus_act_minus_raf_cplx;
    PKC_minus_active_slash_PKC_minus_act_minus_raf_2_k3 = 5.028e-13 vol_secINV;
  // k1*Ras_slash_GAP*PKC_minus_active-k2*PKC_minus_active_slash_PKC_minus_inact_minus_GAP_slash_PKC_minus_inact_minus_GAP_cplx
  // Rate consts copied from PCK-act-raf This reaction inactivates GAP. The idea is from the Boguski and McCormick review.
  PKC_minus_active_slash_PKC_minus_inact_minus_GAP_1: Ras_slash_GAP + $PKC_minus_active -> PKC_minus_active_slash_PKC_minus_inact_minus_GAP_slash_PKC_minus_inact_minus_GAP_cplx; PKC_minus_active_slash_PKC_minus_inact_minus_GAP_1_k1*Ras_slash_GAP*PKC_minus_active - PKC_minus_active_slash_PKC_minus_inact_minus_GAP_1_k2*PKC_minus_active_slash_PKC_minus_inact_minus_GAP_slash_PKC_minus_inact_minus_GAP_cplx;
    PKC_minus_active_slash_PKC_minus_inact_minus_GAP_1_k1 = 7.542048e-13 vol_uMINVsecINV; PKC_minus_active_slash_PKC_minus_inact_minus_GAP_1_k2 = 2.0112e-12 vol_secINV;
  // k3*PKC_minus_active_slash_PKC_minus_inact_minus_GAP_slash_PKC_minus_inact_minus_GAP_cplx
  PKC_minus_active_slash_PKC_minus_inact_minus_GAP_2: PKC_minus_active_slash_PKC_minus_inact_minus_GAP_slash_PKC_minus_inact_minus_GAP_cplx => Ras_slash_GAP_star_ + $PKC_minus_active; PKC_minus_active_slash_PKC_minus_inact_minus_GAP_2_k3*PKC_minus_active_slash_PKC_minus_inact_minus_GAP_slash_PKC_minus_inact_minus_GAP_cplx;
    PKC_minus_active_slash_PKC_minus_inact_minus_GAP_2_k3 = 5.028e-13 vol_secINV;
  // k1*Ras_slash_inact_minus_GEF*PKC_minus_active-k2*PKC_minus_active_slash_PKC_minus_act_minus_GEF_slash_PKC_minus_act_minus_GEF_cplx
  // Rate consts from PKC-act-raf. This reaction activates GEF. It can lead to at least 2X stim of ras, and a 2X stim of MAPK over and above that obtained via direct phosph of c-raf. Note that it is a push-pull reaction, and there is also a contribution through the phosphorylation and inactivation of GAPs. The original PKC-act-raf rate consts are too fast. We lower K1 by 10 X
  PKC_minus_active_slash_PKC_minus_act_minus_GEF_1: Ras_slash_inact_minus_GEF + $PKC_minus_active -> PKC_minus_active_slash_PKC_minus_act_minus_GEF_slash_PKC_minus_act_minus_GEF_cplx; PKC_minus_active_slash_PKC_minus_act_minus_GEF_1_k1*Ras_slash_inact_minus_GEF*PKC_minus_active - PKC_minus_active_slash_PKC_minus_act_minus_GEF_1_k2*PKC_minus_active_slash_PKC_minus_act_minus_GEF_slash_PKC_minus_act_minus_GEF_cplx;
    PKC_minus_active_slash_PKC_minus_act_minus_GEF_1_k1 = 7.542048e-13 vol_uMINVsecINV; PKC_minus_active_slash_PKC_minus_act_minus_GEF_1_k2 = 2.0112e-12 vol_secINV;
  // k3*PKC_minus_active_slash_PKC_minus_act_minus_GEF_slash_PKC_minus_act_minus_GEF_cplx
  PKC_minus_active_slash_PKC_minus_act_minus_GEF_2: PKC_minus_active_slash_PKC_minus_act_minus_GEF_slash_PKC_minus_act_minus_GEF_cplx => Ras_slash_GEF_star_ + $PKC_minus_active; PKC_minus_active_slash_PKC_minus_act_minus_GEF_2_k3*PKC_minus_active_slash_PKC_minus_act_minus_GEF_slash_PKC_minus_act_minus_GEF_cplx;
    PKC_minus_active_slash_PKC_minus_act_minus_GEF_2_k3 = 5.028e-13 vol_secINV;
  // k1*PLA2_slash_PLA2_minus_cytosolic*MAPK_star_-k2*MAPK_star__slash_MAPK_star__slash_MAPK_star__cplx
  // Km = 25uM @ 50 uM ATP and 1mg/ml MBP (huge XS of substrate) Vmax = 4124 pmol/min/ml at a conc of 125 pmol/ml of enz, so: k3 = .5/sec (rate limiting) k1 = (k2 + k3)/Km = (.5 + 0)/(25*6e5) = 2e-8 (#/cell)^-1 #s from Sanghera et al JBC 265 pp 52 , 1990. From Nemenoff et al JBC 268(3):1960-1964 - using Sanghera\'s 1e-4 ratio of MAPK to protein, we get k3 = 7/sec from 1000 pmol/min/mg fig 5
  MAPK_star__slash_MAPK_star__1: PLA2_slash_PLA2_minus_cytosolic + MAPK_star_ -> MAPK_star__slash_MAPK_star__slash_MAPK_star__cplx; MAPK_star__slash_MAPK_star__1_k1*PLA2_slash_PLA2_minus_cytosolic*MAPK_star_ - MAPK_star__slash_MAPK_star__1_k2*MAPK_star__slash_MAPK_star__slash_MAPK_star__cplx;
    MAPK_star__slash_MAPK_star__1_k1 = 2.451225e-13 vol_uMINVsecINV; MAPK_star__slash_MAPK_star__1_k2 = 5.028e-12 vol_secINV;
  // k3*MAPK_star__slash_MAPK_star__slash_MAPK_star__cplx
  MAPK_star__slash_MAPK_star__2: MAPK_star__slash_MAPK_star__slash_MAPK_star__cplx => PLA2_slash_PLA2_star_ + MAPK_star_; MAPK_star__slash_MAPK_star__2_k3*MAPK_star__slash_MAPK_star__slash_MAPK_star__cplx;
    MAPK_star__slash_MAPK_star__2_k3 = 1.257e-12 vol_secINV;
  // k1*MAPK_slash_craf_minus_1_star_*MAPK_star_-k2*MAPK_star__slash_MAPK_star__minus_feedback_slash_MAPK_star__minus_feedback_cplx
  // Ueki et al JBC 269(22):15756-15761 show the presence of this step, but not the rate consts, which are derived from Sanghera et al JBC 265(1):52-57, 1990, see the deriv in the MAPK* notes.
  MAPK_star__slash_MAPK_star__minus_feedback_1: MAPK_slash_craf_minus_1_star_ + MAPK_star_ -> MAPK_star__slash_MAPK_star__minus_feedback_slash_MAPK_star__minus_feedback_cplx; MAPK_star__slash_MAPK_star__minus_feedback_1_k1*MAPK_slash_craf_minus_1_star_*MAPK_star_ - MAPK_star__slash_MAPK_star__minus_feedback_1_k2*MAPK_star__slash_MAPK_star__minus_feedback_slash_MAPK_star__minus_feedback_cplx;
    MAPK_star__slash_MAPK_star__minus_feedback_1_k1 = 2.451225e-13 vol_uMINVsecINV; MAPK_star__slash_MAPK_star__minus_feedback_1_k2 = 5.028e-12 vol_secINV;
  // k3*MAPK_star__slash_MAPK_star__minus_feedback_slash_MAPK_star__minus_feedback_cplx
  MAPK_star__slash_MAPK_star__minus_feedback_2: MAPK_star__slash_MAPK_star__minus_feedback_slash_MAPK_star__minus_feedback_cplx => MAPK_slash_craf_minus_1_star__star_ + MAPK_star_; MAPK_star__slash_MAPK_star__minus_feedback_2_k3*MAPK_star__slash_MAPK_star__minus_feedback_slash_MAPK_star__minus_feedback_cplx;
    MAPK_star__slash_MAPK_star__minus_feedback_2_k3 = 1.257e-12 vol_secINV;
  // k1*MAPK_slash_MAPK_minus_tyr*MKP_minus_1-k2*MKP_minus_1_slash_MKP1_minus_tyr_minus_deph_slash_MKP1_minus_tyr_minus_deph_cplx
  // The original kinetics have been modified to obey the k2 = 4 * k3 rule, while keeping kcat and Km fixed. As noted in the NOTES, the only constraining data point is the time course of MAPK dephosphorylation, which this model satisfies. It would be nice to have more accurate estimates of rate consts and MKP-1 levels from the literature. Effective Km : 67 nM kcat = 1.43 umol/min/mg
  MKP_minus_1_slash_MKP1_minus_tyr_minus_deph_1: MAPK_slash_MAPK_minus_tyr + MKP_minus_1 -> MKP_minus_1_slash_MKP1_minus_tyr_minus_deph_slash_MKP1_minus_tyr_minus_deph_cplx; MKP_minus_1_slash_MKP1_minus_tyr_minus_deph_1_k1*MAPK_slash_MAPK_minus_tyr*MKP_minus_1 - MKP_minus_1_slash_MKP1_minus_tyr_minus_deph_1_k2*MKP_minus_1_slash_MKP1_minus_tyr_minus_deph_slash_MKP1_minus_tyr_minus_deph_cplx;
    MKP_minus_1_slash_MKP1_minus_tyr_minus_deph_1_k1 = 1.885536e-11 vol_uMINVsecINV; MKP_minus_1_slash_MKP1_minus_tyr_minus_deph_1_k2 = 2.0112e-12 vol_secINV;
  // k3*MKP_minus_1_slash_MKP1_minus_tyr_minus_deph_slash_MKP1_minus_tyr_minus_deph_cplx
  MKP_minus_1_slash_MKP1_minus_tyr_minus_deph_2: MKP_minus_1_slash_MKP1_minus_tyr_minus_deph_slash_MKP1_minus_tyr_minus_deph_cplx => MAPK_slash_MAPK + MKP_minus_1; MKP_minus_1_slash_MKP1_minus_tyr_minus_deph_2_k3*MKP_minus_1_slash_MKP1_minus_tyr_minus_deph_slash_MKP1_minus_tyr_minus_deph_cplx;
    MKP_minus_1_slash_MKP1_minus_tyr_minus_deph_2_k3 = 5.028e-13 vol_secINV;
  // k1*MAPK_star_*MKP_minus_1-k2*MKP_minus_1_slash_MKP1_minus_thr_minus_deph_slash_MKP1_minus_thr_minus_deph_cplx
  // See MKP1-tyr-deph
  MKP_minus_1_slash_MKP1_minus_thr_minus_deph_1: MAPK_star_ + MKP_minus_1 -> MKP_minus_1_slash_MKP1_minus_thr_minus_deph_slash_MKP1_minus_thr_minus_deph_cplx; MKP_minus_1_slash_MKP1_minus_thr_minus_deph_1_k1*MAPK_star_*MKP_minus_1 - MKP_minus_1_slash_MKP1_minus_thr_minus_deph_1_k2*MKP_minus_1_slash_MKP1_minus_thr_minus_deph_slash_MKP1_minus_thr_minus_deph_cplx;
    MKP_minus_1_slash_MKP1_minus_thr_minus_deph_1_k1 = 1.885536e-11 vol_uMINVsecINV; MKP_minus_1_slash_MKP1_minus_thr_minus_deph_1_k2 = 2.0112e-12 vol_secINV;
  // k3*MKP_minus_1_slash_MKP1_minus_thr_minus_deph_slash_MKP1_minus_thr_minus_deph_cplx
  MKP_minus_1_slash_MKP1_minus_thr_minus_deph_2: MKP_minus_1_slash_MKP1_minus_thr_minus_deph_slash_MKP1_minus_thr_minus_deph_cplx => MAPK_slash_MAPK_minus_tyr + MKP_minus_1; MKP_minus_1_slash_MKP1_minus_thr_minus_deph_2_k3*MKP_minus_1_slash_MKP1_minus_thr_minus_deph_slash_MKP1_minus_thr_minus_deph_cplx;
    MKP_minus_1_slash_MKP1_minus_thr_minus_deph_2_k3 = 5.028e-13 vol_secINV;
  // k1*MAPK_slash_craf_minus_1_star_*PPhosphatase2A-k2*PPhosphatase2A_slash_craf_minus_deph_slash_craf_minus_deph_cplx
  // See parent PPhosphatase2A for parms
  PPhosphatase2A_slash_craf_minus_deph_1: MAPK_slash_craf_minus_1_star_ + PPhosphatase2A -> PPhosphatase2A_slash_craf_minus_deph_slash_craf_minus_deph_cplx; PPhosphatase2A_slash_craf_minus_deph_1_k1*MAPK_slash_craf_minus_1_star_*PPhosphatase2A - PPhosphatase2A_slash_craf_minus_deph_1_k2*PPhosphatase2A_slash_craf_minus_deph_slash_craf_minus_deph_cplx;
    PPhosphatase2A_slash_craf_minus_deph_1_k1 = 2.408563e-13 vol_uMINVsecINV; PPhosphatase2A_slash_craf_minus_deph_1_k2 = 3.0168e-12 vol_secINV;
  // k3*PPhosphatase2A_slash_craf_minus_deph_slash_craf_minus_deph_cplx
  PPhosphatase2A_slash_craf_minus_deph_2: PPhosphatase2A_slash_craf_minus_deph_slash_craf_minus_deph_cplx => MAPK_slash_craf_minus_1 + PPhosphatase2A; PPhosphatase2A_slash_craf_minus_deph_2_k3*PPhosphatase2A_slash_craf_minus_deph_slash_craf_minus_deph_cplx;
    PPhosphatase2A_slash_craf_minus_deph_2_k3 = 7.542e-13 vol_secINV;
  // k1*MAPK_slash_MAPKK_star_*PPhosphatase2A-k2*PPhosphatase2A_slash_MAPKK_minus_deph_slash_MAPKK_minus_deph_cplx
  // See: Kyriakis et al Nature 358 pp 417-421 1992 Ahn et al Curr Op Cell Biol 4:992-999 1992 for this pathway. See parent PPhosphatase2A for parms.
  PPhosphatase2A_slash_MAPKK_minus_deph_1: MAPK_slash_MAPKK_star_ + PPhosphatase2A -> PPhosphatase2A_slash_MAPKK_minus_deph_slash_MAPKK_minus_deph_cplx; PPhosphatase2A_slash_MAPKK_minus_deph_1_k1*MAPK_slash_MAPKK_star_*PPhosphatase2A - PPhosphatase2A_slash_MAPKK_minus_deph_1_k2*PPhosphatase2A_slash_MAPKK_minus_deph_slash_MAPKK_minus_deph_cplx;
    PPhosphatase2A_slash_MAPKK_minus_deph_1_k1 = 2.408563e-13 vol_uMINVsecINV; PPhosphatase2A_slash_MAPKK_minus_deph_1_k2 = 3.0168e-12 vol_secINV;
  // k3*PPhosphatase2A_slash_MAPKK_minus_deph_slash_MAPKK_minus_deph_cplx
  PPhosphatase2A_slash_MAPKK_minus_deph_2: PPhosphatase2A_slash_MAPKK_minus_deph_slash_MAPKK_minus_deph_cplx => MAPK_slash_MAPKK_minus_ser + PPhosphatase2A; PPhosphatase2A_slash_MAPKK_minus_deph_2_k3*PPhosphatase2A_slash_MAPKK_minus_deph_slash_MAPKK_minus_deph_cplx;
    PPhosphatase2A_slash_MAPKK_minus_deph_2_k3 = 7.542e-13 vol_secINV;
  // k1*MAPK_slash_MAPKK_minus_ser*PPhosphatase2A-k2*PPhosphatase2A_slash_MAPKK_minus_deph_minus_ser_slash_MAPKK_minus_deph_minus_ser_cplx
  PPhosphatase2A_slash_MAPKK_minus_deph_minus_ser_1: MAPK_slash_MAPKK_minus_ser + PPhosphatase2A -> PPhosphatase2A_slash_MAPKK_minus_deph_minus_ser_slash_MAPKK_minus_deph_minus_ser_cplx; PPhosphatase2A_slash_MAPKK_minus_deph_minus_ser_1_k1*MAPK_slash_MAPKK_minus_ser*PPhosphatase2A - PPhosphatase2A_slash_MAPKK_minus_deph_minus_ser_1_k2*PPhosphatase2A_slash_MAPKK_minus_deph_minus_ser_slash_MAPKK_minus_deph_minus_ser_cplx;
    PPhosphatase2A_slash_MAPKK_minus_deph_minus_ser_1_k1 = 2.408563e-13 vol_uMINVsecINV; PPhosphatase2A_slash_MAPKK_minus_deph_minus_ser_1_k2 = 3.0168e-12 vol_secINV;
  // k3*PPhosphatase2A_slash_MAPKK_minus_deph_minus_ser_slash_MAPKK_minus_deph_minus_ser_cplx
  PPhosphatase2A_slash_MAPKK_minus_deph_minus_ser_2: PPhosphatase2A_slash_MAPKK_minus_deph_minus_ser_slash_MAPKK_minus_deph_minus_ser_cplx => MAPK_slash_MAPKK + PPhosphatase2A; PPhosphatase2A_slash_MAPKK_minus_deph_minus_ser_2_k3*PPhosphatase2A_slash_MAPKK_minus_deph_minus_ser_slash_MAPKK_minus_deph_minus_ser_cplx;
    PPhosphatase2A_slash_MAPKK_minus_deph_minus_ser_2_k3 = 7.542e-13 vol_secINV;
  // k1*MAPK_slash_craf_minus_1_star__star_*PPhosphatase2A-k2*PPhosphatase2A_slash_craf_star__star__minus_deph_slash_craf_star__star__minus_deph_cplx
  // Ueki et al JBC 269(22) pp 15756-15761 1994 show hyperphosphorylation of craf, so this is there to dephosphorylate it. Identity of phosphatase is not known to me, but it may be PP2A like the rest, so I have made it so.
  PPhosphatase2A_slash_craf_star__star__minus_deph_1: MAPK_slash_craf_minus_1_star__star_ + PPhosphatase2A -> PPhosphatase2A_slash_craf_star__star__minus_deph_slash_craf_star__star__minus_deph_cplx; PPhosphatase2A_slash_craf_star__star__minus_deph_1_k1*MAPK_slash_craf_minus_1_star__star_*PPhosphatase2A - PPhosphatase2A_slash_craf_star__star__minus_deph_1_k2*PPhosphatase2A_slash_craf_star__star__minus_deph_slash_craf_star__star__minus_deph_cplx;
    PPhosphatase2A_slash_craf_star__star__minus_deph_1_k1 = 2.408563e-13 vol_uMINVsecINV; PPhosphatase2A_slash_craf_star__star__minus_deph_1_k2 = 3.0168e-12 vol_secINV;
  // k3*PPhosphatase2A_slash_craf_star__star__minus_deph_slash_craf_star__star__minus_deph_cplx
  PPhosphatase2A_slash_craf_star__star__minus_deph_2: PPhosphatase2A_slash_craf_star__star__minus_deph_slash_craf_star__star__minus_deph_cplx => MAPK_slash_craf_minus_1_star_ + PPhosphatase2A; PPhosphatase2A_slash_craf_star__star__minus_deph_2_k3*PPhosphatase2A_slash_craf_star__star__minus_deph_slash_craf_star__star__minus_deph_cplx;
    PPhosphatase2A_slash_craf_star__star__minus_deph_2_k3 = 7.542e-13 vol_secINV;

  // Unit definitions:
  unit vol_secINV = litre / second;
  unit vol_uMINV2secINV = litre^3 / ((1e-6 mole)^2 * second);
  unit vol_uMINVsecINV = litre^2 / (1e-6 mole * second);
  unit substance = 1e-6 mole;
end
