// SBML level 2 version 1

model testid()
  // Asthagiri2001_MAPK_Asthagiri_adapt_fb
  // This is a complex model to examine mechanisms that govern MAPK pathway dynamics in Chinese hamster ovary (CHO) cell lines, particularly the role of adapter targeted negative feedback mechanism in generating complete signal adaptation. This model simulates the results as per the figure 7A of the paper by <a href = "http://www.ncbi.nlm.nih.gov/entrez/query.fcgi?cmd=Retrieve&db=pubmed&dopt=Abstract&list_uids=11312698 ">Asthagiri AR and Lauffenburger DA. Biotechnol Prog. 17(2):227-39</a>.
  // This model originates from BioModels Database: A Database of Annotated Published Models (http://www.ebi.ac.uk/biomodels/). It is copyright (c) 2005-2011 The BioModels.net Team.
  // To the extent possible under law, all copyright and related or neighbouring rights to this encoded model have been dedicated to the public domain worldwide. Please refer to CC0 Public Domain Dedication for more information.
  // In summary, you are entitled to use this encoded model in absolutely any manner you deem suitable, verbatim, or with modification, alone or embedded it in a larger context, redistribute it, commercially or not, in a restricted way or not..
  // To cite BioModels Database, please use: Li C, Donizelli M, Rodriguez N, Dharuri H, Endler L, Chelliah V, Li L, He E, Henry A, Stefan MI, Snoep JL, Hucka M, Le Novère N, Laibe C (2010) BioModels Database: An enhanced, curated and annotated resource for published quantitative kinetic models. BMC Syst Biol., 4:92.
  // biomodels.db:MODEL9147975215
  // isDescribedBy pubmed:11312698
  // biomodels.db:MODEL9147975215
  // isDescribedBy pubmed:11312698
  // biomodels.db:MODEL9147975215
  // biomodels.db:MODEL9147975215

  // Compartments:
  compartment default_compartment = 1e-18;
  compartment geometry = 3.9e-13;

  // Species:
  species R in geometry = 0.4273504;
  species C in geometry = 0;
  species C_star_ in geometry = 0;
  species C2 in geometry = 0;
  species A1 in geometry = 0.04273504;
  species A2 in geometry = 0.04273504;
  species C_star_A1 in geometry = 0;
  species A1A2 in geometry = 0;
  species E0_star_ in geometry = 0;
  species E0_star__slash_E1_activ_slash_E1_activ_cplx in geometry = 0;
  species E1 in geometry = 0.04273504;
  species E1_star_ in geometry = 0;
  species E1_star__slash_E2_activ_slash_E2_activ_cplx in geometry = 0;
  species P1 in geometry = 0.02136752;
  species P1_slash_E1_star__deactiv_slash_E1_star__deactiv_cplx in geometry = 0;
  species E2 in geometry = 0.04273504;
  species E2_star_ in geometry = 0;
  species E2_star__slash_E3_activ_slash_E3_activ_cplx in geometry = 0;
  species P2 in geometry = 0.02136752;
  species P2_slash_E2_star__deactiv_slash_E2_star__deactiv_cplx in geometry = 0;
  species E3 in geometry = 0.04273504;
  species E3_star_ in geometry = 0;
  species E3_star__slash_E4_activ_slash_E4_activ_cplx in geometry = 0;
  species P3 in geometry = 0.02136752;
  species P3_slash_E3_star__deactiv_slash_E3_star__deactiv_cplx in geometry = 0;
  species E4 in geometry = 0.04273504;
  species E4_star_ in geometry = 0;
  species E4_star__slash_E5_activ_slash_E5_activ_cplx in geometry = 0;
  species E4_star__slash_E4_star__adpt_fb_slash_E4_star__adpt_fb_cplx in geometry = 0;
  species P4 in geometry = 0.02136752;
  species P4_slash_E4_star__deactiv_slash_E4_star__deactiv_cplx in geometry = 0;
  species E5 in geometry = 0.04273504;
  species P5 in geometry = 0.02136752;
  species P5_slash_E5_star__deactiv_slash_E5_star__deactiv_cplx in geometry = 0;
  species E5_star_ in geometry = 0;
  species A2_minus_ in geometry = 0;
  // L CoInit = buffered at 0.03 uM from Asthagiri, A.R and Lauffenburger, D.A Biotechnol. Prog. 2001, 17, 227-239.
  species $L in geometry = 0.03;

  // Reactions:
  // kf*L*R-kb*C
  // Kf = 10^7/M-1 min-1 and Kr is 0.3 min-1 from Asthagiri, A.R and Lauffenburger, D.A Biotechnol. Prog. 2001, 227-239.
  L_minus_bind_minus_R: $L + R -> C; L_minus_bind_minus_R_kf*L*R - L_minus_bind_minus_R_kb*C;
    L_minus_bind_minus_R_kf = 6.49743822e-14 vol_uMINVsecINV; L_minus_bind_minus_R_kb = 1.95e-15 vol_secINV;
  // kf*C^2-kb*C2
  // Kc is 6*10^7 M-1 min-1 and Ku is 60 min-1 from Asthagiri, A.R and Lauffenburger, D.A Biotechnol. Prog. 2001, 227-239.
  C_minus_dimer: 2 C -> C2; C_minus_dimer_kf*C^2 - C_minus_dimer_kb*C2;
    C_minus_dimer_kf = 3.8999961e-13 vol_uMINVsecINV; C_minus_dimer_kb = 3.9e-13 vol_secINV;
  // kf*C2-kb*C_star_
  // Kc+ is 50min-1 and Kc- is 5min-1 from Asthagiri and 2001.
  C2_minus_phos: C2 -> C_star_; C2_minus_phos_kf*C2 - C2_minus_phos_kb*C_star_;
    C2_minus_phos_kf = 3.2487e-13 vol_secINV; C2_minus_phos_kb = 3.2487e-14 vol_secINV;
  // kf*C_star_*A1-kb*C_star_A1
  // Kf1 is 3*10^8 M-1 min-1 and Kr1 is 0.5/sec from Asthagiri and 2001
  C_star__minus_bind_minus_A1: C_star_ + A1 -> C_star_A1; C_star__minus_bind_minus_A1_kf*C_star_*A1 - C_star__minus_bind_minus_A1_kb*C_star_A1;
    C_star__minus_bind_minus_A1_kf = 1.95004368e-12 vol_uMINVsecINV; C_star__minus_bind_minus_A1_kb = 1.950039e-13 vol_secINV;
  // kf*C_star_A1*A2-kb*E0_star_
  // kf2 and kr2 are 3*10^8 M-1 min-1 and 0.5/sec from Asthagiri and Lauffenburger 20001.
  C_star_A1_minus_bind_minus_A2: C_star_A1 + A2 -> E0_star_; C_star_A1_minus_bind_minus_A2_kf*C_star_A1*A2 - C_star_A1_minus_bind_minus_A2_kb*E0_star_;
    C_star_A1_minus_bind_minus_A2_kf = 1.95004368e-12 vol_uMINVsecINV; C_star_A1_minus_bind_minus_A2_kb = 1.950039e-13 vol_secINV;
  // kf*A2*A1-kb*A1A2
  // Kc12 and Kd12 are 3*10^8 M-1 min-1 and 0.5/sec from Asthagiri and 2001.
  A1_minus_bind_minus_A2: A2 + A1 -> A1A2; A1_minus_bind_minus_A2_kf*A2*A1 - A1_minus_bind_minus_A2_kb*A1A2;
    A1_minus_bind_minus_A2_kf = 1.95004368e-12 vol_uMINVsecINV; A1_minus_bind_minus_A2_kb = 1.950039e-13 vol_secINV;
  // kf*A1A2*C_star_-kb*E0_star_
  // Kf12 and Kr12 are 3*10^8 M-1 min-1 and 0.5/sec from Asthagiri and 2001.
  C_star__minus_bind_minus_A1A2: A1A2 + C_star_ -> E0_star_; C_star__minus_bind_minus_A1A2_kf*A1A2*C_star_ - C_star__minus_bind_minus_A1A2_kb*E0_star_;
    C_star__minus_bind_minus_A1A2_kf = 1.95004368e-12 vol_uMINVsecINV; C_star__minus_bind_minus_A1A2_kb = 1.950039e-13 vol_secINV;
  // k1*E1*E0_star_-k2*E0_star__slash_E1_activ_slash_E1_activ_cplx
  // k1+ =6*10^8 M-1 min-1, k1- =30 min-1, kcat,1 =6 min-1 and km caluculated to 0.06 from Asthagiri and 2001.
  E0_star__slash_E1_activ_1: E1 + E0_star_ -> E0_star__slash_E1_activ_slash_E1_activ_cplx; E0_star__slash_E1_activ_1_k1*E1*E0_star_ - E0_star__slash_E1_activ_1_k2*E0_star__slash_E1_activ_slash_E1_activ_cplx;
    E0_star__slash_E1_activ_1_k1 = 3.8999961e-12 vol_uMINVsecINV; E0_star__slash_E1_activ_1_k2 = 1.95e-13 vol_secINV;
  // k3*E0_star__slash_E1_activ_slash_E1_activ_cplx
  E0_star__slash_E1_activ_2: E0_star__slash_E1_activ_slash_E1_activ_cplx => E1_star_ + E0_star_; E0_star__slash_E1_activ_2_k3*E0_star__slash_E1_activ_slash_E1_activ_cplx;
    E0_star__slash_E1_activ_2_k3 = 3.9e-14 vol_secINV;
  // k1*E2*E1_star_-k2*E1_star__slash_E2_activ_slash_E2_activ_cplx
  // k2+ =6*10^8 M-1 min-1, k2- =30 min-1, kcat,2 =6 min-1 from Asthagire and 2001
  E1_star__slash_E2_activ_1: E2 + E1_star_ -> E1_star__slash_E2_activ_slash_E2_activ_cplx; E1_star__slash_E2_activ_1_k1*E2*E1_star_ - E1_star__slash_E2_activ_1_k2*E1_star__slash_E2_activ_slash_E2_activ_cplx;
    E1_star__slash_E2_activ_1_k1 = 3.8999961e-12 vol_uMINVsecINV; E1_star__slash_E2_activ_1_k2 = 1.95e-13 vol_secINV;
  // k3*E1_star__slash_E2_activ_slash_E2_activ_cplx
  E1_star__slash_E2_activ_2: E1_star__slash_E2_activ_slash_E2_activ_cplx => E2_star_ + E1_star_; E1_star__slash_E2_activ_2_k3*E1_star__slash_E2_activ_slash_E2_activ_cplx;
    E1_star__slash_E2_activ_2_k3 = 3.9e-14 vol_secINV;
  // k1*E1_star_*P1-k2*P1_slash_E1_star__deactiv_slash_E1_star__deactiv_cplx
  // kp1+ =6*10^8 M-1 min-1, kp1- =30 min-1, kpcat,1 =6 min-1 form Asthagiri and 2001.
  P1_slash_E1_star__deactiv_1: E1_star_ + P1 -> P1_slash_E1_star__deactiv_slash_E1_star__deactiv_cplx; P1_slash_E1_star__deactiv_1_k1*E1_star_*P1 - P1_slash_E1_star__deactiv_1_k2*P1_slash_E1_star__deactiv_slash_E1_star__deactiv_cplx;
    P1_slash_E1_star__deactiv_1_k1 = 3.8999961e-12 vol_uMINVsecINV; P1_slash_E1_star__deactiv_1_k2 = 1.95e-13 vol_secINV;
  // k3*P1_slash_E1_star__deactiv_slash_E1_star__deactiv_cplx
  P1_slash_E1_star__deactiv_2: P1_slash_E1_star__deactiv_slash_E1_star__deactiv_cplx => E1 + P1; P1_slash_E1_star__deactiv_2_k3*P1_slash_E1_star__deactiv_slash_E1_star__deactiv_cplx;
    P1_slash_E1_star__deactiv_2_k3 = 3.9e-14 vol_secINV;
  // k1*E3*E2_star_-k2*E2_star__slash_E3_activ_slash_E3_activ_cplx
  // k3+ =6*10^8 M-1 min-1, k3- =30 min-1, kcat,3 =6 min-1 from Asthagiri and 2001.
  E2_star__slash_E3_activ_1: E3 + E2_star_ -> E2_star__slash_E3_activ_slash_E3_activ_cplx; E2_star__slash_E3_activ_1_k1*E3*E2_star_ - E2_star__slash_E3_activ_1_k2*E2_star__slash_E3_activ_slash_E3_activ_cplx;
    E2_star__slash_E3_activ_1_k1 = 3.8999961e-12 vol_uMINVsecINV; E2_star__slash_E3_activ_1_k2 = 1.95e-13 vol_secINV;
  // k3*E2_star__slash_E3_activ_slash_E3_activ_cplx
  E2_star__slash_E3_activ_2: E2_star__slash_E3_activ_slash_E3_activ_cplx => E3_star_ + E2_star_; E2_star__slash_E3_activ_2_k3*E2_star__slash_E3_activ_slash_E3_activ_cplx;
    E2_star__slash_E3_activ_2_k3 = 3.9e-14 vol_secINV;
  // k1*E2_star_*P2-k2*P2_slash_E2_star__deactiv_slash_E2_star__deactiv_cplx
  // kp2+ =6*10^8 M-1 min-1, kp2- = 30 min-1, kpcat,2 = 6 min-1 from Asthagiri and 2001.
  P2_slash_E2_star__deactiv_1: E2_star_ + P2 -> P2_slash_E2_star__deactiv_slash_E2_star__deactiv_cplx; P2_slash_E2_star__deactiv_1_k1*E2_star_*P2 - P2_slash_E2_star__deactiv_1_k2*P2_slash_E2_star__deactiv_slash_E2_star__deactiv_cplx;
    P2_slash_E2_star__deactiv_1_k1 = 3.8999961e-12 vol_uMINVsecINV; P2_slash_E2_star__deactiv_1_k2 = 1.95e-13 vol_secINV;
  // k3*P2_slash_E2_star__deactiv_slash_E2_star__deactiv_cplx
  P2_slash_E2_star__deactiv_2: P2_slash_E2_star__deactiv_slash_E2_star__deactiv_cplx => E2 + P2; P2_slash_E2_star__deactiv_2_k3*P2_slash_E2_star__deactiv_slash_E2_star__deactiv_cplx;
    P2_slash_E2_star__deactiv_2_k3 = 3.9e-14 vol_secINV;
  // k1*E4*E3_star_-k2*E3_star__slash_E4_activ_slash_E4_activ_cplx
  // k4+ = 6*10^8 M-1 min-1, k4- =30 min-1, kcat,4 =6 min-1 from Asthagiri and 2001.
  E3_star__slash_E4_activ_1: E4 + E3_star_ -> E3_star__slash_E4_activ_slash_E4_activ_cplx; E3_star__slash_E4_activ_1_k1*E4*E3_star_ - E3_star__slash_E4_activ_1_k2*E3_star__slash_E4_activ_slash_E4_activ_cplx;
    E3_star__slash_E4_activ_1_k1 = 3.8999961e-12 vol_uMINVsecINV; E3_star__slash_E4_activ_1_k2 = 1.95e-13 vol_secINV;
  // k3*E3_star__slash_E4_activ_slash_E4_activ_cplx
  E3_star__slash_E4_activ_2: E3_star__slash_E4_activ_slash_E4_activ_cplx => E4_star_ + E3_star_; E3_star__slash_E4_activ_2_k3*E3_star__slash_E4_activ_slash_E4_activ_cplx;
    E3_star__slash_E4_activ_2_k3 = 3.9e-14 vol_secINV;
  // k1*E3_star_*P3-k2*P3_slash_E3_star__deactiv_slash_E3_star__deactiv_cplx
  // kp3+ =6*10^8 M-1 min-1, kp3- =30 min-1, kpcat,3 =6 min-1 from Asthagiri and 2001.
  P3_slash_E3_star__deactiv_1: E3_star_ + P3 -> P3_slash_E3_star__deactiv_slash_E3_star__deactiv_cplx; P3_slash_E3_star__deactiv_1_k1*E3_star_*P3 - P3_slash_E3_star__deactiv_1_k2*P3_slash_E3_star__deactiv_slash_E3_star__deactiv_cplx;
    P3_slash_E3_star__deactiv_1_k1 = 3.8999961e-12 vol_uMINVsecINV; P3_slash_E3_star__deactiv_1_k2 = 1.95e-13 vol_secINV;
  // k3*P3_slash_E3_star__deactiv_slash_E3_star__deactiv_cplx
  P3_slash_E3_star__deactiv_2: P3_slash_E3_star__deactiv_slash_E3_star__deactiv_cplx => E3 + P3; P3_slash_E3_star__deactiv_2_k3*P3_slash_E3_star__deactiv_slash_E3_star__deactiv_cplx;
    P3_slash_E3_star__deactiv_2_k3 = 3.9e-14 vol_secINV;
  // k1*E5*E4_star_-k2*E4_star__slash_E5_activ_slash_E5_activ_cplx
  // k5+ =6*10^8 M-1 min-1, k5- =30 min-1, kcat,5 =6 min-1 from Asthagiri and 2001.
  E4_star__slash_E5_activ_1: E5 + E4_star_ -> E4_star__slash_E5_activ_slash_E5_activ_cplx; E4_star__slash_E5_activ_1_k1*E5*E4_star_ - E4_star__slash_E5_activ_1_k2*E4_star__slash_E5_activ_slash_E5_activ_cplx;
    E4_star__slash_E5_activ_1_k1 = 3.8999961e-12 vol_uMINVsecINV; E4_star__slash_E5_activ_1_k2 = 1.95e-13 vol_secINV;
  // k3*E4_star__slash_E5_activ_slash_E5_activ_cplx
  E4_star__slash_E5_activ_2: E4_star__slash_E5_activ_slash_E5_activ_cplx => E5_star_ + E4_star_; E4_star__slash_E5_activ_2_k3*E4_star__slash_E5_activ_slash_E5_activ_cplx;
    E4_star__slash_E5_activ_2_k3 = 3.9e-14 vol_secINV;
  // k1*E0_star_*E4_star_-k2*E4_star__slash_E4_star__adpt_fb_slash_E4_star__adpt_fb_cplx
  // Implementation of adapter feedback induces adaptation of not only the target signal e0* but also signals downstream of the target. k5+ =6*10^8 M-1 min-1, k5- =30 min-1, kcat,5 =6 min-1 from Asthagiri and Lauffenburger 2001.
  E4_star__slash_E4_star__adpt_fb_1: E0_star_ + E4_star_ -> E4_star__slash_E4_star__adpt_fb_slash_E4_star__adpt_fb_cplx; E4_star__slash_E4_star__adpt_fb_1_k1*E0_star_*E4_star_ - E4_star__slash_E4_star__adpt_fb_1_k2*E4_star__slash_E4_star__adpt_fb_slash_E4_star__adpt_fb_cplx;
    E4_star__slash_E4_star__adpt_fb_1_k1 = 3.8999961e-12 vol_uMINVsecINV; E4_star__slash_E4_star__adpt_fb_1_k2 = 1.95e-13 vol_secINV;
  // k3*E4_star__slash_E4_star__adpt_fb_slash_E4_star__adpt_fb_cplx
  E4_star__slash_E4_star__adpt_fb_2: E4_star__slash_E4_star__adpt_fb_slash_E4_star__adpt_fb_cplx => A2_minus_ + E4_star_; E4_star__slash_E4_star__adpt_fb_2_k3*E4_star__slash_E4_star__adpt_fb_slash_E4_star__adpt_fb_cplx;
    E4_star__slash_E4_star__adpt_fb_2_k3 = 3.9e-14 vol_secINV;
  // k1*E4_star_*P4-k2*P4_slash_E4_star__deactiv_slash_E4_star__deactiv_cplx
  // kp4+ = 6*10^8 M-1 min-1, kp4- =30 min-1, kpcat,4 =6 min-1 from Asthagiri and 2001.
  P4_slash_E4_star__deactiv_1: E4_star_ + P4 -> P4_slash_E4_star__deactiv_slash_E4_star__deactiv_cplx; P4_slash_E4_star__deactiv_1_k1*E4_star_*P4 - P4_slash_E4_star__deactiv_1_k2*P4_slash_E4_star__deactiv_slash_E4_star__deactiv_cplx;
    P4_slash_E4_star__deactiv_1_k1 = 3.8999961e-12 vol_uMINVsecINV; P4_slash_E4_star__deactiv_1_k2 = 1.95e-13 vol_secINV;
  // k3*P4_slash_E4_star__deactiv_slash_E4_star__deactiv_cplx
  P4_slash_E4_star__deactiv_2: P4_slash_E4_star__deactiv_slash_E4_star__deactiv_cplx => E4 + P4; P4_slash_E4_star__deactiv_2_k3*P4_slash_E4_star__deactiv_slash_E4_star__deactiv_cplx;
    P4_slash_E4_star__deactiv_2_k3 = 3.9e-14 vol_secINV;
  // k1*E5_star_*P5-k2*P5_slash_E5_star__deactiv_slash_E5_star__deactiv_cplx
  // kp5+ = 6*10^8 M-1 min-1, kp5- = 30 min-1, kpcat,5 = 6 min-1 from Asthagiri and 2001.
  P5_slash_E5_star__deactiv_1: E5_star_ + P5 -> P5_slash_E5_star__deactiv_slash_E5_star__deactiv_cplx; P5_slash_E5_star__deactiv_1_k1*E5_star_*P5 - P5_slash_E5_star__deactiv_1_k2*P5_slash_E5_star__deactiv_slash_E5_star__deactiv_cplx;
    P5_slash_E5_star__deactiv_1_k1 = 3.8999961e-12 vol_uMINVsecINV; P5_slash_E5_star__deactiv_1_k2 = 1.95e-13 vol_secINV;
  // k3*P5_slash_E5_star__deactiv_slash_E5_star__deactiv_cplx
  P5_slash_E5_star__deactiv_2: P5_slash_E5_star__deactiv_slash_E5_star__deactiv_cplx => E5 + P5; P5_slash_E5_star__deactiv_2_k3*P5_slash_E5_star__deactiv_slash_E5_star__deactiv_cplx;
    P5_slash_E5_star__deactiv_2_k3 = 3.9e-14 vol_secINV;

  // Unit definitions:
  unit vol_secINV = litre / second;
  unit vol_uMINVsecINV = litre^2 / (1e-6 mole * second);
  unit substance = 1e-6 mole;
end
