// SBML level 2 version 1

model LeBeau_IP3R_Phosphorylation()
  // LeBeau1999_IP3R_Phosphorylation
  // This model originates from BioModels Database: A Database of Annotated Published Models. It is copyright (c) 2005-2011 The BioModels.net Team.
  // To the extent possible under law, all copyright and related or neighbouring rights to this encoded model have been dedicated to the public domain worldwide. Please refer to CC0 Public Domain Dedication for more information.
  // In summary, you are entitled to use this encoded model in absolutely any manner you deem suitable, verbatim, or with modification, alone or embedded it in a larger context, redistribute it, commercially or not, in a restricted way or not..
  // To cite BioModels Database, please use: Li C, Donizelli M, Rodriguez N, Dharuri H, Endler L, Chelliah V, Li L, He E, Henry A, Stefan MI, Snoep JL, Hucka M, Le Novère N, Laibe C (2010) BioModels Database: An enhanced, curated and annotated resource for published quantitative kinetic models. BMC Syst Biol., 4:92.
  // biomodels.db:MODEL9200487367
  // isDescribedBy pubmed:10352035
  // biomodels.db:MODEL9200487367
  // isDescribedBy pubmed:10352035
  // biomodels.db:MODEL9200487367
  // biomodels.db:MODEL9200487367

  // Compartments:
  compartment compartment = 1;

  // Species:
  species $S in compartment;
  species O in compartment = 0;
  species I1 in compartment = 0;
  species I2 in compartment = 1;
  species c in compartment = 0;

  // Parameters:
  alpha1 = 40;
  beta1 = 0.8;
  alpha4 = 0.06;
  beta4 = 0.01;
  T = 0; T is "time";
  time_constant = 100;

  // Assignment rules:
  S := 1 - (O + I1 + I2);
  k1 := alpha1*c^3/(beta1^3 + c^3);
  p := 0.6*(1 - exp(-T/time_constant));
  k4 := alpha4*p/(beta4 + p);

  // Rate rules:
  T' = 1;

  // Reactions:
  Shut_to_Open: $S -> O; k1*p*S - kminus1*O;
    kminus1 = 0.88;
  Open_to_Inactivated1: O => I1; k2*O;
    k2 = 0.5;
  Inactivated1_to_Shut: I1 => $S; k3*I1;
    k3 = 0.5;
  Inactivated1_to_Inactivated2: I1 => I2; k4*I1;
  Inactivated2_to_Shut: I2 => $S; k5*I2;
    k5 = 0.02;
  Jrel: => c; kflux*O^4;  // modifiers: O
    kflux = 28;
  Jpump: c => ; Vp*c^2/(Kp^2 + c^2);
    Vp = 0.2; Kp = 0.54;
  Jinflux: => c; Jleak;
    Jleak = 0.025;
end
