// SBML level 2 version 3

model McAllister1975_CardiacPurkinjeFibres()
  // This a model from the article:
  // Reconstruction of the electrical activity of cardiac Purkinje fibres.
  // McAllister RE, Noble D, Tsien RW. J Physiol. 1975; 251(1):1-59 1185607 ,
  // Abstract:
  // 1. The electrical activity of Cardiac Purkinje fibres was reconstructed using a mathematical model of the membrane current. The individual components of ionic curent were described by equations which wee based as closely as possible on previous experiments using the voltage clamp technique. 2. Membrane action potentials and pace-maker activity were calculated and compared with time course of underlying changes in two functionally distinct outeard currents, iX1 and iK2. 3. The repolarization of the theoretical action potential is triggered by the onset of iX1, which becomes activated over the plateau range of potentials. iK2 also activates during the plateau but does not play a controlling role in the repolarization. Hwever, iK2 does govern the slow pace-maker depolarization through its subsequent deactivation at negative potentials. 4. The individual phases of the calculated action potential and their 'experimental' modifications were compared with published records. The upstroke is generated by a Hodgkin-Huxley type sodium conductance (gNa), and rises with a maximum rate of 478 V/sec, somewhat less than experimentally observed values ( up to 800 V/sec). The discrepancy is discussed in relation to experimental attempts at measuring gNa. 5. The ole of the transient outward chloride current (called igr) was studied in calculations of the rapid phase of repolarization and 'notch' configuration...
  // This model was taken from the CellML repository and automatically converted to SBML.
  // The original model was: McAllister, Noble, Tsien.(1975) - version05
  // The original CellML model was created by:
  // Noble,Penny,J
  // penny.noble@dpag.ox.ac.uk
  // Department of Physiology, Anatomy & Genetics.
  // University of Oxford
  // This model originates from BioModels Database: A Database of Annotated Published Models (http://www.ebi.ac.uk/biomodels/). It is copyright (c) 2005-2011 The BioModels.net Team.
  // To the extent possible under law, all copyright and related or neighbouring rights to this encoded model have been dedicated to the public domain worldwide. Please refer to CC0 Public Domain Dedication for more information.
  // In summary, you are entitled to use this encoded model in absolutely any manner you deem suitable, verbatim, or with modification, alone or embedded it in a larger context, redistribute it, commercially or not, in a restricted way or not..
  // To cite BioModels Database, please use: Li C, Donizelli M, Rodriguez N, Dharuri H, Endler L, Chelliah V, Li L, He E, Henry A, Stefan MI, Snoep JL, Hucka M, Le Novère N, Laibe C (2010) BioModels Database: An enhanced, curated and annotated resource for published quantitative kinetic models. BMC Syst Biol., 4:92.
  // biomodels.db:MODEL9808533471
  // isDescribedBy pubmed:1185607
  // biomodels.db:MODEL9808533471
  // isDescribedBy pubmed:1185607
  // biomodels.db:MODEL9808533471
  // biomodels.db:MODEL9808533471

  // Compartments:
  compartment Compartment = 1 litre;

  // Parameters:
  V_membrane = -78.041367 millivolt;
  C = 10 microF_per_cm2;
  i_Na has microA_per_cm2;
  E_Na = 40 millivolt;
  g_Na = 150 milliS_per_cm2;
  m = 0.02566853 dimensionless;
  alpha_m has per_millisecond;
  beta_m has per_millisecond;
  V_fast_sodium_current_m_gate has millivolt;
  time_fast_sodium_current_m_gate has millisecond;
  h = 0.78656359 dimensionless;
  alpha_h has per_millisecond;
  beta_h has per_millisecond;
  V_fast_sodium_current_h_gate has millivolt;
  time_fast_sodium_current_h_gate has millisecond;
  i_si has microA_per_cm2;
  g_si = 0.8 milliS_per_cm2;
  g_si_ = 0.04 milliS_per_cm2;
  E_si = 70 millivolt;
  d = 0.00293135 dimensionless;
  alpha_d has per_millisecond;
  beta_d has per_millisecond;
  V_secondary_inward_current_d_gate has millivolt;
  time_secondary_inward_current_d_gate has millisecond;
  f = 0.80873917 dimensionless;
  alpha_f has per_millisecond;
  beta_f has per_millisecond;
  V_secondary_inward_current_f_gate has millivolt;
  time_secondary_inward_current_f_gate has millisecond;
  d1 has dimensionless;
  V_secondary_inward_current_d1_gate has millivolt;
  time_secondary_inward_current_d1_gate has millisecond;
  i_K2 has microA_per_cm2;
  I_K2 has microA_per_cm2;
  E_K = -110 millivolt;
  s = 0.75473994 dimensionless;
  alpha_s has per_millisecond;
  beta_s has per_millisecond;
  E_s = -52 millivolt;
  V_pacemaker_potassium_current_s_gate has millivolt;
  time_pacemaker_potassium_current_s_gate has millisecond;
  i_x1 has microA_per_cm2;
  I_x1 has microA_per_cm2;
  x1 = 0.02030289 dimensionless;
  alpha_x1 has per_millisecond;
  beta_x1 has per_millisecond;
  V_plateau_potassium_current1_x1_gate has millivolt;
  time_plateau_potassium_current1_x1_gate has millisecond;
  i_x2 has microA_per_cm2;
  I_x2 has microA_per_cm2;
  x2 = 0.0176854 dimensionless;
  alpha_x2 has per_millisecond;
  beta_x2 has per_millisecond;
  V_plateau_potassium_current2_x2_gate has millivolt;
  time_plateau_potassium_current2_x2_gate has millisecond;
  i_qr has microA_per_cm2;
  E_Cl = -70 millivolt;
  g_qr = 2.5 milliS_per_cm2;
  q = 3.11285794 dimensionless;
  alpha_q has per_millisecond;
  beta_q has per_millisecond;
  V_transient_chloride_current_q_gate has millivolt;
  time_transient_chloride_current_q_gate has millisecond;
  r = 0.13500116 dimensionless;
  alpha_r has per_millisecond;
  beta_r has per_millisecond;
  V_transient_chloride_current_r_gate has millivolt;
  time_transient_chloride_current_r_gate has millisecond;
  i_K1 has microA_per_cm2;
  E_K1 = -30 millivolt;
  i_Na_b has microA_per_cm2;
  g_Nab = 0.105 milliS_per_cm2;
  i_Cl_b has microA_per_cm2;
  g_Clb = 0.01 milliS_per_cm2;

  // Assignment rules:
  i_Na := g_Na*m^3*h*(V_membrane - E_Na);
  alpha_m := (V_fast_sodium_current_m_gate + 47)/(1 - exp(-(V_fast_sodium_current_m_gate + 47)/10));
  beta_m := 40*exp(-0.056*(V_fast_sodium_current_m_gate + 72));
  alpha_h := 0.0085*exp(-0.184*(V_fast_sodium_current_h_gate + 71));
  beta_h := 2.5/(exp(-0.082*(V_fast_sodium_current_h_gate + 10)) + 1);
  i_si := g_si*d*f*(V_membrane - E_si) + g_si_*d1*(V_membrane - E_si);
  alpha_d := 0.002*(V_secondary_inward_current_d_gate + 40)/(1 - exp(-0.1*(V_secondary_inward_current_d_gate + 40)));
  beta_d := 0.02*exp(-0.0888*(V_secondary_inward_current_d_gate + 40));
  alpha_f := 0.000987*exp(-0.04*(V_secondary_inward_current_f_gate + 60));
  beta_f := 0.02/(exp(-0.087*(V_secondary_inward_current_f_gate + 26)) + 1);
  d1 := 1/(1 + exp(-0.15*(V_secondary_inward_current_d1_gate + 40)));
  i_K2 := I_K2*s;
  I_K2 := 2.8*(exp((V_membrane - E_K)/25) - 1)/(exp((V_membrane + 60)/12.5) + exp((V_membrane + 60)/25));
  alpha_s := 0.001*(V_pacemaker_potassium_current_s_gate - E_s)/(1 - exp(-0.2*(V_pacemaker_potassium_current_s_gate - E_s)));
  beta_s := 5e-5*exp(-0.067*(V_pacemaker_potassium_current_s_gate - E_s));
  i_x1 := x1*I_x1;
  I_x1 := 1.2*(exp((V_membrane + 95)/25) - 1)/exp((V_membrane + 45)/25);
  alpha_x1 := 0.0005*exp((V_plateau_potassium_current1_x1_gate + 50)/12.1)/(1 + exp((V_plateau_potassium_current1_x1_gate + 50)/17.5));
  beta_x1 := 0.0013*exp(-(V_plateau_potassium_current1_x1_gate + 20)/16.67)/(1 + exp(-(V_plateau_potassium_current1_x1_gate + 20)/25));
  i_x2 := x2*I_x2;
  I_x2 := 25 + 0.385*V_membrane;
  alpha_x2 := 0.000127*1/(1 + exp(-(V_plateau_potassium_current2_x2_gate + 19)/5));
  beta_x2 := 0.0003*exp(-(V_plateau_potassium_current2_x2_gate + 20)/16.67)/(1 + exp(-(V_plateau_potassium_current2_x2_gate + 20)/25));
  i_qr := g_qr*q*r*(V_membrane - E_Cl);
  alpha_q := 0.008*V_transient_chloride_current_q_gate/(1 - exp(-0.1*V_transient_chloride_current_q_gate));
  beta_q := 0.08*exp(-0.0888*V_transient_chloride_current_q_gate);
  alpha_r := 3.3e-5*exp(-(V_transient_chloride_current_r_gate/17));
  beta_r := 0.033/(exp(-(V_transient_chloride_current_r_gate + 30)/8) + 1);
  i_K1 := I_K2/2.8 + 0.2*(V_membrane - E_K1)/(1 - exp(-(V_membrane - E_K1)/25));
  i_Na_b := g_Nab*(V_membrane - E_Na);
  i_Cl_b := g_Clb*(V_membrane - E_Cl);

  // Rate rules:
  V_membrane' = -(i_Na + i_si + i_K2 + i_x1 + i_x2 + i_qr + i_K1 + i_Na_b + i_Cl_b)/C;
  m' = alpha_m*(1 - m) - beta_m*m;
  h' = alpha_h*(1 - h) - beta_h*h;
  d' = alpha_d*(1 - d) - beta_d*d;
  f' = alpha_f*(1 - f) - beta_f*f;
  s' = alpha_s*(1 - s) - beta_s*s;
  x1' = alpha_x1*(1 - x1) - beta_x1*x1;
  x2' = alpha_x2*(1 - x2) - beta_x2*x2;
  q' = alpha_q*(1 - q) - beta_q*q;
  r' = alpha_r*(1 - r) - beta_r*r;

  // Unit definitions:
  unit millisecond = 1e-3 second;
  unit per_millisecond = 1 / (1e-3 second);
  unit millivolt = 1e-3 volt;
  unit per_millivolt = 1 / (1e-3 volt);
  unit per_millivolt_millisecond = 1 / (1e-3 volt * 1e-3 second);
  unit milliS_per_cm2 = 1e-3 siemens / (0.01 metre)^2;
  unit microF_per_cm2 = 1e-6 farad / (0.01 metre)^2;
  unit microA_per_cm2 = 1e-6 ampere / (0.01 metre)^2;
  unit concentration_units = 1e-3 mole / litre;
  unit time = 1e-3 second;
end
