// SBML level 2 version 3

model Maleckar2008_AtrialMyocyte()
  // This a model from the article:
  // Mathematical simulations of ligand-gated and cell-type specific effects on the action potential of human atrium.
  // Maleckar MM, Greenstein JL, Trayanova NA, Giles WR. Prog Biophys Mol Biol. 2008; 98(2-3):161-70 19186188 ,
  // Abstract:
  // In the mammalian heart, myocytes and fibroblasts can communicate via gap junction, or connexin-mediated current flow. Some of the effects of this electroto nic coupling on the action potential waveform of the human ventricular myocyte have been analyzed in detail. The present study employs a recently developed mathematical model of the human atrial myocyte to investigate the consequences of this heterogeneous cell-cell interaction on the action potential of the human atrium. Two independent physiological processes which alter the physiology of the human atrium have been studied. i) The effects of the autonomic tra nsmitter acetylcholine on the atrial action potential have been investigated by inclusion of a time-independent, acetylcholine-activated K(+) current in th is mathematical model of the atrial myocyte. ii) A non-selective cation current which is activated by natriuretic peptides has been incorporated into a pre viously published mathematical model of the cardiac fibroblast. These results identify subtle effects of acetylcholine, which arise from the nonlinear inte ractions between ionic currents in the human atrial myocyte. They also illustrate marked alterations in the action potential waveform arising from fibrobla st-myocyte source-sink principles when the natriuretic peptide-mediated cation conductance is activated. Additional calculations also illustrate the effect s of simultaneous activation of both of these cell-type specific conductances within the atrial myocardium. This study provides a basis for beginning to as sess the utility of mathematical modeling in understanding detailed cell-cell interactions within the complex paracrine environment of the human atrial myo cardium.
  // This model was taken from the CellML repository and automatically converted to SBML.
  // The original model was: Maleckar MM, Greenstein JL, Trayanova NA, Giles WR. (2009) - version01
  // The original CellML model was created by:
  // Fink, Martin,
  // martin.fink@dpag.ox.ac.uk
  // The University of Oxford
  // Department of Physiology, Anatomy & Genetics
  // This model originates from BioModels Database: A Database of Annotated Published Models (http://www.ebi.ac.uk/biomodels/). It is copyright (c) 2005-2011 The BioModels.net Team.
  // To the extent possible under law, all copyright and related or neighbouring rights to this encoded model have been dedicated to the public domain worldwide. Please refer to CC0 Public Domain Dedication for more information.
  // In summary, you are entitled to use this encoded model in absolutely any manner you deem suitable, verbatim, or with modification, alone or embedded it in a larger context, redistribute it, commercially or not, in a restricted way or not..
  // To cite BioModels Database, please use: Li C, Donizelli M, Rodriguez N, Dharuri H, Endler L, Chelliah V, Li L, He E, Henry A, Stefan MI, Snoep JL, Hucka M, Le Novère N, Laibe C (2010) BioModels Database: An enhanced, curated and annotated resource for published quantitative kinetic models. BMC Syst Biol., 4:92.
  // biomodels.db:MODEL9810152478
  // isDescribedBy pubmed:19186188
  // biomodels.db:MODEL9810152478
  // isDescribedBy pubmed:19186188
  // biomodels.db:MODEL9810152478
  // biomodels.db:MODEL9810152478

  // Compartments:
  compartment Compartment = 1 litre;

  // Parameters:
  V_membrane = -74.031982 millivolt;
  R = 8314 millijoule_per_mole_kelvin;
  T = 306.15 kelvin;
  F = 96487 coulomb_per_mole;
  Cm = 50 nanoF;
  Q_tot has millivolt;
  I has pA_per_nF;
  i_Stim has pA_per_nF;
  stim_offset = 0 second;
  stim_period = 1 second;
  stim_duration = 0.006 second;
  stim_amplitude = -15 pA_per_nF;
  past has second;
  i_Na has picoA;
  E_Na has millivolt;
  P_Na = 0.0018 nanolitre_per_second;
  m = 0.003289 dimensionless;
  m_infinity has dimensionless;
  m_factor has dimensionless;
  tau_m has second;
  V_sodium_current_m_gate has millivolt;
  time_sodium_current_m_gate has second;
  h1 = 0.877202 dimensionless;
  h_infinity has dimensionless;
  h_factor has dimensionless;
  tau_h1 has second;
  V_sodium_current_h1_gate has millivolt;
  time_sodium_current_h1_gate has second;
  h2 = 0.873881 dimensionless;
  tau_h2 has second;
  V_sodium_current_h2_gate has millivolt;
  time_sodium_current_h2_gate has second;
  i_Ca_L has picoA;
  g_Ca_L = 6.75 nanoS;
  E_Ca_app = 60 millivolt;
  f_Ca has dimensionless;
  k_Ca = 0.025 millimolar;
  d_L = 1.4e-5 dimensionless;
  d_L_infinity has dimensionless;
  d_L_factor has dimensionless;
  tau_d_L has second;
  V_L_type_Ca_channel_d_L_gate has millivolt;
  time_L_type_Ca_channel_d_L_gate has second;
  f_L1 = 0.998597 dimensionless;
  f_L_infinity has dimensionless;
  f_L_factor has millivolt;
  tau_f_L1 has second;
  V_L_type_Ca_channel_f_L1_gate has millivolt;
  time_L_type_Ca_channel_f_L1_gate has second;
  f_L2 = 0.998586 dimensionless;
  tau_f_L2 has second;
  V_L_type_Ca_channel_f_L2_gate has millivolt;
  time_L_type_Ca_channel_f_L2_gate has second;
  i_t has picoA;
  E_K has millivolt;
  g_t = 8.25 nanoS;
  r = 0.001089 dimensionless;
  tau_r has second;
  r_infinity has dimensionless;
  V_Ca_independent_transient_outward_K_current_r_gate has millivolt;
  time_Ca_independent_transient_outward_K_current_r_gate has second;
  s = 0.948597 dimensionless;
  tau_s has second;
  s_infinity has dimensionless;
  s_factor has dimensionless;
  V_Ca_independent_transient_outward_K_current_s_gate has millivolt;
  time_Ca_independent_transient_outward_K_current_s_gate has second;
  i_Kur has picoA;
  g_kur = 2.25 nanoS;
  a_ur = 0.000367 dimensionless;
  a_ur_infinity has dimensionless;
  tau_a_ur has second;
  V_ultra_rapid_K_current_aur_gate has millivolt;
  time_ultra_rapid_K_current_aur_gate has second;
  i_ur = 0.96729 dimensionless;
  i_ur_infinity has dimensionless;
  tau_i_ur has second;
  V_ultra_rapid_K_current_iur_gate has millivolt;
  time_ultra_rapid_K_current_iur_gate has second;
  i_K1 has picoA;
  g_K1 = 3.1 nanoS;
  i_Ks has picoA;
  i_Kr has picoA;
  g_Ks = 1 nanoS;
  g_Kr = 0.5 nanoS;
  n = 0.004374 dimensionless;
  tau_n has second;
  n_infinity has dimensionless;
  n_factor has dimensionless;
  V_delayed_rectifier_K_currents_n_gate has millivolt;
  time_delayed_rectifier_K_currents_n_gate has second;
  pa = 5.3e-5 dimensionless;
  tau_pa has second;
  pa_factor has dimensionless;
  p_a_infinity has dimensionless;
  V_delayed_rectifier_K_currents_pa_gate has millivolt;
  time_delayed_rectifier_K_currents_pa_gate has second;
  pip has dimensionless;
  V_delayed_rectifier_K_currents_pi_gate has millivolt;
  time_delayed_rectifier_K_currents_pi_gate has second;
  i_B_Na has picoA;
  i_B_Ca has picoA;
  g_B_Na = 0.060599 nanoS;
  g_B_Ca = 0.078681 nanoS;
  E_Ca has millivolt;
  i_NaK has picoA;
  K_NaK_K = 1 millimolar;
  i_NaK_max = 68.55 picoA;
  pow_K_NaK_Na_15 = 36.4829;
  i_CaP has picoA;
  i_CaP_max = 4 picoA;
  k_CaP = 0.0002 millimolar;
  i_NaCa has picoA;
  K_NaCa = 0.0374842 picoA_per_millimolar_4;
  d_NaCa = 0.0003 per_millimolar_4;
  gamma_Na = 0.45 dimensionless;
  i_KACh has picoA;
  ACh = 1e-24 millimolar;
  Na_i = 8.516766 millimolar;
  Ca_i = 6.5e-5 millimolar;
  K_i = 129.485991 millimolar;
  Ca_d = 7.1e-5 millimolar;
  phi_Na_en = 0 picoA;
  Vol_i = 0.005884 nanolitre;
  Vol_d = 0.00011768 nanolitre;
  i_di has picoA;
  tau_di = 0.01 second;
  O_C = 0.026766 dimensionless;
  O_TC = 0.012922 dimensionless;
  O_TMgC = 0.190369 dimensionless;
  O_TMgMg = 0.714463 dimensionless;
  O = 1.38222 dimensionless;
  J_O_C has per_second;
  J_O_TC has per_second;
  J_O_TMgC has per_second;
  J_O_TMgMg has per_second;
  J_O has per_second;
  Mg_i = 2.5 millimolar;
  Na_c = 130.022096 millimolar;
  Ca_c = 1.815768 millimolar;
  K_c = 5.560224 millimolar;
  Vol_c = 0.000800224 nanolitre;
  tau_Na = 14.3 second;
  tau_K = 10 second;
  tau_Ca = 24.7 second;
  Na_b = 130 millimolar;
  Ca_b = 1.8 millimolar;
  K_b = 5.4 millimolar;
  i_rel has picoA;
  i_up has picoA;
  i_tr has picoA;
  I_up_max = 2800 picoA;
  k_cyca = 0.0003 millimolar;
  k_srca = 0.5 millimolar;
  k_xcs = 0.4 dimensionless;
  alpha_rel = 200000 picoA_per_millimolar;
  Ca_rel = 0.632613 millimolar;
  Ca_up = 0.649195 millimolar;
  Vol_up = 0.0003969 nanolitre;
  Vol_rel = 4.41e-5 nanolitre;
  r_act has per_second;
  r_inact has per_second;
  r_recov = 0.815 per_second;
  r_Ca_d_term has dimensionless;
  r_Ca_i_term has dimensionless;
  r_Ca_d_factor has dimensionless;
  r_Ca_i_factor has dimensionless;
  i_rel_f2 has dimensionless;
  i_rel_factor has dimensionless;
  O_Calse = 0.431547 dimensionless;
  J_O_Calse has per_second;
  F1 = 0.470055 dimensionless;
  F2 = 0.002814 dimensionless;
  tau_tr = 0.01 second;
  k_rel_i = 0.0003 millimolar;
  k_rel_d = 0.003 millimolar;

  // Assignment rules:
  past := floor(time/stim_period)*stim_period;
  i_Stim := piecewise(stim_amplitude, (time - past >= stim_offset) && (time - past <= stim_offset + stim_duration), 0);
  I := (i_Na + i_Ca_L + i_t + i_Kur + i_K1 + i_Kr + i_Ks + i_B_Na + i_B_Ca + i_NaK + i_CaP + i_NaCa + i_KACh)/Cm + i_Stim;
  Q_tot := 0.05*V_membrane;
  i_Na := P_Na*m*m*m*(0.9*h1 + 0.1*h2)*Na_c*V_membrane*F*F/(R*T)*(exp((V_membrane - E_Na)*F/(R*T)) - 1)/(exp(V_membrane*F/(R*T)) - 1);
  E_Na := R*T/F*ln(Na_c/Na_i);
  m_factor := (V_sodium_current_m_gate + 25.57)/28.8;
  m_infinity := 1/(1 + exp((V_sodium_current_m_gate + 27.12)/(-8.21)));
  tau_m := 4.2e-5*exp(-m_factor*m_factor) + 2.4e-5;
  h_infinity := 1/(1 + exp((V_sodium_current_h1_gate + 63.6)/5.3));
  h_factor := 1/(1 + exp((V_sodium_current_h1_gate + 35.1)/3.2));
  tau_h1 := 0.03*h_factor + 0.0003;
  tau_h2 := 0.12*h_factor + 0.003;
  i_Ca_L := g_Ca_L*d_L*(f_Ca*f_L1 + (1 - f_Ca)*f_L2)*(V_membrane - E_Ca_app);
  f_Ca := Ca_d/(Ca_d + k_Ca);
  d_L_infinity := 1/(1 + exp((V_L_type_Ca_channel_d_L_gate + 9)/(-5.8)));
  d_L_factor := (V_L_type_Ca_channel_d_L_gate + 35)/30;
  tau_d_L := 0.0027*exp(-d_L_factor*d_L_factor) + 0.002;
  f_L_infinity := 1/(1 + exp((V_L_type_Ca_channel_f_L1_gate + 27.4)/7.1));
  f_L_factor := V_L_type_Ca_channel_f_L1_gate + 40;
  tau_f_L1 := 0.161*exp(-f_L_factor*f_L_factor/14.4/14.4) + 0.01;
  tau_f_L2 := 1.3323*exp(-f_L_factor*f_L_factor/14.2/14.2) + 0.0626;
  i_t := g_t*r*s*(V_membrane - E_K);
  E_K := R*T/F*ln(K_c/K_i);
  r_infinity := 1/(1 + exp((V_Ca_independent_transient_outward_K_current_r_gate - 1)/(-11)));
  tau_r := 0.0035*exp(-V_Ca_independent_transient_outward_K_current_r_gate*V_Ca_independent_transient_outward_K_current_r_gate/30/30) + 0.0015;
  s_infinity := 1/(1 + exp((V_Ca_independent_transient_outward_K_current_s_gate + 40.5)/11.5));
  s_factor := (V_Ca_independent_transient_outward_K_current_s_gate + 52.45)/15.8827;
  tau_s := 0.025635*exp(-s_factor*s_factor) + 0.01414;
  i_Kur := g_kur*a_ur*i_ur*(V_membrane - E_K);
  a_ur_infinity := 1/(1 + exp(-(V_ultra_rapid_K_current_aur_gate + 6)/8.6));
  tau_a_ur := 0.009/(1 + exp((V_ultra_rapid_K_current_aur_gate + 5)/12)) + 0.0005;
  i_ur_infinity := 1/(1 + exp((V_ultra_rapid_K_current_iur_gate + 7.5)/10));
  tau_i_ur := 0.59/(1 + exp((V_ultra_rapid_K_current_iur_gate + 60)/10)) + 3.05;
  i_K1 := g_K1*(K_c/1)^0.4457*(V_membrane - E_K)/(1 + exp(1.5*(V_membrane - E_K + 3.6)*F/(R*T)));
  i_Ks := g_Ks*n*(V_membrane - E_K);
  i_Kr := g_Kr*pa*pip*(V_membrane - E_K);
  n_infinity := 1/(1 + exp((V_delayed_rectifier_K_currents_n_gate - 19.9)/(-12.7)));
  n_factor := (V_delayed_rectifier_K_currents_n_gate - 20)/20;
  tau_n := 0.7 + 0.4*exp(-n_factor*n_factor);
  p_a_infinity := 1/(1 + exp((V_delayed_rectifier_K_currents_pa_gate + 15)/(-6)));
  pa_factor := (V_delayed_rectifier_K_currents_pa_gate + 20.1376)/22.1996;
  tau_pa := 0.03118 + 0.21718*exp(-pa_factor*pa_factor);
  pip := 1/(1 + exp((V_delayed_rectifier_K_currents_pi_gate + 55)/24));
  i_B_Na := g_B_Na*(V_membrane - E_Na);
  i_B_Ca := g_B_Ca*(V_membrane - E_Ca);
  E_Ca := R*T/(2*F)*ln(Ca_c/Ca_i);
  pow_Na_i_15 := Na_i^1.5;
  i_NaK := i_NaK_max*K_c/(K_c + K_NaK_K)*pow_Na_i_15/(pow_Na_i_15 + pow_K_NaK_Na_15)*(V_membrane + 150)/(V_membrane + 200);
  i_CaP := i_CaP_max*Ca_i/(Ca_i + k_CaP);
  i_NaCa := K_NaCa*(Na_i*Na_i*Na_i*Ca_c*exp(F*V_membrane*gamma_Na/(R*T)) - Na_c*Na_c*Na_c*Ca_i*exp((gamma_Na - 1)*V_membrane*F/(R*T)))/(1 + d_NaCa*(Na_c*Na_c*Na_c*Ca_i + Na_i*Na_i*Na_i*Ca_c));
  i_KACh := 10/(1 + 9.13652*1^0.477811/ACh^0.477811)*(0.0517 + 0.4516/(1 + exp((V_membrane + 59.53)/17.18)))*(V_membrane - E_K)*Cm;
  i_di := (Ca_d - Ca_i)*2*Vol_d*F/tau_di;
  J_O_C := 200000*Ca_i*(1 - O_C) - 476*O_C;
  J_O_TC := 78400*Ca_i*(1 - O_TC) - 392*O_TC;
  J_O_TMgC := 200000*Ca_i*(1 - O_TMgC - O_TMgMg) - 6.6*O_TMgC;
  J_O_TMgMg := 2000*Mg_i*(1 - O_TMgC - O_TMgMg) - 666*O_TMgMg;
  J_O := 0.08*J_O_TC + 0.16*J_O_TMgC + 0.045*J_O_C;
  r_Ca_d_term := Ca_d/(Ca_d + k_rel_d);
  r_Ca_i_term := Ca_i/(Ca_i + k_rel_i);
  r_Ca_d_factor := r_Ca_d_term*r_Ca_d_term*r_Ca_d_term*r_Ca_d_term;
  r_Ca_i_factor := r_Ca_i_term*r_Ca_i_term*r_Ca_i_term*r_Ca_i_term;
  r_act := 203.8*(r_Ca_i_factor + r_Ca_d_factor);
  r_inact := 33.96 + 339.6*r_Ca_i_factor;
  i_rel_f2 := F2/(F2 + 0.25);
  i_rel_factor := i_rel_f2*i_rel_f2;
  i_rel := alpha_rel*i_rel_factor*(Ca_rel - Ca_i);
  i_up := I_up_max*(Ca_i/k_cyca - k_xcs*k_xcs*Ca_up/k_srca)/((Ca_i + k_cyca)/k_cyca + k_xcs*(Ca_up + k_srca)/k_srca);
  i_tr := (Ca_up - Ca_rel)*2*Vol_rel*F/tau_tr;
  J_O_Calse := 480*Ca_rel*(1 - O_Calse) - 400*O_Calse;

  // Rate rules:
  V_membrane' = -I*1000;
  m' = (m_infinity - m)/tau_m;
  h1' = (h_infinity - h1)/tau_h1;
  h2' = (h_infinity - h2)/tau_h2;
  d_L' = (d_L_infinity - d_L)/tau_d_L;
  f_L1' = (f_L_infinity - f_L1)/tau_f_L1;
  f_L2' = (f_L_infinity - f_L2)/tau_f_L2;
  r' = (r_infinity - r)/tau_r;
  s' = (s_infinity - s)/tau_s;
  a_ur' = (a_ur_infinity - a_ur)/tau_a_ur;
  i_ur' = (i_ur_infinity - i_ur)/tau_i_ur;
  n' = (n_infinity - n)/tau_n;
  pa' = (p_a_infinity - pa)/tau_pa;
  K_i' = -(i_t + i_Kur + i_K1 + i_Ks + i_Kr - 2*i_NaK + i_Stim*Cm)/(Vol_i*F);
  Na_i' = -(i_Na + i_B_Na + 3*i_NaCa + 3*i_NaK + phi_Na_en)/(Vol_i*F);
  Ca_i' = -(i_B_Ca + i_CaP + i_up - (i_di + i_rel + 2*i_NaCa))/(2*Vol_i*F) - 1*J_O;
  Ca_d' = -(i_Ca_L + i_di)/(2*Vol_d*F);
  O_C' = J_O_C;
  O_TC' = J_O_TC;
  O_TMgC' = J_O_TMgC;
  O_TMgMg' = J_O_TMgMg;
  O' = J_O;
  Ca_c' = (Ca_b - Ca_c)/tau_Ca + (i_Ca_L + i_B_Ca + i_CaP - 2*i_NaCa)/(2*Vol_c*F);
  K_c' = (K_b - K_c)/tau_K + (i_t + i_Kur + i_K1 + i_Ks + i_Kr - 2*i_NaK)/(Vol_c*F);
  Na_c' = (Na_b - Na_c)/tau_Na + (i_Na + i_B_Na + 3*i_NaCa + 3*i_NaK + phi_Na_en)/(Vol_c*F);
  F1' = r_recov*(1 - F1 - F2) - r_act*F1;
  F2' = r_act*F1 - r_inact*F2;
  O_Calse' = J_O_Calse;
  Ca_up' = (i_up - i_tr)/(2*Vol_up*F);
  Ca_rel' = (i_tr - i_rel)/(2*Vol_rel*F) - 31*J_O_Calse;

  // Unit definitions:
  unit pA_per_nF = 1e-12 ampere / (1e-9 farad);
  unit nanoS_per_nF = 1e-9 siemens / (1e-9 farad);
  unit per_second = 1 / second;
  unit millivolt = 1e-3 volt;
  unit millimolar = 1e-3 mole / litre;
  unit per_millimolar_4 = litre^4 / (1e-3 mole)^4;
  unit picoA_per_millimolar = 1e-12 ampere * litre / (1e-3 mole);
  unit picoA_per_millimolar_4 = 1e-12 ampere * litre^4 / (1e-3 mole)^4;
  unit per_millimolar_second = litre / (1e-3 mole * second);
  unit picoA = 1e-12 ampere;
  unit nanoS = 1e-9 siemens;
  unit nanoF = 1e-9 farad;
  unit nanolitre = 1e-9 litre;
  unit nanolitre_per_second = 1e-9 litre / second;
  unit millijoule_per_mole_kelvin = 1e-3 joule / (mole * kelvin);
  unit coulomb_per_mole = coulomb / mole;
end
