// SBML level 2 version 3

model MacGregor2005_HypothalamicSystems()
  // This a model from the article:
  // Modelling the hypothalamic control of growth hormone secretion.
  // MacGregor DJ, Leng G. J Neuroendocrinol 2005;17(12):788-803 16280026 ,
  // Abstract:
  // Here, we construct a mathematical model of the hypothalamic systems that control the secretion of growth hormone (GH). The work extends a recent model of the pituitary GH system, adding representations of the hypothalamic GH-releasing hormone (GHRH) and somatostatin neurones, each modelled as a single synchronised unit. An unpatterned stochastic input drives the GHRH neurones generating pulses of GHRH release that trigger GH pulses. Delayed feedback from GH results in increased somatostatin release, which inhibits both GH secretion and GHRH release, producing an overall pattern of 3-h pulses of GH secretion that is very similar to the secretory profile observed in male rats. Rather than directly stimulating somatostatin release, GH feedback triggers a priming effect, increasing releasable stores of somatostatin. Varying this priming effect to reduce the effect of GH can reproduce the less pulsatile form of GH release observed in the female rat. The model behaviour is tested by comparison with experimental observations with a range of different experimental protocols involving GHRH injections and somatostatin and GH infusion.
  // This model was taken from the CellML repository and automatically converted to SBML.
  // The original model was: MacGregor DJ, Leng G. (2005) - version02
  // The original CellML model was created by:
  // Lloyd, Catherine, May
  // c.lloyd@aukland.ac.nz
  // The University of Auckland
  // The Bioengineering Institute
  // This model originates from BioModels Database: A Database of Annotated Published Models (http://www.ebi.ac.uk/biomodels/). It is copyright (c) 2005-2011 The BioModels.net Team.
  // To the extent possible under law, all copyright and related or neighbouring rights to this encoded model have been dedicated to the public domain worldwide. Please refer to CC0 Public Domain Dedication for more information.
  // In summary, you are entitled to use this encoded model in absolutely any manner you deem suitable, verbatim, or with modification, alone or embedded it in a larger context, redistribute it, commercially or not, in a restricted way or not..
  // To cite BioModels Database, please use: Li C, Donizelli M, Rodriguez N, Dharuri H, Endler L, Chelliah V, Li L, He E, Henry A, Stefan MI, Snoep JL, Hucka M, Le Novère N, Laibe C (2010) BioModels Database: An enhanced, curated and annotated resource for published quantitative kinetic models. BMC Syst Biol., 4:92.
  // biomodels.db:MODEL9811206584
  // isDescribedBy pubmed:16280026
  // biomodels.db:MODEL9811206584
  // isDescribedBy pubmed:16280026
  // biomodels.db:MODEL9811206584
  // biomodels.db:MODEL9811206584

  // Compartments:
  compartment Compartment = 1 litre;

  // Parameters:
  r = 0 nanomolar;
  Ir has flux;
  k6 = 5 first_order_rate_constant;
  s = 0 nanomolar;
  f = 0.3 dimensionless;
  k1 = 0.1 second_order_rate_constant;
  k2 = 0.002 first_order_rate_constant;
  k3 = 0.018 first_order_rate_constant;
  phi_b_s has dimensionless;
  sb = 0.029 dimensionless;
  delta_b = 0.3 dimensionless;
  h = 0 nanomolar;
  k4 = 9 first_order_rate_constant;
  k5 = 71 first_order_rate_constant;
  phi_r_s has dimensionless;
  sr = -0.56 dimensionless;
  delta_r = 0.3 dimensionless;
  j1 = 10 dimensionless;
  k7 = 5 first_order_rate_constant;
  Is has flux;
  k8 = 0.07 first_order_rate_constant;
  c = 0.01 nanomolar;

  // Assignment rules:
  Ir := piecewise(0, (time >= 0) && (time <= 90), 10, (time >= 91) && (time <= 92), 0, (time >= 93) && (time <= 113), 10, (time >= 114) && (time <= 115), 0, (time >= 116) && (time <= 136), 10, (time >= 137) && (time <= 138), 0, (time >= 139) && (time <= 159), 10, (time >= 160) && (time <= 161), 0, (time >= 162) && (time <= 252), 10, (time >= 253) && (time <= 254), 0, (time >= 255) && (time <= 275), 10, (time >= 276) && (time <= 277), 0, (time >= 278) && (time <= 298), 10, (time >= 299) && (time <= 300), 0, (time >= 301) && (time <= 321), 10, (time >= 322) && (time <= 323), 0);
  phi_b_s := 1/(1 + exp(-(log10(1*s) - sb)/delta_b));
  phi_r_s := 1/(1 + exp(-(log10(1*s) - sr)/delta_r));
  Is := piecewise(10, (time > 0) && (time <= 90), 0, (time > 90) && (time <= 180), 10, (time > 180) && (time <= 270), 0, (time > 270) && (time <= 360), 0);

  // Rate rules:
  r' = Ir - k6*r;
  s' = Is - k7*s;
  f' = -(k1*(r + c)*f) + (k2 + k3*phi_b_s)*(1 - f);
  h' = j1*((k4 + k5*(1 - phi_r_s))*(r + c)*f - k8*h);

  // Unit definitions:
  unit nanomolar = 1e-9 mole / litre;
  unit minute = 60 second;
  unit first_order_rate_constant = 1 / (60 second);
  unit second_order_rate_constant = litre / (1e-9 mole * 60 second);
  unit flux = 1e-9 mole / (litre * 60 second);
  unit per_nanomolar = litre / (1e-9 mole);
  unit time = 60 second;
end
